# Zement

Dataset: ILCD process, EPD, average dataset
Geography: AT
Reference year: 2020
Valid until: 2025
Classification: OEKOBAU.DAT: Mineralische Baustoffe / Bindemittel / Zement
Classification: IBUCategories: 01 Grundstoffe und Vorprodukte / Zement, Baukalk und andere Bindemittel / Zement
Method details: Zement.pdf
Generated by: VDZ gGmbH
Registration number: EPD-VOZ-20200025-IAG1-DE
Owner: Vereinigung der Österreichischen Zementindustrie (VÖZ)
Compliance: DIN EN 15804+A2; ISO 14025
Review: Accredited third party review by Institut Bauen und Umwelt e. V.
Amounts: rows without a unit in brackets have none in this file; such an amount is in the reference unit of its flow, which a separate flow dataset defines
copyright: true
licenseType: Free of charge for all users and uses
accessRestrictions: None

## General comment
Zement ist ein hydraulisch erhärtender Baustoff. Er besteht aus einem Gemisch feingemahlener, nichtmetallisch-anorganischer Bestandteile. Zement kann durch gemeinsames Vermahlen des bis zur Sinterung gebrannten Zementklinkers mit anderen Haupt- und Nebenbestandteilen oder durch Mischen getrennt feingemahlener Haupt- und Nebenbestand-teile hergestellt werden. Nach Zugabe von Wasser entsteht eine Suspension (Zementleim), die aufgrund einsetzender Hydratationsreaktionen sowohl an der Luft als auch unter Wasser erstarrt und erhärtet sowie dauerhaft fest bleibt. Das deklarierte Produkt ist ein Zement mit einer Zusammensetzung, die der durchschnittlichen Zusammensetzung der in Österreich im Jahr 2017 produzierten Zemente entspricht. Die in der Durchschnittbildung betrachteten Zemente sind fast ausschließlich den Hauptzement-arten CEM I, CEM II und CEM III nach ÖNORM EN 197-1 zuzuordnen (Anteil an sonstigen Zementen <0,5%).

## Technology and included processes
Die wichtigsten Zementrohstoffe Kalkstein, Ton und ihr natürliches Gemisch, der Kalksteinmergel, werden in Steinbrüchen hauptsächlich durch Sprengen gewonnen. Ton lässt sich mit Eimerketten-, Schaufelrad- oder Schürfkübelbaggern unmittelbar von der Bruchwand abtragen. Fahrzeuge befördern das grobstückige Rohmaterial zu Hammerbrechern, in denen es zu Schotter gebrochen wird. Der Schotter kann dann z. B. auf Bandförderern vom Bruch in das Zementwerk transportiert werden. Die Rohmaterialkomponenten werden über Dosiereinrichtungen einer Mühle in vorbestimmten Mischungsverhältnissen aufgegeben und zu Rohmehl feingemahlen. Zementklinker wird in Österreich ausschließlich nach dem Trockenverfahren in Drehrohröfen mit Zyklonvorwärmern hergestellt. Im Vorwärmer wird das Rohmehl von den Abgasen aus dem Drehofen auf über 800 °C erhitzt. Das aus der unteren Zyklonstufe des Vorwärmers austretende Material gelangt in den unter 3 - 4° geneigten Drehofen, in dem das Brenngut vom Ofeneinlauf in Richtung des am Ofenauslauf installierten Brenners bewegt wird. In der so genannten Sinterzone erreicht das Brenngut Temperaturen von etwa 1450 °C. An den Ofenauslauf schließt sich ein Klinkerkühler an. Nach dem Brennen und Kühlen wird der Klinker in Silos oder geschlossenen Hallen gelagert, um Emissionen von Klinkerstaub möglichst zu vermeiden. Zur Herstellung von Zement wird der Klinker allein oder mit weiteren Hauptbestandteilen getrennt oder gemeinsam feingemahlen. Dabei wird dem Mahlgut zur Regelung des Erstarrens ein Sulfatträger zugesetzt. Dazu verwendet man Gips oder Anhydrit aus natürlichen Vorkommen oder aus Rauchgasentschwefelungsanlagen. Der fertige Zement wird meist in Silos gelagert, aus denen der Zement als Sack- oder als Siloware zum Versand kommt. Zur Sicherung der Zementqualität sind heute in allen österreichischen Zementwerken Qualitätssicherungssysteme installiert, die sich an den Anforderungen an die werkseigene Produktionskontrolle in ÖNORM EN 197-2 bzw. der Norm für Qualitätsmanagementsysteme ÖNORM EN ISO 9001 orientieren. Neben den konkreten Vorgaben zur Prozesssteuerung sowie zur Überwachung der Zwischen- und Endprodukte umfassen QM-Systeme nach ÖNORM EN ISO 9001 auch Maßnahmen zur Verbesserung der Organisationsstruktur und der Produktionsabläufe insgesamt.
Technische Daten:
Leistungserklärung des Produkts entspechend der Leistungserklärung in Bezug auf dessen wesentliche Merkmale gemäß ÖNORM EN 197-1:2011. Die in Österreich hergestellten Zemente haben Normdruckfestigkeiten entsprechend der Klassen 32,5, 42,5 oder 52,5 nach ÖNORM EN 197-1:2011.
Deklarierte Einheit:
Die deklarierte Einheit ist 1 t.

## Technical purpose
Zement wird hauptsächlich als Bindemittel für Beton und Mörtel verwendet.

## Reference product
- Zement (): 1000

## Inputs
- Erneuerbare Primärenergie als Energieträger (PERE) [MJ]: A1-A3 338
- Erneuerbare Primärenergie zur stofflichen Nutzung (PERM) [MJ]: A1-A3 0
- Total erneuerbare Primärenergie (PERT) [MJ]: A1-A3 338
- Nicht-erneuerbare Primärenergie als Energieträger (PENRE) [MJ]: A1-A3 1620
- Nicht-erneuerbare Primärenergie zur stofflichen Nutzung (PENRM) [MJ]: A1-A3 0
- Total nicht erneuerbare Primärenergie (PENRT) [MJ]: A1-A3 1620
- Einsatz von Sekundärstoffen (SM) [kg]: A1-A3 121
- Erneuerbare Sekundärbrennstoffe (RSF) [MJ]: A1-A3 577.8
- Nicht erneuerbare Sekundärbrennstoffe (NRSF) [MJ]: A1-A3 1601.4
- Einsatz von Süßwasserressourcen (FW) [m^3]: A1-A3 0.2

## Outputs
- Gefährlicher Abfall zur Deponie (HWD) [kg]
- Entsorgter nicht gefährlicher Abfall (NHWD) [kg]
- Entsorgter radioaktiver Abfall (RWD) [kg]
- Komponenten für die Wiederverwendung (CRU) [kg]: A1-A3 0
- Stoffe zum Recycling (MFR) [kg]: A1-A3 0
- Stoffe für die Energierückgewinnung (MER) [kg]: A1-A3 0
- Exportierte elektrische Energie (EEE) [MJ]: A1-A3 0
- Exportierte thermische Energie (EET) [MJ]: A1-A3 0

## Impact indicators
- Globales Erwärmungspotenzial total (GWP-total) [kg CO_(2)-Äq.]: A1-A3 493
- Globales Erwärmungspotenzial fossil (GWP-fossil) [kg CO_(2)-Äq.]: A1-A3 493
- Globales Erwärmungspotenzial biogen (GWP-biogenic) [kg CO_(2)-Äq.]: A1-A3 0.29
- Globales Erwärmungspotenzial luluc (GWP-luluc) [kg CO_(2)-Äq.]: A1-A3 0.05
- Abbau Potential der stratosphärischen Ozonschicht (ODP) [kg CFC11-Äq.]: A1-A3 5.78e-6
- Versauerungspotenzial von Boden und Wasser (AP) [mol H^(+)-Äq.]: A1-A3 0.833
- Eutrophierungspotenzial Süßwasser (EP-freshwater) [kg PO_(4)-Äq.]: A1-A3 0.111
- Eutrophierungspotenzial Salzwasser (EP-marine) [kg N-Äq.]: A1-A3 0.273
- Eutrophierungspotenzial Land (EP-terrestrial) [mol N-Äq.]: A1-A3 3.39
- Bildungspotential für troposphärisches Ozon (POCP) [kg NMVOC-Äq.]: A1-A3 0.782
- Potenzial für den abiotischen Abbau nicht fossiler Ressourcen (ADPE) [kg Sb-Äq.]: A1-A3 5.47e-5
- Potenzial für den abiotischen Abbau fossiler Brennstoffe (ADPF) [MJ]: A1-A3 1620
- Wassernutzung (WDP) [m^(3) Welt-Äq. entzogen]: A1-A3 41
- Auftreten von Krankheiten aufgrund von Feinstaubemissionen (PM) [Krankheitsfälle]: A1-A3 7.4e-6
- Wirkung durch Exposition des Menschen mit U235 (IR) [kBq U235-Äq.]: A1-A3 11.4
- Toxizitätsvergleichseinheit für Ökosysteme (ETP-fw) [CTUe]
- Toxizitätsvergleichseinheit für Menschen (krebserregend) (HTP-c) [CTUh]
- Toxizitätsvergleichseinheit für Menschen (nicht krebserregend) (HTP-nc) [CTUh]
- Bodenqualitätsindex (SQP) [SQP]

## Use advice
Gültigkeitsbereich:
Die vorliegende Umweltproduktdeklaration bildet die Ökobilanz der Herstellung eines Zements mit einer durchschnittlichen Zusammensetzung in Österreich im Jahr 2017 hergestellter Zemente ab. Die Ökobilanz, die der EPD zugrunde liegt, beruht auf Daten aller 9 österreichischen Zementwerke mit Ofenbetrieb. Da 100 % der Zementproduktion Österreichs erfasst wurden, ist die in der Ökobilanz abgebildete Technologie repräsentativ für die Zementherstellung in Österreich.
Systemgrenze:
Typ der EPD: Wiege-bis-Werkstor. Die gewählten Systemgrenzen umfassen die Herstellung des Zements einschließlich der Rohstoffgewinnung bis zum fertigen Produkt am Werkstor.

Das Produktstadium umfasst:

Modul A1: Gewinnung und Aufbereitung von Rohstoffen.

Modul A2: Transport der Rohstoffe zum Werkstor und interne Transporte.

Modul A3: Zementherstellung.

Das Baustadium, das Nutzungsstadium und das Entsorgungsstadium werden in der Ökobilanz für Zement im Einklang mit der Norm EN 15804 nicht berücksichtigt.

## Data sources
- ecoinvent database (all versions)
- ecoinvent 3.4 database
