# Pflanzenölkraftstoff (Raps, 1 kg)

Dataset: ILCD process, EPD, generic dataset
Geography: DE
Reference year: 2021
Valid until: 2022
Classification: oekobau.dat: Sonstige / Energieträger - Bereitstellung frei Verbraucher / Pflanzenölkraftstoff
Owner: Sphera Solutions GmbH
Compliance: EN 15804+A2
Review: Dependent internal review by Sphera Solutions GmbH; Independent external review by GaBi user forum
Amounts: rows without a unit in brackets have none in this file; such an amount is in the reference unit of its flow, which a separate flow dataset defines
copyright: true
licenseType: Free of charge for all users and uses
accessRestrictions: The license conditions as stated on https://www.oekobaudat.de/ apply.
accessRestrictions: Es gelten die Lizenzbedingungen wie sie auf https://www.oekobaudat.de/ genannt sind.

## General comment
Dieser Datensatz wurde nach dem European Standard EN 15804+A2 für Nachhaltiges Bauen modelliert. Ergebnisse werden in Modulen abgebildet, die den strukturierten Ausdruck von Ergebnissen über den gesamten Lebenszyklus zulassen.

## Geography
Der Datensatz bildet die länderspezifische Situation in Deutschland ab. Dabei werden Haupttechnologien, spezifische regionale Charakteristiken und ggf. Importstatistiken berücksichtigt.

## Time period
Jährlicher Durchschnitt

## Technology and included processes
Durch die sogenannte Umesterung werden die physikalischen Eigenschaften von Rapsöl an die Anforderungen des Dieselmotors angepasst.
Dabei wird durch Zugabe von Methanol zum raffinierten Rapsöl Triglycerid durch Methanol ersetzt. Bei der kontinuierlichen Verarbeitung wird das resultierende Glycerin allmählich vom RME (Rapsölfettsäuremethylester = Pflanzenölkraftstoff) abgetrennt und spezifisch verarbeitet.

## Technical purpose
Rapsmethylester kann an Stelle von Diesel oder Heizöl als Energieträger verwendet werden.

## Safety margin
10 %. Produktsystem weitgehend vollständig abgebildet. Gute technologische, zeitliche und geographische Repräsentativität.

## Reference product
- Pflanzenölkraftstoff (Raps, 1 kg): 1

## Inputs
- Erneuerbare Primärenergie als Energieträger (PERE) [MJ]: B6 45.8556
- Erneuerbare Primärenergie zur stofflichen Nutzung (PERM) [MJ]: B6 0
- Total erneuerbare Primärenergie (PERT) [MJ]: B6 45.8556
- Nicht-erneuerbare Primärenergie als Energieträger (PENRE) [MJ]: B6 16.4078
- Nicht-erneuerbare Primärenergie zur stofflichen Nutzung (PENRM) [MJ]: B6 0
- Total nicht-erneuerbare Primärenergie (PENRT) [MJ]: B6 16.4078
- Einsatz von Sekundärstoffen (SM) [kg]: B6 0
- Erneuerbare Sekundärbrennstoffe (SF) [MJ]: B6 0
- Nicht erneuerbare Sekundärbrennstoffe (NRSF) [MJ]: B6 0
- Nettoeinsatz von Süßwasserressourcen (FW) [m3]: B6 0.0237472

## Outputs
- Gefährlicher Abfall zur Deponie (HWD) [kg]: B6 2.2929e-9
- Entsorgter nicht gefährlicher Abfall (NHWD) [kg]: B6 0.166826
- Entsorgter radioaktiver Abfall (RWD) [kg]: B6 0.000121367
- Komponenten für die Wiederverwendung (CRU) [kg]: B6 0
- Stoffe zum Recycling (MFR) [kg]: B6 0
- Stoffe für die Energierückgewinnung (MER) [kg]: B6 0
- Exportierte elektrische Energie (EEE) [MJ]: B6 0
- Exportierte thermische Energie (EET) [MJ]: B6 0

## Impact indicators
- Globales Erwärmungspotenzial - total (GWP-total) [kg CO2 eq.]: B6 -1.24475
- Globales Erwärmungspotenzial - fossil (GWP-fossil) [kg CO2 eq.]: B6 1.42696
- Globales Erwärmungspotenzial - biogen (GWP-biogenic) [kg CO2 eq.]: B6 -2.69521
- Globales Erwärmungspotenzial - luluc (GWP-luluc) [kg CO2 eq.]: B6 0.0235018
- Abbaupotenzial der stratosphärischen Ozonschicht (ODP) [kg CFC-11 eq.]: B6 2.40206e-15
- Versauerungspotenzial, kumulierte Überschreitung (AP) [Mole of H+ eq.]: B6 0.0311444
- Eutrophierungspotenzial - Süßwasser (EP-freshwater) [kg P eq.]: B6 0.000433817
- Eutrophierungspotenzial - Salzwasser (EP-marine) [kg N eq.]: B6 0.0101203
- Eutrophierungspotenzial - Land (EP-terrestrial) [Mole of N eq.]: B6 0.137445
- Bildungspotenzial für troposphärisches Ozon (POCP) [kg NMVOC eq.]: B6 0.00381986
- Potenzial für die Verknappung abiotischer Ressourcen nicht fossile Ressourcen (ADPE) [kg Sb eq.]: B6 4.46492e-6
- Potenzial für die Verknappung abiotischer Ressourcen fossile Brennstoffe (ADPF) [MJ]: B6 16.1967
- Wasser-Entzugspotenzial (Benutzer) (WDP) [m³ world equiv.]: B6 0.0591498

## Use advice
Dieser Datensatz bezieht sich auf die Herstellung von 1 kg Pflanzenölkraftstoff auf Basis von Rapsöl (Rapsmethylester). Der untere Heizwert beträgt 37 MJ/kg.

## Data sources
- Documentation of data quality management
- GaBi Database Edition 2021, CUP2021.01
- GaBi database (all versions)
