# Automatische Drehflügeltürantriebe ED 100 und ED 250

Dataset: ILCD process, EPD, specific dataset
Geography: DE
Reference year: 2016
Valid until: 2021
Classification: OEKOBAU.DAT: Komponenten von Fenstern und Vorhangfassaden / Antriebssysteme / elektrisch
Classification: IBUCategories: 02 Bauprodukte / Türen, Fenster, Beschläge und Zubehör / Antriebssysteme für Automatiktüren und -tore
Method details: Antriebssysteme für Automatiktüren und -tore.pdf
Owner: DORMA Deutschland GmbH
Compliance: DIN EN 15804; ISO 14025
Review: Accredited third party review by IBU
Amounts: rows without a unit in brackets have none in this file; such an amount is in the reference unit of its flow, which a separate flow dataset defines
copyright: true

## General comment
Die automatischen Drehflügeltürantriebe von DORMA sind elektromechanische Drehflügeltür-antriebe, die für ein- oder zweiflügelige Drehflügel-türen konzipiert worden sind. Je nach Türflügel-breite und Gewicht wird der ED 100 oder der ED 250 benötigt. Beide Antriebe können drückend mit einem Normalgestänge und ziehend mit einer Gleitschiene montiert werden. Für zweiflügelige Antriebe steht neben der verlängerten Verkleidung eine integrierte Schließfolgeregelung zur Verfügung, die leicht eingebaut werden kann. Durch Einsatz der DORMA Upgrade Card kann der Funktionsumfang an viele Türsituationen angepasst werden.

• Flexible Konfiguration nur der Funktionen, die auch tatsächlich benötigt werden.
• Kostengünstiger Transport und leichte Montage durch reduziertes Gewicht.
• Geräuscharm in der Anwendung durch Mehrstufengetriebe.
• Elegante Optik: DORMA Contur Design mit nur 70 mm Antriebshöhe.

Der Unterschied zwischen den beiden Varianten ED100 und ED250 macht insbesondere die Antriebseinheit der Drehflügeltürantriebe aus. Daher wurde der ED 250 bilanztechnisch berücksichtigt (Maximalausprägung eines Drehflügeltürantriebs). Nur die Durchschnittsbildung für den Energieverbrauch in der Nutzungsphase folgt dem arithmetischen Mittel. Die LCA-Ergebnisse werden anhand dieser konservativen Umsetzung als Durchschnitt für beide Drehflügeltürantriebe (ED100 / 250) ausgewiesen.

## Technology and included processes
Die automatischen Drehflügeltürantriebe von DORMA sind elektromechanische Drehflügeltür-antriebe, die für ein- oder zweiflügelige Drehflügel-türen konzipiert worden sind. Je nach Türflügel-breite und Gewicht wird der ED 100 oder der ED 250 benötigt. Beide Antriebe können drückend mit einem Normalgestänge und ziehend mit einer Gleitschiene montiert werden. Für zweiflügelige Antriebe steht neben der verlängerten Verkleidung eine integrierte Schließfolgeregelung zur Verfügung, die leicht eingebaut werden kann. Durch Einsatz der DORMA Upgrade Card kann der Funktionsumfang an viele Türsituationen angepasst werden. • Flexible Konfiguration nur der Funktionen, die auch tatsächlich benötigt werden. • Kostengünstiger Transport und leichte Montage durch reduziertes Gewicht. • Geräuscharm in der Anwendung durch Mehrstufengetriebe. • Elegante Optik: DORMA Contur Design mit nur 70 mm Antriebshöhe. Der Unterschied zwischen den beiden Varianten ED100 und ED250 macht insbesondere die Antriebseinheit der Drehflügeltürantriebe aus. Daher wurde der ED 250 bilanztechnisch berücksichtigt (Maximalausprägung eines Drehflügeltürantriebs). Nur die Durchschnittsbildung für den Energieverbrauch in der Nutzungsphase folgt dem arithmetischen Mittel. Die LCA-Ergebnisse werden anhand dieser konservativen Umsetzung als Durchschnitt für beide Drehflügeltürantriebe (ED100 / 250) ausgewiesen. Die Drehflügeltürantriebe ED 100 und ED 250 bestehen jeweils aus einem Drehflügeltürantrieb, einem Gleitschienen Set und einer Verkleidung aus hochwertigem Aluminium. Die Einzelkomponenten aus Stählen und NE-Metallen werden größtenteils im Werk Ennepetal hergestellt. Die elektronischen Bauteile werden selbst gefertigt (u. a. Leiterplatinen) wie auch extern (u. a. Getriebemotor) zugekauft. In der Montage werden Drehflügeltürantrieb, Gleitschienen-Set und Verkleidung gesondert voneinander montiert, verpackt und eingelagert. Das zertifizierte Qualitätsmanagementsystem nach /DIN EN ISO 9001/ sichert den hohen Qualitätsstandard der DORMA Produkte für alle Standorte ab.
Deklarierte Einheit:
Die deklarierte Einheit ist der Durchschnitt für
ein (1) Stück der automatischen Drehflügeltürantriebe ED 100 und ED 250 inkl. ED Gleitschienenset, ED Verkleidung BASIC und Verpackungsmaterialien. Zur Durchschnittsbildung wurde das arithmetische Mittel genutzt.

## Technical purpose
Die Drehflügeltürantriebe von DORMA sind für viele Anwendungsbereiche geeignet:

• Für ein- oder zweiflügelige Drehflügeltüren.
• Montage an Rauch- und Feuerschutztüren in den Varianten ziehend mit Gleitschiene und drückend mit Normalgestänge.
• Automatisierung sowohl mit niedriger Begehungsfrequenz in der Betriebsart Low-Energy (Niedrigenergieantrieb) als auch an stark frequentierten Türen in der Betriebsart Full-Energy.
• Hohes Drehmoment für vollautomatisierte Drehflügeltüren, die mit Radarmeldern angesteuert werden.
• Für Innen- und Außentüren geeignet.

## Reference product
- ED 100 und ED 250: 1

## Inputs
- Erneuerbare Primärenergie als Energieträger (PERE) [MJ]: A1-A3 334, A4 0.417, A5 0.075, B6 1480, C2 0.0211, C3 1.35, D -212
- Erneuerbare Primärenergie zur stofflichen Nutzung (PERM) [MJ]: A1-A3 12.2, A4 4.4e-13, A5 2.46e-12, B6 4.14e-8, C2 1.99e-14, C3 1.32e-6, D -7.73
- Total erneuerbare Primärenergie (PERT) [MJ]: A1-A3 346, A4 0.417, A5 0.075, B6 1480, C2 0.0211, C3 1.35, D -220
- Nicht-erneuerbare Primärenergie als Energieträger (PENRE) [MJ]: A1-A3 1120, A4 8.51, A5 0.783, B6 7020, C2 0.377, C3 39.5, D -664
- Nicht-erneuerbare Primärenergie zur stofflichen Nutzung (PENRM) [MJ]: A1-A3 7.1, A4 0, A5 0, B6 0, C2 0, C3 5.52e-11, D -4.2
- Total nicht erneuerbare Primärenergie (PENRT) [MJ]: A1-A3 1130, A4 8.51, A5 0.783, B6 7020, C2 0.377, C3 39.5, D -669
- Einsatz von Sekundärstoffen (SM) [kg]: A1-A3 6.31, A4 0, A5 0, B6 0, C2 0, C3 0, D 0
- Erneuerbare Sekundärbrennstoffe (RSF) [MJ]: A1-A3 0, A4 5.6e-5, A5 2.84e-5, B6 0.0926, C2 2.5e-6, C3 0.000594, D 0
- Nicht erneuerbare Sekundärbrennstoffe (NRSF) [MJ]: A1-A3 0, A4 0.000587, A5 0.000131, B6 0.967, C2 2.62e-5, C3 0.00456, D 0
- Einsatz von Süßwasserressourcen (FW) [m^3]: A1-A3 464, A4 0.0359, A5 0.0697, B6 1330, C2 0.00169, C3 1.86, D -539

## Outputs
- Gefährlicher Abfall zur Deponie (HWD) [kg]: A1-A3 0.902, A4 0, A5 0, B6 0, C2 0, C3 0, D -0.00579
- Entsorgter nicht gefährlicher Abfall (NHWD) [kg]: A1-A3 221, A4 0.0305, A5 0.158, B6 1630, C2 0.00142, C3 2.63, D -77.2
- Entsorgter radioaktiver Abfall (RWD) [kg]: A1-A3 0.0582, A4 1.15e-5, A5 4.75e-5, B6 1.05, C2 5.15e-7, C3 0.00126, D -0.0324
- Komponenten für die Wiederverwendung (CRU) [kg]: A1-A3 0, A4 0, A5 0, B6 0, C2 0, C3 0, D 0
- Stoffe zum Recycling (MFR) [kg]: A1-A3 0.347, A4 0, A5 0, B6 0, C2 0, C3 0, D 9.37
- Stoffe für die Energierückgewinnung (MER) [kg]: A1-A3 0, A4 0, A5 1.72, B6 0, C2 0, C3 0, D 1.02
- Exportierte elektrische Energie (EEE) [MJ]: A1-A3 0, A4 0, A5 9.38, B6 0, C2 0, C3 0, D 23.7
- Exportierte thermische Energie (EET) [MJ]: A1-A3 0, A4 0, A5 25.9, B6 0, C2 0, C3 0, D 62

## Impact indicators
- Globales Erwärmungspotenzial (GWP) [kg CO_(2)-Äq.]: A1-A3 63.3, A4 0.628, A5 2.55, B6 394, C2 0.0274, C3 4.29, D -52.5
- Abbau Potential der stratosphärischen Ozonschicht (ODP) [kg CFC11-Äq.]: A1-A3 1.87e-6, A4 2.54e-12, A5 1.21e-11, B6 2.93e-7, C2 1.12e-13, C3 3.22e-8, D -1.16e-6
- Versauerungspotenzial von Boden und Wasser (AP) [kg SO_(2)-Äq.]: A1-A3 0.426, A4 0.00612, A5 0.00054, B6 1.98, C2 0.000174, C3 0.00635, D -0.29
- Eutrophierungspotenzial (EP) [kg PO_(4)^(3)-Äq.]: A1-A3 0.146, A4 0.00116, A5 9.49e-5, B6 0.108, C2 4.46e-5, C3 0.000875, D -0.0158
- Bildungspotential für troposphärisches Ozon (POCP) [kg Ethen-Äq.]: A1-A3 0.0804, A4 -0.00128, A5 3.92e-5, B6 0.115, C2 -7.15e-5, C3 0.000557, D -0.0183
- Potenzial für den abiotischen Abbau nicht fossiler Ressourcen (ADPE) [kg Sb-Äq.]: A1-A3 0.00949, A4 2.34e-8, A5 4.27e-8, B6 6.24e-5, C2 1.07e-9, C3 3.27e-6, D -0.000515
- Potenzial für den abiotischen Abbau fossiler Brennstoffe (ADPF) [MJ]: A1-A3 946, A4 8.49, A5 0.664, B6 4390, C2 0.376, C3 36.5, D -586

## Use advice
Gültigkeitsbereich:
Die vorliegende EPD bezieht sich auf den berechneten Durchschnitt der DORMA Drehflügeltürantriebe ED 100 und ED 250. Die Abweichungen der Einzelprodukte zum berechneten Durchschnitt liegen signifikant unter 10%. Produktionsstandort beider Produkte ist der DORMA Standort Werk Ennepetal, Deutschland. Die Stoff- und Energieströme wurden entsprechend berücksichtigt.
Systemgrenze:
Typ der EPD: Wiege bis Werkstor mit Optionen (cradle to gate with options).

Module A1-3, A4 und A5

Das Produktstadium beginnt mit der Berücksichtigung der Produktion der notwendigen Rohstoffe inklusive aller entsprechenden Vorketten sowie der notwendigen Beschaffungstransporte. Daneben wurden ebenfalls die Distributionstransporte und die Installation auf der Baustelle berücksichtigt.

Modul B6

Der durchschnittliche Energieverbrauch für die beiden automatischen Drehflügeltürantriebe ED 100 und ED 250 wird in der Betriebsart Full-Energy anhand des arithmetischen Mittels dargestellt.

Module C2-3

Die Module beinhalten die Umweltwirkungen für die Abfallbehandlung am Ende des Produktlebenswegs und die zugehörigen Transporte.

Modul D

Die aus der Abfallbehandlung resultierenden Wertströme, die wiederum potenziell als energetischen (MVA-Route) oder werkstofflichen Input (Recycling) für ein nachgelagertes Produktsystem dienen, werden hier ausgewiesen.

## Data sources
- Automatische Drehflügeltürantriebe ED 100 und ED 250.pdf
- GaBi Database (all versions)
- GaBi database SP28 2015
