# Rohre für Strom-Wärmepumpe (Wasser-Wasser) 10 kW

Dataset: ILCD process, EPD, generic dataset
Geography: DE
Reference year: 2021
Valid until: 2022
Classification: oekobau.dat: Gebäudetechnik / Heizung / Wärmeerzeuger
Owner: Sphera Solutions GmbH
Compliance: EN 15804+A2
Review: Dependent internal review by Sphera Solutions GmbH; Independent external review by GaBi user forum
Amounts: rows without a unit in brackets have none in this file; such an amount is in the reference unit of its flow, which a separate flow dataset defines
copyright: true
licenseType: Free of charge for all users and uses
accessRestrictions: The license conditions as stated on https://www.oekobaudat.de/ apply.
accessRestrictions: Es gelten die Lizenzbedingungen wie sie auf https://www.oekobaudat.de/ genannt sind.

## General comment
Dieser Datensatz wurde nach dem European Standard EN 15804+A2 für Nachhaltiges Bauen modelliert. Ergebnisse werden in Modulen abgebildet, die den strukturierten Ausdruck von Ergebnissen über den gesamten Lebenszyklus zulassen.

## Geography
Der Datensatz bildet die länderspezifische Situation in Deutschland ab. Dabei werden Haupttechnologien, spezifische regionale Charakteristiken und ggf. Importstatistiken berücksichtigt.

## Time period
Jährlicher Durchschnitt

## Technology and included processes
Die dargestellten Rohrleitungen (Sonde, Erdkollektor oder Brunnen und Zuleitung) sind hier abgebildet. Dabei sind die Teile, die von der Leistung der Wärmepumpe abhängen entsprechend skaliert. Diese Skalierung erfolgt linear in Abhängigkeit der bereitzustellenden Leistung. Die Rohrleitungen unterteilen sich hierbei in Zuleitungsrohr und Erdkollektorrohr, bzw. Sondenleitung oder Brunnenleitung. Die Rohrlänge wird bei steigender bereitzustellender Leistung stufenweise erhöht, indem weitere Erdsonden, bzw. Kollektorkreise zugeschaltet werden. Der zusätzliche Materialaufwand wird dabei mittels typischer Rohrdurchmesser und Wandstärken als zusätzlicher Materialeinsatz linear entsprechend der bereitzustellenden Leistung skaliert. Für die Wärmepumpe kann nach VDI Richtlinie 2067 von einer 20- jährigen durchschnittlichen Lebensdauer ausgegangen werden.
Die Rohre verbleiben nach der Nutzungsdauer der Wärmepumpe im Boden, deswegen wird hier kein Recyclingpotential betrachtet.
Hintergrundsystem:
Strom: Die Stromerzeugung wird entsprechend der länderspezifischen Randbedingungen modelliert. Die landesspezifische Analyse beinhaltet:
1.: Spezifische Kraftwerke der verschiedenen fossilen Energieträger und der Einsatz erneuerbarer Energien sind entsprechend der länderspezifischen Energieträgermixe modelliert. Die Analyse bezieht Stromimporte aus den Nachbarländern, Transmissions-und Verteilungsverluste und den Eigenverbrauch im Kraftwerk und bei der Verteilung bzw. Speicherung, z. B. durch Pumpspeicherwerke, ein.
2.: Die landes-/regionalspezifischen Technologiestandards sowie die Erzeugung in Elektrizitätskraftwerken und/oder in speziellen Kraftwerken mit Kraft-Wärme-Kopplung (KWK) sind berücksichtigt.
3.: Die länderspezifische Energieträgerbereitstellung (mit Anteil der Importe und/oder Eigenversorgung) einschließlich der Energieträger-Eigenschaften (z. B. Elementar- und Energiegehalte) werden berücksichtigt.
4.: Die Förderung, Produktion, Verarbeitung und Transportprozesse werden entsprechend der Situation im jeweiligen Stromerzeugerland modelliert. Die unterschiedlichen Produktions- und Verarbeitungsverfahren (Emissionen und Wirkungsgrade) in den verschiedenen Energieerzeugerländern werden einbezogen, z. B. Rohöl-Veredelungsverfahren oder Abfackel-Raten an den Ölplattformen.
Thermische Energie, Prozessdampf: Die Erzeugung von Dampf und thermischer Energie in Heizkraftwerken wird entsprechend der landesspezifischen Situation (Emissionsgrenzwerte, Energieträgerbasis) modelliert.
Der Wirkungsgrad für die thermische Energieerzeugung beträgt per Definition 100% des Energieträgereinsatzes. Für Prozessdampf liegt der Wirkungsgrad im Bereich von 85-95%. Die zur Heizenergie-Erzeugung verwendeten Energieträger werden entsprechend der nationalen Situation modelliert (siehe Kapitel Strom oben).
Transporte: Alle relevanten und bekannten Transportprozesse in Form von See- und Binnenschiffsverkehr sowie Bahn-, Lkw- und der Leitungstransport sind enthalten.
Energieträger: Die Energieträger werden entsprechend der spezifischen Versorgungslage modelliert (siehe Kapitel Strom oben).
Raffinerieprodukte: Diesel, Benzin, technische Gase, Heizöl, Schmierstoffe und Rückstände, wie Bitumen, werden mit einem parametrierten länderspezifische Raffineriemodell modelliert. Das Raffinerie-Modell bezieht die länderspezifischen Veredelungsverfahren (z. B. Emissionspegel, interner Energieverbrauch etc.) und das länderspezifische Produktspektrum ein, das sich je nach Land stark unterscheiden kann. Die Rohöl-Förderung wird gemäß der länderspezifischen Situation mit den jeweiligen Energieträger-Eigenschaften modelliert.

## Technical purpose
Dieses Produkt kann im Baubereich verwendet werden.

## Safety margin
20 %. Produktsystem bis auf wenige Prozesse/Flüsse abgebildet. Technologische, zeitliche und geographische Repräsentativität teilweise gegeben.

## Reference product
- Rohre für Strom-Wärmepumpe (Wasser-Wasser) 10 kW: 1

## Inputs
- Erneuerbare Primärenergie als Energieträger (PERE) [MJ]: A1-A3 346.756, C2 0.729025, C3 0, C4 0.029276, D 30.4687
- Erneuerbare Primärenergie zur stofflichen Nutzung (PERM) [MJ]: A1-A3 0, C2 0, C3 0, C4 0, D 0
- Total erneuerbare Primärenergie (PERT) [MJ]: A1-A3 346.756, C2 0.729025, C3 0, C4 0.029276, D 30.4687
- Nicht-erneuerbare Primärenergie als Energieträger (PENRE) [MJ]: A1-A3 2232.94, C2 2.33939, C3 99, C4 0.216776, D -167.875
- Nicht-erneuerbare Primärenergie zur stofflichen Nutzung (PENRM) [MJ]: A1-A3 82.5, C2 0, C3 -82.5, C4 0, D 0
- Total nicht-erneuerbare Primärenergie (PENRT) [MJ]: A1-A3 2315.44, C2 2.33939, C3 16.5, C4 0.216776, D -167.875
- Einsatz von Sekundärstoffen (SM) [kg]: A1-A3 5.43168, C2 0, C3 0, C4 0, D 0
- Erneuerbare Sekundärbrennstoffe (SF) [MJ]: A1-A3 0, C2 0, C3 0, C4 0, D 0
- Nicht erneuerbare Sekundärbrennstoffe (NRSF) [MJ]: A1-A3 0, C2 0, C3 0, C4 0, D 0
- Nettoeinsatz von Süßwasserressourcen (FW) [m3]: A1-A3 0.395712, C2 0.000317023, C3 0, C4 5.33967e-5, D -0.0153158

## Outputs
- Gefährlicher Abfall zur Deponie (HWD) [kg]: A1-A3 3.10832e-7, C2 3.90512e-10, C3 0, C4 2.30627e-11, D 2.93112e-8
- Entsorgter nicht gefährlicher Abfall (NHWD) [kg]: A1-A3 5.57859, C2 0.000888463, C3 0, C4 1.08106, D -0.3292
- Entsorgter radioaktiver Abfall (RWD) [kg]: A1-A3 0.0385513, C2 6.98551e-5, C3 0, C4 2.23784e-6, D 0.00393251
- Komponenten für die Wiederverwendung (CRU) [kg]: A1-A3 0, C2 0, C3 0, C4 0, D 0
- Stoffe zum Recycling (MFR) [kg]: A1-A3 0, C2 0, C3 0, C4 0, D 0
- Stoffe für die Energierückgewinnung (MER) [kg]: A1-A3 0, C2 0, C3 0, C4 0, D 0
- Exportierte elektrische Energie (EEE) [MJ]: A1-A3 0, C2 0, C3 0, C4 0, D 0
- Exportierte thermische Energie (EET) [MJ]: A1-A3 0, C2 0, C3 0, C4 0, D 0

## Impact indicators
- Globales Erwärmungspotenzial - total (GWP-total) [kg CO2 eq.]: A1-A3 135.678, C2 0.175804, C3 0, C4 0.0159957, D -22.7101
- Globales Erwärmungspotenzial - fossil (GWP-fossil) [kg CO2 eq.]: A1-A3 134.924, C2 0.174091, C3 0, C4 0.0163429, D -22.7571
- Globales Erwärmungspotenzial - biogen (GWP-biogenic) [kg CO2 eq.]: A1-A3 0.588477, C2 0.00075438, C3 0, C4 -0.00039526, D 0.0476111
- Globales Erwärmungspotenzial - luluc (GWP-luluc) [kg CO2 eq.]: A1-A3 0.16554, C2 0.000958839, C3 0, C4 4.80489e-5, D -0.00053484
- Abbaupotenzial der stratosphärischen Ozonschicht (ODP) [kg CFC-11 eq.]: A1-A3 1.3872e-12, C2 2.80948e-15, C3 0, C4 6.4126e-17, D 1.5332e-13
- Versauerungspotenzial, kumulierte Überschreitung (AP) [Mole of H+ eq.]: A1-A3 0.442822, C2 0.00107519, C3 0, C4 0.000116329, D -0.0628678
- Eutrophierungspotenzial - Süßwasser (EP-freshwater) [kg P eq.]: A1-A3 0.000237646, C2 5.37994e-7, C3 0, C4 2.75062e-8, D -3.933e-6
- Eutrophierungspotenzial - Salzwasser (EP-marine) [kg N eq.]: A1-A3 0.0753827, C2 0.000525538, C3 0, C4 3.01998e-5, D -0.0130558
- Eutrophierungspotenzial - Land (EP-terrestrial) [Mole of N eq.]: A1-A3 0.801782, C2 0.00578313, C3 0, C4 0.000331796, D -0.141449
- Bildungspotenzial für troposphärisches Ozon (POCP) [kg NMVOC eq.]: A1-A3 0.259233, C2 0.000997277, C3 0, C4 9.15082e-5, D -0.0436429
- Potenzial für die Verknappung abiotischer Ressourcen nicht fossile Ressourcen (ADPE) [kg Sb eq.]: A1-A3 0.0085358, C2 4.30093e-8, C3 0, C4 1.54906e-9, D 7.0096e-7
- Potenzial für die Verknappung abiotischer Ressourcen fossile Brennstoffe (ADPF) [MJ]: A1-A3 2326.65, C2 2.33907, C3 0, C4 0.216662, D -165.981
- Wasser-Entzugspotenzial (Benutzer) (WDP) [m³ world equiv.]: A1-A3 8.99934, C2 0.0018769, C3 0, C4 0.00174903, D 0.673555

## Use advice
Der Datensatz repräsentiert ein Cradle to Gate Inventar. Er kann verwendet werden, um die Lieferkette des jeweiligen Produktes in einer repräsentativen Weise zu charakterisieren. Die Kombination mit einzelnen Einheitenprozessen und diesem Produkt ermöglicht die Erstellung von anwenderspezifischen (Produkt-) LCAs.

## Data sources
- Documentation of data quality management
- GaBi Database Edition 2021, CUP2021.01
- GaBi database (all versions)
