# Marmorplatte

Dataset: ILCD process, EPD, generic dataset
Geography: DE
Reference year: 2021
Valid until: 2022
Classification: oekobau.dat: Mineralische Baustoffe / Steine und Elemente / Naturwerkstein
Owner: Sphera Solutions GmbH
Compliance: EN 15804+A2
Review: Dependent internal review by Sphera Solutions GmbH; Independent external review by GaBi user forum
Amounts: rows without a unit in brackets have none in this file; such an amount is in the reference unit of its flow, which a separate flow dataset defines
copyright: true
licenseType: Free of charge for all users and uses
accessRestrictions: The license conditions as stated on https://www.oekobaudat.de/ apply.
accessRestrictions: Es gelten die Lizenzbedingungen wie sie auf https://www.oekobaudat.de/ genannt sind.

## General comment
Dieser Datensatz wurde nach dem European Standard EN 15804+A2 für Nachhaltiges Bauen modelliert. Ergebnisse werden in Modulen abgebildet, die den strukturierten Ausdruck von Ergebnissen über den gesamten Lebenszyklus zulassen.

## Geography
Der Datensatz bildet die länderspezifische Situation in Deutschland ab. Dabei werden Haupttechnologien, spezifische regionale Charakteristiken und ggf. Importstatistiken berücksichtigt.

## Time period
Jährlicher Durchschnitt

## Technology and included processes
Marmorrohblöcke werden aus Steinbrüchen durch Sprengen und Sägen gewonnen. Nach dem Transport zum Werk erfolgt der Grobzuschnitt durch sog. Schrammsägen, sowie das Gattern in Plattenrohlinge. Diese werden durch Schleifen und Polieren weiter veredelt und anschließend formatiert. Die Ökobilanz wird durch die eingesetzte Energie für die einzelnen Bearbeitungsschritte, sowie durch die Transportaufwendungen dominiert.

In der Entsorgungsphase wird in Modul C1 ein maschineller Rückbau (Bagger) bilanziert. Der Transport in Modul C2 zur Aufbereitungsanlage erfolgt mit einem LKW (50km). In Modul C3 wird das Material aufbereitet, eventuelle Bewehrung wird einer Senke (keine Lasten, keine Gutschriften) zugeführt. Es wurde ein Aufbereitungsverlust von 25% angenommen. Dieser Verlust wird einer Inertstoffdeponie innerhalb von Modul C3 zugeführt (durchschnittliche Deponieemissionen). In Modul D erfolgt eine Gutschrift für die Netto-Materialmenge (ohne Bewehrungsanteil und abzüglich Aufbereitungsverluste) für die Substitution von natürlichem Kies als Verfüllmaterial (z.B. im Straßen- oder Deponiebau).

## Technical purpose
Marmorplatten werden hauptsächlich als Boden- oder Wandbelag sowie zur Herstellung von Küchenplatten oder Fensterbänken verwendet.

## Safety margin
20 %. Produktsystem bis auf wenige Prozesse/Flüsse abgebildet. Technologische, zeitliche und geographische Repräsentativität teilweise gegeben.

## Reference product
- Marmorplatte: 1

## Inputs
- Erneuerbare Primärenergie als Energieträger (PERE) [MJ]: A1-A3 67.7249, A4 9.56663, C1 0.0130019, C2 0.113681, C3 0.687813, D -0.26931
- Erneuerbare Primärenergie zur stofflichen Nutzung (PERM) [MJ]: A1-A3 0, A4 0, C1 0, C2 0, C3 0, D 0
- Total erneuerbare Primärenergie (PERT) [MJ]: A1-A3 67.7249, A4 9.56663, C1 0.0130019, C2 0.113681, C3 0.687813, D -0.26931
- Nicht-erneuerbare Primärenergie als Energieträger (PENRE) [MJ]: A1-A3 207.521, A4 85.3964, C1 0.224023, C2 1.95872, C3 6.17914, D -0.98903
- Nicht-erneuerbare Primärenergie zur stofflichen Nutzung (PENRM) [MJ]: A1-A3 0, A4 0, C1 0, C2 0, C3 0, D 0
- Total nicht-erneuerbare Primärenergie (PENRT) [MJ]: A1-A3 207.521, A4 85.3964, C1 0.224023, C2 1.95872, C3 6.17914, D -0.98903
- Einsatz von Sekundärstoffen (SM) [kg]: A1-A3 0, A4 0, C1 0, C2 0, C3 0, D 0
- Erneuerbare Sekundärbrennstoffe (SF) [MJ]: A1-A3 0, A4 0, C1 0, C2 0, C3 0, D 0
- Nicht erneuerbare Sekundärbrennstoffe (NRSF) [MJ]: A1-A3 0, A4 0, C1 0, C2 0, C3 0, D 0
- Nettoeinsatz von Süßwasserressourcen (FW) [m3]: A1-A3 0.112569, A4 0.0040387, C1 1.15554e-5, C2 0.000101034, C3 0.00156287, D -0.000163256

## Outputs
- Gefährlicher Abfall zur Deponie (HWD) [kg]: A1-A3 3.67383e-8, A4 5.33122e-9, C1 9.36342e-12, C2 8.18681e-11, C3 5.0563e-10, D -1.59348e-10
- Entsorgter nicht gefährlicher Abfall (NHWD) [kg]: A1-A3 9.4768, A4 0.0167481, C1 3.61624e-5, C2 0.000316182, C3 15.1478, D -0.656778
- Entsorgter radioaktiver Abfall (RWD) [kg]: A1-A3 0.0140419, A4 0.0010439, C1 2.14979e-7, C2 1.87965e-6, C3 5.44857e-5, D -2.91685e-5
- Komponenten für die Wiederverwendung (CRU) [kg]: A1-A3 0, A4 0, C1 0, C2 0, C3 0, D 0
- Stoffe zum Recycling (MFR) [kg]: A1-A3 0, A4 0, C1 0, C2 0, C3 37.83, D 0
- Stoffe für die Energierückgewinnung (MER) [kg]: A1-A3 0, A4 0, C1 0, C2 0, C3 0, D 0
- Exportierte elektrische Energie (EEE) [MJ]: A1-A3 0, A4 0, C1 0, C2 0, C3 0, D 0
- Exportierte thermische Energie (EET) [MJ]: A1-A3 0, A4 0, C1 0, C2 0, C3 0, D 0

## Impact indicators
- Globales Erwärmungspotenzial - total (GWP-total) [kg CO2 eq.]: A1-A3 16.4968, A4 6.26366, C1 0.0167599, C2 0.14878, C3 0.391931, D -0.075358
- Globales Erwärmungspotenzial - fossil (GWP-fossil) [kg CO2 eq.]: A1-A3 16.4177, A4 6.24155, C1 0.0166477, C2 0.14777, C3 0.395527, D -0.0749487
- Globales Erwärmungspotenzial - biogen (GWP-biogenic) [kg CO2 eq.]: A1-A3 0.0560724, A4 0.0158917, C1 3.60735e-6, C2 6.12122e-5, C3 -0.00518167, D -6.68405e-5
- Globales Erwärmungspotenzial - luluc (GWP-luluc) [kg CO2 eq.]: A1-A3 0.023022, A4 0.00621081, C1 0.000108541, C2 0.00094902, C3 0.00158542, D -0.000342388
- Abbaupotenzial der stratosphärischen Ozonschicht (ODP) [kg CFC-11 eq.]: A1-A3 2.02948e-13, A4 3.984e-14, C1 4.32446e-18, C2 3.78105e-17, C3 1.64113e-15, D -9.67734e-16
- Versauerungspotenzial, kumulierte Überschreitung (AP) [Mole of H+ eq.]: A1-A3 0.0480913, A4 0.186969, C1 0.000224142, C2 0.000418962, C3 0.003182, D -0.00024823
- Eutrophierungspotenzial - Süßwasser (EP-freshwater) [kg P eq.]: A1-A3 2.10587e-5, A4 6.31392e-6, C1 3.47584e-8, C2 3.03906e-7, C3 7.64658e-7, D -2.08549e-7
- Eutrophierungspotenzial - Salzwasser (EP-marine) [kg N eq.]: A1-A3 0.011108, A4 0.0503614, C1 0.00010197, C2 0.000193007, C3 0.00119093, D -9.65424e-5
- Eutrophierungspotenzial - Land (EP-terrestrial) [Mole of N eq.]: A1-A3 0.120139, A4 0.551491, C1 0.00112118, C2 0.0021594, C3 0.0130867, D -0.00106281
- Bildungspotenzial für troposphärisches Ozon (POCP) [kg NMVOC eq.]: A1-A3 0.0324144, A4 0.139026, C1 0.00030539, C2 0.000376368, C3 0.00351387, D -0.000228344
- Potenzial für die Verknappung abiotischer Ressourcen nicht fossile Ressourcen (ADPE) [kg Sb eq.]: A1-A3 2.6069e-6, A4 6.67323e-7, C1 1.47013e-9, C2 1.28539e-8, C3 2.05239e-7, D -1.5307e-8
- Potenzial für die Verknappung abiotischer Ressourcen fossile Brennstoffe (ADPF) [MJ]: A1-A3 207.477, A4 85.2994, C1 0.224013, C2 1.95864, C3 6.17735, D -0.988833
- Wasser-Entzugspotenzial (Benutzer) (WDP) [m³ world equiv.]: A1-A3 3.85754, A4 0.0308019, C1 6.56991e-5, C2 0.000574433, C3 0.0524761, D -0.00182697

## Use advice
Dieser Datensatz bezieht sich auf die Herstellung von 1 m² Marmorplatte mit einer Dicke von 2 cm. Das Flächengewicht ist 52 kg. Der Datensatz kann näherungsweise für die Abschätzung anderer Steindicken verwendet werden.

Der Datensatz repräsentiert ein Cradle to Gate Inventar. Er kann verwendet werden, um die Lieferkette des jeweiligen Produktes in einer repräsentativen Weise zu charakterisieren. Die Kombination mit einzelnen Einheitenprozessen und diesem Produkt ermöglicht die Erstellung von anwenderspezifischen (Produkt-) LCAs

## Data sources
- GaBi databases
- Documentation of data quality management
- GaBi Database Edition 2021, CUP2021.01
- GaBi database (all versions)
