# Verblenderkonsole JVAeco+

Dataset: ILCD process, EPD, specific dataset
Geography: DE
Reference year: 2021
Valid until: 2026
Classification: OEKOBAU.DAT: Metalle / Edelstahl / Befestigungsmittel
Classification: IBUCategories: 02 Bauprodukte / Metallbauprodukte und Zubehör / Baustähle
Method details: Baustähle.pdf
Generated by: myclimate Deutschland gGmbH
Registration number: EPD-JDL-20200259-IBA1-DE
Owner: Jordahl GmbH
Compliance: DIN EN 15804; ISO 14025
Review: Accredited third party review by Institut Bauen und Umwelt e. V.
Amounts: rows without a unit in brackets have none in this file; such an amount is in the reference unit of its flow, which a separate flow dataset defines
copyright: true
licenseType: Free of charge for all users and uses
accessRestrictions: None

## General comment
Die JORDAHL Verblenderkonsolen sind Teil eines Systems für Verblendmauerwerk, mit dem Fassaden dauerhaft befestigt werden. Unterschiedliche Ausführungen ermöglichen den Einsatz sowohl bei Neubauten als auch bei Sanierungen. Sie nehmen das Eigengewicht des Verblendmauerwerks auf und leiten es über Ankerschienen oder Dübel in die tragende Innenwand aus Stahlbeton. Die Ankerschienen oder Dübelbefestigungen sind nicht Teil der betrachteten Produktdeklaration. Zusammen mit dem Tragwerk wird eine zweischalige Konstruktion ausgebildet. Die dreieckige Aussparung im Konsolkörper (JVAeco+) reduziert den Materialaufwand auf die wesentlichen statischen Aufgaben und minimiert zusätzlich den Wärmestrom im Bereich der Verblenderkonsole. Die Konsolen sind standardmäßig zur Abfangung von Mauerwerk mit einer Breite von 90 mm bis 115 mm und Dämmschichten zwischen 60 und 300 mm ausgelegt.

Das deklarierte Produkt ist ein aus Lean Duplex Edelstahl gefertigtes System, bestehend aus Konsolkopf und Konsolkörper unterschiedlicher Typen, Größen und Laststufen.

Der Konsolkopf, bestehend aus zwei gezahnten Blechen, wird an ein Stegblech (Konsolkörper) geschweißt. Je nach Ausführung wird als Auflager des Verblendmauerwerks eine Auflagerplatte oder ein Winkel an den Konsolkörper angeschweißt. Zur Abtragung der entstehenden Druckkräfte dient eine Druckplatte an der Verblenderkonsole, die sich am tragfähigen Verankerungsgrund abstützt (siehe Abbildung 1). Bei besonders hohen Lasten kann es notwendig sein, an einer Auflagerkonstruktion (Auflagerplatte oder Winkel) mehrere Konsolrücken und angeschweißte Konsolköpfe zu befestigen.

Der Konsolkopf greift über gezahnte Bleche in eine Abkantung einer Schräglochplatte und wird über ein zugelassenes Befestigungsmittel (Klemmscheibe und Spezialschraube oder Dübel) mit dem Verankerungsgrund verspannt und dadurch horizontal und vertikal gehalten.

Abbildung 1: Die JORDAHL Verblenderkonsole JVAeco+ besteht wie alle JORDAHL Systeme für Verblendmauerwerk komplett aus Edelstahl

## Technology and included processes
Nach der Anlieferung der Edelstahlbleche werden daraus mit Hilfe eines Lasers die in verschiedenen Größen erhältlichen Konsolrücken aus den Metallplatten geschnitten. Der angefallene Metall-Verschnitt und Filterstaub wird in Behältern gelagert, durch einen Schrotthändler abgeholt und gemäß Vorschrift dem Recycling zugeführt. Formgebung & Weiterverarbeitung Die Konsolköpfe und der Konsolrücken werden durch eine Abkantpresse geformt. Die vorgeformten Einzelteile der Verblenderkonsole werden zur Weiterverarbeitung gegeben. Der Konsolkopf wird durch einen Schweißroboter zusammengeschweißt. Danach werden die Einzelteile der Verblenderkonsole (verschweißter Konsolkopf, Konsolrücken, Auflagerplatte/ Winkel, Druckplatte) durch manuelles Schweißen zu einem Produkt zusammengeführt. Kugelstrahlen Die gefertigten Verblenderkonsolen werden kugelgestrahlt, um Korrosion zu verhindern.
Technische Daten:
Es gelten die folgenden technischen Daten für Verblendmauerwerk aus Edelstahl. Die Prüfnorm ist EN 845-1.
Deklarierte Einheit:
Die Deklaration bezieht sich auf die Herstellung von 1 kg Verblenderkonsolen JVAeco+ aus Edelstahl.

## Technical purpose
JVAeco+ N, NA, NU fangen geschlossene Wandflächen ab.
JVAeco+ P, PAR werden bevorzugt im Normalwandbereich und Randbereich (z.B. Innenecken oder vertikalen Fugen) eingesetzt.
JVAeco+ E, EA werden im Endbereich von Verblendmauerwerksscheiben (Innenecken oder vertikalen
Fugen) eingesetzt.
JVAeco+ F, FAR sind kombinierte Abfangkonsolen mit durchgehendem Auflagerwinkel und zwei oder mehreren Konsolankern für sichtbare oder unsichtbare Gebäudeöffnungen.
JVAeco+ NFT, NAFT werden vor allem bei Öffnungen eingesetzt, die mit Fertigteilstützen abgefangen werden und über kein seitliches Auflager verfügen.

Die jeweiligen Typen verfügen über eine weitere Variante, die mittels Absatz nach unten oder oben dazu dient, eine bestimmte Höhe zu überwinden.

Beispiele hierfür sind: JVAeco+

NA-

PAR-

EA-

FAR-

NAFT- (mit tiefgesetztem Konsolauflager)
NU- (mit hochgesetztem Konsolauflager)

## Reference product
- Verblenderkonsole JVAeco+ (): 1

## Inputs
- Erneuerbare Primärenergie als Energieträger (PERE) [MJ]: A1-A3 1.8958, C2 -0.0624143, C3 0, C4 4.73537e-5, D 9.07645e-6
- Erneuerbare Primärenergie zur stofflichen Nutzung (PERM) [MJ]: A1-A3 0, C2 0, C3 0, C4 0, D 0
- Total erneuerbare Primärenergie (PERT) [MJ]: A1-A3 1.8958, C2 -0.0624143, C3 0, C4 4.73537e-5, D 9.07645e-6
- Nicht-erneuerbare Primärenergie als Energieträger (PENRE) [MJ]: A1-A3 52.1359, C2 -1.54349, C3 0, C4 0.127876, D 0.00355358
- Nicht-erneuerbare Primärenergie zur stofflichen Nutzung (PENRM) [MJ]: A1-A3 0, C2 0, C3 0, C4 0, D 0
- Total nicht erneuerbare Primärenergie (PENRT) [MJ]: A1-A3 52.1359, C2 -1.54349, C3 0, C4 0.127876, D 0.00355358
- Einsatz von Sekundärstoffen (SM) [kg]: A1-A3 0.4944, C2 0, C3 0, C4 0, D 0.455532
- Erneuerbare Sekundärbrennstoffe (RSF) [MJ]: A1-A3 0, C2 0, C3 0, C4 0, D 0
- Nicht erneuerbare Sekundärbrennstoffe (NRSF) [MJ]: A1-A3 0, C2 0, C3 0, C4 0, D 0
- Einsatz von Süßwasserressourcen (FW) [m^3]: A1-A3 1.12815, C2 -0.0151177, C3 0, C4 -2.65747e-5, D -4.35589e-6

## Outputs
- Gefährlicher Abfall zur Deponie (HWD) [kg]: A1-A3 3.67259e-5, C2 -5.72505e-7, C3 0, C4 3.19503e-7, D 8.50222e-9
- Entsorgter nicht gefährlicher Abfall (NHWD) [kg]: A1-A3 5.3919, C2 -0.223301, C3 0, C4 5.01311e-6, D 0.0496399
- Entsorgter radioaktiver Abfall (RWD) [kg]: A1-A3 0.00016906, C2 -3.21964e-6, C3 0, C4 8.74591e-7, D 2.41956e-8
- Komponenten für die Wiederverwendung (CRU) [kg]: A1-A3 0, C2 0, C3 0, C4 0, D 0
- Stoffe zum Recycling (MFR) [kg]: A1-A3 0, C2 0, C3 0.95, C4 0, D 0
- Stoffe für die Energierückgewinnung (MER) [kg]: A1-A3 0, C2 0, C3 0, C4 0, D 0
- Exportierte elektrische Energie (EEE) [MJ]: A1-A3 0, C2 0, C3 0, C4 0, D 0
- Exportierte thermische Energie (EET) [MJ]: A1-A3 0, C2 0, C3 0, C4 0, D 0

## Impact indicators
- Globales Erwärmungspotenzial (GWP) [kg CO_(2)-Äq.]: A1-A3 4.4346, C2 0.00859495, C3 0, C4 0.000242229, D -2.72347
- Abbau Potential der stratosphärischen Ozonschicht (ODP) [kg CFC11-Äq.]: A1-A3 2.41318e-7, C2 1.56198e-9, C3 0, C4 4.22567e-11, D -1.11794e-7
- Versauerungspotenzial von Boden und Wasser (AP) [kg SO_(2)-Äq.]: A1-A3 0.0222394, C2 2.23066e-5, C3 0, C4 1.45689e-6, D -0.0158553
- Eutrophierungspotenzial (EP) [kg PO_(4)^(3)-Äq.]: A1-A3 0.00237281, C2 3.80438e-6, C3 0, C4 3.046e-7, D -0.00142349
- Bildungspotential für troposphärisches Ozon (POCP) [kg Ethen-Äq.]: A1-A3 0.00107114, C2 8.18499e-7, C3 0, C4 5.08797e-8, D -0.000651819
- Potenzial für den abiotischen Abbau nicht fossiler Ressourcen (ADPE) [kg Sb-Äq.]: A1-A3 0.00014221, C2 5.02954e-10, C3 0, C4 6.63967e-11, D -0.000120102
- Potenzial für den abiotischen Abbau fossiler Brennstoffe (ADPF) [MJ]: A1-A3 46.8325, C2 0.120435, C3 0, C4 0.00334465, D -27.169

## Use advice
Gültigkeitsbereich:
Dieses Dokument bezieht sich auf Verblenderkonsolen JVAeco+ der Firma JORDAHL GmbH, hergestellt in Trebbin, Deutschland. Die deklarierte Einheit bezieht sich auf 1 kg Verblenderkonsole als spezifisches Produkt. Die Datenerhebung erfolgte werksspezifisch mit aktuellen Jahresdaten von 2019. Der Deklarationsinhaber ist verantwortlich für die zugrunde liegenden Daten und deren Verifizierung.
Systemgrenze:
Die Ökobilanz betrachtet die Systemgrenzen "von der Wiege bis zum Werkstor - mit Optionen" und folgt dem modularen Aufbau nach EN 15804. Die Ökobilanz berücksichtigt folgende Module:

A1: Rohstoffgewinnung und -verarbeitung, Verarbeitungsprozesse, Stahlerzeugung, -guss und -produktion; Aufbereitung von Recyclingmaterialien

A2: Transport zum Hersteller: Transport der Rohstoffe zum Herstellungswerk

A3: Herstellungsprozesse und -aufwendungen: Herstellung der Verblenderkonsolen JVAeco+
C2: Transport zur Abfallbewirtschaftung
C3: Abfallbewirtschaftung zur Wiederverwendung, Rückgewinnung und/oder zum Recycling
C4: Beseitigung

D: Wiederverwendungs-, Rückgewinnungs- oder Recyclingpotenzial als Nettoflüsse und Gutschriften bzw. Lasten für Edelstahl

## Data sources
- ecoinvent database (all versions)
- ecoinvent 3.6 database
