# Fugendichtungsbänder Butyl; Polybutadiene rubber

Dataset: ILCD process, EPD, generic dataset
Geography: DE
Reference year: 2021
Valid until: 2022
Classification: oekobau.dat: Komponenten von Fenstern und Vorhangfassaden / Dichtungskomponenten / -materialien / Fugendichtungsbänder
Owner: Sphera Solutions GmbH
Compliance: EN 15804+A2
Review: Dependent internal review by Sphera Solutions GmbH; Independent external review by GaBi user forum
Amounts: rows without a unit in brackets have none in this file; such an amount is in the reference unit of its flow, which a separate flow dataset defines
copyright: true
licenseType: Free of charge for all users and uses
accessRestrictions: The license conditions as stated on https://www.oekobaudat.de/ apply.
accessRestrictions: Es gelten die Lizenzbedingungen wie sie auf https://www.oekobaudat.de/ genannt sind.

## General comment
Dieser Datensatz wurde nach dem European Standard EN 15804+A2 für Nachhaltiges Bauen modelliert. Ergebnisse werden in Modulen abgebildet, die den strukturierten Ausdruck von Ergebnissen über den gesamten Lebenszyklus zulassen.

## Geography
Der Datensatz bildet die länderspezifische Situation in Deutschland ab. Dabei werden Haupttechnologien, spezifische regionale Charakteristiken und ggf. Importstatistiken berücksichtigt.

## Time period
Jährlicher Durchschnitt

## Technology and included processes
Die Ökobilanz von Butyl-Fugendichtungsbändern beinhaltet die Herstellung und Entsorgung von Polybutadien-Kautschuk mit einer Dichte von 1,2 g/cm3 in unterschiedlichen Dicken und Breiten. Der Kautschuk wird durch die Polymerisation von 1,3-Butadien erzeugt. Die Reaktion wird mit Hilfe eines chemischen Starters initiiert und kann in Form der Emulsions- oder Lösungspolymerisation erfolgen. Als Katalysatoren können das Übergangsmetall Nickel oder das Alkylmetall Butyllithium eingesetzt werden. Die Ökobilanz bezieht sich auf das Verfahren der Lösungspolymerisation, die stark exotherm abläuft. Die eingesetzten Lösemittel setzen die Reaktionsrate herab und verhindern eine unkontrollierte Reaktion. Batch-Verfahren und kontinuierliches Herstellungsverfahren sind möglich.
Transporte vom Werk zum Einbauort sind nicht berücksichtigt und sollten nach Bedarf nachträglich einbezogen werden.

In Modul C1 wird ein manueller Rückbau (lastenfrei) angenommen. Sammelverluste werden vernachlässigt.
Der Transport in Modul C2 zur Verwertungsanlage erfolgt mit einem LKW (50km).
In Modul C3 wird die Zerkleinerung und thermische Behandlung (Verbrennung) des Materials berücksichtigt. Bei der Berechnung der Verbrennungsemissionen und Gutschriften wird der spezifische Heizwert des jeweiligen Materials sowie die Materialzusammensetzung berücksichtigt.
In Modul D erfolgen Gutschriften für die Substitution von Strom (deutscher Strommix) und thermischer Energie (aus Erdgas).

## Technical purpose
Dieses Produkt kann im Baubereich verwendet werden.

## Safety margin
20 %. Produktsystem bis auf wenige Prozesse/Flüsse abgebildet. Technologische, zeitliche und geographische Repräsentativität teilweise gegeben.

## Reference product
- Fugendichtungsbänder Butyl: 1

## Inputs
- Erneuerbare Primärenergie als Energieträger (PERE) [MJ]: A1-A3 11.1292, C2 0.00218616, C3 0.413212, D -5.87615
- Erneuerbare Primärenergie zur stofflichen Nutzung (PERM) [MJ]: A1-A3 0, C2 0, C3 0, D 0
- Total erneuerbare Primärenergie (PERT) [MJ]: A1-A3 11.1292, C2 0.00218616, C3 0.413212, D -5.87615
- Nicht-erneuerbare Primärenergie als Energieträger (PENRE) [MJ]: A1-A3 89.2475, C2 0.0376677, C3 44.6368, D -17.3795
- Nicht-erneuerbare Primärenergie zur stofflichen Nutzung (PENRM) [MJ]: A1-A3 36, C2 0, C3 -36, D 0
- Total nicht-erneuerbare Primärenergie (PENRT) [MJ]: A1-A3 125.247, C2 0.0376677, C3 8.63676, D -17.3795
- Einsatz von Sekundärstoffen (SM) [kg]: A1-A3 0, C2 0, C3 0, D 0
- Erneuerbare Sekundärbrennstoffe (SF) [MJ]: A1-A3 0, C2 0, C3 0, D 0
- Nicht erneuerbare Sekundärbrennstoffe (NRSF) [MJ]: A1-A3 0, C2 0, C3 0, D 0
- Nettoeinsatz von Süßwasserressourcen (FW) [m3]: A1-A3 0.0137276, C2 1.94295e-6, C3 0.00745769, D -0.00218593

## Outputs
- Gefährlicher Abfall zur Deponie (HWD) [kg]: A1-A3 1.69412e-8, C2 1.57439e-12, C3 3.11505e-10, D -6.0336e-9
- Entsorgter nicht gefährlicher Abfall (NHWD) [kg]: A1-A3 0.0497211, C2 6.08042e-6, C3 0.316808, D -0.00916646
- Entsorgter radioaktiver Abfall (RWD) [kg]: A1-A3 0.00127997, C2 3.61471e-8, C3 4.99999e-5, D -0.000631987
- Komponenten für die Wiederverwendung (CRU) [kg]: A1-A3 0, C2 0, C3 0, D 0
- Stoffe zum Recycling (MFR) [kg]: A1-A3 0, C2 0, C3 0, D 0
- Stoffe für die Energierückgewinnung (MER) [kg]: A1-A3 0, C2 0, C3 1, D 0
- Exportierte elektrische Energie (EEE) [MJ]: A1-A3 0, C2 0, C3 4.70734, D 0
- Exportierte thermische Energie (EET) [MJ]: A1-A3 0, C2 0, C3 10.8077, D 0

## Impact indicators
- Globales Erwärmungspotenzial - total (GWP-total) [kg CO2 eq.]: A1-A3 5.77848, C2 0.00286116, C3 3.05014, D -1.11841
- Globales Erwärmungspotenzial - fossil (GWP-fossil) [kg CO2 eq.]: A1-A3 5.64917, C2 0.00284173, C3 3.04963, D -1.10488
- Globales Erwärmungspotenzial - biogen (GWP-biogenic) [kg CO2 eq.]: A1-A3 0.125763, C2 1.17716e-6, C3 0.000312854, D -0.0119044
- Globales Erwärmungspotenzial - luluc (GWP-luluc) [kg CO2 eq.]: A1-A3 0.00354039, C2 1.82504e-5, C3 0.000190205, D -0.00162326
- Abbaupotenzial der stratosphärischen Ozonschicht (ODP) [kg CFC-11 eq.]: A1-A3 4.7158e-14, C2 7.27125e-19, C3 1.67472e-15, D -2.56528e-14
- Versauerungspotenzial, kumulierte Überschreitung (AP) [Mole of H+ eq.]: A1-A3 0.00712752, C2 8.05696e-6, C3 0.000528889, D -0.00113372
- Eutrophierungspotenzial - Süßwasser (EP-freshwater) [kg P eq.]: A1-A3 7.31237e-6, C2 5.84435e-9, C3 2.42603e-7, D -2.70068e-6
- Eutrophierungspotenzial - Salzwasser (EP-marine) [kg N eq.]: A1-A3 0.00237057, C2 3.71167e-6, C3 0.000119315, D -0.000416984
- Eutrophierungspotenzial - Land (EP-terrestrial) [Mole of N eq.]: A1-A3 0.0255049, C2 4.15269e-5, C3 0.00243837, D -0.00444236
- Bildungspotenzial für troposphärisches Ozon (POCP) [kg NMVOC eq.]: A1-A3 0.00721321, C2 7.23785e-6, C3 0.000332237, D -0.0010921
- Potenzial für die Verknappung abiotischer Ressourcen nicht fossile Ressourcen (ADPE) [kg Sb eq.]: A1-A3 9.30403e-7, C2 2.47191e-10, C3 2.27434e-8, D -3.46566e-7
- Potenzial für die Verknappung abiotischer Ressourcen fossile Brennstoffe (ADPF) [MJ]: A1-A3 132.441, C2 0.0376661, C3 1.43642, D -17.3771
- Wasser-Entzugspotenzial (Benutzer) (WDP) [m³ world equiv.]: A1-A3 0.0391738, C2 1.10468e-5, C3 0.311883, D -0.0132705

## Use advice
Der Datensatz repräsentiert ein Cradle to Gate Inventar. Er kann verwendet werden, um die Lieferkette des jeweiligen Produktes in einer repräsentativen Weise zu charakterisieren. Die Kombination mit einzelnen Einheitenprozessen und diesem Produkt ermöglicht die Erstellung von anwenderspezifischen (Produkt-) LCAs.

## Data sources
- Polybutadiene: Properties and Applications
- dsir.gov: Polybutadiene
- IBU-Declaration Dt. Bauchemie; MA resin products, high-filled. flow (EPD-DIV-20130101-IBE1-EN), 2013
- Documentation of data quality management
- GaBi Database Edition 2021, CUP2021.01
- GaBi database (all versions)
