# Verbrennung Kunststoff in MVA inkl. Gutschrift; plastic incineration

Dataset: ILCD process, EPD, generic dataset
Geography: DE
Reference year: 2018
Valid until: 2022
Classification: oekobau.dat: End of Life / Generisch / Kunststoffe
Owner: thinkstep
Compliance: DIN EN 15804
Review: Dependent internal review by thinkstep, IABP-GaBi, IBP-GaBi; Independent external review by GaBi user forum, GaBi bug forum, GaBi user community
Amounts: rows without a unit in brackets have none in this file; such an amount is in the reference unit of its flow, which a separate flow dataset defines
copyright: true

## General comment
Dieser Datensatz wurde nach dem European Standard EN 15804 für Nachhaltiges Bauen modelliert. Ergebnisse werden in Modulen abgebildet, die den strukturierten Ausdruck von Ergebnissen über den gesamten Lebenszyklus zulassen.

## Geography
Der Datensatz bildet die länderspezifische Situation in Deutschland ab. Dabei werden Haupttechnologien, spezifische regionale Charakteristiken und ggf. Importstatistiken berücksichtigt.

## Time period
Jährlicher Durchschnitt

## Technology and included processes
Der Datensatz beschreibt die Verbrennung von Kunststoffverpackungen mit einem unteren Heizwert von 36,0 MJ/kg. Die Verbrennung erfolgt in Müllverbrennungsanlagen (MVA) unter Nutzung der thermischen Energie mit deutschen Randbedingungen. Um den gesetzlichen Anforderungen zu entsprechen, wird eine trockenen Rauchgasreinigung und selektive nicht-katalytische Reduktion zur Stickoxid-Beseitigung nachgeschaltet. Auswirkungen auf die Umwelt, die durch die Abfallsammlung, den Transport oder die Vorbehandlung entstehen, sind nicht im Datensatz enthalten. Die modellierte Anlage besteht aus einer Verbrennungslinie, die mit einem Rost- und einem Dampfgenerator ausgestattet ist.
Der durchschnittliche Wirkungsgrad der Dampferzeugung liegt bei 82%. Ein Teil des erzeugten Dampfs wird intern als Prozessdampf genutzt. Der restliche Teil wird zur Stromerzeugung oder als Heizenergie für die Industrie oder Haushalte bereitgestellt. Die Energiebilanz der analysierten Anlage entspricht den landes-/regionsspezifische Bedingungen. Die durchschnittliche Anlage weist einen Wirkungsgrad von 38% auf. Die erzeugte Energie wird zu 28 % für Stromgewinnung genutzt, 72% dienen der Dampferzeugung. Datengrundlage bildet eine ITAD-Studie (IG der Thermischen Abfallbehandlungsanlagen Deutschland), die im Jahr 2008 69 Müllverbrennungsanlagen in Deutschland analysiert hat. Die Energiebilanz eines Durchschnittsabfalls wird herangezogen, um spezifische Abfälle wie Kunststoffabfall oder Holz mit den entsprechenden Heizwerten berechnen zu können. Der Eigenverbrauch der Anlage sowie Hilfsstoffe sind im Datensatz berücksichtigt.
Der Eigenverbrauch ist teilweise unabhängig von der Abfallart, z. B. bezüglich der Aufbereitung des Abfalls vor der Verbrennung. In anderen Bereichen spielt die Abfallzusammensetzung eine wesentliche Rolle, so z. B. beim Abgasvolumen, der Behandlung spezifischer Emissionen etc. Zur Rauchgasreinigung wird ein Trockenverfahren mit Adsorber eingesetzt. Stickoxidemissionen werden durch das SNCR-Verfahren, bei dem Ammoniakwasser in den Feuerraum eingedüst wird, vermindert. Die Stickoxide reagieren mit dem Ammoniak zu Stickstoff und Wasser.
Anschließend wird das Rauchgas konditioniert, Adsorptionsmittel zugegeben und durch einen Gewebefilter gereinigt. Kalkmilch und feine Partikel von Herdofenkoks werden als Adsorptionsmittel verwendet; ein Teil der Adsorptionsmittel kann recycelt werden. Die Flugasche wird mit Adsorptionsmittel versetzt und anschließend mit der Kesselasche vermischt (Behandlung von APC-Rückständen siehe unten).
Daten zu durchschnittlichen Emissionswerten von HCl, HF, NOx, VOC, N2O, CO, NH3, SO2, Staub, Dioxinen und den Schwermetallen As, Cd, Co, Cr, Ni und Pb pro Kubikmeter gereinigtes Rauchgas sind dem BREF-Dokument Waste incineration" der Europäischen Kommission entnommen. Bedingt durch die Vielzahl an Emissionen werden für einige Emissionen und Stoffrückstände die Durchschnittswerte mit zusätzlichen gemessenen Anlagendaten ergänzt. Wenn Emissionswerte gänzlich fehlen, werden durchschnittliche Transferkoeffizienten (Literatur) zur Berechnung herangezogen. Auch die Verteilung von Elementen auf die entstehenden Reststoffe erfolgt in dieser Weise.
Die Bettasche wird abgelöscht, Schrott und ein Teil der NE-Metalle (Aluminium, Kupfer, Messing, Zink, Blei) können zu Recycling-Zwecken genutzt werden. Dafür wird die Bettasche in einem länger andauernden Stabilisierungs-Warteprozess von drei Monaten zwischengelagert.
Die erzeugte Bodenasche kann danach zur Metallrückgewinnung und als Baumaterial verwendet werden. Die APC-Rückstände einschließlich Kesselasche, Filterkuchen und Schlämme werden in unterirdischen Lagerstätten, z. B. Salzbergwerken, deponiert. Die Entsorgung in unterirdischen Lagerstätten ohne freies Wasser und ohne Kontakt zum Grundwasser wurde als emissionsfrei modelliert. Der Betrieb der unterirdischen Lagerstätte ist inbegriffen. Entsorgungstransporte sind ebenfalls berücksichtigt.
Alle relevanten Betriebsmittel und Hilfsstoffen, die in der Abfallverbrennungsanlage verwendet werden, sind im Ökobilanzmodell betrachtet. Um die Gutschriften für die rückgewonnenen Eisenschrott berechnen zu können, wurde ein "value of scrap"-Datensatz verwendet, der die Umweltbelastungen für das Umschmelzen und Verarbeitung von Schrott einschließt. Für NE-Metalle wurden keine Gutschriften für eine eventuelle Rückgewinnung erteilt.

Hintergrundsystem:
Strom: Die Stromerzeugung wird entsprechend der länderspezifischen Randbedingungen modelliert. Die landesspezifische Analyse beinhaltet:
1.: Spezifische Kraftwerke der verschiedenen fossilen Energieträger und der Einsatz erneuerbarer Energien sind entsprechend der länderspezifischen Energieträgermixe modelliert. Die Analyse bezieht Stromimporte aus den Nachbarländern, Transmissions-und Verteilungsverluste und den Eigenverbrauch im Kraftwerk und bei der Verteilung bzw. Speicherung, z. B. durch Pumpspeicherwerke, ein.
2.: Die landes-/regionalspezifischen Technologiestandards sowie die Erzeugung in Elektrizitätskraftwerken und/oder in speziellen Kraftwerken mit Kraft-Wärme-Kopplung (KWK) sind berücksichtigt.
3.: Die länderspezifische Energieträgerbereitstellung (mit Anteil der Importe und/oder Eigenversorgung) einschließlich der Energieträger-Eigenschaften (z. B. Elementar- und Energiegehalte) werden berücksichtigt.
4.: Die Förderung, Produktion, Verarbeitung und Transportprozesse werden entsprechend der Situation im jeweiligen Stromerzeugerland modelliert. Die unterschiedlichen Produktions- und Verarbeitungsverfahren (Emissionen und Wirkungsgrade) in den verschiedenen Energieerzeugerländern werden einbezogen, z. B. Rohöl-Veredelungsverfahren oder Abfackel-Raten an den Ölplattformen.
Thermische Energie, Prozessdampf: Die Erzeugung von Dampf und thermischer Energie in Heizkraftwerken wird entsprechend der landesspezifischen Situation (Emissionsgrenzwerte, Energieträgerbasis) modelliert.
Der Wirkungsgrad für die thermische Energieerzeugung beträgt per Definition 100% des Energieträgereinsatzes. Für Prozessdampf liegt der Wirkungsgrad im Bereich von 85-95%. Die zur Heizenergie-Erzeugung verwendeten Energieträger werden entsprechend der nationalen Situation modelliert (siehe Kapitel Strom oben).
Transporte: Alle relevanten und bekannten Transportprozesse in Form von See- und Binnenschiffsverkehr sowie Bahn-, Lkw- und der Leitungstransport sind enthalten.
Energieträger: Die Energieträger werden entsprechend der spezifischen Versorgungslage modelliert (siehe Kapitel Strom oben).
Raffinerieprodukte: Diesel, Benzin, technische Gase, Heizöl, Schmierstoffe und Rückstände, wie Bitumen, werden mit einem parametrierten länderspezifische Raffineriemodell modelliert. Das Raffinerie-Modell bezieht die länderspezifischen Veredelungsverfahren (z. B. Emissionspegel, interner Energieverbrauch etc.) und das länderspezifische Produktspektrum ein, das sich je nach Land stark unterscheiden kann. Die Rohöl-Förderung wird gemäß der länderspezifischen Situation mit den jeweiligen Energieträger-Eigenschaften modelliert.

## Technical purpose
Dieses Produkt kann im Baubereich verwendet werden.

## Safety margin
0 %.

## Reference product
- Abfallverbrennung von Plastik (unspezifische) Anteile in kommunalen Feststoffabfall: 1

## Inputs
- Erneuerbare Primärenergie als Energieträger (PERE) [MJ]: C3 0.306423, D -5.89084
- Erneuerbare Primärenergie zur stofflichen Nutzung (PERM) [MJ]: C3 0, D 0
- Total erneuerbare Primärenergie (PERT) [MJ]: C3 0.306423, D -5.89084
- Nicht-erneuerbare Primärenergie als Energieträger (PENRE) [MJ]: C3 1.17855, D -20.561
- Nicht-erneuerbare Primärenergie zur stofflichen Nutzung (PENRM) [MJ]: C3 0, D 0
- Total nicht erneuerbare Primärenergie (PENRT) [MJ]: C3 1.17855, D -20.561
- Einsatz von Sekundärstoffen (SM) [kg]: C3 0, D 0
- Erneuerbare Sekundärbrennstoffe (RSF) [MJ]: C3 0, D 0
- Nicht erneuerbare Sekundärbrennstoffe (NRSF) [MJ]: C3 0, D 0
- Einsatz von Süßwasserressourcen (FW) [m3]: C3 0.00621797, D -0.00274784

## Outputs
- Gefährlicher Abfall zur Deponie (HWD) [kg]: C3 4.49086e-9, D -1.08752e-8
- Entsorgter nicht gefährlicher Abfall (NHWD) [kg]: C3 0.263974, D -0.00968417
- Entsorgter radioaktiver Abfall (RWD) [kg]: C3 4.37289e-5, D -0.000711708
- Komponenten für die Wiederverwendung (CRU) [kg]: C3 0, D 0
- Stoffe zum Recycling (MFR) [kg]: C3 0, D 0
- Stoffe für die Energierückgewinnung (MER) [kg]: C3 0, D 0
- Exportierte elektrische Energie (EEE) [MJ]: C3 4.70734, D 0
- Exportierte thermische Energie (EET) [MJ]: C3 10.8077, D 0

## Impact indicators
- Globales Erwärmungspotenzial (GWP) [kg CO2 Äquiv.]: C3 2.52745, D -1.40543
- Abbaupotenzial der stratosphärischen Ozonschicht (ODP) [kg R11 Äquiv.]: C3 1.70912e-15, D -3.25739e-14
- Versauerungspotential (AP) [kg SO2 Äquiv.]: C3 0.000280596, D -0.00118723
- Eutrophierungspotential (EP) [kg Phosphat Äquiv.]: C3 6.25215e-5, D -0.000225006
- Bildungspotenzial für troposphärisches Ozon (POCP) [kg Ethen Äquiv.]: C3 2.60162e-5, D -0.000120883
- Potenzial für den abiotischen Abbau nicht fossiler Ressourcen (ADPE) [kg Sb Äquiv.]: C3 1.78439e-8, D -3.49583e-7
- Potenzial für den abiotischen Abbau fossiler Brennstoffe (ADPF) [MJ]: C3 1.06816, D -18.7643

## Use advice
Der Datensatz repräsentiert ein Cradle to Gate Inventar. Er kann verwendet werden, um die Lieferkette des jeweiligen Produktes in einer repräsentativen Weise zu charakterisieren. Die Kombination mit einzelnen Einheitenprozessen und diesem Produkt ermöglicht die Erstellung von anwenderspezifischen (Produkt-) LCAs.

## Data sources
- GaBi Database Edition 2020, SP40
- GaBi database (all versions)
