# Hausmülldeponie

Dataset: ILCD process, EPD, generic dataset
Geography: DE
Reference year: 2018
Valid until: 2022
Classification: oekobau.dat: End of Life / Generisch / Hausmüll
Owner: thinkstep
Compliance: DIN EN 15804
Review: Dependent internal review by thinkstep, IABP-GaBi, IBP-GaBi; Independent external review by GaBi user forum, GaBi bug forum, GaBi user community
Amounts: rows without a unit in brackets have none in this file; such an amount is in the reference unit of its flow, which a separate flow dataset defines
copyright: true

## General comment
Dieser Datensatz wurde nach dem European Standard EN 15804 für Nachhaltiges Bauen modelliert. Ergebnisse werden in Modulen abgebildet, die den strukturierten Ausdruck von Ergebnissen über den gesamten Lebenszyklus zulassen.

## Geography
Der Datensatz bildet die länderspezifische Situation in Deutschland ab. Dabei werden Haupttechnologien, spezifische regionale Charakteristiken und ggf. Importstatistiken berücksichtigt.

## Time period
Jährlicher Durchschnitt

## Technology and included processes
Der Datensatz umfasst die Ablagerung von 1 kg Hausmüll auf einer dafür vorgesehenen Deponie. Der anteilige Betrieb und die anteiligen Auswirkungen der Deponie über einen Zeitraum von 100 Jahren sind berücksichtigt. Der Transport zur Deponie ist nicht mit eingeschlossen. Der Datensatz bezieht nur die anlagespezifischen Prozesse ein. Die Deponie erzeugt 0,419 MJ Strom aus der Deponiegasverbrennung. Die Energiegutschrift ist im Datensatz berücksichtigt.

Hintergrundsystem:
Strom: Die Stromerzeugung wird entsprechend der länderspezifischen Randbedingungen modelliert. Die landesspezifische Analyse beinhaltet:
1.: Spezifische Kraftwerke der verschiedenen fossilen Energieträger und der Einsatz erneuerbarer Energien sind entsprechend der länderspezifischen Energieträgermixe modelliert. Die Analyse bezieht Stromimporte aus den Nachbarländern, Transmissions-und Verteilungsverluste und den Eigenverbrauch im Kraftwerk und bei der Verteilung bzw. Speicherung, z. B. durch Pumpspeicherwerke, ein.
2.: Die landes-/regionalspezifischen Technologiestandards sowie die Erzeugung in Elektrizitätskraftwerken und/oder in speziellen Kraftwerken mit Kraft-Wärme-Kopplung (KWK) sind berücksichtigt.
3.: Die länderspezifische Energieträgerbereitstellung (mit Anteil der Importe und/oder Eigenversorgung) einschließlich der Energieträger-Eigenschaften (z. B. Elementar- und Energiegehalte) werden berücksichtigt.
4.: Die Förderung, Produktion, Verarbeitung und Transportprozesse werden entsprechend der Situation im jeweiligen Stromerzeugerland modelliert. Die unterschiedlichen Produktions- und Verarbeitungsverfahren (Emissionen und Wirkungsgrade) in den verschiedenen Energieerzeugerländern werden einbezogen, z. B. Rohöl-Veredelungsverfahren oder Abfackel-Raten an den Ölplattformen.
Thermische Energie, Prozessdampf: Die Erzeugung von Dampf und thermischer Energie in Heizkraftwerken wird entsprechend der landesspezifischen Situation (Emissionsgrenzwerte, Energieträgerbasis) modelliert.
Der Wirkungsgrad für die thermische Energieerzeugung beträgt per Definition 100% des Energieträgereinsatzes. Für Prozessdampf liegt der Wirkungsgrad im Bereich von 85-95%. Die zur Heizenergie-Erzeugung verwendeten Energieträger werden entsprechend der nationalen Situation modelliert (siehe Kapitel Strom oben).
Transporte: Alle relevanten und bekannten Transportprozesse in Form von See- und Binnenschiffsverkehr sowie Bahn-, Lkw- und der Leitungstransport sind enthalten.
Energieträger: Die Energieträger werden entsprechend der spezifischen Versorgungslage modelliert (siehe Kapitel Strom oben).
Raffinerieprodukte: Diesel, Benzin, technische Gase, Heizöl, Schmierstoffe und Rückstände, wie Bitumen, werden mit einem parametrierten länderspezifische Raffineriemodell modelliert. Das Raffinerie-Modell bezieht die länderspezifischen Veredelungsverfahren (z. B. Emissionspegel, interner Energieverbrauch etc.) und das länderspezifische Produktspektrum ein, das sich je nach Land stark unterscheiden kann. Die Rohöl-Förderung wird gemäß der länderspezifischen Situation mit den jeweiligen Energieträger-Eigenschaften modelliert.

## Technical purpose
Dieses Produkt kann im Baubereich verwendet werden.

## Safety margin
0 %.

## Reference product
- Hausmüll: 1

## Inputs
- Erneuerbare Primärenergie als Energieträger (PERE) [MJ]: C4 -0.309024
- Erneuerbare Primärenergie zur stofflichen Nutzung (PERM) [MJ]: C4 0
- Total erneuerbare Primärenergie (PERT) [MJ]: C4 -0.309024
- Nicht-erneuerbare Primärenergie als Energieträger (PENRE) [MJ]: C4 0.22251
- Nicht-erneuerbare Primärenergie zur stofflichen Nutzung (PENRM) [MJ]: C4 0
- Total nicht erneuerbare Primärenergie (PENRT) [MJ]: C4 0.22251
- Einsatz von Sekundärstoffen (SM) [kg]: C4 0
- Erneuerbare Sekundärbrennstoffe (RSF) [MJ]: C4 0
- Nicht erneuerbare Sekundärbrennstoffe (NRSF) [MJ]: C4 0
- Einsatz von Süßwasserressourcen (FW) [m3]: C4 -6.09159e-5

## Outputs
- Gefährlicher Abfall zur Deponie (HWD) [kg]: C4 2.98109e-9
- Entsorgter nicht gefährlicher Abfall (NHWD) [kg]: C4 0.807691
- Entsorgter radioaktiver Abfall (RWD) [kg]: C4 -3.4632e-5
- Komponenten für die Wiederverwendung (CRU) [kg]: C4 0
- Stoffe zum Recycling (MFR) [kg]: C4 0
- Stoffe für die Energierückgewinnung (MER) [kg]: C4 0
- Exportierte elektrische Energie (EEE) [MJ]: C4 0
- Exportierte thermische Energie (EET) [MJ]: C4 0

## Impact indicators
- Globales Erwärmungspotenzial (GWP) [kg CO2 Äquiv.]: C4 0.753563
- Abbaupotenzial der stratosphärischen Ozonschicht (ODP) [kg R11 Äquiv.]: C4 -1.85738e-15
- Versauerungspotential (AP) [kg SO2 Äquiv.]: C4 0.000163116
- Eutrophierungspotential (EP) [kg Phosphat Äquiv.]: C4 0.000804198
- Bildungspotenzial für troposphärisches Ozon (POCP) [kg Ethen Äquiv.]: C4 0.000194731
- Potenzial für den abiotischen Abbau nicht fossiler Ressourcen (ADPE) [kg Sb Äquiv.]: C4 -1.54176e-8
- Potenzial für den abiotischen Abbau fossiler Brennstoffe (ADPF) [MJ]: C4 0.309737

## Use advice
Der Datensatz repräsentiert ein Cradle to Gate Inventar. Er kann verwendet werden, um die Lieferkette des jeweiligen Produktes in einer repräsentativen Weise zu charakterisieren. Die Kombination mit einzelnen Einheitenprozessen und diesem Produkt ermöglicht die Erstellung von anwenderspezifischen (Produkt-) LCAs.

## Data sources
- GaBi Database Edition 2020, SP40
- GaBi database (all versions)
