# HEBEL Bewehrter Porenbeton

Dataset: ILCD process, EPD, average dataset
Geography: DE
Reference year: 2016
Valid until: 2022
Classification: OEKOBAU.DAT: Mineralische Baustoffe / Mörtel und Beton / Beton
Classification: IBUCategories: 02 Bauprodukte / Mauerwerk und Mörtel / Porenbeton
Method details: Porenbeton.pdf
Registration number: EPD-IAD-20160116-IAC1-DE
Owner: Xella Deutschland GmbH
Compliance: DIN EN 15804; ISO 14025
Review: Accredited third party review by Institut Bauen und Umwelt e. V.
Amounts: rows without a unit in brackets have none in this file; such an amount is in the reference unit of its flow, which a separate flow dataset defines
copyright: true

## General comment
Die genannten Produkte sind bewehrte Elemente unterschiedlicher Formate aus Porenbeton. Porenbeton gehört zur Gruppe der porosierten dampfgehärteten Leichtbetone.

## Technology and included processes
Die vorliegenden EPD-Ergebnisse beruhen auf der Ökobilanz von bewehrten Porenbeton-Produkten unterschiedlicher Formate. Porenbeton gehört zur Gruppe der porosierten dampfgehärteten Leichtbetone. Hauptgrundstoffe sind Sand, Zement, Branntkalk und Aluminium als Porenbildner. Herstellung: Der gemahlene Quarzsand wird mit den anderen Grundstoffen unter Zugabe von Wasser und Aluminiumpaste, in einem Mischer zu einer Rohmasse gemischt und in Gießformen gegossen. Die Stahlbewehrung wird im Porenbetonwerk gefertigt. Die Bewehrungselemente werden vor dem Einbau in die Gießform durch Tauchbaden korrosionsschutzbehandelt. Das Wasser löscht unter Wärmeentwicklung den Kalk. Das Aluminium reagiert im alkalischen Milieu. Dabei bildet sich gasförmiger Wasserstoff, der die Poren in der Masse erzeugt und ohne Rückstände entweicht. Die Poren besitzen meist einen Durchmesser von 0,5 – 1,5 mm und sind ausschließlich mit Luft gefüllt. Nach dem ersten Abbinden entstehen halbfeste Rohblöcke, aus denen maschinell und mit hoher Genauigkeit die Elemente geschnitten werden. Die Ausbildung der endgültigen Eigenschaften der Bauteile erfolgt während der anschließenden Dampfhärtung über 5 – 12 Stunden bei etwa 190 °C und einem Druck von ca. 12 bar in Dampfdruckkesseln, den sog. Autoklaven. Hier bilden sich aus den eingesetzten Stoffen Calcium-Silikathydrate, die dem in der Natur vorkommenden Mineral Tobermorit entsprechen. Die Reaktion des Materials ist mit der Entnahme aus dem Autoklaven abgeschlossen. Der Dampf wird nach Abschluss des Härtungsprozesses für weitere Autoklavzyklen verwandt. Das anfallende Kondensat wird als Prozesswasser genutzt. Auf diese Weise wird Energie eingespart und es fällt kein Abwasser an. Systemgrenzen: Im Einzelnen werden folgende Prozesse der Herstellung der Porenbetonprodukte einbezogen: Bereitstellungsprozesse von Rohstoffen, Verpackungen und Energie, Transporte der Rohstoffe (Zement, Kalk, Sand, Bewehrungsstahl etc.) zum Produktionsstandort, Herstellprozess im Werk inklusive energetischer Aufwendungen, Herstellung von Hilfsstoffen, Entsorgung anfallender Reststoffe. Alle beschriebenen Prozesse sind Teil der Module A1-A3. Hintergrundsystem: Zur Modellierung der Porenbeton-Herstellung wurde das von der thinkstep AG entwickelte Software-System zur Ganzheitlichen Bilanzierung "GaBi ts" eingesetzt. Die in der GaBi-Datenbank enthaltenen konsistenten Datensätze sind in der online GaBi-Dokumentation dokumentiert. Die Ökobilanz wurde für den Bezugsraum Deutschland erstellt.
Deklarierte Einheit:
Die Deklaration bezieht sich auf die Herstellung von 1 m³ bewehrten HEBEL Porenbeton mit einer durchschnittlichen Rohdichte von 550 kg/m³ inklusive 25,6 kg Bewehrungsstahl.

## Technical purpose
Bewehrte Bauteile für Dächer, Decken sowie für tragende und nichttragende Wände. Bestimmungsgemäß wird ein direkter Kontakt mit Wasser bautechnisch vermieden.

## Reference product
- 1 m³ HEBEL bewehrter Porenbeton (550 kg/m³): 1

## Inputs
- Erneuerbare Primärenergie als Energieträger (PERE) [MJ]: A1-A3 346.646
- Erneuerbare Primärenergie zur stofflichen Nutzung (PERM) [MJ]: A1-A3 40.5438
- Total erneuerbare Primärenergie (PERT) [MJ]: A1-A3 387.19
- Nicht-erneuerbare Primärenergie als Energieträger (PENRE) [MJ]: A1-A3 2110.2
- Nicht-erneuerbare Primärenergie zur stofflichen Nutzung (PENRM) [MJ]: A1-A3 25.9699
- Total nicht erneuerbare Primärenergie (PENRT) [MJ]: A1-A3 2136.17
- Einsatz von Sekundärstoffen (SM) [kg]: A1-A3 0
- Erneuerbare Sekundärbrennstoffe (RSF) [MJ]: A1-A3 18.3426
- Nicht erneuerbare Sekundärbrennstoffe (NRSF) [MJ]: A1-A3 281.795
- Einsatz von Süßwasserressourcen (FW) [m^3]: A1-A3 1.10143

## Outputs
- Gefährlicher Abfall zur Deponie (HWD) [kg]: A1-A3 1.21859e-5
- Entsorgter nicht gefährlicher Abfall (NHWD) [kg]: A1-A3 9.23072
- Entsorgter radioaktiver Abfall (RWD) [kg]: A1-A3 0.0725272
- Komponenten für die Wiederverwendung (CRU) [kg]: A1-A3 0
- Stoffe zum Recycling (MFR) [kg]: A1-A3 0
- Stoffe für die Energierückgewinnung (MER) [kg]: A1-A3 0
- Exportierte elektrische Energie (EEE) [MJ]: A1-A3 0
- Exportierte thermische Energie (EET) [MJ]: A1-A3 0

## Impact indicators
- Globales Erwärmungspotenzial (GWP) [kg CO_(2)-Äq.]: A1-A3 307.029
- Abbau Potential der stratosphärischen Ozonschicht (ODP) [kg CFC11-Äq.]: A1-A3 5.21172e-9
- Versauerungspotenzial von Boden und Wasser (AP) [kg SO_(2)-Äq.]: A1-A3 0.341596
- Eutrophierungspotenzial (EP) [kg PO_(4)^(3)-Äq.]: A1-A3 0.0412382
- Bildungspotential für troposphärisches Ozon (POCP) [kg Ethen-Äq.]: A1-A3 0.0378786
- Potenzial für den abiotischen Abbau nicht fossiler Ressourcen (ADPE) [kg Sb-Äq.]: A1-A3 0.0002159
- Potenzial für den abiotischen Abbau fossiler Brennstoffe (ADPF) [MJ]: A1-A3 1953.44

## Use advice
Gültigkeitsbereich:
Die Ökobilanz beruht auf den Daten des Jahres 2014 aus den deutschen Xella-Werken Alzenau, Laußig und Rotenburg. In Deutschland produziert Xella nur in diesen Werken bewehrten Porenbeton.
Systemgrenze:
Typ der EPD: Wiege-bis-Werkstor

Im Einzelnen werden folgende Prozesse in das Produktstadium A1-A3 der Herstellung der Porenbetonprodukte einbezogen:

Bereitstellungsprozesse von Rohstoffen, Verpackungen und Energie
Transporte der Rohstoffe zum Produktionsstandort
Herstellprozess im Werk inklusive energetischer Aufwendungen, Herstellung von Hilfsstoffen, Entsorgung anfallender Reststoffe

## Data sources
- HEBEL Bewehrter Porenbeton.pdf
- GaBi Database (all versions)
- GaBi database SP27 2015
