# Spanplatte (generisch); 700 kg/m3

Dataset: ILCD process, EPD, generic dataset
Geography: DE
Reference year: 2021
Valid until: 2022
Classification: oekobau.dat: Holz / Holzwerkstoffe / Spanplatten
Owner: Sphera Solutions GmbH
Compliance: EN 15804+A2
Review: Dependent internal review by Sphera Solutions GmbH; Independent external review by GaBi user forum
Amounts: rows without a unit in brackets have none in this file; such an amount is in the reference unit of its flow, which a separate flow dataset defines
copyright: true
licenseType: Free of charge for all users and uses
accessRestrictions: The license conditions as stated on https://www.oekobaudat.de/ apply.
accessRestrictions: Es gelten die Lizenzbedingungen wie sie auf https://www.oekobaudat.de/ genannt sind.

## General comment
Dieser Datensatz wurde nach dem European Standard EN 15804+A2 für Nachhaltiges Bauen modelliert. Ergebnisse werden in Modulen abgebildet, die den strukturierten Ausdruck von Ergebnissen über den gesamten Lebenszyklus zulassen.

## Geography
Der Datensatz bildet die länderspezifische Situation in Deutschland ab. Dabei werden Haupttechnologien, spezifische regionale Charakteristiken und ggf. Importstatistiken berücksichtigt.

## Time period
Jährlicher Durchschnitt

## Technology and included processes
Holz verschiedener Sortierungen (vorwiegend Holzreste) werden maschinell zerspant. Die anschließende Trocknung der Holzspäne erfolgt mit Hilfe eines Trockenzylinders, bis sie ihre Arbeitsfeuchte erreicht haben. Danach werden sie verklebt. In einer Mulde werden die verschiedenen Holzschnitzelfraktionen in Plattenform angehäuft. Infolge der Verpressung unter Einwirkung von Hitze und Druck entstehen die Primärplatten. Diese werden anwendungsspezifisch mit Schneidcutter und Sägemaschine bearbeitet. Die Primärbearbeitung der Platten wird mit einer Glättung beendet. Die Platten können je nach Verwendungszweck weiter bearbeitet werden. Produktionsrückstände (z.B. vom Glätten und Schneiden) werden wieder in den Produktionsprozess eingeschleust (auch zur thermischen Energieerzeugung).

In Modul C1 wird ein manueller Rückbau (lastenfrei) angenommen. Sammelverluste werden vernachlässigt.
Der Transport in Modul C2 zur Verwertungsanlage erfolgt mit einem LKW (50km).
In Modul C3 wird die Zerkleinerung und thermische Behandlung (Verbrennung) des Materials berücksichtigt. Es wird angenommen, dass das Material das Ende der Abfalleigenschaft direkt nach der Zerkleinerung erreicht. Das im Material durch Photosynthese aufgenommene und gespeicherte CO2 (aus Modul A1) wird in C3 ausgebucht (CO2 Neutralität innerhalb des Produktsystems gemäß EN 16485: Round and sawn timber - Environmental Product Declarations - Product category rules for wood and wood-based products for use in construction, 2014),
Modul D enthält die Lasten durch den Betrieb der Verwertungsanlage (exkl. biogenes CO2, siehe oben) sowie Gutschriften für die Substitution von Strom (deutscher Strommix) und thermischer Energie (aus Erdgas). Bei der Berechnung der Verbrennungsemissionen und Gutschriften wird der spezifische Heizwert des jeweiligen Materials sowie die Materialzusammensetzung berücksichtigt.

## Technical purpose
Dieses Produkt kann im Baubereich verwendet werden.

## Safety margin
20 %. Produktsystem bis auf wenige Prozesse/Flüsse abgebildet. Technologische, zeitliche und geographische Repräsentativität teilweise gegeben.

## Reference product
- Spanplatte (generisch): 1

## Inputs
- Erneuerbare Primärenergie als Energieträger (PERE) [MJ]: A1-A3 5474.39, C2 1.53031, C3 13314.7, D -1759.95
- Erneuerbare Primärenergie zur stofflichen Nutzung (PERM) [MJ]: A1-A3 11000, C2 0, C3 -11000, D 0
- Total erneuerbare Primärenergie (PERT) [MJ]: A1-A3 16474.4, C2 1.53031, C3 2314.67, D -1759.95
- Nicht-erneuerbare Primärenergie als Energieträger (PENRE) [MJ]: A1-A3 4131.19, C2 26.3674, C3 1344.48, D -5123.39
- Nicht-erneuerbare Primärenergie zur stofflichen Nutzung (PENRM) [MJ]: A1-A3 645, C2 0, C3 -645, D 0
- Total nicht-erneuerbare Primärenergie (PENRT) [MJ]: A1-A3 4776.19, C2 26.3674, C3 699.478, D -5123.39
- Einsatz von Sekundärstoffen (SM) [kg]: A1-A3 0, C2 0, C3 0, D 0
- Erneuerbare Sekundärbrennstoffe (SF) [MJ]: A1-A3 0, C2 0, C3 0, D 0
- Nicht erneuerbare Sekundärbrennstoffe (NRSF) [MJ]: A1-A3 0, C2 0, C3 0, D 0
- Nettoeinsatz von Süßwasserressourcen (FW) [m3]: A1-A3 2.78469, C2 0.00136007, C3 4.00059, D -0.654505

## Outputs
- Gefährlicher Abfall zur Deponie (HWD) [kg]: A1-A3 1.20525e-5, C2 1.10207e-9, C3 1.37977e-7, D -1.78387e-6
- Entsorgter nicht gefährlicher Abfall (NHWD) [kg]: A1-A3 7.67092, C2 0.0042563, C3 11.9136, D -2.71975
- Entsorgter radioaktiver Abfall (RWD) [kg]: A1-A3 0.0741411, C2 2.53029e-5, C3 0.0140779, D -0.189286
- Komponenten für die Wiederverwendung (CRU) [kg]: A1-A3 0, C2 0, C3 0, D 0
- Stoffe zum Recycling (MFR) [kg]: A1-A3 0, C2 0, C3 0, D 0
- Stoffe für die Energierückgewinnung (MER) [kg]: A1-A3 0, C2 0, C3 0, D 0
- Exportierte elektrische Energie (EEE) [MJ]: A1-A3 0.054824, C2 0, C3 1410.04, D 0
- Exportierte thermische Energie (EET) [MJ]: A1-A3 0.125872, C2 0, C3 3154.54, D 0

## Impact indicators
- Globales Erwärmungspotenzial - total (GWP-total) [kg CO2 eq.]: A1-A3 -842.273, C2 2.00281, C3 1477, D -330.294
- Globales Erwärmungspotenzial - fossil (GWP-fossil) [kg CO2 eq.]: A1-A3 196.728, C2 1.98921, C3 39.9618, D -326.261
- Globales Erwärmungspotenzial - biogen (GWP-biogenic) [kg CO2 eq.]: A1-A3 -1039.63, C2 0.00082401, C3 1437, D -3.54618
- Globales Erwärmungspotenzial - luluc (GWP-luluc) [kg CO2 eq.]: A1-A3 0.62531, C2 0.0127753, C3 0.0380083, D -0.486013
- Abbaupotenzial der stratosphärischen Ozonschicht (ODP) [kg CFC-11 eq.]: A1-A3 3.42412e-11, C2 5.08988e-16, C3 4.71031e-13, D -7.68369e-12
- Versauerungspotenzial, kumulierte Überschreitung (AP) [Mole of H+ eq.]: A1-A3 0.900726, C2 0.00563987, C3 0.961731, D -0.336647
- Eutrophierungspotenzial - Süßwasser (EP-freshwater) [kg P eq.]: A1-A3 0.00429919, C2 4.09105e-6, C3 6.77278e-5, D -0.00080849
- Eutrophierungspotenzial - Salzwasser (EP-marine) [kg N eq.]: A1-A3 0.492607, C2 0.00259817, C3 0.431234, D -0.123555
- Eutrophierungspotenzial - Land (EP-terrestrial) [Mole of N eq.]: A1-A3 3.65037, C2 0.0290688, C3 5.24191, D -1.31578
- Bildungspotenzial für troposphärisches Ozon (POCP) [kg NMVOC eq.]: A1-A3 1.16435, C2 0.00506649, C3 1.10311, D -0.323279
- Potenzial für die Verknappung abiotischer Ressourcen nicht fossile Ressourcen (ADPE) [kg Sb eq.]: A1-A3 -2.43949e-5, C2 1.73034e-7, C3 7.11232e-6, D -0.000103441
- Potenzial für die Verknappung abiotischer Ressourcen fossile Brennstoffe (ADPF) [MJ]: A1-A3 4903.92, C2 26.3663, C3 570.359, D -5122.65
- Wasser-Entzugspotenzial (Benutzer) (WDP) [m³ world equiv.]: A1-A3 63.4707, C2 0.00773275, C3 169.455, D -3.97232

## Use advice
Der Datensatz repräsentiert ein Cradle to Gate Inventar. Er kann verwendet werden, um die Lieferkette des jeweiligen Produktes in einer repräsentativen Weise zu charakterisieren. Die Kombination mit einzelnen Einheitenprozessen und diesem Produkt ermöglicht die Erstellung von anwenderspezifischen (Produkt-) LCAs.

## Data sources
- IBU-Deklaration Egger: Egger EUROSPAN (EPD-EHW-2008511-D), 2009
- IBU-Deklaration Pfleiderer: Living Board Spanplatte (EPD-PFL-2009111-D), 2009
- Documentation of data quality management
- GaBi Database Edition 2021, CUP2021.01
- GaBi database (all versions)
