# AQUAPANEL® Cement Board Rooftop 12,5 mm

Dataset: ILCD process, EPD, specific dataset
Geography: DE
Reference year: 2021
Valid until: 2026
Classification: OEKOBAU.DAT: Komposite / Systembauteile / Decken
Classification: IBUCategories: 02 Bauprodukte / Normal- Leicht- und Porenbeton / Faserzement / Faserbeton
Method details: Faserzement / Faserbeton.pdf
Generated by: WESSLING GmbH
Registration number: EPD-USG-20210120-IBA1-DE
Owner: Knauf AQUAPANEL GmbH & Co. KG
Compliance: DIN EN 15804+A2; ISO 14025
Review: Accredited third party review by Institut Bauen und Umwelt e. V.
Amounts: rows without a unit in brackets have none in this file; such an amount is in the reference unit of its flow, which a separate flow dataset defines
copyright: true
licenseType: Free of charge for all users and uses
accessRestrictions: None

## General comment
Zementgebundene, mineralische Bauplatte mit flächigen Gitterstrukturen aus in Längs- und Querrichtung angeordneten Glasgelegen für den Einsatz im Flachdachbau.

## Technology and included processes
Die Zuschlagsstoffe und Bindemittel werden in Silos außerhalb der Produktionshalle bevorratet. Über Bandwaagen und Differentialdosierer werden die Rohstoffe für den Plattenkern rezepturmäßig dosiert und über eine zentrale Fördereinrichtung zum Wägebehälter transportiert. Das Bindemittel zur Herstellung der Deckschicht wird direkt über einen Schneckenförderer zur Fertigungseinheit des „slurry“ (Zementgemisch) transportiert. Die zur Herstellung erforderlichen Glasgewebe werden im Untergeschoß der Produktionshalle gelagert. Die Trockenmischung im Wägebehälter wird in den darunter befindlichen Zwangsmischer entleert und Wasser wird rezepturgemäß zudosiert. Die Kernmischung wird homogen und erdfeucht gemischt und per Bandförderer zur Formstation befördert. Parallel wird der „slurry“ für die Deckschicht homogen vorgemischt und per Schneckenpumpen und Schläuchen zur Formstation gefördert. In der Formstation wird das 3-Schicht-Element im Strangpressverfahren endlos gefertigt und im anschließenden Schneidapparat auf die entsprechende Länge geschnitten. Die zugeschnittenen Platten werden im Regallager erhärtet. Der Produktionsprozess ist nach ISO 9001 zertifiziert.
Deklarierte Einheit:
Die deklarierte Einheit der Studie ist 1 m² AQUAPANEL® Cement Board Rooftop mit einer Dicke von 12,5 mm.

## Technical purpose
AQUAPANEL® Cement Board Rooftop ist Bestandteil von Flachdachsystemen, insbesondere gewerblich bzw. industriell genutzter Gebäude. Sie verbessert die Leistungsfähigkeit des Flachdaches in verschiedener Hinsicht:

1. Als Deckplatte zwischen der Dämmung und der Dachabdichtung:

■ schützt die darunterliegende Wärmedämmung

■ reduziert die Beanspruchung der Abdichtungsbahnen

■ verleiht dem gesamten Dachsystem zusätzliche strukturelle Festigkeit

■ bietet einen soliden Untergrund für begehbare Dächer und Dächer mit Auflast.

2. Als Trägerplatte, die direkt auf das Profilblech befestigt wird, dient sie als:

■ Träger für die Dampfsperre

■ Arbeitsplattform für die Dachdecker

## Reference product
- AQUAPANEL® Cement Board Rooftop 12,5 mm (AQUAPANEL® Cement Board Rooftop 12,5 mm ): 1

## Inputs
- Erneuerbare Primärenergie als Energieträger (PERE) [MJ]: A1 5.24, A2 0.04, A3 2.04, C1 0.01, C2 0.08, C3 0, C4 0.43, D 0
- Erneuerbare Primärenergie zur stofflichen Nutzung (PERM) [MJ]: A1 0, A2 0, A3 0, C1 0, C2 0, C3 0, C4 0, D 0
- Total erneuerbare Primärenergie (PERT) [MJ]: A1 5.24, A2 0.04, A3 2.04, C1 0.01, C2 0.08, C3 0, C4 0.43, D 0
- Nicht-erneuerbare Primärenergie als Energieträger (PENRE) [MJ]: A1 36.44, A2 0.62, A3 3.55, C1 0.13, C2 1.32, C3 0, C4 3.26, D 0
- Nicht-erneuerbare Primärenergie zur stofflichen Nutzung (PENRM) [MJ]: A1 0, A2 0, A3 0, C1 0, C2 0, C3 0, C4 0, D 0
- Total nicht erneuerbare Primärenergie (PENRT) [MJ]: A1 36.44, A2 0.62, A3 3.55, C1 0.13, C2 1.32, C3 0, C4 3.26, D 0
- Einsatz von Sekundärstoffen (SM) [kg]: A1 0.06, A2 0, A3 0, C1 0, C2 0, C3 0, C4 0, D 0
- Erneuerbare Sekundärbrennstoffe (RSF) [MJ]: A1 2.4, A2 0, A3 0, C1 0, C2 0, C3 0, C4 0, D 0
- Nicht erneuerbare Sekundärbrennstoffe (NRSF) [MJ]: A1 4.57, A2 0, A3 0, C1 0, C2 0, C3 0, C4 0, D 0
- Einsatz von Süßwasserressourcen (FW) [m^3]: A1 0.00817, A2 3.23e-5, A3 0.0011, C1 6.91e-6, C2 6.88e-5, C3 0, C4 0.00082, D 0

## Outputs
- Gefährlicher Abfall zur Deponie (HWD) [kg]: A1 1.49e-5, A2 2.31e-8, A3 2.38e-9, C1 4.95e-9, C2 4.93e-8, C3 0, C4 4.96e-8, D 0
- Entsorgter nicht gefährlicher Abfall (NHWD) [kg]: A1 0.0731, A2 0.000109, A3 0.00273, C1 2.33e-5, C2 0.000232, C3 0, C4 16.4, D 0
- Entsorgter radioaktiver Abfall (RWD) [kg]: A1 0.000772, A2 6.52e-7, A3 0.000296, C1 1.4e-7, C2 1.39e-6, C3 0, C4 3.7e-5, D 0
- Komponenten für die Wiederverwendung (CRU) [kg]: A1 0.4, A2 0, A3 0, C1 0, C2 0, C3 0, C4 0, D 0
- Stoffe zum Recycling (MFR) [kg]: A1 0, A2 0, A3 0, C1 0, C2 0, C3 0, C4 0, D 0
- Stoffe für die Energierückgewinnung (MER) [kg]: A1 0, A2 0, A3 0, C1 0, C2 0, C3 0, C4 0, D 0
- Exportierte elektrische Energie (EEE) [MJ]: A1 0, A2 0, A3 0, C1 0, C2 0, C3 0, C4 0, D 0
- Exportierte thermische Energie (EET) [MJ]: A1 0, A2 0, A3 0, C1 0, C2 0, C3 0, C4 0, D 0

## Impact indicators
- Globales Erwärmungspotenzial total (GWP-total) [kg CO_(2)-Äq.]: A1 4.94, A2 0.05, A3 0.29, C1 0.01, C2 0.1, C3 0, C4 0.23, D 0
- Globales Erwärmungspotenzial fossil (GWP-fossil) [kg CO_(2)-Äq.]: A1 4.91, A2 0.05, A3 0.28, C1 0.01, C2 0.1, C3 0, C4 0.25, D 0
- Globales Erwärmungspotenzial biogen (GWP-biogenic) [kg CO_(2)-Äq.]: A1 0.0276, A2 1.87e-5, A3 0.00186, C1 -0.000442, C2 4e-5, C3 0, C4 -0.0197, D 0
- Globales Erwärmungspotenzial luluc (GWP-luluc) [kg CO_(2)-Äq.]: A1 0.00237, A2 0.000195, A3 0.000721, C1 4.18e-5, C2 0.000416, C3 0, C4 0.000714, D 0
- Abbau Potential der stratosphärischen Ozonschicht (ODP) [kg CFC11-Äq.]: A1 2.17e-14, A2 1.14e-17, A3 8.73e-15, C1 2.45e-18, C2 2.44e-17, C3 0, C4 9.91e-16, D 0
- Versauerungspotenzial von Boden und Wasser (AP) [mol H^(+)-Äq.]: A1 0.00803, A2 0.000269, A3 0.000433, C1 4.92e-5, C2 0.000573, C3 0, C4 0.00178, D 0
- Eutrophierungspotenzial Süßwasser (EP-freshwater) [kg PO_(4)-Äq.]: A1 4.05e-6, A2 1.01e-7, A3 1.18e-6, C1 2.17e-8, C2 2.16e-7, C3 0, C4 4.26e-7, D 0
- Eutrophierungspotenzial Salzwasser (EP-marine) [kg N-Äq.]: A1 0.00217, A2 0.000132, A3 0.000133, C1 2.32e-5, C2 0.000281, C3 0, C4 0.000458, D 0
- Eutrophierungspotenzial Land (EP-terrestrial) [mol N-Äq.]: A1 0.0236, A2 0.00146, A3 0.00139, C1 0.000257, C2 0.00312, C3 0, C4 0.00503, D 0
- Bildungspotential für troposphärisches Ozon (POCP) [kg NMVOC-Äq.]: A1 0.00666, A2 0.000252, A3 0.000333, C1 6.49e-5, C2 0.000537, C3 0, C4 0.00139, D 0
- Potenzial für den abiotischen Abbau nicht fossiler Ressourcen (ADPE) [kg Sb-Äq.]: A1 3.97e-7, A2 3.87e-9, A3 1.07e-7, C1 8.29e-10, C2 8.25e-9, C3 0, C4 2.23e-8, D 0
- Potenzial für den abiotischen Abbau fossiler Brennstoffe (ADPF) [MJ]: A1 36.19, A2 0.62, A3 3.54, C1 0.133, C2 1.32, C3 0, C4 3.25, D 0
- Wassernutzung (WDP) [m^(3) Welt-Äq. entzogen]: A1 0.236, A2 0.000201, A3 0.00629, C1 4.3e-5, C2 0.000428, C3 0, C4 0.026, D 0
- Auftreten von Krankheiten aufgrund von Feinstaubemissionen (PM) [Krankheitsfälle]
- Wirkung durch Exposition des Menschen mit U235 (IR) [kBq U235-Äq.]
- Toxizitätsvergleichseinheit für Ökosysteme (ETP-fw) [CTUe]
- Toxizitätsvergleichseinheit für Menschen (krebserregend) (HTP-c) [CTUh]
- Toxizitätsvergleichseinheit für Menschen (nicht krebserregend) (HTP-nc) [CTUh]
- Bodenqualitätsindex (SQP) [SQP]

## Use advice
Gültigkeitsbereich:
Diese Umweltproduktdeklaration bezieht sich auf AQUAPANEL® Cement Board Rooftop aus der Produktionsstätte Iserlohn, Deutschland.
Systemgrenze:
Im Rahmen der durchgeführten Ökobilanz sind die Herstellung bzw. Bereitstellung und der Transport der Vorprodukte/Rohstoffe sowie die Produktion des Endprodukts (A1–A3) berücksichtigt. Weiterhin wird die End-of-life-Phase (C1–C4) unter Anwendung technischer Szenarien betrachtet.

Die Daten der Zementplattenherstellung wurden am Produktionsstandort ermittelt. Die Rezeptur und die eingesetzten Ausgangsstoffe, die eingesetzte elektrische Energie sowie alle direkten Produktionsabfälle wurden in der Bilanzierung berücksichtigt. Innerhalb der Phase A2 wurden alle spezifischen Transportwege der Edukte hinterlegt.

## Data sources
- GaBi Database (all versions)
- GaBi database SP40 2020
