# STEICOflex F

Dataset: ILCD process, EPD, specific dataset
Geography: RER
Reference year: 2020
Valid until: 2025
Classification: OEKOBAU.DAT: Dämmstoffe / Holzfasern / Holzfaserdämmplatte
Classification: IBUCategories: 02 Bauprodukte / Holzwerkstoffe / Holzwerkstoffe
Method details: Holzwerkstoffe.pdf
Registration number: EPD-STE-20200001-IBA1-DE
Owner: STEICO SE
Compliance: DIN EN 15804; ISO 14025
Review: Accredited third party review by Institut Bauen und Umwelt e. V.
Amounts: rows without a unit in brackets have none in this file; such an amount is in the reference unit of its flow, which a separate flow dataset defines
copyright: true

## General comment
STEICOflex F sind flexible Holzfaserdämmplatten, die im Trockenverfahren produziert werden. Zur Erzielung der Flexibilität des Produktes ist die Zugabe einer geringen Menge textiler Bindefaser notwendig.

## Technology and included processes
STEICOflex F wird im Trockenverfahren hergestellt: Verarbeitung des Rohholzes zu Hackschnitzeln Erhitzen der Hackschnitzel unter Dampfdruck Zerfaserung der Hackschnitzel durch Defibrationsverfahren Trocknung der Fasern im Zyclontrockner Zumischung der Bikomponentenfaser Aufgabe des Gemenges auf die Produktionslinie Erwärmen und Pressen des Gemenges zur Dämmmatte Zuschnitt der Holzfaserdämmung Abstapelung, Verpackung Alle während der Produktion anfallenden Reststoffe werden entweder erneut der Produktion zugeführt oder intern einer energetischen Verwertung zugeführt. Systeme zur Gütesicherung: CE-Kennzeichnung nach /DIN EN 13171/MPA Nordrhein-Westfalen, D /PEFC/10-34-76/
Technische Daten:
Die folgenden Angaben beziehen sich auf das Produkt STEICOflex F im Auslieferungszustand.

Weitere Daten stehen unter www.steico.com zum Download zur Verfügung.
Deklarierte Einheit:
Die deklarierte Einheit ist 1 m³ Holzfaserdämmstoff mit einer mittleren Rohdichte von 51,7 kg bei einem Wasseranteil von 2 %. Der Anteil der Zusätze liegt bei 8,7 %.

## Technical purpose
Die flexible Holzfaser-Wärmedämmung STEICOflex F wird als Gefachdämmung in Dach-, Wand- und Deckenkonstruktionen sowie als Hohlraumdämmung bei Trennwänden, Vorsatzschalen und Installationsebenen eingesetzt.

## Reference product
- STEICOflex F (): 1

## Inputs
- Erneuerbare Primärenergie als Energieträger (PERE) [MJ]: A1 5.23677, A2 0.633859, A3 101.463, A5 0.43348, C2 0.120865, C3 0.335642, D -165.725
- Erneuerbare Primärenergie zur stofflichen Nutzung (PERM) [MJ]: A1 890.104, A2 0, A3 40.5435, A5 -40.5435, C2 0, C3 -890.104, D 0
- Total erneuerbare Primärenergie (PERT) [MJ]: A1 895.341, A2 0.633859, A3 142.007, A5 -40.11, C2 0.120865, C3 -889.768, D -165.725
- Nicht-erneuerbare Primärenergie als Energieträger (PENRE) [MJ]: A1 9.02449, A2 10.9275, A3 559.81, A5 2.21749, C2 2.08367, C3 5.5136, D -626.972
- Nicht-erneuerbare Primärenergie zur stofflichen Nutzung (PENRM) [MJ]: A1 161.18, A2 0, A3 31.4357, A5 -31.4357, C2 0, C3 -161.18, D 0
- Total nicht erneuerbare Primärenergie (PENRT) [MJ]: A1 170.204, A2 10.9275, A3 591.246, A5 -29.2182, C2 2.08367, C3 -155.666, D -626.972
- Einsatz von Sekundärstoffen (SM) [kg]: A1 0, A2 0, A3 0, A5 0, C2 0, C3 0, D 0
- Erneuerbare Sekundärbrennstoffe (RSF) [MJ]: A1 0, A2 0, A3 258.496, A5 0, C2 0, C3 0, D 890.104
- Nicht erneuerbare Sekundärbrennstoffe (NRSF) [MJ]: A1 0, A2 0, A3 0, A5 0, C2 0, C3 0, D 161.18
- Einsatz von Süßwasserressourcen (FW) [m^3]: A1 0.0701887, A2 0.00107163, A3 0.382453, A5 0.0183206, C2 0.00020434, C3 0.000385045, D 0.0899334

## Outputs
- Gefährlicher Abfall zur Deponie (HWD) [kg]: A1 5.30918e-7, A2 6.10411e-7, A3 1.18444e-6, A5 9.78325e-9, C2 1.16394e-7, C3 3.1416e-7, D -3.40316e-7
- Entsorgter nicht gefährlicher Abfall (NHWD) [kg]: A1 0.0317367, A2 0.000888299, A3 0.347663, A5 0.247763, C2 0.000169383, C3 0.000370197, D 1.14906
- Entsorgter radioaktiver Abfall (RWD) [kg]: A1 0.00157786, A2 1.48264e-5, A3 0.0866502, A5 8.54718e-5, C2 2.82712e-6, C3 6.55331e-6, D -0.028807
- Komponenten für die Wiederverwendung (CRU) [kg]: A1 0, A2 0, A3 0, A5 0, C2 0, C3 0, D 0
- Stoffe zum Recycling (MFR) [kg]: A1 0, A2 0, A3 0, A5 0, C2 0, C3 0, D 0
- Stoffe für die Energierückgewinnung (MER) [kg]: A1 0, A2 0, A3 0, A5 0, C2 0, C3 51.7, D 0
- Exportierte elektrische Energie (EEE) [MJ]: A1 0, A2 0, A3 0, A5 11.3501, C2 0, C3 0, D 0
- Exportierte thermische Energie (EET) [MJ]: A1 0, A2 0, A3 0, A5 23.9896, C2 0, C3 0, D 0

## Impact indicators
- Globales Erwärmungspotenzial (GWP) [kg CO_(2)-Äq.]: A1 -79.0291, A2 0.79192, A3 17.0793, A5 6.1351, C2 0.151005, C3 85.104, D -32.7376
- Abbau Potential der stratosphärischen Ozonschicht (ODP) [kg CFC11-Äq.]: A1 7.75523e-11, A2 1.32712e-16, A3 2.10315e-13, A5 2.43776e-15, C2 2.53058e-17, C3 1.40404e-16, D -1.00397e-12
- Versauerungspotenzial von Boden und Wasser (AP) [kg SO_(2)-Äq.]: A1 0.0118945, A2 0.00334461, A3 0.0264189, A5 0.00117721, C2 0.000637755, C3 0.00373648, D -0.0392877
- Eutrophierungspotenzial (EP) [kg PO_(4)^(3)-Äq.]: A1 0.0019861, A2 0.000851266, A3 0.00480722, A5 0.00018735, C2 0.000162321, C3 0.000809305, D -0.00645236
- Bildungspotential für troposphärisches Ozon (POCP) [kg Ethen-Äq.]: A1 0.00227084, A2 -0.00138107, A3 0.00263989, A5 5.26505e-5, C2 -0.000263344, C3 0.000367027, D -0.00351958
- Potenzial für den abiotischen Abbau nicht fossiler Ressourcen (ADPE) [kg Sb-Äq.]: A1 1.43173e-6, A2 6.19127e-8, A3 7.19489e-6, A5 2.14662e-7, C2 1.18056e-8, C3 3.88892e-8, D -9.82264e-6
- Potenzial für den abiotischen Abbau fossiler Brennstoffe (ADPF) [MJ]: A1 166.216, A2 10.8894, A3 361.948, A5 2.00169, C2 2.07642, C3 5.49676, D -554.213

## Use advice
Gültigkeitsbereich:
Diese Umwelt-Produktdeklaration gilt für die flexiblen Holzfaser-Dämmplatten STEICOflex F 036/038, welche in folgendem Werk hergestellt werden:

STEICO Casteljaloux SAS

30 rue de Belloc

47700 Casteljaloux
Systemgrenze:
Der Deklarationstyp entspricht einer EPD „Wiege bis Werkstor – mit Optionen“. Inhalte sind das Stadium der Produktion, d. h. von der Bereitstellung der Rohstoffe bis zum Werkstor der Produktion (cradle-to-gate, Module A1 bis A3), sowie das Modul A5 und Teile des Endes des Lebensweges (Modul C2 und C3). Darüber hinaus erfolgt eine Betrachtung der potenziellen Nutzen und Lasten über den Lebensweg des Produktes hinaus (Modul D).

Das Modul A1 umfasst die Bereitstellung des Holzes aus dem Forst sowie die Bereitstellung der Additive. Die Transporte dieser Stoffe werden in Modul A2 berücksichtigt. Modul A3 beinhaltet die Aufwendungen der Herstellung des Produktes, wie die Bereitstellung der Brennstoffe, Betriebsmittel und Energie, sowie die Verpackung des Produktes. Für die Wärmebereitstellung bezogenes Altholz steht ohne Umweltlasten bereit.

In Modul A5 wird ausschließlich die Entsorgung der Produktverpackung abgedeckt, welche den Ausgang des enthaltenen biogenen Kohlenstoffs sowie der enthaltenen Primärenergie (PERM und PENRM) einschließt.

Modul C2 berücksichtigt den Transport zum Entsorger und Modul C3 die Aufbereitung und Sortierung des Altholzes. Aufgrund Datenmangels wurde die konservative Annahme getroffen, dass das Material, wie es bei Altholz der Fall wäre, zerkleinert wird, bevor es zur Nachnutzung bereit ist. Zudem werden in Modul C3 gemäß /EN 16485/ die CO2-Äquivalente des im Produkt befindlichen holzinhärenten Kohlenstoffs sowie die im Produkt enthaltene erneuerbare und nicht-erneuerbare Primärenergie (PERM und PENRM) als Abgänge verbucht.

In Modul D werden die thermische Verwertung des Produktes am Ende seines Lebenswegs sowie die daraus resultierenden potenziellen Nutzen und Lasten in Form einer Systemerweiterung bilanziert.

## Data sources
- STEICOflex F.pdf
- GaBi Database (all versions)
- GaBi database SP39 2019
