# Sandwichwand

Dataset: ILCD process, EPD, average dataset
Geography: RER
Reference year: 2020
Valid until: 2025
Classification: OEKOBAU.DAT: Mineralische Baustoffe / Steine und Elemente / Betonfertigteile und Betonwaren
Classification: IBUCategories: 02 Bauprodukte / Normal- Leicht- und Porenbeton / Betonfertigteile
Method details: Betonfertigteile.pdf
Generated by: myclimate Deutschland gGmbH
Registration number: EPD-THO-20200192-IBD1-DE
Owner: thomas gruppe - Geschäftsfeld Betonbauteile
Compliance: DIN EN 15804; ISO 14025
Review: Accredited third party review by Institut Bauen und Umwelt e. V.
Amounts: rows without a unit in brackets have none in this file; such an amount is in the reference unit of its flow, which a separate flow dataset defines
copyright: true
licenseType: Free of charge for all users and uses
accessRestrictions: None

## General comment
Diese Deklaration bezieht sich auf die Produktgruppe der Sandwichwände.

Die Herstellung von Sandwichwänden erfolgt auf Flachbahnen oder auf Kipptischen der Betonfertigteilwerke. Sandwichwände bestehen aus vorgefertigten Stahlbetonplatten und unterscheiden sich in ihren Größen, Abmessungen und Verwendungszwecke.

Sandwichwände sind durch einen dreischichtigen Aufbau gekennzeichnet. Tragschale, Dämmschicht und Wetterschale. Die Dämmschicht wird kundenspezifisch eingesetzt und ist nicht Teil des betrachteten Produktsystems.

## Technology and included processes
Formgebung Die Vorprodukte wie Zuschlagstoffe, Zement und Stahl für die Sandwichwände werden angeliefert. Nach fest vorgegebenen Rezepten wird der Beton zusammengemixt. Bevor die Sandwichwände gegossen werden, werden die Schalungen mit den gewünschten Abmessungen erstellt. Die Armierungseisen für die Stahlbetonplatten werden angebracht und anschließend betoniert. Aushärtung und Auslagerung Die Aushärtung der Sandwichwände findet bei einer Dauer von 8-10 Stunden statt. Im Anschluss werden die Sandwichwände entschalt und können verladen werden. Die Normfestigkeit ist nach 28 Tagen nach der Herstellung erreicht.
Technische Daten:
Es gelten die Daten entsprechend den
Leistungserklärungen nach DIN EN 14992:2012, Betonfertigteile - Wandelemente und DIN EN 1520:2011, Vorgefertigte Bauteile aus haufwerksporigem Leichtbeton und mit statisch anrechenbarer oder nicht anrechenbarer Bewehrung.
Deklarierte Einheit:
Die Deklaration bezieht sich auf die Herstellung von 1 t produzierte Sandwichwand.

Die Produktgruppe der Sandwichwände variieren in Volumen, Massen und geringfügig in ihrer Zusammensetzung. Die Durchschnittsbildung erfolgte bezogen auf die gemittelte Jahreproduktion der einzelnen Standorte und bildet somit den tatsächlichen Produktionsmix ab.

## Technical purpose
Sandwichwände der thomas gruppe aus dem Geschäftsfeld Betonbauteile finden Anwendung als Außenwand im Wohnungs-, Industrie- und Landwirtschaftsbau.

## Reference product
- Sandwichwand: 1000

## Inputs
- Erneuerbare Primärenergie als Energieträger (PERE) [MJ]: A1-A3 380, C1 0.0535, C2 1.61, C4 25.5
- Erneuerbare Primärenergie zur stofflichen Nutzung (PERM) [MJ]: A1-A3 0, C1 0, C2 0, C4 0
- Total erneuerbare Primärenergie (PERT) [MJ]: A1-A3 380, C1 0.0535, C2 1.61, C4 25.5
- Nicht-erneuerbare Primärenergie als Energieträger (PENRE) [MJ]: A1-A3 1820, C1 11.9, C2 25.8, C4 200
- Nicht-erneuerbare Primärenergie zur stofflichen Nutzung (PENRM) [MJ]: A1-A3 0, C1 0, C2 0, C4 0
- Total nicht erneuerbare Primärenergie (PENRT) [MJ]: A1-A3 1820, C1 11.9, C2 25.8, C4 200
- Einsatz von Sekundärstoffen (SM) [kg]: C1 0, C2 0, C4 0
- Erneuerbare Sekundärbrennstoffe (RSF) [MJ]: A1-A3 0, C1 0, C2 0, C4 0
- Nicht erneuerbare Sekundärbrennstoffe (NRSF) [MJ]: A1-A3 0, C1 0, C2 0, C4 0
- Einsatz von Süßwasserressourcen (FW) [m^3]: A1-A3 0.625, C1 8.45e-5, C2 0.00182, C4 0.0504

## Outputs
- Gefährlicher Abfall zur Deponie (HWD) [kg]: A1-A3 0.000657, C1 1.69e-9, C2 1.46e-6, C4 3.42e-6
- Entsorgter nicht gefährlicher Abfall (NHWD) [kg]: A1-A3 83.8, C1 0.00151, C2 0.00183, C4 931
- Entsorgter radioaktiver Abfall (RWD) [kg]: A1-A3 0.042, C1 1.18e-5, C2 3.9e-5, C4 0.00266
- Komponenten für die Wiederverwendung (CRU) [kg]: A1-A3 0, C1 0, C2 0, C4 0
- Stoffe zum Recycling (MFR) [kg]: A1-A3 1.31, C1 0, C2 70.5, C4 0
- Stoffe für die Energierückgewinnung (MER) [kg]: A1-A3 0, C1 0, C2 0, C4 0
- Exportierte elektrische Energie (EEE) [MJ]: A1-A3 0, C1 0, C2 0, C4 0
- Exportierte thermische Energie (EET) [MJ]: A1-A3 0, C1 0, C2 0, C4 0

## Impact indicators
- Globales Erwärmungspotenzial (GWP) [kg CO_(2)-Äq.]: A1-A3 244, C1 0.863, C2 1.92, C4 13.8
- Abbau Potential der stratosphärischen Ozonschicht (ODP) [kg CFC11-Äq.]: A1-A3 1.16e-6, C1 2.84e-16, C2 9.11e-16, C4 8.12e-14
- Versauerungspotenzial von Boden und Wasser (AP) [kg SO_(2)-Äq.]: A1-A3 0.331, C1 0.000607, C2 0.00433, C4 0.0829
- Eutrophierungspotenzial (EP) [kg PO_(4)^(3)-Äq.]: A1-A3 0.0817, C1 8.7e-5, C2 0.00106, C4 0.0094
- Bildungspotential für troposphärisches Ozon (POCP) [kg Ethen-Äq.]: A1-A3 0.0396, C1 9.06e-5, C2 -0.00134, C4 0.00636
- Potenzial für den abiotischen Abbau nicht fossiler Ressourcen (ADPE) [kg Sb-Äq.]: A1-A3 8.03e-5, C1 3.02e-8, C2 1.86e-7, C4 5.09e-6
- Potenzial für den abiotischen Abbau fossiler Brennstoffe (ADPF) [MJ]: A1-A3 1710, C1 11.8, C2 25.7, C4 194

## Use advice
Gültigkeitsbereich:
Dieses Dokument bezieht sich auf Sandwichwände aus dem Geschäftsfeld Betonbauteile der thomas gruppe, hergestellt an den nachfolgenden 2 von insgesamt 15 Produktionsstandorten:

thomas betonbauteile Melsdorf GmbH & Co. KG

Am Ihlberg 22-24

24109 Melsdorf

thomas praefab Międzyrzecz Sp. z o.o.

ul. Budowlanych 9

66-300 Międzyrzecz

Die deklarierte Einheit bezieht sich auf 1 t Sandwichwände. Die Datenerhebung für die Herstellung des deklarierten Produktes erfolgte werksspezifisch mit aktuellen Jahresdaten von 2018. Der Deklarationsinhaber ist verantwortlich für die zugrunde liegenden Daten und deren Verifizierung.
Systemgrenze:
Die Ökobilanz betrachtet die Systemgrenzen "von der Wiege bis zum Werkstor - mit Optionen" und folgt dem modularen Aufbau nach EN 15804. Die Ökobilanz berücksichtigt folgende Module:

A1: Rohstoffgewinnung und –verarbeitung, Verarbeitungsprozesse von Zement und Zuschlagstoffen, Stahlerzeugung, -guß und -produktion; Aufbereitung von Recyclingmaterialien
A2: Transport zum Hersteller: Transport der Rohstoffe zum Herstellungswerk
A3: Herstellungsprozesse und -aufwendungen: Herstellung der Betonfertigteile

C1: Rückbau & Abriss der Betonfertigteile
C2: Transport zur Abfallbewirtschaftung
C4: Beseitigung der Betonfertigteile zur Deponie

## Data sources
- ecoinvent database (all versions)
- ecoinvent 3.6 database
