# THERMATEX Basic & Standard

Dataset: ILCD process, EPD, average dataset
Geography: DE
Reference year: 2021
Valid until: 2026
Classification: OEKOBAU.DAT: Mineralische Baustoffe / Steine und Elemente / Deckenplatten
Classification: IBUCategories: 02 Bauprodukte / Innen-, Außenwand und Deckenbekleidungen / Mineralplatten
Method details: Mineralplatten.pdf
Generated by: Daxner & Merl GmbH
Registration number: EPD-KNA-20210052-IBC1-DE
Owner: Knauf Ceiling Solutions GmbH & Co. KG
Compliance: DIN EN 15804+A2; ISO 14025
Review: Accredited third party review by Institut Bauen und Umwelt e. V.
Amounts: rows without a unit in brackets have none in this file; such an amount is in the reference unit of its flow, which a separate flow dataset defines
copyright: true
licenseType: Free of charge for all users and uses
accessRestrictions: None

## General comment
Die im Nassverfahren hergestellten Deckenplatten bestehen aus biolöslicher Mineralwolle, Perlit, Ton und Stärke. Die Deckenplatten erfüllen die Anforderungen der DIN 18177 und EN 13964.

Die AMF- und Armstrong-Mineralplatten gibt es in einer großen Bandbreite verschiedener Oberflächendesigns und Produkteigenschaften. Je nach Ausführung sind die Deckenplatten in verschiedenen Formaten und Kantenausführungen erhältlich.

Diese EPD gilt für die folgenden Produkte:

Basic Range:
ECOMIN Fligran, ECOMIN Planet, ECOMIN Trento, ECOMIN Nevada, ECOMIN Orbit (micro), Armstrong Aleria L, Armstrong Atlas, Armstrong Bajkal, Armstrong Retail, Armstrong Savanna, Armstrong Scala

Standard Range:
THERMATEX Star, THERMATEX Star Complete, THERMATEX Schlicht, THERMATEX Laguna (micro), THERMATEX Feinstratos (micro), THERMATEX Feinstratos (micro) Complete, THERMATEX Mercure, THERMATEX Mercure Complete, THERMATEX Fresko, THERMATEX Feinfresko, THERMATEX Symetra, Armstrong Plain, Armstrong Casa, Armstrong Casa Max, Armstrong Dune Max, Armstrong Dune Supreme, Armstrong Dune, Armstrong Dune eVo, Armstrong Dune eVo dB, Armstrong Sahara, Armstrong Sahara dB, Armstrong Fine Fissured, Armstrong Fine Fissured High NRC, Armstrong Tatra, Armstrong Cortega

## Technology and included processes
Die Mineralplatten werden im traditionellen Nass-Verfahren (wet-felt) hergestellt. Die Ausgangsstoffe werden dabei mit Wasser zu einer homogenen Stoffsuspension gemischt, die auf einen Bandförderer gepumpt wird (Langsieb). Das Wasser wird mechanisch (Schwerkraft und Unterdruck) sowie durch Verdampfen im Trocknungsofen entfernt. Soweit möglich wird das Prozesswasser wiederverwendet. Es wird entsprechend behandelt und wieder in den Prozesswasserkreislauf eingespeist. Die Platten können abhängig vom gewünschten Erscheinungsbild besandet, farbbehandelt, mit Mustern versehen, erodiert oder geprägt sein. Produktionsabfall und Staub werden im Prozess im Sinne eines internen Kreislaufs wiederverwendet. Das Herstellerwerk ist ISO 9001, ISO 14001 und ISO 50001 zertifiziert.
Technische Daten:
Mineralplatten (wet-felt) werden durch die EN 13964 geregelt und haben die entsprechende Kennzeichnung und Leistungserklärung. Im Überblick ergeben sich folgende Daten:
Deklarierte Einheit:
Die vorliegende Umwelt-Produktdeklaration bezieht sich auf eine deklarierte Einheit von 1 m² THERMATEX/ARMSTRONG Standard Range Mineralplatte mit einem mittleren Flächengewicht von 3,35 kg/m².

## Technical purpose
Mineralplatten (wet-felt) werden typischerweise als
Bekleidung für abgehängte Deckenkonstruktionen verwendet.
Sie werden in erster Linie als optische Bekleidung, aber auch für Schallabsorption und Schalldämmung, für Feuerwiderstand und gegen
Feuerausbreitung, für Reinräume sowie bei hohen
Hygieneanforderungen eingesetzt.

## Reference product
- THERMATEX/ARMSTRONG Standard Range Mineralplatte: 1

## Inputs
- Erneuerbare Primärenergie als Energieträger (PERE) [MJ]: A1-A3 3.43, C1 0, C2 0.00769, C3 0, C4 0.0873, D 0
- Erneuerbare Primärenergie zur stofflichen Nutzung (PERM) [MJ]: A1-A3 5.79, C1 0, C2 0, C3 0, C4 0, D 0
- Total erneuerbare Primärenergie (PERT) [MJ]: A1-A3 9.22, C1 0, C2 0.00769, C3 0, C4 0.0873, D 0
- Nicht-erneuerbare Primärenergie als Energieträger (PENRE) [MJ]: A1-A3 70.8, C1 0, C2 0.134, C3 0, C4 0.667, D 0
- Nicht-erneuerbare Primärenergie zur stofflichen Nutzung (PENRM) [MJ]: A1-A3 6.19, C1 0, C2 0, C3 0, C4 0, D 0
- Total nicht erneuerbare Primärenergie (PENRT) [MJ]: A1-A3 77, C1 0, C2 0.134, C3 0, C4 0.667, D 0
- Einsatz von Sekundärstoffen (SM) [kg]: A1-A3 0.75, C1 0, C2 0, C3 0, C4 0, D 0
- Erneuerbare Sekundärbrennstoffe (RSF) [MJ]: A1-A3 0, C1 0, C2 0, C3 0, C4 0, D 0
- Nicht erneuerbare Sekundärbrennstoffe (NRSF) [MJ]: A1-A3 0, C1 0, C2 0, C3 0, C4 0, D 0
- Einsatz von Süßwasserressourcen (FW) [m^3]: A1-A3 0.0134, C1 0, C2 8.97e-6, C3 0, C4 0.000168, D 0

## Outputs
- Gefährlicher Abfall zur Deponie (HWD) [kg]: A1-A3 1.07e-5, C1 0, C2 6.18e-9, C3 0, C4 1.02e-8, D 0
- Entsorgter nicht gefährlicher Abfall (NHWD) [kg]: A1-A3 0.188, C1 0, C2 2.12e-5, C3 0, C4 3.35, D 0
- Entsorgter radioaktiver Abfall (RWD) [kg]: A1-A3 0.000969, C1 0, C2 2.46e-7, C3 0, C4 7.58e-6, D 0
- Komponenten für die Wiederverwendung (CRU) [kg]: A1-A3 0, C1 0, C2 0, C3 0, C4 0, D 0
- Stoffe zum Recycling (MFR) [kg]: A1-A3 0, C1 0, C2 0, C3 0, C4 0, D 0
- Stoffe für die Energierückgewinnung (MER) [kg]: A1-A3 0, C1 0, C2 0, C3 0, C4 0, D 0
- Exportierte elektrische Energie (EEE) [MJ]: A1-A3 0, C1 0, C2 0, C3 0, C4 0, D 0
- Exportierte thermische Energie (EET) [MJ]: A1-A3 0, C1 0, C2 0, C3 0, C4 0, D 0

## Impact indicators
- Globales Erwärmungspotenzial total (GWP-total) [kg CO_(2)-Äq.]: A1-A3 4.49, C1 0, C2 0.0101, C3 0, C4 0.559, D 0
- Globales Erwärmungspotenzial fossil (GWP-fossil) [kg CO_(2)-Äq.]: A1-A3 5, C1 0, C2 0.01, C3 0, C4 0.0508, D 0
- Globales Erwärmungspotenzial biogen (GWP-biogenic) [kg CO_(2)-Äq.]: A1-A3 -0.509, C1 0, C2 -1.67e-5, C3 0, C4 0.509, D 0
- Globales Erwärmungspotenzial luluc (GWP-luluc) [kg CO_(2)-Äq.]: A1-A3 0.00327, C1 0, C2 8.07e-5, C3 0, C4 0.000146, D 0
- Abbau Potential der stratosphärischen Ozonschicht (ODP) [kg CFC11-Äq.]: A1-A3 9.28e-11, C1 0, C2 1.83e-18, C3 0, C4 1.88e-16, D 0
- Versauerungspotenzial von Boden und Wasser (AP) [mol H^(+)-Äq.]: A1-A3 0.00981, C1 0, C2 3.39e-5, C3 0, C4 0.000365, D 0
- Eutrophierungspotenzial Süßwasser (EP-freshwater) [kg PO_(4)-Äq.]: A1-A3 8.16e-5, C1 0, C2 3.04e-8, C3 0, C4 8.73e-8, D 0
- Eutrophierungspotenzial Salzwasser (EP-marine) [kg N-Äq.]: A1-A3 0.00334, C1 0, C2 1.53e-5, C3 0, C4 9.38e-5, D 0
- Eutrophierungspotenzial Land (EP-terrestrial) [mol N-Äq.]: A1-A3 0.0362, C1 0, C2 0.000171, C3 0, C4 0.00103, D 0
- Bildungspotential für troposphärisches Ozon (POCP) [kg NMVOC-Äq.]: A1-A3 0.00618, C1 0, C2 3e-5, C3 0, C4 0.000284, D 0
- Potenzial für den abiotischen Abbau nicht fossiler Ressourcen (ADPE) [kg Sb-Äq.]: A1-A3 1.33e-6, C1 0, C2 8.06e-10, C3 0, C4 4.56e-9, D 0
- Potenzial für den abiotischen Abbau fossiler Brennstoffe (ADPF) [MJ]: A1-A3 77, C1 0, C2 0.133, C3 0, C4 0.667, D 0
- Wassernutzung (WDP) [m^(3) Welt-Äq. entzogen]: A1-A3 0.0667, C1 0, C2 9.72e-5, C3 0, C4 0.00533, D 0
- Auftreten von Krankheiten aufgrund von Feinstaubemissionen (PM) [Krankheitsfälle]: A1-A3 1.1e-7, C1 0, C2 1.92e-10, C3 0, C4 4.51e-9, D 0
- Wirkung durch Exposition des Menschen mit U235 (IR) [kBq U235-Äq.]: A1-A3 0.115, C1 0, C2 3.63e-5, C3 0, C4 0.000778, D 0
- Toxizitätsvergleichseinheit für Ökosysteme (ETP-fw) [CTUe]: A1-A3 14.9, C1 0, C2 0.0996, C3 0, C4 0.381, D 0
- Toxizitätsvergleichseinheit für Menschen (krebserregend) (HTP-c) [CTUh]: A1-A3 1.19e-9, C1 0, C2 2.06e-12, C3 0, C4 5.64e-11, D 0
- Toxizitätsvergleichseinheit für Menschen (nicht krebserregend) (HTP-nc) [CTUh]: A1-A3 3.72e-8, C1 0, C2 1.18e-10, C3 0, C4 6.22e-9, D 0
- Bodenqualitätsindex (SQP) [SQP]: A1-A3 69.2, C1 0, C2 0.0467, C3 0, C4 0.139, D 0

## Use advice
Gültigkeitsbereich:
Die vorliegende Umwelt-Produktdeklaration bezieht sich auf eine deklarierte Einheit von 1 m² THERMATEX/ARMSTRONG Standard Range Mineralplatte mit einer mittleren Rezeptur und einem mittleren Flächengewicht von 3,35 kg/m², produziert am Standort in Grafenau, Deutschland unter dem Markennamen THERMATEX bzw. ARMSTRONG.
Systemgrenze:
Die Ökobilanz der durchschnittlichen THERMATEX/ARMSTRONG Standard Range Mineralplatte beinhaltet eine cradle-to-gate Betrachtung (Wiege bis zum Werkstor) der auftretenden Umweltwirkungen mit den Modulen C1-C4 und Modul D. Die folgenden Lebenszyklusphasen werden in der Analyse berücksichtigt:

Modul A1–A3 | Produktionsstadium

Das Produktionsstadium beinhaltet die vorgelagerten Lasten der Rohstoffversorgung, deren Transporte und die Produktionsanlage am Knauf Ceiling Solutions Standort in Grafenau (Deutschland). Mineralische Deckenplatten werden im Nassverfahren hergestellt. Die Hauptrohstoffeinsätze stellen Mineralwolle, Perlit, Ton und Stärke dar. Der Produktionsstandort wird mit Strom aus dem deutschen Stromnetz und Wärme aus Erdgas versorgt.

Modul C1 | Rückbau/Abriss

Die Demontage des Produktes erfolgt entweder manuell oder mit kleineren Werkzeugen. Der bezogene Energiebedarf wird als vernachlässigbar angesehen.

Modul C2 | Transport zur Entsorgung

Der Transport zur Entsorgung des Materials wird über ein repräsentatives Szenario mit 50 km LKW-Transportdistanz zur Deponie abgeschätzt. In der Realität kann dieses Szenario je nach dem tatsächlichen Ort des Rückbaus und der entsprechenden Abfallbehandlung variieren.

Modul C3 | Abfallbehandlung

Das deklarierte Szenario geht von einer Deponierung des Produkts aus. Entsprechende Umweltauswirkungen werden in Modul C4 berücksichtigt.

Modul C4 | Beseitigung

Das Modul C4 bezieht sich auf die Emissionen aus der Entsorgung der mineralischen Deckenplatten. Das gewählte Szenario erfasst daher die Umweltbelastungen durch die Deponierung des Produktes in einer Inertstoffdeponie.

Modul D | Gutschriften und Lasten außerhalb der Systemgrenze

Das deklarierte Szenario geht von einer Deponierung des Produkts aus. Entsprechende Umweltauswirkungen werden in Modul C4 berücksichtigt.

## Data sources
- GaBi Database (all versions)
- GaBi database SP40 2020
