# Argeton

Dataset: ILCD process, EPD, specific dataset
Geography: DE
Reference year: 2019
Valid until: 2024
Classification: OEKOBAU.DAT: Mineralische Baustoffe / Steine und Elemente / Fliesen und Platten
Classification: IBUCategories: 02 Bauprodukte / Fassaden / Keramische Bekleidung
Method details: Keramische Bekleidung.pdf
Generated by: PE INTERNATIONAL AG
Registration number: EPD-WIN-20140143-ICA2-DE
Owner: Wienerberger GmbH
Compliance: DIN EN 15804; ISO 14025
Review: Accredited third party review by Institut Bauen und Umwelt e. V.
Amounts: rows without a unit in brackets have none in this file; such an amount is in the reference unit of its flow, which a separate flow dataset defines
copyright: true
licenseType: Free of charge for all users and uses
accessRestrictions: None

## General comment
Argeton-Tonziegelfassaden bestehen aus ebenen keramischen Fassadenplatten, welche aus verschiedenen Tonmischungen hergestellt werden. Es werden sowohl einschalige Platten als auch Platten mit Hohlräumen für vorgehängte hinterlüftete Fassaden produziert. Die Fassadenplatten werden mittels systemgebundener Aluminium-Tragsysteme an eine primäre Unterkonstruktion der Fassade montiert.

Argeton Fassadenplatten werden in unterschiedlichen Lieferformaten und Abmessungen vertrieben, mit oder ohne Hohlkammern, und unterscheiden sich somit im Flächengewicht. Die nach Rezeptur eingesetzten Rohstoffe und der Herstellungsprozess sind dabei identisch. Das deklarierte Flächengewicht stellt einen Jahresdurchschnitt dar auf Basis der im Jahr 2013 hergestellten Produktionsmengen.

## Technology and included processes
Die Herstellung der Argeton-Fassadenplatten erfolgt in 9 Schritten: Rohstoffgewinnung, Aufbereitung, Formgebung, Trocknung, Farbgebung, Brennen, Schneiden, Qualitätskontrolle, Verpackung Der Abbau des Tons erfolgt in zum Werk nahe gelegenen Tongruben. Nach dem Transport ins Werk folgt der Aufbereitungsprozess. Dieser umfasst die Zerkleinerung, das Mischen, das Anfeuchten und Reinigen des Tons von Fremdstoffen wie Steinen und die Beimengung von Zuschlagstoffen. Der Ton wird im Strangpressverfahren durch eine Form (Mundstück) gepresst und grob auf Länge geschnitten. Während der Trocknung wird dem plastischen Ton Feuchtigkeit entzogen. Bei Bedarf wird eine Engobe oder Glasur auf den getrockneten Ziegelplatten aufgetragen. In einem Rollenofen werden die Platten je nach Ton bei ca. 1000°C bis 1200°C gebrannt. Nach dem Brennvorgang erfolgt das Schneiden auf die exakte Länge. Die Ziegelplatten werden optisch geprüft und stichprobenartig auf ihre Formhaltigkeit vemessen. Die Verpackung mit Folie und weiteren Verpackungsmaterialien erfolgt halbautomatisch auf Paletten. Das Qualitätsmanagementsystem erfüllt die Anforderungen der Norm /ISO 9001/.
Deklarierte Einheit:
Die Deklaration bezieht sich auf 1m² keramischer Fassadenplatten inklusive systemgebundener Aluminium-Unterkonstruktion. Das durchschnittliche Flächengewicht der keramischen Fassadenplatten (ohne Unterkonstruktion) beträgt 40 kg/m², das der Unterkonstruktion 0,57 kg/m².

## Technical purpose
Argeton-Tonziegelplatten werden als Bekleidungsmaterial bei vorgehängten hinterlüfteten Fassaden angewendet sowie bei dekorativen Bekleidungen für den Innenausbau. Die Fassadenplatten werden auch für Unterdecken, Fensterlaibungen, Fensterstürze, Abdeckungen oder im Dachbereich verwendet.

## Reference product
- 1m² keramische Fassadenplatten inklusive Unterkonstruktion: 1

## Inputs
- Erneuerbare Primärenergie als Energieträger (PERE) [MJ]: A1-A3 48
- Erneuerbare Primärenergie zur stofflichen Nutzung (PERM) [MJ]: A1-A3 0
- Total erneuerbare Primärenergie (PERT) [MJ]: A1-A3 48, A4 0.0072805, A5 0.01, B1 0, B2 0, B3 0, B4 0, B5 0, C1 0, C2 0.09, C3 0, C4 0.62, D -13.4
- Nicht-erneuerbare Primärenergie als Energieträger (PENRE) [MJ]: A1-A3 646
- Nicht-erneuerbare Primärenergie zur stofflichen Nutzung (PENRM) [MJ]: A1-A3 0
- Total nicht erneuerbare Primärenergie (PENRT) [MJ]: A1-A3 646, A4 3.29212, A5 0.15, B1 0, B2 0, B3 0, B4 0, B5 0, C1 0, C2 1.58, C3 0, C4 7.46, D -37.6
- Einsatz von Sekundärstoffen (SM) [kg]: A1-A3 0.39, A4 0, A5 0, B1 0, B2 0, B3 0, B4 0, B5 0, C1 0, C2 0, C3 0, C4 0, D 0
- Erneuerbare Sekundärbrennstoffe (RSF) [MJ]: A1-A3 0, A4 0, A5 0, B1 0, B2 0, B3 0, B4 0, B5 0, C1 0, C2 0, C3 0, C4 0, D 0
- Nicht erneuerbare Sekundärbrennstoffe (NRSF) [MJ]: A1-A3 0, A4 0, A5 0, B1 0, B2 0, B3 0, B4 0, B5 0, C1 0, C2 0, C3 0, C4 0, D 0
- Einsatz von Süßwasserressourcen (FW) [m^3]: A1-A3 0.0856, A4 2.3715e-5, A5 0.00117, B1 0, B2 0, B3 0, B4 0, B5 0, C1 0, C2 6e-5, C3 0, C4 -0.0225, D -0.0284

## Outputs
- Gefährlicher Abfall zur Deponie (HWD) [kg]: A1-A3 0.0449, A4 8.63934e-6, A5 1.99e-5, B1 0, B2 0, B3 0, B4 0, B5 0, C1 0, C2 6.99e-6, C3 0, C4 0.000338, D -0.00399
- Entsorgter nicht gefährlicher Abfall (NHWD) [kg]: A1-A3 1.32, A4 1.58394e-5, A5 0.0146, B1 0, B2 0, B3 0, B4 0, B5 0, C1 0, C2 0.000301, C3 0, C4 40.1, D -0.43
- Entsorgter radioaktiver Abfall (RWD) [kg]: A1-A3 0.0186, A4 3.8617e-6, A5 7.64e-6, B1 0, B2 0, B3 0, B4 0, B5 0, C1 0, C2 2.2e-6, C3 0, C4 0.00013, D -0.00238
- Komponenten für die Wiederverwendung (CRU) [kg]: A1-A3 0, A4 0, A5 0, B1 0, B2 0, B3 0, B4 0, B5 0, C1 0, C2 0, C3 0, C4 0
- Stoffe zum Recycling (MFR) [kg]: A1-A3 0, A4 0, A5 0, B1 0, B2 0, B3 0, B4 0, B5 0, C1 0, C2 0.51, C3 0, C4 0
- Stoffe für die Energierückgewinnung (MER) [kg]: A1-A3 0, A4 0, A5 0, B1 0, B2 0, B3 0, B4 0, B5 0, C1 0, C2 0, C3 0, C4 0
- Exportierte elektrische Energie (EEE) [MJ]: A1-A3 0, A4 0, A5 0.6945, B1 0, B2 0, B3 0, B4 0, B5 0, C1 0, C2 0, C3 0, C4 0
- Exportierte thermische Energie (EET) [MJ]: A1-A3 0, A4 0, A5 1.677, B1 0, B2 0, B3 0, B4 0, B5 0, C1 0, C2 0, C3 0, C4 0

## Impact indicators
- Globales Erwärmungspotenzial (GWP) [kg CO_(2)-Äq.]: A1-A3 43.4, A4 0.236048, A5 0.484, B1 0, B2 0, B3 0, B4 0, B5 0, C1 0, C2 0.11529, C3 0, C4 0.542915, D -3.18
- Abbau Potential der stratosphärischen Ozonschicht (ODP) [kg CFC11-Äq.]: A1-A3 2.71e-9, A4 1.7919e-13, A5 3.59e-13, B1 0, B2 0, B3 0, B4 0, B5 0, C1 0, C2 2.75863e-13, C3 0, C4 6.80837e-12, D 1.56e-9
- Versauerungspotenzial von Boden und Wasser (AP) [kg SO_(2)-Äq.]: A1-A3 0.111, A4 0.000525203, A5 6.81e-5, B1 0, B2 0, B3 0, B4 0, B5 0, C1 0, C2 0.00031508, C3 0, C4 0.00344926, D -0.0191
- Eutrophierungspotenzial (EP) [kg PO_(4)^(3)-Äq.]: A1-A3 0.0103, A4 0.000103144, A5 9.8e-6, B1 0, B2 0, B3 0, B4 0, B5 0, C1 0, C2 7.06206e-5, C3 0, C4 0.000473313, D -0.000912
- Bildungspotential für troposphärisches Ozon (POCP) [kg Ethen-Äq.]: A1-A3 0.00668, A4 -0.000158075, A5 4.99e-6, B1 0, B2 0, B3 0, B4 0, B5 0, C1 0, C2 -8.87927e-5, C3 0, C4 0.000323881, D -0.000966
- Potenzial für den abiotischen Abbau nicht fossiler Ressourcen (ADPE) [kg Sb-Äq.]: A1-A3 0.000247, A4 8.1021e-9, A5 2.34e-8, B1 0, B2 0, B3 0, B4 0, B5 0, C1 0, C2 5.40816e-9, C3 0, C4 2.04318e-7, D -8.14e-7
- Potenzial für den abiotischen Abbau fossiler Brennstoffe (ADPF) [MJ]: A1-A3 599, A4 3.28236, A5 0.13, B1 0, B2 0, B3 0, B4 0, B5 0, C1 0, C2 1.57026, C3 0, C4 7.13725, D -31.6

## Use advice
Gültigkeitsbereich:
Die EPD bezieht sich auf keramische Fassadenelemente des Produktionswerkes Görlitz (Am Dachziegelwerk 1, 02829 Schöpstal), die von der Wienerberger GmbH unter der Handelsmarke Argeton geführt werden. Die gesammelten Produktionsdaten beziehen sich auf das Jahr 2013. Die Ökobilanz, die auf plausiblen, transparent nachvollziehbaren Basisdaten beruht, repräsentiert zu 100% die genannten Produkte.
Systemgrenze:
Typ der EPD: Wiege bis Bahre.

Die Ökobilanz berücksichtigt die Rohstoffgewinnung, die Rohstofftransporte und die eigentliche

Produktherstellung inklusive Berücksichtigung der Verpackungsmaterialien (Module A1-A3).
Der Transport zur Baustelle (Modul A4) sowie die Behandlung der Verpackungsmaterialien in Müllverbrennungsanlagen nach dem Einbau des Produktes (Modul A5) sind ebenfalls Teil der Systemgrenzen.
Nach Ablauf der Nutzungsdauer wird das Produkt manuell rückgebaut (Modul C1). Nach dem Transport des rückgebauten Produktes (Modul C2) ist für die Fassadenplatte eine Deponierung auf einer Inertstoffdeponie vorgesehen (Modul C4), die Aluminium-Unterkonstruktion kann wiederverwertet werden. Gutschriften infolge des Recyclings von Primäraluminium sind in Modul D deklariert. Gutschriften für Strom und thermische Energie infolge der thermischen Verwertung der Verpackung innerhalb des Moduls A5 werden ebenfalls in Modul D berücksichtigt.
Das Nutzungsstadium (Modul B1-B5) ist in dieser Studie berücksichtigt.
Da sich die Module B6 und B7 auf den Betrieb des Gebäudes beziehen, werden diese in der EPD für das Argeton Fassadensystem nicht deklariert. Die Nutzung des Produkts steht in keinem Zusammenhang mit dem betrieblichen Energieeinsatz und Wassereinsatz bei Gebäuden.

## Data sources
- GaBi Database (all versions)
- GaBi database SP26 2014
