# A2-Betonpflaster- Standardstein grau mit Vorsatz

Dataset: ILCD process, EPD, average dataset
Geography: DE
Reference year: 2021
Valid until: 2026
Classification: OEKOBAU.DAT: Mineralische Baustoffe / Steine und Elemente / Betonfertigteile und Betonwaren
Classification: IBUCategories: 02 Bauprodukte / Tiefbauprodukte / Oberbaumaterialien für Verkehrswege im Aussenbereich
Method details: Oberbaumaterialien für Verkehrswege im Aussenbereich.pdf
Generated by: Sphera Solutions GmbH
Registration number: EPD-SLG-20210055-CBE1-DE
Owner: Betonverband Straße, Landschaft, Garten e.V.
Compliance: DIN EN 15804+A2; ISO 14025
Review: Accredited third party review by Institut Bauen und Umwelt e. V.
Amounts: rows without a unit in brackets have none in this file; such an amount is in the reference unit of its flow, which a separate flow dataset defines
copyright: true
licenseType: Free of charge for all users and uses
accessRestrictions: None

## General comment
Pflastersteine aus Beton werden aus natürlichen Gesteinskörnungen, Zement und Wasser, mit oder ohne Zugabe von Zusatzmitteln und Zusatzstoffen maschinell hergestellt.

Die Steine haben unterschiedliche Formate (Breite/Länge) und eine Dicke von 10 cm. Ihre Oberseite ist nicht geschliffen oder poliert oder so hergestellt, dass sie glatt ist.
Das mittlere Flächengewicht beträgt 230 kg/m².

## Technology and included processes
Die deklarierten Betonsteine werden nach DIN EN 1338 hergestellt. Der Produktionsprozess ist stark mechanisiert und bei allen Herstellern sehr ähnlich. Der Transport auf die Baustelle erfolgt in der Regel auf Holzpaletten . Die Steine sind dabei mit Kunststoffbändern und / oder Stretch-/Abdeckfolie zu einer Ladeeinheit verpackt. Weitere Informationen auf www.betonstein.org
Technische Daten:
Folgende technische Eigenschaften sind im Lieferzustand gem. DIN EN 1338 gegeben:
Deklarierte Einheit:
Die Deklaration bezieht sich auf Herstellung und das Lebensende von 1 m² Betonpflastersteine grau mit Vorsatz mit einem mittleren Flächengewicht von 230 kg/m² und einer Pflastersteindicke von 10 cm.

## Technical purpose
Betonpflastersteine werden u. a. als Bodenbelag für Industrie- und Gewerbestraßen, dörfliche Hauptstraßen, Busverkehrs- und Abstellflächen sowie sonstige Wege und Plätze eingesetzt.

## Reference product
- Betonpflasterstein, 10 cm (230 kg/m²): 1

## Inputs
- Erneuerbare Primärenergie als Energieträger (PERE) [MJ]: A1-A3 29.8754, C1 0.274896, C2 1.02372, C3 0.971384, C4 0, D -18.518
- Erneuerbare Primärenergie zur stofflichen Nutzung (PERM) [MJ]: A1-A3 0, C1 0, C2 0, C3 0, C4 0, D 0
- Total erneuerbare Primärenergie (PERT) [MJ]: A1-A3 29.8754, C1 0.274896, C2 1.02372, C3 0.971384, C4 0, D -18.518
- Nicht-erneuerbare Primärenergie als Energieträger (PENRE) [MJ]: A1-A3 114.85, C1 4.72201, C2 17.5849, C3 11.5482, C4 0, D -39.9619
- Nicht-erneuerbare Primärenergie zur stofflichen Nutzung (PENRM) [MJ]: A1-A3 1.70501, C1 0, C2 0, C3 0, C4 0, D 0
- Total nicht erneuerbare Primärenergie (PENRT) [MJ]: A1-A3 116.555, C1 4.72201, C2 17.5849, C3 11.5482, C4 0, D -39.9619
- Einsatz von Sekundärstoffen (SM) [kg]: A1-A3 37.8281, C1 0, C2 0, C3 0, C4 0, D 0
- Erneuerbare Sekundärbrennstoffe (RSF) [MJ]: A1-A3 0, C1 0, C2 0, C3 0, C4 0, D 0
- Nicht erneuerbare Sekundärbrennstoffe (NRSF) [MJ]: A1-A3 0, C1 0, C2 0, C3 0, C4 0, D 0
- Einsatz von Süßwasserressourcen (FW) [m^3]: A1-A3 0.0460854, C1 0.000246193, C2 0.000916828, C3 0.00302159, C4 0, D -0.0214949

## Outputs
- Gefährlicher Abfall zur Deponie (HWD) [kg]: A1-A3 0.000156563, C1 1.76457e-7, C2 6.57128e-7, C3 2.43083e-7, C4 0, D -3.12531e-7
- Entsorgter nicht gefährlicher Abfall (NHWD) [kg]: A1-A3 3.37285, C1 0.000828795, C2 0.00308645, C3 0.00347507, C4 0, D -0.026156
- Entsorgter radioaktiver Abfall (RWD) [kg]: A1-A3 0.00419763, C1 4.9713e-6, C2 1.85132e-5, C3 9.27039e-5, C4 0, D -0.00264052
- Komponenten für die Wiederverwendung (CRU) [kg]: A1-A3 0, C1 0, C2 0, C3 0, C4 0, D 0
- Stoffe zum Recycling (MFR) [kg]: A1-A3 0, C1 0, C2 0, C3 223.084, C4 0, D 0
- Stoffe für die Energierückgewinnung (MER) [kg]: A1-A3 0, C1 0, C2 0, C3 0, C4 0, D 0
- Exportierte elektrische Energie (EEE) [MJ]: A1-A3 0, C1 0, C2 0, C3 0, C4 0, D 0
- Exportierte thermische Energie (EET) [MJ]: A1-A3 0, C1 0, C2 0, C3 0, C4 0, D 0

## Impact indicators
- Globales Erwärmungspotenzial total (GWP-total) [kg CO_(2)-Äq.]: A1-A3 25.008, C1 0.352799, C2 1.3331, C3 0.615547, C4 0, D -3.17321
- Globales Erwärmungspotenzial fossil (GWP-fossil) [kg CO_(2)-Äq.]: A1-A3 24.9603, C1 0.351254, C2 1.32703, C3 0.612121, C4 0, D -3.14811
- Globales Erwärmungspotenzial biogen (GWP-biogenic) [kg CO_(2)-Äq.]: A1-A3 0.0326211, C1 5.78016e-5, C2 0.000532541, C3 0.00116918, C4 0, D -0.0162404
- Globales Erwärmungspotenzial luluc (GWP-luluc) [kg CO_(2)-Äq.]: A1-A3 0.0150644, C1 0.00148744, C2 0.00553925, C3 0.00225662, C4 0, D -0.00885545
- Abbau Potential der stratosphärischen Ozonschicht (ODP) [kg CFC11-Äq.]: A1-A3 8.20038e-12, C1 8.72336e-17, C2 3.2486e-16, C3 2.60553e-15, C4 0, D -7.74106e-14
- Versauerungspotenzial von Boden und Wasser (AP) [mol H^(+)-Äq.]: A1-A3 0.0301251, C1 0.0039755, C2 0.00382538, C3 0.00575208, C4 0, D -0.0059327
- Eutrophierungspotenzial Süßwasser (EP-freshwater) [kg PO_(4)-Äq.]: A1-A3 1.99699e-5, C1 7.74012e-7, C2 2.88244e-6, C3 1.46457e-6, C4 0, D -1.17348e-5
- Eutrophierungspotenzial Salzwasser (EP-marine) [kg N-Äq.]: A1-A3 0.0108251, C1 0.00202069, C2 0.00174672, C3 0.00283304, C4 0, D -0.00205142
- Eutrophierungspotenzial Land (EP-terrestrial) [mol N-Äq.]: A1-A3 0.117086, C1 0.0222359, C2 0.0195865, C3 0.0311498, C4 0, D -0.0228501
- Bildungspotential für troposphärisches Ozon (POCP) [kg NMVOC-Äq.]: A1-A3 0.0313788, C1 0.00584289, C2 0.00339058, C3 0.00822007, C4 0, D -0.00508303
- Potenzial für den abiotischen Abbau nicht fossiler Ressourcen (ADPE) [kg Sb-Äq.]: A1-A3 6.22275e-6, C1 2.9532e-8, C2 1.09978e-7, C3 6.73645e-7, C4 0, D -9.98128e-7
- Potenzial für den abiotischen Abbau fossiler Brennstoffe (ADPF) [MJ]: A1-A3 116.528, C1 4.72124, C2 17.582, C3 11.5463, C4 0, D -39.9505
- Wassernutzung (WDP) [m^(3) Welt-Äq. entzogen]: A1-A3 0.369639, C1 0.00153105, C2 0.00570167, C3 0.103389, C4 0, D -0.543421
- Auftreten von Krankheiten aufgrund von Feinstaubemissionen (PM) [Krankheitsfälle]
- Wirkung durch Exposition des Menschen mit U235 (IR) [kBq U235-Äq.]
- Toxizitätsvergleichseinheit für Ökosysteme (ETP-fw) [CTUe]
- Toxizitätsvergleichseinheit für Menschen (krebserregend) (HTP-c) [CTUh]
- Toxizitätsvergleichseinheit für Menschen (nicht krebserregend) (HTP-nc) [CTUh]
- Bodenqualitätsindex (SQP) [SQP]

## Use advice
Gültigkeitsbereich:
Die vorliegende Umwelt-Produktdeklaration bezieht sich auf graue Betonpflastersteine mit Vorsatzschicht, die von den Mitgliedern des Betonverbandes Straße, Landschaft, Garten e.V. (SLG), Bonn hergestellt werden.

Sie beruht auf Produktionsdaten mit dem Bezugsjahr 2018, die in Betonsteinwerken verschiedener Region und Größe in Deutschland erhoben und nach massenseitiger Produktionsmenge gewichtet wurden.
Systemgrenze:
Die Systemgrenzen der EPD folgen dem modularen Ansatz der EN 15804. Typ der EPD: Wiege bis Werkstor mit Optionen.

In der vorliegenden EPD werden die Herstellung in den Betonsteinwerken der beteiligten SLG-Mitgliedsfirmen und das Lebensende der Pflastersteine betrachtet:

Produktstadium (A1–A3): Das Produktstadium der SLG Betonpflastersteine grau mit Vorsatz umfasst:
A1 Rohstoffbereitstellung und –verarbeitung und Verarbeitungsprozesse von als Input dienenden Sekundärstoffen, (z.B. Recyclingprozesse),
A2 Transporte der Rohstoffe zu den Werken (Bezugsraum Deutschland),
A3 Herstellung der Betonsteine im Werk, (inkl. Energiebereitstellung, Wasserbereitstellung, Bereitstellung von Hilfsstoffen, Entsorgung der Produktionsabfälle, Herstellung der Verpackungsmaterialien).

Entsorgungsstadium (C1–C4): Das Entsorgungsstadium der SLG Betonpflastersteine grau mit Vorsatz (EoL-Szenario: 100 % Recycling, Bauschuttaufbereitung mit stofflichen Gutschriften in D aus dem Einbau als Sekundärmaterial im Straßenbau) umfasst:
C1 maschineller Ausbau mit einer Baumaschine,
C2 LKW-Transport (100 km) zur Aufbereitung,
C3 Aufbereitung der Betonsteine: 100% Recycling (Bauschuttaufbereitung: Brechen der Betonsteine),
C4 keine weiteren Aufwände durch Deponierung/ Entsorgung

Gutschriften und Lasten außerhalb der Systemgrenzen (D): Modul D der SLG Betonpflastersteine grau mit Vorsatz umfasst:

Rückgewinnungspotentiale/ stoffliche Gutschriften aus dem Einbau als Sekundärmaterial im Straßenoberbau.

Einflüsse von Abfällen werden in den Modulen berücksichtigt, in denen diese anfallen. Transportaufwendungen werden für alle Basismaterialien einbezogen.

In der Herstellung benötigte Maschinen, Anlagen und Infrastruktur werden vernachlässigt. Der Transport der Hilfsstoffe und der Verpackungen wird wegen der geringen Mengen und damit verbundenen geringen Relevanz nicht berücksichtigt.

Die Erhebung der Vordergrunddaten bezieht sich auf das Jahr 2018. Es handelt sich in allen Fällen um jährliche Durchschnittszahlen. Alle Produktionsstätten liegen in Deutschland.

## Data sources
- GaBi Database (all versions)
- GaBi database SP40 2020
