# EGGER Schichtstoff

Dataset: ILCD process, EPD, average dataset
Geography: DE
Reference year: 2021
Valid until: 2026
Classification: OEKOBAU.DAT: Beschichtungen / Innenbeschichtungen / Wand- und Deckenbeläge
Classification: IBUCategories: 02 Bauprodukte / Inneneinrichtung / Schichtpressstoffe
Method details: Schichtpressstoffe.pdf
Generated by: Daxner & Merl GmbH
Registration number: EPD-EGG-20210049-IBC1-DE
Owner: Fritz EGGER GmbH & Co. OG
Compliance: DIN EN 15804+A2; ISO 14025
Review: Accredited third party review by Institut Bauen und Umwelt e. V.
Amounts: rows without a unit in brackets have none in this file; such an amount is in the reference unit of its flow, which a separate flow dataset defines
copyright: true
licenseType: Free of charge for all users and uses
accessRestrictions: None

## General comment
EGGER Schichtstoff ist ein vielseitig einsetzbarer Werkstoff, welcher in Kombination mit klassischen Holzwerkstoffen wie MDF (Mitteldichte Faserplatte), HDF (Hochdichte Faserplatte) und Spanplatten oder anderen Trägermaterialien zu so genannten Schichtstoff-Verbundelementen verarbeitet wird. Klassische Anwendungen bzw. Einsatzbereiche sind die Küchenindustrie, Türenindustrie, Büromöbelindustrie, der Messebau, Ladenbau, dekorative Innenausbau, Schiffsbau und Fahrzeugbau.

Schichtpressstoffe bestehen aus Papierbahnen, die mit wärmehärtenden Harzen imprägniert sind. Sie sind mehrschichtig aufgebaut und bestehen aus melaminharzimprägniertem Dekorpapier und einem oder mehreren mit Phenolharz imprägnierten Natronkraftpapier/-en, die unter hohem Druck und Wärme miteinander verpresst werden. Der Schichtstoffaufbau, die Harz- und Papierqualitäten, die Oberflächenstrukturen, die Verwendung spezieller Overlays sowie die Pressparameter bei der Herstellung entscheiden über die Schichtstoffqualität und somit über die spätere Anwendung bzw. das Einsatzgebiet.

Beim deklarierten Produkt handelt es sich um einen flächengewichteten Durchschnitt der verschiedenen EGGER Produkte dieser Produktfamilie.

## Technology and included processes
EGGER Schichtstoffe werden ausschließlich kontinuierlich hergestellt. Mittels Doppelbandpressen ist es möglich, unterschiedliche Schichtstoffdicken und -qualitäten endlos herzustellen. Diese Art der Schichtstoffherstellung bzw. -qualität wird im Allgemeinen als CPL (Continuous Pressed Laminate) bezeichnet. Abhängig vom Herstelldruck werden EGGER Schichtstoffe gemäß oder in Anlehnung an EN 438-3:2016 hergestellt. Die Schichtstoffe bestehen aus Schichten von Zellulosefaserstoffbahnen (üblicherweise Papier), die mit härtbaren Harzen imprägniert werden. Die mit dekorativen Farben oder Mustern versehene(n) einseitige(n) Deckschicht(en) ist (sind) mit Harzen auf Melaminbasis imprägniert. Die Kernschichten sind mit Phenolharzen imprägniert. Die Zufuhr von Wärme und Druck bewirkt ein Fließen und anschließendes Aushärten der Harze. Durch die Vernetzung der Harze, verstärkt durch die Zellulosefasern der Papiere, entsteht ein sehr dichtes Material mit geschlossener Oberfläche.
Technische Daten:
EGGER Schichtstoff wird gemäß der in der EN 438-2 beschriebenen Prüfverfahren geprüft und erfüllt die in EN 438-3 beschriebenen Anforderungen. Im technischen Datenblatt "EGGER Schichtstoff" finden Sie ausführliche Informationen zu den Qualitätsmerkmalen und Produkteigenschaften unter www.egger.com/schichtstoff.
Deklarierte Einheit:
Die vorliegende Umwelt-Produktdeklaration bezieht sich auf eine deklarierte Einheit von 1 m² produziertem EGGER Schichtstoff mit einer durchschnittlichen Grammatur von 961 g/m².

## Technical purpose
Schichtstoffe sind nicht selbsttragend und dienen als Beschichtungsmaterial. EGGER Schichtstoffe sind nur für die Verwendung im Innenbereich geeignet. Der Schichtstoff wird zur Beschichtung von Holzwerkstoffen oder anderweitigen Trägermaterialien als sogenanntes Verbundelement im Innenbereich für Möbel oder den Innenausbau verwendet.

## Reference product
- Schichtstoff: 1

## Inputs
- Erneuerbare Primärenergie als Energieträger (PERE) [MJ]: A1-A3 8.60349, C1 0, C2 0.00441408, C3 0, C4 0.094631, D -2.26211
- Erneuerbare Primärenergie zur stofflichen Nutzung (PERM) [MJ]: A1-A3 7.37758, C1 0, C2 0, C3 0, C4 0, D 0
- Total erneuerbare Primärenergie (PERT) [MJ]: A1-A3 15.9811, C1 0, C2 0.00441408, C3 0, C4 0.094631, D -2.26211
- Nicht-erneuerbare Primärenergie als Energieträger (PENRE) [MJ]: A1-A3 37.206, C1 0, C2 0.076647, C3 0, C4 0.488775, D -10.3594
- Nicht-erneuerbare Primärenergie zur stofflichen Nutzung (PENRM) [MJ]: A1-A3 10.0585, C1 0, C2 0, C3 0, C4 0, D 0
- Total nicht erneuerbare Primärenergie (PENRT) [MJ]: A1-A3 47.2645, C1 0, C2 0.076647, C3 0, C4 0.488775, D -10.3594
- Einsatz von Sekundärstoffen (SM) [kg]: A1-A3 0, C1 0, C2 0, C3 0, C4 0, D 0
- Erneuerbare Sekundärbrennstoffe (RSF) [MJ]: A1-A3 0.0407079, C1 0, C2 0, C3 0, C4 0, D 0
- Nicht erneuerbare Sekundärbrennstoffe (NRSF) [MJ]: A1-A3 0, C1 0, C2 0, C3 0, C4 0, D 0
- Einsatz von Süßwasserressourcen (FW) [m^3]: A1-A3 0.0110055, C1 0, C2 5.14389e-6, C3 0, C4 0.00374131, D -0.00261956

## Outputs
- Gefährlicher Abfall zur Deponie (HWD) [kg]: A1-A3 4.67432e-7, C1 0, C2 3.54428e-9, C3 0, C4 1.23506e-9, D -4.1311e-9
- Entsorgter nicht gefährlicher Abfall (NHWD) [kg]: A1-A3 0.582943, C1 0, C2 1.2148e-5, C3 0, C4 0.0886039, D -0.00478618
- Entsorgter radioaktiver Abfall (RWD) [kg]: A1-A3 0.000609891, C1 0, C2 1.41268e-7, C3 0, C4 2.25859e-5, D -0.000772492
- Komponenten für die Wiederverwendung (CRU) [kg]: A1-A3 0, C1 0, C2 0, C3 0, C4 0, D 0
- Stoffe zum Recycling (MFR) [kg]: A1-A3 0, C1 0, C2 0, C3 0, C4 0, D 0
- Stoffe für die Energierückgewinnung (MER) [kg]: A1-A3 0, C1 0, C2 0, C3 0, C4 0, D 0
- Exportierte elektrische Energie (EEE) [MJ]: A1-A3 0, C1 0, C2 0, C3 0, C4 2.58, D 0
- Exportierte thermische Energie (EET) [MJ]: A1-A3 0, C1 0, C2 0, C3 0, C4 4.67, D 0

## Impact indicators
- Globales Erwärmungspotenzial total (GWP-total) [kg CO_(2)-Äq.]: A1-A3 2.02609, C1 0, C2 0.00579138, C3 0, C4 1.38765, D -0.61255
- Globales Erwärmungspotenzial fossil (GWP-fossil) [kg CO_(2)-Äq.]: A1-A3 2.68691, C1 0, C2 0.00575467, C3 0, C4 0.710189, D -0.610689
- Globales Erwärmungspotenzial biogen (GWP-biogenic) [kg CO_(2)-Äq.]: A1-A3 -0.662397, C1 0, C2 -9.60538e-6, C3 0, C4 0.67743, D -0.00143418
- Globales Erwärmungspotenzial luluc (GWP-luluc) [kg CO_(2)-Äq.]: A1-A3 0.00157664, C1 0, C2 4.63141e-5, C3 0, C4 3.57504e-5, D -0.000427509
- Abbau Potential der stratosphärischen Ozonschicht (ODP) [kg CFC11-Äq.]: A1-A3 4.2625e-12, C1 0, C2 1.05013e-18, C3 0, C4 3.26591e-16, D -6.37244e-15
- Versauerungspotenzial von Boden und Wasser (AP) [mol H^(+)-Äq.]: A1-A3 0.0074472, C1 0, C2 1.94464e-5, C3 0, C4 0.000286548, D -0.000855052
- Eutrophierungspotenzial Süßwasser (EP-freshwater) [kg PO_(4)-Äq.]: A1-A3 1.14174e-5, C1 0, C2 1.74277e-8, C3 0, C4 5.84693e-8, D -7.87293e-7
- Eutrophierungspotenzial Salzwasser (EP-marine) [kg N-Äq.]: A1-A3 0.00338443, C1 0, C2 8.77293e-6, C3 0, C4 9.51504e-5, D -0.000221153
- Eutrophierungspotenzial Land (EP-terrestrial) [mol N-Äq.]: A1-A3 0.0215146, C1 0, C2 9.7999e-5, C3 0, C4 0.00128728, D -0.00236968
- Bildungspotential für troposphärisches Ozon (POCP) [kg NMVOC-Äq.]: A1-A3 0.00704106, C1 0, C2 1.7236e-5, C3 0, C4 0.000257615, D -0.000635482
- Potenzial für den abiotischen Abbau nicht fossiler Ressourcen (ADPE) [kg Sb-Äq.]: A1-A3 6.271e-6, C1 0, C2 4.6267e-10, C3 0, C4 4.94951e-9, D -1.00224e-7
- Potenzial für den abiotischen Abbau fossiler Brennstoffe (ADPF) [MJ]: A1-A3 47.2494, C1 0, C2 0.0763409, C3 0, C4 0.488642, D -10.3583
- Wassernutzung (WDP) [m^(3) Welt-Äq. entzogen]: A1-A3 0.0428021, C1 0, C2 5.57929e-5, C3 0, C4 0.158354, D -0.0632786
- Auftreten von Krankheiten aufgrund von Feinstaubemissionen (PM) [Krankheitsfälle]: A1-A3 7.17563e-8, C1 0, C2 1.09877e-10, C3 0, C4 2.36233e-9, D -7.26106e-9
- Wirkung durch Exposition des Menschen mit U235 (IR) [kBq U235-Äq.]: A1-A3 0.0727484, C1 0, C2 2.08405e-5, C3 0, C4 0.0032085, D -0.126692
- Toxizitätsvergleichseinheit für Ökosysteme (ETP-fw) [CTUe]: A1-A3 21.829, C1 0, C2 0.0571178, C3 0, C4 0.298674, D -2.23497
- Toxizitätsvergleichseinheit für Menschen (krebserregend) (HTP-c) [CTUh]: A1-A3 5.04269e-10, C1 0, C2 1.18055e-12, C3 0, C4 1.59563e-11, D -9.68026e-11
- Toxizitätsvergleichseinheit für Menschen (nicht krebserregend) (HTP-nc) [CTUh]: A1-A3 3.03616e-8, C1 0, C2 6.80236e-11, C3 0, C4 1.36396e-9, D -3.59739e-9
- Bodenqualitätsindex (SQP) [SQP]: A1-A3 111.702, C1 0, C2 0.0267965, C3 0, C4 0.125159, D -1.62627

## Use advice
Gültigkeitsbereich:
Dieses Dokument bezieht sich auf den von der EGGER Kunststoffe GmbH & Co. KG im Werk Gifhorn (Deutschland) hergestellten Schichtstoff. Es handelt sich um durchschnittlichen Standard EGGER Schichtstoff.
Systemgrenze:
Die Ökobilanz des durchschnittlichen EGGER Schichtstoffes beinhaltet eine cradle-to-gate Betrachtung (Wiege bis zum Werkstor) der auftretenden Umweltwirkungen mit den Modulen C1–C4 und Modul D (A1–A3, +C, +D). Die folgenden Lebenszyklusphasen werden in der Analyse berücksichtigt:

Modul A1–A3 | Produktionsstadium
Das Produktionsstadium beinhaltet die Aufwendungen der Rohstoffversorgung (Zellulosefaserstoffbahnen – üblicherweise Papier wie Kraft-, Dekor- und Pergamentpapier, Herstellung der eingesetzten Basischemikalien sowie Komponenten der Phenol- und Melaminharz-Imprägnierung, Hilfsstoffe etc.) sowie der damit verbundenen Transporte bezogen auf den Produktionsstandort in Gifhorn. Innerhalb der Werksgrenzen werden die Imprägnierung der Papiere mit Melamin- und Phenolharzen, der Pressvorgang in den Doppelbandpressen, das Formatieren und der Rückseitenschliff inklusive der Verpackung berücksichtigt. Die eingesetzte elektrische Energie wird vom deutschen Stromnetz bezogen. Thermische Energie wird durch Erdgas als Energieträger bereitgestellt.

Modul C1 | Rückbau / Abriss

Für die Schichtstoffe wurde ein manueller Ausbau angenommen. Die damit verbundenen Aufwände sind vernachlässigbar, wodurch keine Umweltwirkungen aus dem Rückbau der Produkte deklariert werden.

Modul C2 | Transport zur Abfallbehandlung

Modul C2 beinhaltet den Transport zur Abfallbehandlung. Dazu wird der Transport via LKW über 50 km Transportdistanz als repräsentatives Szenario angesetzt.

Modul C3 | Abfallbehandlung

Das angesetzte Szenario deklariert die energetische Verwertung der Schichtstoffe. Entsprechende Umweltauswirkungen werden in Modul C4 berücksichtigt.

Modul C4 | Beseitigung
Das Modul C4 deklariert die Emissionen aus der energetischen Verwertung der Schichtstoffe nach dem Ausbau in einer Müllverbrennungsanlage als fiktives Szenario. In der Realität wird das Produkt immer im Verbund mit bspw. anderen Holzwerkstoffen ausgebaut und einer entsprechenden Verwertung zugeführt.

Modul D | Gutschriften und Lasten außerhalb der Systemgrenze

In Modul D werden die Substitutionspotenziale für Wärme und Strom aus der energetischen Verwertung des Produktes in Modul C4 in Form eines europäischen Durchschnittsszenarios beschrieben.

## Data sources
- GaBi Database (all versions)
- GaBi database SP40 2020
