# Lithium Eisenphosphat (LFP) Batterie (pro 1kWh Speicherkapazität); 1kWh storage capacity

Dataset: ILCD process, EPD, generic dataset
Geography: DE
Reference year: 2018
Valid until: 2022
Classification: oekobau.dat: Gebäudetechnik / Elektro / Batteriespeicher
Owner: thinkstep
Compliance: DIN EN 15804
Review: Dependent internal review by thinkstep, IABP-GaBi, IBP-GaBi; Independent external review by GaBi user forum, GaBi bug forum, GaBi user community
Amounts: rows without a unit in brackets have none in this file; such an amount is in the reference unit of its flow, which a separate flow dataset defines
copyright: true

## General comment
Dieser Datensatz wurde nach dem European Standard EN 15804 für Nachhaltiges Bauen modelliert. Ergebnisse werden in Modulen abgebildet, die den strukturierten Ausdruck von Ergebnissen über den gesamten Lebenszyklus zulassen.

## Geography
Der Datensatz bildet die länderspezifische Situation in Deutschland ab. Dabei werden Haupttechnologien, spezifische regionale Charakteristiken und ggf. Importstatistiken berücksichtigt.

## Time period
Jährlicher Durchschnitt

## Technology and included processes
Vordergrundsystem:
Dieser Datensatz bildet die Herstellung einer Heimspeicherbatterie auf Basis der Lithium Eisenphosphat (LFP) Technologie inkl. Steuer- und Regelelektronik ab. Die dargestellten Umweltwirkungen beziehen sich auf die Bereitstellung von 1kWh Speicherkapazität. Speicherkapazitätsverluste in der Betriebsphase wurden bei der Berechnung nicht berücksichtigt (nach 6000 Ladezyklen sind noch etwa 70% der ursprünglichen Speicherkapazität verfügbar). Die dargestellten Werte können für kleine und mittlere Speichersysteme bis 40kWh näherungsweise verwendet bzw. skaliert werden.

Der Wirkungsgrad der LFP- Batterie im Betrieb beträgt in Abhängigkeit der verwendeten Steuer- und Regelelektronik ca. 92%, d.h. bei 1kWh gespeicherter Energie können etwa 0,92kWh wieder abgegeben werden.

Hintergrundsystem:
Strom: Die Stromerzeugung wird entsprechend der länderspezifischen Randbedingungen modelliert. Die landesspezifische Analyse beinhaltet:
1.: Spezifische Kraftwerke der verschiedenen fossilen Energieträger und der Einsatz erneuerbarer Energien sind entsprechend der länderspezifischen Energieträgermixe modelliert. Die Analyse bezieht Stromimporte aus den Nachbarländern, Transmissions-und Verteilungsverluste und den Eigenverbrauch im Kraftwerk und bei der Verteilung bzw. Speicherung, z. B. durch Pumpspeicherwerke, ein.
2.: Die landes-/regionalspezifischen Technologiestandards sowie die Erzeugung in Elektrizitätskraftwerken und/oder in speziellen Kraftwerken mit Kraft-Wärme-Kopplung (KWK) sind berücksichtigt.
3.: Die länderspezifische Energieträgerbereitstellung (mit Anteil der Importe und/oder Eigenversorgung) einschließlich der Energieträger-Eigenschaften (z. B. Elementar- und Energiegehalte) werden berücksichtigt.
4.: Die Förderung, Produktion, Verarbeitung und Transportprozesse werden entsprechend der Situation im jeweiligen Stromerzeugerland modelliert. Die unterschiedlichen Produktions- und Verarbeitungsverfahren (Emissionen und Wirkungsgrade) in den verschiedenen Energieerzeugerländern werden einbezogen, z. B. Rohöl-Veredelungsverfahren oder Abfackel-Raten an den Ölplattformen.
Thermische Energie, Prozessdampf: Die Erzeugung von Dampf und thermischer Energie in Heizkraftwerken wird entsprechend der landesspezifischen Situation (Emissionsgrenzwerte, Energieträgerbasis) modelliert.
Der Wirkungsgrad für die thermische Energieerzeugung beträgt per Definition 100% des Energieträgereinsatzes. Für Prozessdampf liegt der Wirkungsgrad im Bereich von 85-95%. Die zur Heizenergie-Erzeugung verwendeten Energieträger werden entsprechend der nationalen Situation modelliert (siehe Kapitel Strom oben).
Transporte: Alle relevanten und bekannten Transportprozesse in Form von See- und Binnenschiffsverkehr sowie Bahn-, Lkw- und der Leitungstransport sind enthalten.
Energieträger: Die Energieträger werden entsprechend der spezifischen Versorgungslage modelliert (siehe Kapitel Strom oben).
Raffinerieprodukte: Diesel, Benzin, technische Gase, Heizöl, Schmierstoffe und Rückstände, wie Bitumen, werden mit einem parametrierten länderspezifische Raffineriemodell modelliert. Das Raffinerie-Modell bezieht die länderspezifischen Veredelungsverfahren (z. B. Emissionspegel, interner Energieverbrauch etc.) und das länderspezifische Produktspektrum ein, das sich je nach Land stark unterscheiden kann. Die Rohöl-Förderung wird gemäß der länderspezifischen Situation mit den jeweiligen Energieträger-Eigenschaften modelliert.

## Technical purpose
Dieses Produkt kann im Baubereich verwendet werden.

## Safety margin
10 %. Produktsystem weitgehend vollständig abgebildet. Gute technologische, zeitliche und geographische Repräsentativität.

## Reference product
- Lithium-Eisen-Phosphat-Batterie (pro 1 kWh Speicherkapazität): 1

## Inputs
- Erneuerbare Primärenergie als Energieträger (PERE) [MJ]: A1-A3 1071.42, C1 0, C2 0.0558059, C4 11.1312, D -152.946
- Erneuerbare Primärenergie zur stofflichen Nutzung (PERM) [MJ]: A1-A3 0, C1 0, C2 0, C4 0, D 0
- Total erneuerbare Primärenergie (PERT) [MJ]: A1-A3 1071.42, C1 0, C2 0.0558059, C4 11.1312, D -152.946
- Nicht-erneuerbare Primärenergie als Energieträger (PENRE) [MJ]: A1-A3 3415.43, C1 0, C2 0.958601, C4 70.7367, D -468.399
- Nicht-erneuerbare Primärenergie zur stofflichen Nutzung (PENRM) [MJ]: A1-A3 0, C1 0, C2 0, C4 0, D 0
- Total nicht erneuerbare Primärenergie (PENRT) [MJ]: A1-A3 3415.43, C1 0, C2 0.958601, C4 70.7367, D -468.399
- Einsatz von Sekundärstoffen (SM) [kg]: A1-A3 0, C1 0, C2 0, C4 0, D 0
- Erneuerbare Sekundärbrennstoffe (RSF) [MJ]: A1-A3 0, C1 0, C2 0, C4 0, D 0
- Nicht erneuerbare Sekundärbrennstoffe (NRSF) [MJ]: A1-A3 0, C1 0, C2 0, C4 0, D 0
- Einsatz von Süßwasserressourcen (FW) [m3]: A1-A3 2.00981, C1 0, C2 4.99789e-5, C4 0.0119951, D -0.332332

## Outputs
- Gefährlicher Abfall zur Deponie (HWD) [kg]: A1-A3 2.26563e-5, C1 0, C2 3.58219e-8, C4 1.56029e-7, D -2.04793e-7
- Entsorgter nicht gefährlicher Abfall (NHWD) [kg]: A1-A3 59.4483, C1 0, C2 0.000168251, C4 16.6456, D -8.1552
- Entsorgter radioaktiver Abfall (RWD) [kg]: A1-A3 0.130857, C1 0, C2 1.00921e-6, C4 0.00158263, D -0.036448
- Komponenten für die Wiederverwendung (CRU) [kg]: A1-A3 0, C1 0, C2 0, C4 0, D 0
- Stoffe zum Recycling (MFR) [kg]: A1-A3 0, C1 5.17, C2 0, C4 0, D 0
- Stoffe für die Energierückgewinnung (MER) [kg]: A1-A3 0, C1 0, C2 0, C4 0, D 0
- Exportierte elektrische Energie (EEE) [MJ]: A1-A3 0, C1 0, C2 0, C4 0, D 0
- Exportierte thermische Energie (EET) [MJ]: A1-A3 0, C1 0, C2 0, C4 0, D 0

## Impact indicators
- Globales Erwärmungspotenzial (GWP) [kg CO2 Äquiv.]: A1-A3 241.48, C1 0, C2 0.0714308, C4 22.5933, D -35.2863
- Abbaupotenzial der stratosphärischen Ozonschicht (ODP) [kg R11 Äquiv.]: A1-A3 1.5142e-6, C1 0, C2 2.36076e-17, C4 6.0717e-14, D 1.49758e-11
- Versauerungspotential (AP) [kg SO2 Äquiv.]: A1-A3 1.05906, C1 0, C2 0.000156486, C4 0.0242143, D -0.114558
- Eutrophierungspotential (EP) [kg Phosphat Äquiv.]: A1-A3 0.0677247, C1 0, C2 3.75137e-5, C4 0.00497343, D -0.00736362
- Bildungspotenzial für troposphärisches Ozon (POCP) [kg Ethen Äquiv.]: A1-A3 0.100422, C1 0, C2 -5.29346e-5, C4 0.00162135, D -0.00679383
- Potenzial für den abiotischen Abbau nicht fossiler Ressourcen (ADPE) [kg Sb Äquiv.]: A1-A3 0.0184858, C1 0, C2 6.00173e-9, C4 7.51578e-7, D -2.12263e-5
- Potenzial für den abiotischen Abbau fossiler Brennstoffe (ADPF) [MJ]: A1-A3 3084.39, C1 0, C2 0.956022, C4 66.7422, D -376.002

## Use advice
Der Datensatz repräsentiert ein Cradle to Gate Inventar. Er kann verwendet werden, um die Lieferkette des jeweiligen Produktes in einer repräsentativen Weise zu charakterisieren. Die Kombination mit einzelnen Einheitenprozessen und diesem Produkt ermöglicht die Erstellung von anwenderspezifischen (Produkt-) LCAs.

## Data sources
- Photovoltaik Web: Autarkiegradberechnung
- Tesla powerwall and powerpack: PV production and electricity demand
- GaBi Database Edition 2020, SP40
- GaBi database (all versions)
