# BauderTHERMOFIN

Dataset: ILCD process, EPD, average dataset
Geography: DE
Reference year: 2016
Valid until: 2021
Classification: OEKOBAU.DAT: Kunststoffe / Dachbahnen / Elastomer-Dachbahnen
Classification: IBUCategories: 02 Bauprodukte / Abdichtungen / Dach- und Dichtungsbahnsysteme aus Kunststoffen und Elastomeren
Method details: Dach- und Dichtungsbahnsysteme aus Kunststoffen und Elastomeren.pdf
Owner: Paul Bauder GmbH & Co. KG
Compliance: DIN EN 15804; ISO 14025
Review: Accredited third party review by IBU
Amounts: rows without a unit in brackets have none in this file; such an amount is in the reference unit of its flow, which a separate flow dataset defines
copyright: true

## General comment
BauderTHERMOFIN sind Kunststoffdach- und Dichtungsbahnen auf Basis FPO mit einer Trägereinlage aus Glasvlies. Die Produktpalette untergliedert sich in folgende Varianten:

· BauderTHERMOFIN F (12/15/16/18/20)

mittige Glasvliesverstärkung

· BauderTHERMOFIN F (15/18/20) V

mittige Glasvliesverstärkung, unterseitige Spezialvlieskaschierung

Die ausgewiesenen Ergebnisse deklarieren einen Durchschnitt über alle THERMOFIN-Produkte. Die Durchschnittsbildung basiert auf den entsprechenden Produktionsmengen (nach produzierter Fläche) für das Kalenderjahr 2012.

## Technology and included processes
Die Fertigung der FPO Dach- und Dichtungsbahnen erfolgt in einem einstufigen Verfahren. Die Mischung der und Plastifizierung der Rohstoffe auf den Extrudern erfolgt getrennt für Ober- und Unterfolie. Die Glasvliesverstärkung wird zuerst mit der Unterfolie danach mit der Oberfolie beschichtet. Ein Teil der FPO Dach- und Dichtungsbahnen erhält eine unterseitige Spezialvlieskaschierung. Nach Abkühlung und endgültigem Randbeschnitt werden die Produkte konfektioniert. Alle anfallenden Produktionsabfälle werden recycelt und dem Fertigungsprozess direkt wieder zugeführt. Eine permanente Messung der Produktqualität und kontinuierliche Verbesserung der internen Prozesse wird durch den Einsatz des Qualitätsmanagement-systems nach /DIN EN ISO 9001/ gewährleistet. - Systemgrenzen: Wiege bis Bahre mit Optionen. - Transporte: es werden sämtliche Transporte im Lebenszyklus berücksichtigt. - Repräsentativität der EPD: Alle Datensätze wurden entsprechend den lokalen Gegebenheiten bestmöglich ausgewählt (u.a. EU-Datensätze ab Transport zur Baustelle). - Abfälle: Es existieren insgesamt zwei Szenarien, die einzeln genutzt werden können, da es sich jeweils um ein 100 % Szenario handelt (KEINE Mischszenarien).
Deklarierte Einheit:
Die deklarierte Einheit ist 1 m² des nach der Produktionsmenge gewichteten Mittels für die mechanisch oder unter Auflast befestigten, mittels Heißluft abgedichteten THERMOFIN Dach- und Dichtungsbahn-Varianten F (12/15/16/18/20) und
F (15/18/20) V inklusive Verpackungsmaterialien.

## Technical purpose
Die FPO Dach- und Dichtungsbahnen werden einlagig verlegt und an den Nähten heißluftverschweißt. Die Windsogsicherung erfolgt durch mechanische Befestigung, per Auflast oder per Verklebung.

Dachabdichtung – Einlagige Abdichtung von nicht genutzten und genutzten Dächern in flacher und geneigter Form.

Bauwerksabdichtung – Einlagige Abdichtung von nichtwasserdichten Bauwerken und Bauteilen gegen Bodenfeuchte und nicht drückendes Wasser. BauderTHERMOFIN Dach- und Dichtungsbahnen werden je nach Anforderung:

· mechanisch befestigt,

· unter Auflast oder

· verklebt verlegt.

## Scenarios
- S1: Recycling-Route
- S2: MVA-Route

## Reference product
- 1 m² BauderTHERMOFIN F (12/15/16/18/20) und F (15/18/20) V: 1

## Inputs
- Erneuerbare Primärenergie als Energieträger (PERE) [MJ]: A1-A3 5.21, A4 0.0452, A5 0.0915, C2 (S1) 0.0185, C2 (S2) 0.00663, C3 (S1) 0.0604, C3 (S2) 1.36, D (S1) -2.07, D (S2) -0.0903
- Erneuerbare Primärenergie zur stofflichen Nutzung (PERM) [MJ]: A1-A3 1.3, A4 0, A5 0, C2 (S1) 0, C2 (S2) 0, C3 (S1) 0, C3 (S2) 0, D (S1) 0, D (S2) 0
- Total erneuerbare Primärenergie (PERT) [MJ]: A1-A3 6.51, A4 0.0452, A5 0.0915, C2 (S1) 0.0185, C2 (S2) 0.00663, C3 (S1) 0.0604, C3 (S2) 1.36, D (S1) -2.07, D (S2) -0.0903
- Nicht-erneuerbare Primärenergie als Energieträger (PENRE) [MJ]: A1-A3 40.6, A4 0.797, A5 0.35, C2 (S1) 0.326, C2 (S2) 0.107, C3 (S1) 0.216, C3 (S2) 65.6, D (S1) -75.6, D (S2) -33.5
- Nicht-erneuerbare Primärenergie zur stofflichen Nutzung (PENRM) [MJ]: A1-A3 64.4, A4 0, A5 0, C2 (S1) 0, C2 (S2) 0, C3 (S1) 0, C3 (S2) 0, D (S1) 0, D (S2) 0
- Total nicht erneuerbare Primärenergie (PENRT) [MJ]: A1-A3 105, A4 0.797, A5 0.35, C2 (S1) 0.326, C2 (S2) 0.107, C3 (S1) 0.216, C3 (S2) 65.6, D (S1) -75.6, D (S2) -33.5
- Einsatz von Sekundärstoffen (SM) [kg]: A1-A3 0.178, A4 0, A5 0, C2 (S1) 0, C2 (S2) 0, C3 (S1) 0, C3 (S2) 0, D (S1) 0, D (S2) 0
- Erneuerbare Sekundärbrennstoffe (RSF) [MJ]: A1-A3 0, A4 0, A5 0, C2 (S1) 0, C2 (S2) 0, C3 (S1) 0, C3 (S2) 0, D (S1) 0, D (S2) 0
- Nicht erneuerbare Sekundärbrennstoffe (NRSF) [MJ]: A1-A3 0, A4 0, A5 0, C2 (S1) 0, C2 (S2) 0, C3 (S1) 0, C3 (S2) 0, D (S1) 0, D (S2) 0
- Einsatz von Süßwasserressourcen (FW) [m^3]: A1-A3 0.105, A4 0.000113, A5 0.000454, C2 (S1) 4.63e-5, C2 (S2) 1.32e-5, C3 (S1) 9.31e-5, C3 (S2) 0.00904, D (S1) -0.008, D (S2) -0.00112

## Outputs
- Gefährlicher Abfall zur Deponie (HWD) [kg]: A1-A3 0, A4 0, A5 0, C2 (S1) 0, C2 (S2) 0, C3 (S1) 0, C3 (S2) 0, D (S1) 0, D (S2) 0
- Entsorgter nicht gefährlicher Abfall (NHWD) [kg]: A1-A3 0.0781, A4 6.7e-5, A5 0.00159, C2 (S1) 2.74e-5, C2 (S2) 1.1e-5, C3 (S1) 0.00013, C3 (S2) 0.00444, D (S1) -0.00815, D (S2) -0.00362
- Entsorgter radioaktiver Abfall (RWD) [kg]: A1-A3 0.0017, A4 1.14e-6, A5 4.94e-5, C2 (S1) 4.67e-7, C2 (S2) 1.49e-7, C3 (S1) 3.25e-5, C3 (S2) 4.2e-5, D (S1) -0.0005, D (S2) -2.08e-5
- Komponenten für die Wiederverwendung (CRU) [kg]: A1-A3 0, A4 0, A5 0, C2 (S1) 0, C2 (S2) 0, C3 (S1) 0, C3 (S2) 0, D (S1) 0, D (S2) 0
- Stoffe zum Recycling (MFR) [kg]: A1-A3 0, A4 0, A5 0, C2 (S1) 0, C2 (S2) 0, C3 (S1) 1.59, C3 (S2) 0, D (S1) 0, D (S2) 0
- Stoffe für die Energierückgewinnung (MER) [kg]: A1-A3 0, A4 0, A5 0.0696, C2 (S1) 0, C2 (S2) 0, C3 (S1) 0, C3 (S2) 1.77, D (S1) 0, D (S2) 0
- Exportierte elektrische Energie (EEE) [MJ]: A1-A3 0, A4 0, A5 0.197, C2 (S1) 0, C2 (S2) 0, C3 (S1) 0, C3 (S2) 10.2, D (S1) 0, D (S2) 0
- Exportierte thermische Energie (EET) [MJ]: A1-A3 0, A4 0, A5 0.519, C2 (S1) 0, C2 (S2) 0, C3 (S1) 0, C3 (S2) 27.8, D (S1) 0, D (S2) 0

## Impact indicators
- Globales Erwärmungspotenzial (GWP) [kg CO_(2)-Äq.]: A1-A3 3.25, A4 0.0577, A5 0.14, C2 (S1) 0.0236, C2 (S2) 0.00777, C3 (S1) 0.0124, C3 (S2) 3.75, D (S1) -1.95, D (S2) -2.06
- Abbau Potential der stratosphärischen Ozonschicht (ODP) [kg CFC11-Äq.]: A1-A3 5.86e-9, A4 2.65e-13, A5 2.91e-11, C2 (S1) 1.09e-13, C2 (S2) 2.63e-14, C3 (S1) 8.78e-12, C3 (S2) 1.42e-9, D (S1) -2.49e-11, D (S2) -1.06e-12
- Versauerungspotenzial von Boden und Wasser (AP) [kg SO_(2)-Äq.]: A1-A3 0.00635, A4 0.000251, A5 6.72e-5, C2 (S1) 0.000148, C2 (S2) 4.83e-5, C3 (S1) 3.44e-5, C3 (S2) 0.000321, D (S1) -0.00313, D (S2) -0.0014
- Eutrophierungspotenzial (EP) [kg PO_(4)^(3)-Äq.]: A1-A3 0.000833, A4 6.15e-5, A5 7.8e-6, C2 (S1) 3.7e-5, C2 (S2) 1.23e-5, C3 (S1) 3.08e-6, C3 (S2) 6.98e-5, D (S1) -0.000322, D (S2) -0.000209
- Bildungspotential für troposphärisches Ozon (POCP) [kg Ethen-Äq.]: A1-A3 0.0011, A4 -8.59e-5, A5 4.96e-6, C2 (S1) -6.19e-5, C2 (S2) -2.06e-5, C3 (S1) 2.37e-6, C3 (S2) 3.9e-5, D (S1) -0.000714, D (S2) -0.000262
- Potenzial für den abiotischen Abbau nicht fossiler Ressourcen (ADPE) [kg Sb-Äq.]: A1-A3 1.89e-6, A4 3.84e-9, A5 5.71e-9, C2 (S1) 1.57e-9, C2 (S2) 5.52e-10, C3 (S1) 4.04e-9, C3 (S2) -1.21e-7, D (S1) -6.39e-7, D (S2) -9.68e-8
- Potenzial für den abiotischen Abbau fossiler Brennstoffe (ADPF) [MJ]: A1-A3 101, A4 0.794, A5 0.226, C2 (S1) 0.325, C2 (S2) 0.107, C3 (S1) 0.134, C3 (S2) 1.1, D (S1) -74.3, D (S2) -33.4

## Use advice
Gültigkeitsbereich:
Dieses Dokument ist gültig für die FPO Dach- und Dichtungsbahnen:

· BauderTHERMOFIN F (12/15/16/18/20),

· BauderTHERMOFIN F (15/18/20) V

hergestellt im deutschen BAUDER Produktionswerk Schwepnitz.
Systemgrenze:
Typ der EPD: Wiege bis Werkstor (mit Optionen).

Verwendet werden folgende Module:

Modul A1-3

Sämtliche Vorketten der verwendeten Rohstoffe und Materialien, sowie deren Beschaffungstransporte. Produktionsprozesse inklusive Energie- und Abfall-ströme (Wiege bis Werkstor). Anfallende Abfälle werden bis zum End of Waste-Status berücksichtigt.

Modul A4-5

Die Transporte zur Baustelle und ein durchschnittlicher Installationsaufwand (Heißluftverklebung und anfallen-de Verschnitte). Verwertung des Verpackungs-materials.
Befestigungsmaterial ist nicht Teil des untersuchten Produktsystems. Entsprechend des eingesetzten Produkts bzw. Materials (Metall/ Kunststoff) ist die jeweilige EPD zu referenzieren.

Modul C2-1

Transporte im Rahmen der Recycling-Route.

Modul C2-2

Transporte im Rahmen der MVA-Route.

Modul C3-1

Stoffliche Verwertung (Recycling) des Produkts inklusive Aufbereitungsaufwand.

Modul C3-2
Thermische Verwertung (Verbrennung in einer WtE-Anlage) zur Reduzierung des Abfallvolumens für die Deponierung.

Module D-1 und D-2 Ausweis der durch die Abfallbehandlung in den Modulen A5, C3-1 und C3-2 entstandenen Gutschriften.

## Data sources
- BauderTHERMOFIN.pdf
- GaBi Database (all versions)
- GaBi database SP28 2015
