# Metalllack (lösemittelbasiert); 1 sqm

Dataset: ILCD process, EPD, generic dataset
Geography: DE
Reference year: 2018
Valid until: 2022
Classification: oekobau.dat: Metalle / Oberflächenbehandlung und Beschichtung von Metallen / (Nass-) Lackieren von Metallen
Owner: thinkstep
Compliance: DIN EN 15804
Review: Dependent internal review by thinkstep, IABP-GaBi, IBP-GaBi; Independent external review by GaBi user forum, GaBi bug forum, GaBi user community
Amounts: rows without a unit in brackets have none in this file; such an amount is in the reference unit of its flow, which a separate flow dataset defines
copyright: true

## General comment
Dieser Datensatz wurde nach dem European Standard EN 15804 für Nachhaltiges Bauen modelliert. Ergebnisse werden in Modulen abgebildet, die den strukturierten Ausdruck von Ergebnissen über den gesamten Lebenszyklus zulassen.

## Geography
Der Datensatz bildet die länderspezifische Situation in Deutschland ab. Dabei werden Haupttechnologien, spezifische regionale Charakteristiken und ggf. Importstatistiken berücksichtigt.

## Time period
Jährlicher Durchschnitt

## Technology and included processes
Der Datensatz umfasst die Industriemetallbeschichtung einer Fläche von 1 Quadratmeter, mit einer Schichtdicke von 100 Mikrometern. Nicht enthalten ist die Produktion des Metallsubstrats, die separat berechnet wird.
Decklackauftrag:
Der Datensatz beschreibt die Verwendung einer lösemittelbasierten weißen Industriebeschichtung mit 35% organischen Lösungsmitteln und 65% Feststoffen. Der Decklack wird in einer klimatisierten Beschichtungs-/Lackier-/Spritzkabine aufgetragen. Die Klimatisierung nutzt thermische Energie aus Erdgas und entsalztes Wasser, um die Temperatur und Feuchtigkeit der Prozessluft in einem engen Anwendungsfenster und aus Qualitätsgründen unbeeinflusst von äußeren Wetteränderungen zu halten. Die dafür benötigte Menge an Energie und Wasser ist stark abhängig von den örtlichen klimatischen Bedingungen, die hier verwendeten Daten sind repräsentativ für Norddeutschland im Landesinneren. Die Prozessluft enthält Beschichtungs-/Lackteilchen (die Übertragungsverluste) und muss dadurch gereinigt werden, was in der Regel in einem spritzwasserfesten Filter erfolgt. Hierzu werden Gerinnungschemikalien benötigt, und verdampftes Wasser muss durch Leitungswasser ersetzt werden. Abfall (koagulierter/geronnener Beschichtungsschlamm) wird wegen seines Energiegehalts in einer Abfallverbrennungsanlage verbrannt. Hier kommt die Strom- und Dampferzeugung zugute, die dort hergestellt werden. Spülmittel wird verwendet, um das Lackauftragsystem zu reinigen, wenn die Farben geändert werden. Es wird kein Abwasser erzeugt, das Verfahren läuft üblicherweise in einem abwasserfreien Betriebsmodus. Die Vernetzung der Beschichtung findet in einem Trockner (Ofen), statt, der in der Regel mit Erdgas betrieben wird. Für lösemittelhaltige Beschichtungen wird in der Regel eine thermische Abluftnachbehandlung zur VOC-Emissionskontrolle eingesetzt.

Hintergrundsystem:
Strom: Die Stromerzeugung wird entsprechend der länderspezifischen Randbedingungen modelliert. Die landesspezifische Analyse beinhaltet:
1.: Spezifische Kraftwerke der verschiedenen fossilen Energieträger und der Einsatz erneuerbarer Energien sind entsprechend der länderspezifischen Energieträgermixe modelliert. Die Analyse bezieht Stromimporte aus den Nachbarländern, Transmissions-und Verteilungsverluste und den Eigenverbrauch im Kraftwerk und bei der Verteilung bzw. Speicherung, z. B. durch Pumpspeicherwerke, ein.
2.: Die landes-/regionalspezifischen Technologiestandards sowie die Erzeugung in Elektrizitätskraftwerken und/oder in speziellen Kraftwerken mit Kraft-Wärme-Kopplung (KWK) sind berücksichtigt.
3.: Die länderspezifische Energieträgerbereitstellung (mit Anteil der Importe und/oder Eigenversorgung) einschließlich der Energieträger-Eigenschaften (z. B. Elementar- und Energiegehalte) werden berücksichtigt.
4.: Die Förderung, Produktion, Verarbeitung und Transportprozesse werden entsprechend der Situation im jeweiligen Stromerzeugerland modelliert. Die unterschiedlichen Produktions- und Verarbeitungsverfahren (Emissionen und Wirkungsgrade) in den verschiedenen Energieerzeugerländern werden einbezogen, z. B. Rohöl-Veredelungsverfahren oder Abfackel-Raten an den Ölplattformen.
Thermische Energie, Prozessdampf: Die Erzeugung von Dampf und thermischer Energie in Heizkraftwerken wird entsprechend der landesspezifischen Situation (Emissionsgrenzwerte, Energieträgerbasis) modelliert.
Der Wirkungsgrad für die thermische Energieerzeugung beträgt per Definition 100% des Energieträgereinsatzes. Für Prozessdampf liegt der Wirkungsgrad im Bereich von 85-95%. Die zur Heizenergie-Erzeugung verwendeten Energieträger werden entsprechend der nationalen Situation modelliert (siehe Kapitel Strom oben).
Transporte: Alle relevanten und bekannten Transportprozesse in Form von See- und Binnenschiffsverkehr sowie Bahn-, Lkw- und der Leitungstransport sind enthalten.
Energieträger: Die Energieträger werden entsprechend der spezifischen Versorgungslage modelliert (siehe Kapitel Strom oben).
Raffinerieprodukte: Diesel, Benzin, technische Gase, Heizöl, Schmierstoffe und Rückstände, wie Bitumen, werden mit einem parametrierten länderspezifische Raffineriemodell modelliert. Das Raffinerie-Modell bezieht die länderspezifischen Veredelungsverfahren (z. B. Emissionspegel, interner Energieverbrauch etc.) und das länderspezifische Produktspektrum ein, das sich je nach Land stark unterscheiden kann. Die Rohöl-Förderung wird gemäß der länderspezifischen Situation mit den jeweiligen Energieträger-Eigenschaften modelliert.

## Technical purpose
Dieses Produkt kann im Baubereich verwendet werden.

## Safety margin
20 %. Produktsystem bis auf wenige Prozesse/Flüsse abgebildet. Technologische, zeitliche und geographische Repräsentativität teilweise gegeben.

## Reference product
- Surface (metals coating solvent-based) (m2): 1

## Inputs
- Erneuerbare Primärenergie als Energieträger (PERE) [MJ]: A1-A3 4.89114, C1 0, C2 0.000457632, C3 0.0308447, D -0.158462
- Erneuerbare Primärenergie zur stofflichen Nutzung (PERM) [MJ]: A1-A3 0, C1 0, C2 0, C3 0, D 0
- Total erneuerbare Primärenergie (PERT) [MJ]: A1-A3 4.89114, C1 0, C2 0.000457632, C3 0.0308447, D -0.158462
- Nicht-erneuerbare Primärenergie als Energieträger (PENRE) [MJ]: A1-A3 33.7048, C1 0, C2 0.00786093, C3 7.31487, D -0.597486
- Nicht-erneuerbare Primärenergie zur stofflichen Nutzung (PENRM) [MJ]: A1-A3 7.2, C1 0, C2 0, C3 -7.2, D 0
- Total nicht erneuerbare Primärenergie (PENRT) [MJ]: A1-A3 40.9048, C1 0, C2 0.00786093, C3 0.114871, D -0.597486
- Einsatz von Sekundärstoffen (SM) [kg]: A1-A3 0, C1 0, C2 0, C3 0, D 0
- Erneuerbare Sekundärbrennstoffe (RSF) [MJ]: A1-A3 0, C1 0, C2 0, C3 0, D 0
- Nicht erneuerbare Sekundärbrennstoffe (NRSF) [MJ]: A1-A3 0, C1 0, C2 0, C3 0, D 0
- Einsatz von Süßwasserressourcen (FW) [m3]: A1-A3 0.00570259, C1 0, C2 4.09848e-7, C3 0.000649379, D -7.40071e-5

## Outputs
- Gefährlicher Abfall zur Deponie (HWD) [kg]: A1-A3 1.94409e-8, C1 0, C2 2.93755e-10, C3 6.86565e-10, D -3.10816e-10
- Entsorgter nicht gefährlicher Abfall (NHWD) [kg]: A1-A3 0.0197351, C1 0, C2 1.37973e-6, C3 0.017856, D -0.000271204
- Entsorgter radioaktiver Abfall (RWD) [kg]: A1-A3 0.000631494, C1 0, C2 8.27594e-9, C3 4.35986e-6, D -1.91409e-5
- Komponenten für die Wiederverwendung (CRU) [kg]: A1-A3 0, C1 0, C2 0, C3 0, D 0
- Stoffe zum Recycling (MFR) [kg]: A1-A3 0, C1 0, C2 0, C3 0, D 0
- Stoffe für die Energierückgewinnung (MER) [kg]: A1-A3 0, C1 0.252, C2 0, C3 0, D 0
- Exportierte elektrische Energie (EEE) [MJ]: A1-A3 0, C1 0, C2 0, C3 0.151871, D 0
- Exportierte thermische Energie (EET) [MJ]: A1-A3 0, C1 0, C2 0, C3 0.397816, D 0

## Impact indicators
- Globales Erwärmungspotenzial (GWP) [kg CO2 Äquiv.]: A1-A3 2.28622, C1 0, C2 0.000584863, C3 0.143886, D -0.0404745
- Abbaupotenzial der stratosphärischen Ozonschicht (ODP) [kg R11 Äquiv.]: A1-A3 2.66766e-14, C1 0, C2 1.93592e-19, C3 1.70331e-16, D -8.75919e-16
- Versauerungspotential (AP) [kg SO2 Äquiv.]: A1-A3 0.00213076, C1 0, C2 1.18136e-6, C3 2.72134e-5, D -3.33075e-5
- Eutrophierungspotential (EP) [kg Phosphat Äquiv.]: A1-A3 0.000348003, C1 0, C2 2.80842e-7, C3 6.38098e-6, D -6.28413e-6
- Bildungspotenzial für troposphärisches Ozon (POCP) [kg Ethen Äquiv.]: A1-A3 0.00316305, C1 0, C2 -3.53935e-7, C3 2.34796e-6, D -3.45021e-6
- Potenzial für den abiotischen Abbau nicht fossiler Ressourcen (ADPE) [kg Sb Äquiv.]: A1-A3 3.58702e-7, C1 0, C2 4.92167e-11, C3 1.82491e-9, D -9.55689e-9
- Potenzial für den abiotischen Abbau fossiler Brennstoffe (ADPF) [MJ]: A1-A3 39.3109, C1 0, C2 0.00783978, C3 0.103866, D -0.549165

## Use advice
Der Datensatz repräsentiert ein Cradle to Gate Inventar. Er kann verwendet werden, um die Lieferkette des jeweiligen Produktes in einer repräsentativen Weise zu charakterisieren. Die Kombination mit einzelnen Einheitenprozessen und diesem Produkt ermöglicht die Erstellung von anwenderspezifischen (Produkt-) LCAs.

## Data sources
- GaBi Database Edition 2020, SP40
- GaBi database (all versions)
- Paints, Coatings and Solvents, 1998
- Ökologische Bilanzierung von Baustoffen und Gebäuden, 2000
- Lackformulierung und Lackrezeptur
- Lackrohstoffkunde
- Ganzheitliche Bilanzierung der Pulverlackiertechnik im Vergleich zu anderen Lackiertechnologien, 199
- Farben und Lacke
- BASF Handbuch Lackiertechnik
