# Kooltherm K5

Dataset: ILCD process, EPD, average dataset
Geography: NL
Reference year: 2019
Valid until: 2024
Classification: OEKOBAU.DAT: Dämmstoffe / Phenolharz-Hartschaum (PF) / PF-Platten
Classification: IBUCategories: 02 Bauprodukte / Wärmedämmungsprodukte / Dämmstoffe aus Schaumkunststoffen
Method details: Dämmstoffe aus Schaumkunststoffen.pdf
Generated by: Sphera Solutions GmbH
Registration number: EPD-KSI-20190072-IBC1-DE
Owner: Kingspan Insulation
Compliance: DIN EN 15804; ISO 14025
Review: Accredited third party review by Institut Bauen und Umwelt e. V.
Amounts: rows without a unit in brackets have none in this file; such an amount is in the reference unit of its flow, which a separate flow dataset defines
copyright: true
licenseType: Free of charge for all users and uses
accessRestrictions: None

## General comment
Kingspan Kooltherm ® K5 ist ein Dämmstoff aus wärmeaushärtendem Schaumstoff mit beidseitiger Gewebebeschichtung auf Glasfaserbasis. Das Produkt ist in verschiedenen Dicken von 20 mm bis 200 mm erhältlich. Diese EPD bezieht sich auf die meistverkaufte Dicke von 100 mm mit einem R-Wert von 5,0 m² K/W.

## Technology and included processes
Phenolharzschaum wird unter Verwendung von Phenolharz, einem Katalysator, Zusatzstoffen und einem Treibmittel hergestellt. Die Zellstruktur im Harz entsteht durch die Hitze der chemischen Reaktion. Dazu wird das Treibmittel dem Material zugegeben, das eine feste und sehr feine Zellstruktur formt, die zu nahezu 100 % geschlossen ist. Der Schaum wird auf die Glasfaserschicht aufgetragen. Danach werden die Dicke und die Festigkeit durch das Fließband bestimmt, wo obere und untere Walzen das Material auf die gewünschte Dicke komprimieren. Die Platte wird auf die richtige Größe zugesägt und gemäß der Produktspezifikationen verpackt.
Deklarierte Einheit:
Die deklarierte Einheit (1 m²) und die Umrechnungsfaktoren sind in der folgenden Tabelle aufgelistet.

## Technical purpose
Durch seinen hohen Dämmwert ist der Kooltherm K5 bestens geeignet zur Außendämmung unter den anwendbaren Putzsystemen.

## Reference product
- 1 m², 100mm Dicke: 1

## Inputs
- Erneuerbare Primärenergie als Energieträger (PERE) [MJ]: A1-A3 6.50969, C3 0.281574, D -11.0331
- Erneuerbare Primärenergie zur stofflichen Nutzung (PERM) [MJ]: A1-A3 0, C3 0, D 0
- Total erneuerbare Primärenergie (PERT) [MJ]: A1-A3 6.50969, C3 0.281574, D -11.0331
- Nicht-erneuerbare Primärenergie als Energieträger (PENRE) [MJ]: A1-A3 143.458, C3 91, D -54.4532
- Nicht-erneuerbare Primärenergie zur stofflichen Nutzung (PENRM) [MJ]: A1-A3 88.9, C3 -88.9, D 0
- Total nicht erneuerbare Primärenergie (PENRT) [MJ]: A1-A3 232.358, C3 2.09026, D -54.4532
- Einsatz von Sekundärstoffen (SM) [kg]: A1-A3 0, C3 0, D 0
- Erneuerbare Sekundärbrennstoffe (RSF) [MJ]: A1-A3 0, C3 0, D 0
- Nicht erneuerbare Sekundärbrennstoffe (NRSF) [MJ]: A1-A3 0, C3 0, D 0
- Einsatz von Süßwasserressourcen (FW) [m^3]: A1-A3 0.0329515, C3 0.0177292, D -0.013007

## Outputs
- Gefährlicher Abfall zur Deponie (HWD) [kg]: A1-A3 9.88e-5, C3 2.07e-9, D -2.24e-8
- Entsorgter nicht gefährlicher Abfall (NHWD) [kg]: A1-A3 0.691, C3 0.0823, D -0.0235
- Entsorgter radioaktiver Abfall (RWD) [kg]: A1-A3 0.000971, C3 9.44e-5, D -0.0044
- Komponenten für die Wiederverwendung (CRU) [kg]: A1-A3 0, C3 0, D 0
- Stoffe zum Recycling (MFR) [kg]: A1-A3 0, C3 0, D 0
- Stoffe für die Energierückgewinnung (MER) [kg]: A1-A3 0, C3 3.5, D 0
- Exportierte elektrische Energie (EEE) [MJ]: A1-A3 0, C3 13.1, D 0
- Exportierte thermische Energie (EET) [MJ]: A1-A3 0, C3 23.4, D 0

## Impact indicators
- Globales Erwärmungspotenzial (GWP) [kg CO_(2)-Äq.]: A1-A3 7.70552, C3 7.56205, D -3.07105
- Abbau Potential der stratosphärischen Ozonschicht (ODP) [kg CFC11-Äq.]: A1-A3 1.94948e-8, C3 1.23766e-15, D -4.2387e-14
- Versauerungspotenzial von Boden und Wasser (AP) [kg SO_(2)-Äq.]: A1-A3 0.0143574, C3 0.00300548, D -0.0051936
- Eutrophierungspotenzial (EP) [kg PO_(4)^(3)-Äq.]: A1-A3 0.00173515, C3 0.00076443, D -0.000561912
- Bildungspotential für troposphärisches Ozon (POCP) [kg Ethen-Äq.]: A1-A3 0.004569, C3 0.000190641, D -0.000411418
- Potenzial für den abiotischen Abbau nicht fossiler Ressourcen (ADPE) [kg Sb-Äq.]: A1-A3 1.01273e-5, C3 6.88824e-8, D -5.54524e-7
- Potenzial für den abiotischen Abbau fossiler Brennstoffe (ADPF) [MJ]: A1-A3 229.888, C3 1.85219, D -43.3606

## Use advice
Gültigkeitsbereich:
Das Kooltherm Dämmmaterial wird von Kingspan Insulation B.V. im Produktionswerk in Tiel, Niederlande, produziert. Bei der Produktion wird eine Gewebeschicht auf Glasfaserbasis autohäsiv auf das Schaummaterial aufgetragen.
Systemgrenze:
Typ der EPD: Wiege bis Werkstor – mit Optionen, Module A1-A3, C3, D

Die folgenden Prozesse sind in den Kooltherm Produktionsstadien A1-A3 enthalten: Herstellung der Vorprodukte (Harz, Zusatzstoffe, Treibmittel):

- Transport der Rohmaterialien und Vorprodukte zum Werk

- Herstellungsprozess im Werk einschließlich des Verbrauchs an Wasser und Energie, der Entsorgung der Abfallprodukte und der Beachtung jeglicher direkter VOC-Emissionen in die Luft

- Herstellung und Transport der Verpackungsmaterialien

Die folgenden Prozesse sind in den Kooltherm Stadien C3 und D enthalten: - Entsorgungsstadium (Verbrennung in Abfallverbrennungsanlage mit Energierückgewinnung)

## Data sources
- GaBi Database (all versions)
- GaBi database SP35 2018
