# EGGER Schnittholz

Dataset: ILCD process, EPD, average dataset
Geography: DE
Reference year: 2021
Valid until: 2026
Classification: OEKOBAU.DAT: Holz / Vollholz / Bau-Schnittholz
Classification: IBUCategories: 02 Bauprodukte / Produkte aus Bauholz / Vollholzprodukte
Method details: Vollholzprodukte.pdf
Generated by: Daxner & Merl GmbH
Registration number: EPD-EGG-20200248-IBC1-DE
Owner: Fritz EGGER GmbH & Co. OG
Compliance: DIN EN 15804+A2; ISO 14025
Review: Accredited third party review by Institut Bauen und Umwelt e. V.
Amounts: rows without a unit in brackets have none in this file; such an amount is in the reference unit of its flow, which a separate flow dataset defines
copyright: true
licenseType: Free of charge for all users and uses
accessRestrictions: None

## General comment
Technisch getrocknetes und gehobeltes EGGER Schnittholz wird aus frischem Fichten- und Kiefernrundholz (Picea abies und Pinus sylvestris) gefertigt. Das Rundholz wird in Faserrichtung zu rechteckigen Holzquerschnitten mit mindestens 12 mm Stärke aufgetrennt. Anschließend folgen der Trocknungsprozess und beim Sortiment Schnittholz gehobelt das Hobeln. Unterschiedliche Sortimente und Qualitäten werden durch festgelegte Sortierkriterien differenziert. Im Wesentlichen sind die Sortierung nach der Festigkeit, visuell als auch maschinell, und die Sortierung nach optischen bzw. ästhetischen Gesichtspunkten zu unterscheiden. Die atro-Rohdichte liegt durchschnittlich für die Fichte bei 430 kg/m³ und für die Kiefer bei 490 kg/m³.

Das deklarierte Produkt ist repräsentativ für die hergestellten Sortimente.

## Technology and included processes
Das Rundholz wird am Produktionsstandort in Brilon angeliefert und nach Qualität sortiert. Nach der Entrindung werden die Stämme in Polter sortiert. In der Sägelinie werden die Stämme gespant, profiliert und mit Kreissägen in Haupt- und Seitenware aufgetrennt. Nach dem Auftrennen wird das frische Schnittholz visuell sortiert und paketiert. Es folgt dann die technische Trocknung in Trockenkammern auf eine definierte Endfeuchte. Anschließend erfolgt eine visuelle oder maschinelle Festigkeitssortierung, der die Hobelung vorausgeht. Die Herstellung erfolgt also in folgenden Teilschritten: 1. Rundholzsortierung 2. Entrindung 3. Spanen, Profilieren, Sägen 4. Schnittholzsortierung 5. Paketierung 6. technische Trocknung 7. Hobelung (nur Schnittholz - gehobelt) 8. visuelle/maschinelle Festigkeitssortierung 9. Paketierung/Verpackung
Deklarierte Einheit:
Die vorliegende Umwelt-Produktdeklaration bezieht sich auf eine deklarierte Einheit von 1 m³ technisch getrocknetes, sägeraues und gehobeltes EGGER Schnittholz mit einer mittleren Dichte von 503 kg/m³ und einer Auslieferungsfeuchte von etwa 15 %.

## Technical purpose
EGGER Schnittholz wird im Baubereich sowohl für dekorative als auch für konstruktive Zwecke eingesetzt. Nach Festigkeit sortiertes Schnittholz kann für die Errichtung tragender Bauteile z. B. im Hochbau eingesetzt werden, sowohl als Einzelelement oder als Lamelle in einem verleimten Element wie z. B. in Brettschichtholz, Brettsperrholz oder keilgezinktem Konstruktionsvollholz.

## Reference product
- Schnittholz technisch getrocknet und gehobelt (1 m³ Schnittholz gehobelt): 1

## Inputs
- Erneuerbare Primärenergie als Energieträger (PERE) [MJ]: A1-A3 372.136, C1 0, C2 1.12506, C3 8122.47, C4 0, D -1749.69
- Erneuerbare Primärenergie zur stofflichen Nutzung (PERM) [MJ]: A1-A3 8204.79, C1 0, C2 0, C3 -8091.74, C4 0, D 0
- Total erneuerbare Primärenergie (PERT) [MJ]: A1-A3 8576.93, C1 0, C2 1.12506, C3 30.7323, C4 0, D -1749.69
- Nicht-erneuerbare Primärenergie als Energieträger (PENRE) [MJ]: A1-A3 1281.51, C1 0, C2 19.5357, C3 69.3999, C4 0, D -6949.64
- Nicht-erneuerbare Primärenergie zur stofflichen Nutzung (PENRM) [MJ]: A1-A3 7.90852, C1 0, C2 0, C3 0, C4 0, D 0
- Total nicht erneuerbare Primärenergie (PENRT) [MJ]: A1-A3 1289.42, C1 0, C2 19.5357, C3 69.3999, C4 0, D -6949.64
- Einsatz von Sekundärstoffen (SM) [kg]: A1-A3 0, C1 0, C2 0, C3 0, C4 0, D 0
- Erneuerbare Sekundärbrennstoffe (RSF) [MJ]: A1-A3 416.359, C1 0, C2 0, C3 0, C4 0, D 7079.7
- Nicht erneuerbare Sekundärbrennstoffe (NRSF) [MJ]: A1-A3 0, C1 0, C2 0, C3 0, C4 0, D 0
- Einsatz von Süßwasserressourcen (FW) [m^3]: A1-A3 0.30475, C1 0, C2 0.00131107, C3 0.0355344, C4 0, D -1.41507

## Outputs
- Gefährlicher Abfall zur Deponie (HWD) [kg]: A1-A3 3.8259e-5, C1 0, C2 9.03364e-7, C3 2.87101e-8, C4 0, D -2.352e-6
- Entsorgter nicht gefährlicher Abfall (NHWD) [kg]: A1-A3 2.75954, C1 0, C2 0.00309626, C3 0.0492029, C4 0, D 0.254071
- Entsorgter radioaktiver Abfall (RWD) [kg]: A1-A3 0.058694, C1 0, C2 3.60062e-5, C3 0.0105229, C4 0, D -0.598209
- Komponenten für die Wiederverwendung (CRU) [kg]: A1-A3 0, C1 0, C2 0, C3 0, C4 0, D 0
- Stoffe zum Recycling (MFR) [kg]: A1-A3 0, C1 0, C2 0, C3 0, C4 0, D 0
- Stoffe für die Energierückgewinnung (MER) [kg]: A1-A3 0, C1 0, C2 0, C3 489.878, C4 0, D 0
- Exportierte elektrische Energie (EEE) [MJ]: A1-A3 0, C1 0, C2 0, C3 0, C4 0, D 0
- Exportierte thermische Energie (EET) [MJ]: A1-A3 0, C1 0, C2 0, C3 0, C4 0, D 0

## Impact indicators
- Globales Erwärmungspotenzial total (GWP-total) [kg CO_(2)-Äq.]: A1-A3 -696.479, C1 0, C2 1.4761, C3 805.848, C4 0, D -405.4
- Globales Erwärmungspotenzial fossil (GWP-fossil) [kg CO_(2)-Äq.]: A1-A3 101.019, C1 0, C2 1.46675, C3 3.94516, C4 0, D -404.058
- Globales Erwärmungspotenzial biogen (GWP-biogenic) [kg CO_(2)-Äq.]: A1-A3 -797.851, C1 0, C2 -0.00244821, C3 801.897, C4 0, D -1.01366
- Globales Erwärmungspotenzial luluc (GWP-luluc) [kg CO_(2)-Äq.]: A1-A3 0.353235, C1 0, C2 0.0118045, C3 0.00571586, C4 0, D -0.32851
- Abbau Potential der stratosphärischen Ozonschicht (ODP) [kg CFC11-Äq.]: A1-A3 5.56178e-10, C1 0, C2 2.67657e-16, C3 8.67597e-14, C4 0, D -4.92827e-12
- Versauerungspotenzial von Boden und Wasser (AP) [mol H^(+)-Äq.]: A1-A3 0.432806, C1 0, C2 0.00495648, C3 0.00871035, C4 0, D 0.270655
- Eutrophierungspotenzial Süßwasser (EP-freshwater) [kg PO_(4)-Äq.]: A1-A3 0.000397224, C1 0, C2 4.44197e-6, C3 1.05375e-5, C4 0, D -0.00060361
- Eutrophierungspotenzial Salzwasser (EP-marine) [kg N-Äq.]: A1-A3 0.172124, C1 0, C2 0.00223604, C3 0.00193454, C4 0, D 0.0686411
- Eutrophierungspotenzial Land (EP-terrestrial) [mol N-Äq.]: A1-A3 1.89625, C1 0, C2 0.0249779, C3 0.0203247, C4 0, D 0.815783
- Bildungspotential für troposphärisches Ozon (POCP) [kg NMVOC-Äq.]: A1-A3 0.652867, C1 0, C2 0.00439311, C3 0.00530161, C4 0, D 0.289926
- Potenzial für den abiotischen Abbau nicht fossiler Ressourcen (ADPE) [kg Sb-Äq.]: A1-A3 9.02519e-5, C1 0, C2 1.17925e-7, C3 1.1417e-6, C4 0, D -7.40977e-5
- Potenzial für den abiotischen Abbau fossiler Brennstoffe (ADPF) [MJ]: A1-A3 1288.3, C1 0, C2 19.4577, C3 69.3859, C4 0, D -6948.82
- Wassernutzung (WDP) [m^(3) Welt-Äq. entzogen]: A1-A3 2.61355, C1 0, C2 0.0142205, C3 0.859692, C4 0, D -22.7424
- Auftreten von Krankheiten aufgrund von Feinstaubemissionen (PM) [Krankheitsfälle]: A1-A3 7.67861e-6, C1 0, C2 2.80054e-8, C3 7.30541e-8, C4 0, D -1.46387e-6
- Wirkung durch Exposition des Menschen mit U235 (IR) [kBq U235-Äq.]: A1-A3 6.08944, C1 0, C2 0.00531181, C3 1.72645, C4 0, D -98.1417
- Toxizitätsvergleichseinheit für Ökosysteme (ETP-fw) [CTUe]: A1-A3 711.104, C1 0, C2 14.5582, C3 29.6948, C4 0, D -1701.98
- Toxizitätsvergleichseinheit für Menschen (krebserregend) (HTP-c) [CTUh]: A1-A3 6.94241e-8, C1 0, C2 3.00897e-10, C3 8.19982e-10, C4 0, D -6.73122e-9
- Toxizitätsvergleichseinheit für Menschen (nicht krebserregend) (HTP-nc) [CTUh]: A1-A3 1.10027e-6, C1 0, C2 1.73378e-8, C3 3.02115e-8, C4 0, D 1.9674e-6
- Bodenqualitätsindex (SQP) [SQP]: A1-A3 94622.2, C1 0, C2 6.82988, C3 22.0831, C4 0, D -1277.95

## Use advice
Gültigkeitsbereich:
Die vorliegende Umwelt-Produktdeklaration bezieht sich auf eine deklarierte Einheit von 1 m³ technisch getrocknetes Schnittholz mit einer mittleren Dichte von 503 kg/m³, produziert am Standort Brilon, Deutschland. Sie bildet die beiden Qualitäten sägerau und gehobelt ab.
Systemgrenze:
Die Ökobilanz des durchschnittlichen technisch getrockneten, sägerauen und gehobelten EGGER Schnittholzes beinhaltet eine cradle-to-gate Betrachtung (Wiege bis zum Werkstor) der auftretenden Umweltwirkungen mit den Modulen C1-C4 und Modul D (A1-A3,+C,+D). Die folgenden Lebenszyklusphasen werden in der Analyse berücksichtigt:

Modul A1–A3 | Produktionsstadium

Das Produktionsstadium beinhaltet die Aufwendungen der Rohstoffversorgung (Rundholz, Hilfsstoffe etc.) sowie der damit verbundenen Transporte zum Produktionsstandort in Brilon. Innerhalb der Werksgrenzen werden der Holzplatz, die Sortierung, die Säge sowie die Trocknung und die Hobelung inklusive der Verpackung berücksichtigt. Die Bereitstellung von thermischer und elektrischer Energie, Druckluft und Wasser erfolgt durch zentrale Versorger am Standort Brilon. Der Großteil der eingesetzten elektrischen Energie wird vom deutschen Stromnetz bezogen. Im eigenen Biomasse-Kraftwerk wird sowohl internes Restholz als auch extern bezogenes Altholz verwertet. Die Systemgrenze für in der Produktion verwendetes Altholz wird nach dem Sortieren und Hacken gesetzt. Dabei wird angenommen, dass das Ende der Abfalleigenschaft erreicht ist. Hier gilt die nach EN 15804 definierte Systemgrenze für Sekundärrohstoffe.

Modul C1 | Rückbau / Abriss

Für das Schnittholz wurde ein manueller Ausbau angenommen. Die damit verbundenen Aufwände sind vernachlässigbar, wodurch keine Umweltwirkungen aus dem Rückbau der Produkte deklariert werden.

Modul C2 | Transport zur Abfallbehandlung

Modul C2 beinhaltet den Transport zur Abfallbehandlung. Dazu wird der Transport via LKW über 50 km Transportdistanz als repräsentatives Szenario angesetzt.

Modul C3 | Abfallbehandlung

In Modul C3 wird das Hacken nach Ausbau der Produkte betrachtet. Die Holzprodukte und mit ihnen die materialinhärenten Eigenschaften verlassen das Produktsystem als Sekundärbrennstoff in Modul C3.

Modul C4 | Beseitigung

Das angesetzte Szenario deklariert die energetische Verwertung der Holzprodukte, wodurch keine Umweltauswirkungen aus der Abfallbehandlung der Produkte in C4 zu erwarten sind.

Modul D | Gutschriften und Lasten außerhalb der

Systemgrenze

In Modul D wird die energetische Verwertung des Produktes am Lebensende inklusive der entsprechenden energetischen Substitutionspotenziale in Form eines europäischen Durchschnittsszenarios beschrieben.

## Data sources
- GaBi Database (all versions)
- GaBi database SP40 2020
