# Betonrohr, bewehrt; reinforced

Dataset: ILCD process, EPD, generic dataset
Geography: DE
Reference year: 2021
Valid until: 2022
Classification: oekobau.dat: Mineralische Baustoffe / Steine und Elemente / Betonfertigteile und Betonwaren
Owner: Sphera Solutions GmbH
Compliance: EN 15804+A2
Review: Dependent internal review by Sphera Solutions GmbH; Independent external review by GaBi user forum
Amounts: rows without a unit in brackets have none in this file; such an amount is in the reference unit of its flow, which a separate flow dataset defines
copyright: true
licenseType: Free of charge for all users and uses
accessRestrictions: The license conditions as stated on https://www.oekobaudat.de/ apply.
accessRestrictions: Es gelten die Lizenzbedingungen wie sie auf https://www.oekobaudat.de/ genannt sind.

## General comment
Dieser Datensatz wurde nach dem European Standard EN 15804+A2 für Nachhaltiges Bauen modelliert. Ergebnisse werden in Modulen abgebildet, die den strukturierten Ausdruck von Ergebnissen über den gesamten Lebenszyklus zulassen.

## Geography
Der Datensatz bildet die länderspezifische Situation in Deutschland ab. Dabei werden Haupttechnologien, spezifische regionale Charakteristiken und ggf. Importstatistiken berücksichtigt.

## Time period
Jährlicher Durchschnitt

## Technology and included processes
Die Lebenszyklusanalyse von Stahlbeton-Fertigteil-Rohren berücksichtigt die Herstellung von Beton (C20/25) und Bewehrungsstahl sowie den zur Herstellung benötigten Strombedarf. Der Bewehrungsgehalt beträgt 0,6%. Die Systemgrenze bildet das fertige Produkt am Werkstor mit verschiedenen Abmessungen und Gewichten pro laufenden Meter. Transporte vom Werk zur Baustelle sind nicht berücksichtigt und müssen bei Systembetrachtungen eingerechnet werden.

In der Entsorgungsphase wird in Modul C1 ein maschineller Rückbau (Bagger) bilanziert. Der Transport in Modul C2 zur Aufbereitungsanlage erfolgt mit einem LKW (50km). In Modul C3 wird das Material aufbereitet, eventuelle Bewehrung wird einer Senke (keine Lasten, keine Gutschriften) zugeführt. Es wurde ein Aufbereitungsverlust von 25% angenommen. Dieser Verlust wird einer Inertstoffdeponie innerhalb von Modul C3 zugeführt (durchschnittliche Deponieemissionen). In Modul D erfolgt eine Gutschrift für die Netto-Materialmenge (ohne Bewehrungsanteil und abzüglich Aufbereitungsverluste) für die Substitution von natürlichem Kies als Verfüllmaterial (z.B. im Straßen- oder Deponiebau).

## Technical purpose
Dieses Produkt kann im Baubereich verwendet werden.

## Safety margin
20 %. Produktsystem bis auf wenige Prozesse/Flüsse abgebildet. Technologische, zeitliche und geographische Repräsentativität teilweise gegeben.

## Reference product
- Betonrohr, bewehrt: 1

## Inputs
- Erneuerbare Primärenergie als Energieträger (PERE) [MJ]: A1-A3 0.254251, C1 0.000250036, C2 0.00218616, C3 0.0130142, D -0.00509565
- Erneuerbare Primärenergie zur stofflichen Nutzung (PERM) [MJ]: A1-A3 0, C1 0, C2 0, C3 0, D 0
- Total erneuerbare Primärenergie (PERT) [MJ]: A1-A3 0.254251, C1 0.000250036, C2 0.00218616, C3 0.0130142, D -0.00509565
- Nicht-erneuerbare Primärenergie als Energieträger (PENRE) [MJ]: A1-A3 0.745354, C1 0.00430813, C2 0.0376677, C3 0.116917, D -0.0187136
- Nicht-erneuerbare Primärenergie zur stofflichen Nutzung (PENRM) [MJ]: A1-A3 0, C1 0, C2 0, C3 0, D 0
- Total nicht-erneuerbare Primärenergie (PENRT) [MJ]: A1-A3 0.745354, C1 0.00430813, C2 0.0376677, C3 0.116917, D -0.0187136
- Einsatz von Sekundärstoffen (SM) [kg]: A1-A3 0.0169609, C1 0, C2 0, C3 0, D 0
- Erneuerbare Sekundärbrennstoffe (SF) [MJ]: A1-A3 0, C1 0, C2 0, C3 0, D 0
- Nicht erneuerbare Sekundärbrennstoffe (NRSF) [MJ]: A1-A3 0, C1 0, C2 0, C3 0, D 0
- Nettoeinsatz von Süßwasserressourcen (FW) [m3]: A1-A3 0.000284185, C1 2.2222e-7, C2 1.94295e-6, C3 2.95714e-5, D -3.08899e-6

## Outputs
- Gefährlicher Abfall zur Deponie (HWD) [kg]: A1-A3 1.535e-10, C1 1.80066e-13, C2 1.57439e-12, C3 9.56711e-12, D -3.01505e-12
- Entsorgter nicht gefährlicher Abfall (NHWD) [kg]: A1-A3 0.0396661, C1 6.9543e-7, C2 6.08042e-6, C3 0.286614, D -0.012427
- Entsorgter radioaktiver Abfall (RWD) [kg]: A1-A3 2.8928e-5, C1 4.13421e-9, C2 3.61471e-8, C3 1.03093e-6, D -5.51902e-7
- Komponenten für die Wiederverwendung (CRU) [kg]: A1-A3 0, C1 0, C2 0, C3 0, D 0
- Stoffe zum Recycling (MFR) [kg]: A1-A3 0, C1 0, C2 0, C3 0.715787, D 0
- Stoffe für die Energierückgewinnung (MER) [kg]: A1-A3 0, C1 0, C2 0, C3 0, D 0
- Exportierte elektrische Energie (EEE) [MJ]: A1-A3 0, C1 0, C2 0, C3 0, D 0
- Exportierte thermische Energie (EET) [MJ]: A1-A3 0, C1 0, C2 0, C3 0, D 0

## Impact indicators
- Globales Erwärmungspotenzial - total (GWP-total) [kg CO2 eq.]: A1-A3 0.145714, C1 0.000322305, C2 0.00286116, C3 0.00741579, D -0.00142586
- Globales Erwärmungspotenzial - fossil (GWP-fossil) [kg CO2 eq.]: A1-A3 0.145226, C1 0.000320149, C2 0.00284173, C3 0.00748383, D -0.00141812
- Globales Erwärmungspotenzial - biogen (GWP-biogenic) [kg CO2 eq.]: A1-A3 0.000322005, C1 6.93722e-8, C2 1.17716e-6, C3 -9.80432e-5, D -1.2647e-6
- Globales Erwärmungspotenzial - luluc (GWP-luluc) [kg CO2 eq.]: A1-A3 0.000165122, C1 2.08733e-6, C2 1.82504e-5, C3 2.99979e-5, D -6.47838e-6
- Abbaupotenzial der stratosphärischen Ozonschicht (ODP) [kg CFC-11 eq.]: A1-A3 1.02383e-15, C1 8.31628e-20, C2 7.27125e-19, C3 3.10522e-17, D -1.83106e-17
- Versauerungspotenzial, kumulierte Überschreitung (AP) [Mole of H+ eq.]: A1-A3 0.000178126, C1 4.31043e-6, C2 8.05696e-6, C3 6.02071e-5, D -4.6968e-6
- Eutrophierungspotenzial - Süßwasser (EP-freshwater) [kg P eq.]: A1-A3 1.57558e-7, C1 6.6843e-10, C2 5.84435e-9, C3 1.44682e-8, D -3.94598e-9
- Eutrophierungspotenzial - Salzwasser (EP-marine) [kg N eq.]: A1-A3 6.20908e-5, C1 1.96097e-6, C2 3.71167e-6, C3 2.25337e-5, D -1.82669e-6
- Eutrophierungspotenzial - Land (EP-terrestrial) [Mole of N eq.]: A1-A3 0.000677672, C1 2.15611e-5, C2 4.15269e-5, C3 0.000247615, D -2.01096e-5
- Bildungspotenzial für troposphärisches Ozon (POCP) [kg NMVOC eq.]: A1-A3 0.000180472, C1 5.87288e-6, C2 7.23785e-6, C3 6.64864e-5, D -4.32054e-6
- Potenzial für die Verknappung abiotischer Ressourcen nicht fossile Ressourcen (ADPE) [kg Sb eq.]: A1-A3 1.42452e-8, C1 2.82717e-11, C2 2.47191e-10, C3 3.88336e-9, D -2.89626e-10
- Potenzial für die Verknappung abiotischer Ressourcen fossile Brennstoffe (ADPF) [MJ]: A1-A3 0.74517, C1 0.00430795, C2 0.0376661, C3 0.116883, D -0.0187099
- Wasser-Entzugspotenzial (Benutzer) (WDP) [m³ world equiv.]: A1-A3 0.00606167, C1 1.26344e-6, C2 1.10468e-5, C3 0.000992909, D -3.45683e-5

## Use advice
Der Datensatz repräsentiert ein Cradle to Gate Inventar. Er kann verwendet werden, um die Lieferkette des jeweiligen Produktes in einer repräsentativen Weise zu charakterisieren. Die Kombination mit einzelnen Einheitenprozessen und diesem Produkt ermöglicht die Erstellung von anwenderspezifischen (Produkt-) LCAs.

## Data sources
- Beton Atlas - Entwerfen mit Stahlbeton im Hochbau, 2002
- Ökologischer Vergleich von Rohren aus verschiedenen Werkstoffen, TU-Wien, 1996
- Schneider Bautabellen für Ingenieure, 2006
- Stahlbetonrohr nach V1201-Typ 2 und DIN EN 1916, 2008
- Documentation of data quality management
- GaBi Database Edition 2021, CUP2021.01
- GaBi database (all versions)
