# Braas Dachsteine Frankfurter, Taunus, Doppel-S, Harzer

Dataset: ILCD process, EPD, average dataset
Geography: DE
Reference year: 2018
Valid until: 2023
Classification: OEKOBAU.DAT: Mineralische Baustoffe / Steine und Elemente / Dachsteine
Classification: IBUCategories: 02 Bauprodukte / Bedachungen / Betondachsteine
Method details: Betondachsteine.pdf
Generated by: SUSTAINUM Institut für zukunftsfähiges Wirtschaften Berlin eG
Registration number: EPD-BRA-20170029-ICD1-DE
Owner: BMI Deutschland Braas
Compliance: DIN EN 15804; ISO 14025
Review: Accredited third party review by Institut Bauen und Umwelt e. V.
Amounts: rows without a unit in brackets have none in this file; such an amount is in the reference unit of its flow, which a separate flow dataset defines
copyright: true
licenseType: Free of charge for all users and uses
accessRestrictions: None

## General comment
BRAAS Dachsteine werden für das Eindecken von Dächern verschiedenster Formen und Dachneigungen sowie als Außenwandbekleidung verwendet. Die BRAAS Dachsteinmodelle sind:

Tegalit
Frankfurter Pfanne
Taunus Pfanne
Doppel-S
Harzer Pfanne
Harzer Pfanne 7
Harzer Pfanne F+

Die Dachsteinmodelle unterscheiden sich in ihren Abmessungen, Formen, Oberflächen und Farben. Die Produktionsschritte und die Materialzusammensetzung sind nahezu identisch.

## Technology and included processes
Bei der Herstellung von BRAAS Dachsteinen werden aus der Natur gewonnene Rohstoffe aus heimischen Regionen eingesetzt. In prozessoptimierten Aufbereitungsanlagen werden die Rohstoffe dosiert, gemischt und unter hohem Druck auf Unterlagsplatten aufgebracht. Gleichzeitig wird die Oberflächenkontur des Dachsteins geformt. Das verdichtete und profilierte Material verlässt als Endlosstrang die Maschine. Mit Spezialmessern werden die einzelnen Dachsteine getrennt. Nach einer ersten Oberflächenveredelung erfolgt der Härtungsprozess. Dazu werden die frischen Dachsteine für acht bis zwölf Stunden in Härtekammern bei einer Temperatur von 50°C - 60°C eingelagert. Bevor sie von ihren Unterlagsplatten getrennt werden, erhalten sie ihre zweite Oberflächenbeschichtung und passieren einen Trockenofen. Eine Qualitätskontrolle schließt sich an. Dachsteine, die den strengen Qualitätsanforderungen nicht entsprechen, werden aussortiert und einer Aufbereitung zur Wiederverwendung als Rohstoff zugeführt. Ihre Tragfähigkeit nach /EN 490/ und DINplus erreichen die Dachsteine ohne weiteren Energieaufwand.
Technische Daten:
Es gelten die Daten entsprechend der Leistungserklärung nach /EN 490:2012 Dach- und Formsteine aus Beton für Dächer und Wandbekleidungen - Produktanforderungen/. Und folgende
Deklarierte Einheit:
Die Deklaration bezieht sich auf die Herstellung von 1t durchschnittlich produziertem Dachstein der BRAAS GmbH.

## Technical purpose
Dachsteine werden als Dachdeckungen für geneigte Dächer oder als Außenwandbekleidungen verwendet.

## Reference product
- 1t Dachsteine (1t Dachsteine ): 1000

## Inputs
- Erneuerbare Primärenergie als Energieträger (PERE) [MJ]: A1 119.208, A2 7.39807, A3 61.9911, A4 18.8902, A5 0.261218, B1 0, B4 0, B5 0, C1 0, C2 3.14837, C3 0, C4 24.6067, D -7.13376
- Erneuerbare Primärenergie zur stofflichen Nutzung (PERM) [MJ]: A1 0, A2 0, A3 0, A4 0, A5 0, B1 0, B4 0, B5 0, C1 0, C2 0, C3 0, C4 0, D 0
- Total erneuerbare Primärenergie (PERT) [MJ]: A1 119.208, A2 7.39807, A3 61.9911, A4 18.8902, A5 0.261218, B1 0, B4 0, B5 0, C1 0, C2 3.14837, C3 0, C4 24.6067, D -7.13376
- Nicht-erneuerbare Primärenergie als Energieträger (PENRE) [MJ]: A1 1154.29, A2 108.938, A3 397.262, A4 278.162, A5 75.9479, B1 0, B4 0, B5 0, C1 0, C2 46.3603, C3 0, C4 216.321, D -38.9154
- Nicht-erneuerbare Primärenergie zur stofflichen Nutzung (PENRM) [MJ]: A1 325.83, A2 0, A3 0, A4 0, A5 -74.1, B1 0, B4 0, B5 0, C1 0, C2 0, C3 0, C4 0, D 0
- Total nicht erneuerbare Primärenergie (PENRT) [MJ]: A1 1480.12, A2 108.938, A3 397.262, A4 278.162, A5 1.84792, B1 0, B4 0, B5 0, C1 0, C2 46.3603, C3 0, C4 216.321, D -38.9154
- Einsatz von Sekundärstoffen (SM) [kg]: A1 0, A2 0, A3 0, A4 0, A5 0, B1 0, B4 0, B5 0, C1 0, C2 0, C3 0, C4 0, D 0
- Erneuerbare Sekundärbrennstoffe (RSF) [MJ]: A1 0, A2 0, A3 0, A4 0, A5 0, B1 0, B4 0, B5 0, C1 0, C2 0, C3 0, C4 0, D 0
- Nicht erneuerbare Sekundärbrennstoffe (NRSF) [MJ]: A1 0, A2 0, A3 0, A4 0, A5 0, B1 0, B4 0, B5 0, C1 0, C2 0, C3 0, C4 0, D 0
- Einsatz von Süßwasserressourcen (FW) [m^3]: A1 0.327526, A2 0.011173, A3 0.0481865, A4 0.0285291, A5 0.0106813, B1 0, B4 0, B5 0, C1 0, C2 0.00475486, C3 0, C4 0.0440491, D -0.00536229

## Outputs
- Gefährlicher Abfall zur Deponie (HWD) [kg]: A1 0.00514892, A2 1.40182e-5, A3 4.87634e-7, A4 3.5794e-5, A5 3.30092e-8, B1 0, B4 0, B5 0, C1 0, C2 5.96566e-6, C3 0, C4 4.94741e-6, D -2.50984e-8
- Entsorgter nicht gefährlicher Abfall (NHWD) [kg]: A1 563.143, A2 0.7251, A3 126.768, A4 1.85147, A5 0.99766, B1 0, B4 0, B5 0, C1 0, C2 0.308578, C3 0, C4 1038.31, D -8.38682
- Entsorgter radioaktiver Abfall (RWD) [kg]: A1 0.0325956, A2 0.000147494, A3 0.0147501, A4 0.000376609, A5 8.12016e-5, B1 0, B4 0, B5 0, C1 0, C2 6.27682e-5, C3 0, C4 0.00298807, D -0.00171482
- Komponenten für die Wiederverwendung (CRU) [kg]: A1 0, A2 0, A3 0, A4 0, A5 0, B1 0, B4 0, B5 0, C1 0, C2 0, C3 0, C4 0, D 0
- Stoffe zum Recycling (MFR) [kg]: A1 0, A2 0, A3 0, A4 0, A5 0, B1 0, B4 0, B5 0, C1 0, C2 0, C3 0, C4 0, D 0
- Stoffe für die Energierückgewinnung (MER) [kg]: A1 0, A2 0, A3 0, A4 0, A5 0, B1 0, B4 0, B5 0, C1 0, C2 0, C3 0, C4 0, D 0
- Exportierte elektrische Energie (EEE) [MJ]: A1 0, A2 0, A3 0, A4 0, A5 8.35, B1 0, B4 0, B5 0, C1 0, C2 0, C3 0, C4 0, D 0
- Exportierte thermische Energie (EET) [MJ]: A1 0, A2 0, A3 0, A4 0, A5 19.2, B1 0, B4 0, B5 0, C1 0, C2 0, C3 0, C4 0, D 0

## Impact indicators
- Globales Erwärmungspotenzial (GWP) [kg CO_(2)-Äq.]: A1 220.369, A2 7.94881, A3 27.5644, A4 20.2915, A5 4.31369, B1 0, B4 0, B5 0, C1 0, C2 3.38191, C3 0, C4 16.0675, D -2.6807
- Abbau Potential der stratosphärischen Ozonschicht (ODP) [kg CFC11-Äq.]: A1 5.86018e-9, A2 1.65223e-11, A3 7.28862e-10, A4 4.21881e-11, A5 1.32401e-11, B1 0, B4 0, B5 0, C1 0, C2 7.03134e-12, C3 0, C4 1.57926e-10, D -8.46667e-11
- Versauerungspotenzial von Boden und Wasser (AP) [kg SO_(2)-Äq.]: A1 0.316241, A2 0.0333532, A3 0.0327401, A4 0.0880734, A5 0.00106817, B1 0, B4 0, B5 0, C1 0, C2 0.0146789, C3 0, C4 0.0962445, D -0.0028844
- Eutrophierungspotenzial (EP) [kg PO_(4)^(3)-Äq.]: A1 0.0332951, A2 0.00851459, A3 0.00492682, A4 0.0225018, A5 9.22564e-5, B1 0, B4 0, B5 0, C1 0, C2 0.00375031, C3 0, C4 0.0130939, D -0.000450605
- Bildungspotential für troposphärisches Ozon (POCP) [kg Ethen-Äq.]: A1 0.0424823, A2 -0.012054, A3 0.00365332, A4 -0.0321217, A5 3.34815e-5, B1 0, B4 0, B5 0, C1 0, C2 -0.00535361, C3 0, C4 0.00924866, D -0.000312571
- Potenzial für den abiotischen Abbau nicht fossiler Ressourcen (ADPE) [kg Sb-Äq.]: A1 0.00035451, A2 6.03985e-7, A3 6.28507e-6, A4 1.54221e-6, A5 2.96462e-7, B1 0, B4 0, B5 0, C1 0, C2 2.57035e-7, C3 0, C4 5.55239e-6, D -6.88933e-7
- Potenzial für den abiotischen Abbau fossiler Brennstoffe (ADPF) [MJ]: A1 1398.09, A2 108.555, A3 360.113, A4 277.185, A5 1.64375, B1 0, B4 0, B5 0, C1 0, C2 46.1974, C3 0, C4 208.789, D -34.5966

## Use advice
Gültigkeitsbereich:
Dieses Dokument bezieht sich auf Dachsteine der Firma BRAAS GmbH, hergestellt in mehreren Werken in Deutschland. Es handelt sich um die Deklaration eines Produkts gemittelt aus 6 von 7 Werken des Herstellers. Die 7 Produktionswerke sind: Altheim, Heusenstamm, Heyrothsberge, Mainburg, Monheim, Rahmstorf und Dülmen. Das Werk Dülmen stellt in einem speziellen Verfahren Sonderformsteine in einer kleinen Auflage her und wird zur Sicherung der Repräsentativität nicht in die Bilanzierung mit eingeschlossen.

Die deklarierte Einheit bezieht sich auf 1 t Dachsteine. Die Datenerhebung für die Herstellung des deklarierten Produktes erfolgte werksspezifisch mit aktuellen Jahresdaten von 2015. Die Ökobilanz ist somit repräsentativ für Dachsteine der BRAAS GmbH. Der Deklarationsinhaber ist verantwortlich für die zugrunde liegenden Daten und deren Verifizierung.
Systemgrenze:
Die Ökobilanz betrachtet die Systemgrenzen "von der Wiege bis zur Bahre" und folgt dem modularen Aufbau nach /DIN EN 15804/. Die Ökobilanz berücksichtigt folgende Module:

A1-A3: Rohstoffversorgung, Transport, Herstellung
A4: Transport vom Hersteller zum Verwendungsort
A5: Montage
B1: Nutzung/ Anwendung
B4: Ersatz
B5: Erneuerung
C1: Rückbau/ Abriss
C2: Transport
C3: Abfallbehandlung
C4: Beseitigung
D: Wiederverwendungs-, Rückgewinnungs- oder Recyclingpotenzial

## Data sources
- GaBi Database (all versions)
- GaBi database SP29 2016
