# Kunststoffprofil SBR; SBR

Dataset: ILCD process, EPD, generic dataset
Geography: DE
Reference year: 2018
Valid until: 2022
Classification: oekobau.dat: Kunststoffe / Profile / Kunststoffprofile elastisch
Owner: thinkstep
Compliance: DIN EN 15804
Review: Dependent internal review by thinkstep, IABP-GaBi, IBP-GaBi; Independent external review by GaBi user forum, GaBi bug forum, GaBi user community
Amounts: rows without a unit in brackets have none in this file; such an amount is in the reference unit of its flow, which a separate flow dataset defines
copyright: true

## General comment
Dieser Datensatz wurde nach dem European Standard EN 15804 für Nachhaltiges Bauen modelliert. Ergebnisse werden in Modulen abgebildet, die den strukturierten Ausdruck von Ergebnissen über den gesamten Lebenszyklus zulassen.

## Geography
Der Datensatz bildet die länderspezifische Situation in Deutschland ab. Dabei werden Haupttechnologien, spezifische regionale Charakteristiken und ggf. Importstatistiken berücksichtigt.

## Time period
Jährlicher Durchschnitt

## Technology and included processes
Die Ökobilanzierung umfasst die Rohstoffbereitstellung, den Rohstofftransport und den Herstellungsaufwand für ein Styrol-Butadien-Kautschuk-Profil (SBR). Die Systemgrenze bildet das verkaufsfertige Produkt. Transporte vom Werk zum Einbauort sind nicht berücksichtigt und sollten nach Bedarf nachträglich einbezogen werden.
Zur Herstellung von SBR: Wichtige Vorprodukte sind Styrol und Butadien. Grundsätzlich wird unterschieden zwischen dem Verfahren der Emulsionspolymerisation und der Lösungspolymerisation. In diesem Fall wird die einfachere Emulsionspolymerisation betrachtet. Bezüglich des Energieverbrauchs ist dieses Verfahren weniger aufwändig als die Lösungspolymerisation. Styrol, Butadien, Wasser und andere Materialien (z. B. Schwefelsäure und Steinsalz) werden in einem Reaktor gemischt und die Polymerisation gestartet. Nach einer definierten Umwälzung wird die Reaktion abgestoppt. Verbliebene Monomere werden durch Ausdämpfen und Vakuum-Desorption entfernt. Die entstandene Emulsion wird nach der kontrollierten Ausflockung gewaschen und getrocknet.

Hintergrundsystem:
Strom: Die Stromerzeugung wird entsprechend der länderspezifischen Randbedingungen modelliert. Die landesspezifische Analyse beinhaltet:
1.: Spezifische Kraftwerke der verschiedenen fossilen Energieträger und der Einsatz erneuerbarer Energien sind entsprechend der länderspezifischen Energieträgermixe modelliert. Die Analyse bezieht Stromimporte aus den Nachbarländern, Transmissions-und Verteilungsverluste und den Eigenverbrauch im Kraftwerk und bei der Verteilung bzw. Speicherung, z. B. durch Pumpspeicherwerke, ein.
2.: Die landes-/regionalspezifischen Technologiestandards sowie die Erzeugung in Elektrizitätskraftwerken und/oder in speziellen Kraftwerken mit Kraft-Wärme-Kopplung (KWK) sind berücksichtigt.
3.: Die länderspezifische Energieträgerbereitstellung (mit Anteil der Importe und/oder Eigenversorgung) einschließlich der Energieträger-Eigenschaften (z. B. Elementar- und Energiegehalte) werden berücksichtigt.
4.: Die Förderung, Produktion, Verarbeitung und Transportprozesse werden entsprechend der Situation im jeweiligen Stromerzeugerland modelliert. Die unterschiedlichen Produktions- und Verarbeitungsverfahren (Emissionen und Wirkungsgrade) in den verschiedenen Energieerzeugerländern werden einbezogen, z. B. Rohöl-Veredelungsverfahren oder Abfackel-Raten an den Ölplattformen.
Thermische Energie, Prozessdampf: Die Erzeugung von Dampf und thermischer Energie in Heizkraftwerken wird entsprechend der landesspezifischen Situation (Emissionsgrenzwerte, Energieträgerbasis) modelliert.
Der Wirkungsgrad für die thermische Energieerzeugung beträgt per Definition 100% des Energieträgereinsatzes. Für Prozessdampf liegt der Wirkungsgrad im Bereich von 85-95%. Die zur Heizenergie-Erzeugung verwendeten Energieträger werden entsprechend der nationalen Situation modelliert (siehe Kapitel Strom oben).
Transporte: Alle relevanten und bekannten Transportprozesse in Form von See- und Binnenschiffsverkehr sowie Bahn-, Lkw- und der Leitungstransport sind enthalten.
Energieträger: Die Energieträger werden entsprechend der spezifischen Versorgungslage modelliert (siehe Kapitel Strom oben).
Raffinerieprodukte: Diesel, Benzin, technische Gase, Heizöl, Schmierstoffe und Rückstände, wie Bitumen, werden mit einem parametrierten länderspezifische Raffineriemodell modelliert. Das Raffinerie-Modell bezieht die länderspezifischen Veredelungsverfahren (z. B. Emissionspegel, interner Energieverbrauch etc.) und das länderspezifische Produktspektrum ein, das sich je nach Land stark unterscheiden kann. Die Rohöl-Förderung wird gemäß der länderspezifischen Situation mit den jeweiligen Energieträger-Eigenschaften modelliert.

## Technical purpose
Dieses Produkt kann im Baubereich verwendet werden.

## Safety margin
20 %. Produktsystem bis auf wenige Prozesse/Flüsse abgebildet. Technologische, zeitliche und geographische Repräsentativität teilweise gegeben.

## Reference product
- Kunststoffprofil (SBR/EPDM): 1

## Inputs
- Erneuerbare Primärenergie als Energieträger (PERE) [MJ]: A1-A3 7.30173, C1 0, C2 0.0021792, C3 0.142149, D -7.13478
- Erneuerbare Primärenergie zur stofflichen Nutzung (PERM) [MJ]: A1-A3 0, C1 0, C2 0, C3 0, D 0
- Total erneuerbare Primärenergie (PERT) [MJ]: A1-A3 7.30173, C1 0, C2 0.0021792, C3 0.142149, D -7.13478
- Nicht-erneuerbare Primärenergie als Energieträger (PENRE) [MJ]: A1-A3 62.9338, C1 0, C2 0.037433, C3 52.2113, D -24.7944
- Nicht-erneuerbare Primärenergie zur stofflichen Nutzung (PENRM) [MJ]: A1-A3 51.6, C1 0, C2 0, C3 -51.6, D 0
- Total nicht erneuerbare Primärenergie (PENRT) [MJ]: A1-A3 114.534, C1 0, C2 0.037433, C3 0.611347, D -24.7944
- Einsatz von Sekundärstoffen (SM) [kg]: A1-A3 0, C1 0, C2 0, C3 0, D 0
- Erneuerbare Sekundärbrennstoffe (RSF) [MJ]: A1-A3 0, C1 0, C2 0, C3 0, D 0
- Nicht erneuerbare Sekundärbrennstoffe (NRSF) [MJ]: A1-A3 0, C1 0, C2 0, C3 0, D 0
- Einsatz von Süßwasserressourcen (FW) [m3]: A1-A3 0.0155231, C1 0, C2 1.95166e-6, C3 0.00805848, D -0.00332787

## Outputs
- Gefährlicher Abfall zur Deponie (HWD) [kg]: A1-A3 5.27752e-8, C1 0, C2 1.39883e-9, C3 1.31481e-9, D -1.31271e-8
- Entsorgter nicht gefährlicher Abfall (NHWD) [kg]: A1-A3 0.0485323, C1 0, C2 6.57015e-6, C3 0.0407884, D -0.011703
- Entsorgter radioaktiver Abfall (RWD) [kg]: A1-A3 0.00123863, C1 0, C2 3.94093e-8, C3 2.0461e-5, D -0.000862006
- Komponenten für die Wiederverwendung (CRU) [kg]: A1-A3 0, C1 0, C2 0, C3 0, D 0
- Stoffe zum Recycling (MFR) [kg]: A1-A3 0, C1 0, C2 0, C3 0, D 0
- Stoffe für die Energierückgewinnung (MER) [kg]: A1-A3 0, C1 1.2, C2 0, C3 0, D 0
- Exportierte elektrische Energie (EEE) [MJ]: A1-A3 0, C1 0, C2 0, C3 6.84184, D 0
- Exportierte thermische Energie (EET) [MJ]: A1-A3 0, C1 0, C2 0, C3 15.5884, D 0

## Impact indicators
- Globales Erwärmungspotenzial (GWP) [kg CO2 Äquiv.]: A1-A3 4.20151, C1 0, C2 0.00278506, C3 3.1383, D -1.6957
- Abbaupotenzial der stratosphärischen Ozonschicht (ODP) [kg R11 Äquiv.]: A1-A3 3.67559e-14, C1 0, C2 9.21867e-19, C3 7.99298e-16, D -3.94532e-14
- Versauerungspotential (AP) [kg SO2 Äquiv.]: A1-A3 0.00488403, C1 0, C2 5.62553e-6, C3 0.000261772, D -0.00143459
- Eutrophierungspotential (EP) [kg Phosphat Äquiv.]: A1-A3 0.000732831, C1 0, C2 1.33734e-6, C3 5.96077e-5, D -0.000271955
- Bildungspotenzial für troposphärisches Ozon (POCP) [kg Ethen Äquiv.]: A1-A3 0.000915988, C1 0, C2 -1.6854e-6, C3 1.97357e-5, D -0.000145925
- Potenzial für den abiotischen Abbau nicht fossiler Ressourcen (ADPE) [kg Sb Äquiv.]: A1-A3 6.50939e-7, C1 0, C2 2.34365e-10, C3 8.53519e-9, D -4.23029e-7
- Potenzial für den abiotischen Abbau fossiler Brennstoffe (ADPF) [MJ]: A1-A3 111.405, C1 0, C2 0.0373323, C3 0.559698, D -22.6183

## Use advice
Der Datensatz repräsentiert ein Cradle to Gate Inventar. Er kann verwendet werden, um die Lieferkette des jeweiligen Produktes in einer repräsentativen Weise zu charakterisieren. Die Kombination mit einzelnen Einheitenprozessen und diesem Produkt ermöglicht die Erstellung von anwenderspezifischen (Produkt-) LCAs.

## Data sources
- GaBi Database Edition 2020, SP40
- GaBi database (all versions)
