# Thermisch behandeltes Holz (1 m³, 409 kg/m³)

Dataset: ILCD process, EPD, generic dataset
Geography: DE
Reference year: 2021
Valid until: 2022
Classification: oekobau.dat: Holz / Modifiziertes Holz / Thermisch behandeltes Holz
Owner: Sphera Solutions GmbH
Compliance: EN 15804+A2
Review: Dependent internal review by Sphera Solutions GmbH; Independent external review by GaBi user forum
Amounts: rows without a unit in brackets have none in this file; such an amount is in the reference unit of its flow, which a separate flow dataset defines
copyright: true
licenseType: Free of charge for all users and uses
accessRestrictions: The license conditions as stated on https://www.oekobaudat.de/ apply.
accessRestrictions: Es gelten die Lizenzbedingungen wie sie auf https://www.oekobaudat.de/ genannt sind.

## General comment
Dieser Datensatz wurde nach dem European Standard EN 15804+A2 für Nachhaltiges Bauen modelliert. Ergebnisse werden in Modulen abgebildet, die den strukturierten Ausdruck von Ergebnissen über den gesamten Lebenszyklus zulassen.

## Geography
Der Datensatz bildet die länderspezifische Situation in Deutschland ab. Dabei werden Haupttechnologien, spezifische regionale Charakteristiken und ggf. Importstatistiken berücksichtigt.

## Time period
Jährlicher Durchschnitt

## Technology and included processes
Für die Herstellung von thermisch modifiziertem Holz wird für diesen Datensatz getrocknetes Bauholz aus Nadelholz eingesetzt.

Das Holz wird über mehrere Prozessschritte behandelt wobei Temperaturen zwischen 170 und 250 °C erreicht werden. Pro Kilogramm trockene Holzmasse wurde von einem thermischen Energieverbrauch von knapp 32 MJ/kg ausgegangen. Infolge der Temperaturen laufen verschiedene Reaktionen und Prozesse ab, die die chemische Struktur des Holzes verändern und zu einer erhöhten Dauerhaftigkeit sowie Dimensionsstabilität beitragen.

Für die Bereitstellung der benötigten thermischen Energie wurde als konservativer Ansatz davon ausgegangen, dass die Hälfte der benötigten thermischen Energie aus fossilen Quellen (Erdgas) und die andere Hälfte aus erneuerbaren Quellen (Biomasse) gewonnen wird. Die thermische Energie zusammen mit der Holzvorkette dominieren die Ökobilanz des Produktsystems.

In Modul C1 wird ein manueller Rückbau (lastenfrei) angenommen. Sammelverluste werden vernachlässigt.
Der Transport in Modul C2 zur Verwertungsanlage erfolgt mit einem LKW (50km).
In Modul C3 wird die Zerkleinerung und thermische Verwertung des Materials berücksichtigt. Das im Material durch Photosynthese aufgenommene und gespeicherte CO2 (aus Modul A1) wird dabei in C3 ausgebucht (CO2 Neutralität innerhalb des Produktsystems gemäß EN 16485: Round and sawn timber - Environmental Product Declarations - Product category rules for wood and wood-based products for use in construction, 2014). Weiterhin enthält das Modul C3 die Lasten für den Betrieb der Verwertungsanlage.
Modul D enthält die Gutschriften für die Substitution von Strom (deutscher Strommix) und thermischer Energie (aus Erdgas). Bei der Berechnung der Verbrennungsemissionen und Gutschriften wird der spezifische Heizwert des jeweiligen Materials sowie die Materialzusammensetzung berücksichtigt.

## Technical purpose
Thermisch modifiziertes Holz kann für tragende und nicht-tragende Anwendungen verwendet werden. Durch die verbesserte Dauerhaftigkeit wird thermisch modifiziertes Holz vor allem im Aussenbereich eingesetzt. Farbbeschichtungen sind möglich.

## Safety margin
20 %. Produktsystem bis auf wenige Prozesse/Flüsse abgebildet. Technologische, zeitliche und geographische Repräsentativität teilweise gegeben.

## Reference product
- Thermisch behandeltes Holz (1 m³, 409 kg/m³): 1

## Inputs
- Erneuerbare Primärenergie als Energieträger (PERE) [MJ]: A1-A3 8712.7, C2 0.894141, C3 8271.4, D -967.827
- Erneuerbare Primärenergie zur stofflichen Nutzung (PERM) [MJ]: A1-A3 6840, C2 0, C3 -6840, D 0
- Total erneuerbare Primärenergie (PERT) [MJ]: A1-A3 15552.7, C2 0.894141, C3 1431.4, D -967.827
- Nicht-erneuerbare Primärenergie als Energieträger (PENRE) [MJ]: A1-A3 9209.22, C2 15.4061, C3 314.243, D -2817.44
- Nicht-erneuerbare Primärenergie zur stofflichen Nutzung (PENRM) [MJ]: A1-A3 0, C2 0, C3 0, D 0
- Total nicht-erneuerbare Primärenergie (PENRT) [MJ]: A1-A3 9209.22, C2 15.4061, C3 314.243, D -2817.44
- Einsatz von Sekundärstoffen (SM) [kg]: A1-A3 0, C2 0, C3 0, D 0
- Erneuerbare Sekundärbrennstoffe (SF) [MJ]: A1-A3 0, C2 0, C3 0, D 0
- Nicht erneuerbare Sekundärbrennstoffe (NRSF) [MJ]: A1-A3 0, C2 0, C3 0, D 0
- Nettoeinsatz von Süßwasserressourcen (FW) [m3]: A1-A3 1.538, C2 0.000794668, C3 2.20015, D -0.359923

## Outputs
- Gefährlicher Abfall zur Deponie (HWD) [kg]: A1-A3 3.03463e-5, C2 6.43924e-10, C3 7.60678e-8, D -9.80978e-7
- Entsorgter nicht gefährlicher Abfall (NHWD) [kg]: A1-A3 9.95515, C2 0.00248689, C3 6.5519, D -1.49563
- Entsorgter radioaktiver Abfall (RWD) [kg]: A1-A3 0.0171485, C2 1.47841e-5, C3 0.0077839, D -0.104091
- Komponenten für die Wiederverwendung (CRU) [kg]: A1-A3 0, C2 0, C3 0, D 0
- Stoffe zum Recycling (MFR) [kg]: A1-A3 0, C2 0, C3 0, D 0
- Stoffe für die Energierückgewinnung (MER) [kg]: A1-A3 0, C2 0, C3 0, D 0
- Exportierte elektrische Energie (EEE) [MJ]: A1-A3 0, C2 0, C3 775.403, D 0
- Exportierte thermische Energie (EET) [MJ]: A1-A3 0, C2 0, C3 1734.73, D 0

## Impact indicators
- Globales Erwärmungspotenzial - total (GWP-total) [kg CO2 eq.]: A1-A3 -202.159, C2 1.17021, C3 812.268, D -181.634
- Globales Erwärmungspotenzial - fossil (GWP-fossil) [kg CO2 eq.]: A1-A3 542.889, C2 1.16227, C3 22.0174, D -179.416
- Globales Erwärmungspotenzial - biogen (GWP-biogenic) [kg CO2 eq.]: A1-A3 -746.068, C2 0.000481457, C3 790.23, D -1.9501
- Globales Erwärmungspotenzial - luluc (GWP-luluc) [kg CO2 eq.]: A1-A3 1.02035, C2 0.00746441, C3 0.0210075, D -0.267266
- Abbaupotenzial der stratosphärischen Ozonschicht (ODP) [kg CFC-11 eq.]: A1-A3 4.72562e-13, C2 2.97394e-16, C3 2.60451e-13, D -4.22538e-12
- Versauerungspotenzial, kumulierte Überschreitung (AP) [Mole of H+ eq.]: A1-A3 1.44717, C2 0.0032953, C3 0.528931, D -0.185128
- Eutrophierungspotenzial - Süßwasser (EP-freshwater) [kg P eq.]: A1-A3 0.00763816, C2 2.39034e-6, C3 3.74189e-5, D -0.000444602
- Eutrophierungspotenzial - Salzwasser (EP-marine) [kg N eq.]: A1-A3 0.578961, C2 0.00151807, C3 0.237162, D -0.0679451
- Eutrophierungspotenzial - Land (EP-terrestrial) [Mole of N eq.]: A1-A3 5.427, C2 0.0169845, C3 2.88281, D -0.723566
- Bildungspotenzial für troposphärisches Ozon (POCP) [kg NMVOC eq.]: A1-A3 29.7514, C2 0.00296028, C3 0.606665, D -0.177776
- Potenzial für die Verknappung abiotischer Ressourcen nicht fossile Ressourcen (ADPE) [kg Sb eq.]: A1-A3 8.4851e-5, C2 1.01101e-7, C3 3.92825e-6, D -5.68837e-5
- Potenzial für die Verknappung abiotischer Ressourcen fossile Brennstoffe (ADPF) [MJ]: A1-A3 9207.53, C2 15.4054, C3 314.177, D -2817.03
- Wasser-Entzugspotenzial (Benutzer) (WDP) [m³ world equiv.]: A1-A3 44.8416, C2 0.00451814, C3 93.1867, D -2.18444

## Use advice
Dieser Datensatz bezieht sich auf 1 m³ thermisch modifiziertes Holz mit einer Rohdichte von 409 kg/m³. Durch die thermische Behandlung des Holzes wird die Dauerhaftigkeit des Holzes gegenüber Holzschädlingen und Pilzbefall sowie die Dimensionsstabilität erhöht. Der Datensatz kann für die näherungsweise Abschätzung anderer Holzrohdichten von 350 - 450 kg/m³ verwendet werden.

## Data sources
- ULLMANN'S Encyclopedia of Industrial Chemistry
- Documentation of data quality management
- GaBi Database Edition 2021, CUP2021.01
- GaBi database (all versions)
