# Gipsfaserplatten

Dataset: ILCD process, EPD, average dataset
Geography: DE
Reference year: 2016
Valid until: 2021
Classification: OEKOBAU.DAT: Mineralische Baustoffe / Steine und Elemente / Gipsplatten
Classification: IBUCategories: 02 Bauprodukte / Gipsprodukte / Gipsplatten
Method details: Gipsplatten.pdf
Registration number: 9268
Owner: Fermacell GmbH
Compliance: DIN EN 15804; ISO 14025
Review: Accredited third party review by Institut Bauen und Umwelt e. V.
Amounts: rows without a unit in brackets have none in this file; such an amount is in the reference unit of its flow, which a separate flow dataset defines
copyright: true

## General comment
FERMACELL Gipsfaser-Platten (beschichtet) sind spezielle Bauplatten aus Gips und Zellulosefasern.

Für das Inverkehrbringen des Produkts in der EU/EFTA (mit Ausnahme der Schweiz) gilt die Verordnung (EU) Nr. 305/2011 (CPR). Das Produkt benötigt eine Leistungserklärung unter Berücksichtigung der Europäischen Technischen Zulassung /ETA-03/0050/ und die CE-Kennzeichnung.

## Technology and included processes
Gipsaufbereitung: Hauptrohstoff der Gipsfaser-Platte ist Gips. Gips enthält etwa 21% Kristallwasser. In der Aufbereitungsanlage wird dieser Stoff zunächst in einer Mahltrocknungsanlage aufgelockert, zerkleinert und entlang der Calcinierstrecke auf ca. 170°C erwärmt. Dabei entweicht ein Teil des Kristallwassers und es bildet sich ein Mehrphasengips, In einem anschließenden Zyklon wird die Luft vom Materialstrom getrennt und in einem Filter gereinigt. Der Materialstrom wird über eine Ageing-Strecke geführt und auf unter 80°C gekühlt. Gipsfaserplatten: Die beiden natürlichen Rohstoffe Gips und Papierfasern werden gemischt und nach Zugabe von Wasser – ohne weitere Bindemittel – unter hohem Druck zu stabilen Platten gepresst, getrocknet, beidseitig, kalibriert und oberflächenhydrophobiert sowie anschließend auf die benötigten Formate zugeschnitten.
Technische Daten:
Leistungswerte des Produkts entsprechend der Leistungserklärung in Bezug auf dessen Wesentliche Merkmale gemäß /ETA 03/0050/, unter anderem:
Deklarierte Einheit:
Diese Kern-EPD bezieht sich auf die Herstellung von 1 m2 FERMACELL Gipsfaser-Platte.

## Technical purpose
FERMACELL Gipsfaser-Platten werden zur Beplankung und Bekleidung von Bauteilen verwendet.

Für die Verwendung gelten die jeweiligen nationalen Bestimmungen.

## Reference product
- Fermacell Gipsfaserplatte: 1

## Inputs
- Erneuerbare Primärenergie als Energieträger (PERE) [MJ]: A1-A3 3.57
- Erneuerbare Primärenergie zur stofflichen Nutzung (PERM) [MJ]: A1-A3 0.00862
- Total erneuerbare Primärenergie (PERT) [MJ]: A1-A3 3.58
- Nicht-erneuerbare Primärenergie als Energieträger (PENRE) [MJ]: A1-A3 17.4
- Nicht-erneuerbare Primärenergie zur stofflichen Nutzung (PENRM) [MJ]: A1-A3 0.00129
- Total nicht erneuerbare Primärenergie (PENRT) [MJ]: A1-A3 17.4
- Einsatz von Sekundärstoffen (SM) [kg]: A1-A3 3.64
- Erneuerbare Sekundärbrennstoffe (RSF) [MJ]: A1-A3 0
- Nicht erneuerbare Sekundärbrennstoffe (NRSF) [MJ]: A1-A3 0
- Einsatz von Süßwasserressourcen (FW) [m^3]: A1-A3 0.00697

## Outputs
- Gefährlicher Abfall zur Deponie (HWD) [kg]: A1-A3 1.47e-7
- Entsorgter nicht gefährlicher Abfall (NHWD) [kg]: A1-A3 0.0235
- Entsorgter radioaktiver Abfall (RWD) [kg]: A1-A3 0.000418
- Komponenten für die Wiederverwendung (CRU) [kg]: A1-A3 0
- Stoffe zum Recycling (MFR) [kg]: A1-A3 0
- Stoffe für die Energierückgewinnung (MER) [kg]: A1-A3 0
- Exportierte elektrische Energie (EEE) [MJ]: A1-A3 0
- Exportierte thermische Energie (EET) [MJ]: A1-A3 0

## Impact indicators
- Globales Erwärmungspotenzial (GWP) [kg CO_(2)-Äq.]: A1-A3 1.14
- Abbau Potential der stratosphärischen Ozonschicht (ODP) [kg CFC11-Äq.]: A1-A3 2.95e-11
- Versauerungspotenzial von Boden und Wasser (AP) [kg SO_(2)-Äq.]: A1-A3 0.00174
- Eutrophierungspotenzial (EP) [kg PO_(4)^(3)-Äq.]: A1-A3 0.000299
- Bildungspotential für troposphärisches Ozon (POCP) [kg Ethen-Äq.]: A1-A3 6.75e-5
- Potenzial für den abiotischen Abbau nicht fossiler Ressourcen (ADPE) [kg Sb-Äq.]: A1-A3 0.000111
- Potenzial für den abiotischen Abbau fossiler Brennstoffe (ADPF) [MJ]: A1-A3 16.4

## Use advice
Gültigkeitsbereich:
Diese Umwelt-Produktdeklaration bezieht sich auf beschichtete Gipsfaser-Platten der Fermacell GmbH.
Als Datenbasis wurden spezifische Daten aus 4 Fermacell-Werken (Deutschland: Münchehof, Sieglingen, Wijchen und Orejo/Spanien)
gemittelt. Die Ökobilanz umfasst die Roh-
stoff- und Energiegewinnung, Rohstofftransporte und die eigentliche Herstellungsphase der beschich-
teten Gipsfaser-Platten. Betrachtet wird 1 m² einer durchschnittlichen Gipsfaser-Platte (beschichtet) mit
einer durchschnittlichen Dichte von 1,18 t/m³.
Systemgrenze:
Die gewählten Systemgrenzen umfassen die Herstellung des Produktes einschließlich

der Rohstoffgewinnung bis zum fertig verpackten Produkt am Werkstor (Cradle-to-gate).

Der Betrachtungsrahmen umfasst im Einzelnen:

· Rohstoffbereitstellung

· Energiebereitstellung

· Transporte und Verpackungen der Rohstoffe und Vorprodukte

· Herstellung (Energie, Abfall, Emissionen)

Die Nutzung wird wegen der vielseitigen Anwendungsmöglichkeiten und Konstruktionen nicht in die Berechnung einbezogen. Die Entsorgung des untersuchten Produktes ist aufgrund der langen Lebensdauer nicht hinreichend quantifizierbar und wird deshalb nicht in die Bilanzierung einbezogen.

Auf der Inputseite werden alle Stoffströme, die in das System eingehen und größer als 1 % ihrer gesamten Masse sind oder mehr als 1 % zum Primärenergie-verbrauch beitragen, berücksichtigt. Auf der Output-seite werden alle Stoffströme erfasst, die das System verlassen und deren Umweltauswirkungen größer als 1 %der gesamten Auswirkungen einer berücksichtigten Wirkkategorie sind.

## Data sources
- Gipsfaserplatten.pdf
- GaBi Database (all versions)
- GaBi database SP27 2015
