# Folie aus Polytetrafluorethylen (PTFE)

Dataset: ILCD process, EPD, generic dataset
Geography: DE
Reference year: 2021
Valid until: 2022
Classification: oekobau.dat: Kunststoffe / Folien und Vliese / Technische Textilien
Owner: Sphera Solutions GmbH
Compliance: EN 15804+A2
Review: Dependent internal review by Sphera Solutions GmbH; Independent external review by GaBi user forum
Amounts: rows without a unit in brackets have none in this file; such an amount is in the reference unit of its flow, which a separate flow dataset defines
copyright: true
licenseType: Free of charge for all users and uses
accessRestrictions: The license conditions as stated on https://www.oekobaudat.de/ apply.
accessRestrictions: Es gelten die Lizenzbedingungen wie sie auf https://www.oekobaudat.de/ genannt sind.

## General comment
Dieser Datensatz wurde nach dem European Standard EN 15804+A2 für Nachhaltiges Bauen modelliert. Ergebnisse werden in Modulen abgebildet, die den strukturierten Ausdruck von Ergebnissen über den gesamten Lebenszyklus zulassen.

## Geography
Der Datensatz bildet die länderspezifische Situation in Deutschland ab. Dabei werden Haupttechnologien, spezifische regionale Charakteristiken und ggf. Importstatistiken berücksichtigt.

## Time period
Jährlicher Durchschnitt

## Technology and included processes
PTFE wird unter Verwendung von Lösemitteln, thermischer Energie und Druck in einem Extrusionsprozess verarbeitet. Nach weiteren Verarbeitungsschritten (u.a. waschen, trocknen, dehnen, thermische Behandlung) entsteht das fertige Produkt. Die Vorkette der PTFE Granulatherstellung dominiert dabei die Ökobilanz.

In Modul C1 wird ein manueller Rückbau (lastenfrei) angenommen. Sammelverluste werden vernachlässigt.
Der Transport in Modul C2 zur Verwertungsanlage erfolgt mit einem LKW (50km).
In Modul C3 wird die Zerkleinerung und thermische Behandlung (Verbrennung) des Materials berücksichtigt. Bei der Berechnung der Verbrennungsemissionen und Gutschriften wird der spezifische Heizwert des jeweiligen Materials sowie die Materialzusammensetzung berücksichtigt.
In Modul D erfolgen Gutschriften für die Substitution von Strom (deutscher Strommix) und thermischer Energie (aus Erdgas).

## Technical purpose
PTFE Folien werden im Baubereich vor allem als Dach- oder Fassadenmembran verwendet. Sie werden i.d.R. verschweißt um großflächige Formate zu erhalten. PTFE ist sehr beständig gegen alle natürlichen Umwelteinflüsse.

## Safety margin
20 %. Produktsystem bis auf wenige Prozesse/Flüsse abgebildet. Technologische, zeitliche und geographische Repräsentativität teilweise gegeben.

## Reference product
- Folie aus Polytetrafluorethylen (PTFE): 1

## Inputs
- Erneuerbare Primärenergie als Energieträger (PERE) [MJ]: A1-A3 60.1695, C2 0.00218616, C3 0.0619503, D -0.701874
- Erneuerbare Primärenergie zur stofflichen Nutzung (PERM) [MJ]: A1-A3 0, C2 0, C3 0, D 0
- Total erneuerbare Primärenergie (PERT) [MJ]: A1-A3 60.1695, C2 0.00218616, C3 0.0619503, D -0.701874
- Nicht-erneuerbare Primärenergie als Energieträger (PENRE) [MJ]: A1-A3 262.435, C2 0.0376677, C3 5.59092, D -2.07589
- Nicht-erneuerbare Primärenergie zur stofflichen Nutzung (PENRM) [MJ]: A1-A3 4.5, C2 0, C3 -4.5, D 0
- Total nicht-erneuerbare Primärenergie (PENRT) [MJ]: A1-A3 266.935, C2 0.0376677, C3 1.09092, D -2.07589
- Einsatz von Sekundärstoffen (SM) [kg]: A1-A3 0, C2 0, C3 0, D 0
- Erneuerbare Sekundärbrennstoffe (SF) [MJ]: A1-A3 0, C2 0, C3 0, D 0
- Nicht erneuerbare Sekundärbrennstoffe (NRSF) [MJ]: A1-A3 0, C2 0, C3 0, D 0
- Nettoeinsatz von Süßwasserressourcen (FW) [m3]: A1-A3 0.112628, C2 1.94295e-6, C3 0.000896706, D -0.000261097

## Outputs
- Gefährlicher Abfall zur Deponie (HWD) [kg]: A1-A3 7.06464e-8, C2 1.57439e-12, C3 4.42283e-11, D -7.2068e-10
- Entsorgter nicht gefährlicher Abfall (NHWD) [kg]: A1-A3 0.217086, C2 6.08042e-6, C3 0.037856, D -0.00109488
- Entsorgter radioaktiver Abfall (RWD) [kg]: A1-A3 0.00620814, C2 3.61471e-8, C3 7.51902e-6, D -7.54873e-5
- Komponenten für die Wiederverwendung (CRU) [kg]: A1-A3 0, C2 0, C3 0, D 0
- Stoffe zum Recycling (MFR) [kg]: A1-A3 0, C2 0, C3 0, D 0
- Stoffe für die Energierückgewinnung (MER) [kg]: A1-A3 0, C2 0, C3 1, D 0
- Exportierte elektrische Energie (EEE) [MJ]: A1-A3 0, C2 0, C3 0.562265, D 0
- Exportierte thermische Energie (EET) [MJ]: A1-A3 0, C2 0, C3 1.29092, D 0

## Impact indicators
- Globales Erwärmungspotenzial - total (GWP-total) [kg CO2 eq.]: A1-A3 20.5721, C2 0.00286116, C3 0.36587, D -0.133588
- Globales Erwärmungspotenzial - fossil (GWP-fossil) [kg CO2 eq.]: A1-A3 20.4702, C2 0.00284173, C3 0.36579, D -0.131972
- Globales Erwärmungspotenzial - biogen (GWP-biogenic) [kg CO2 eq.]: A1-A3 0.084517, C2 1.17716e-6, C3 5.30191e-5, D -0.00142191
- Globales Erwärmungspotenzial - luluc (GWP-luluc) [kg CO2 eq.]: A1-A3 0.0173266, C2 1.82504e-5, C3 2.66034e-5, D -0.000193889
- Abbaupotenzial der stratosphärischen Ozonschicht (ODP) [kg CFC-11 eq.]: A1-A3 2.44051e-13, C2 7.27125e-19, C3 2.52135e-16, D -3.06409e-15
- Versauerungspotenzial, kumulierte Überschreitung (AP) [Mole of H+ eq.]: A1-A3 0.0738046, C2 8.05696e-6, C3 6.53633e-5, D -0.000135417
- Eutrophierungspotenzial - Süßwasser (EP-freshwater) [kg P eq.]: A1-A3 4.14981e-5, C2 5.84435e-9, C3 3.53583e-8, D -3.22581e-7
- Eutrophierungspotenzial - Salzwasser (EP-marine) [kg N eq.]: A1-A3 0.00797577, C2 3.71167e-6, C3 1.4952e-5, D -4.98064e-5
- Eutrophierungspotenzial - Land (EP-terrestrial) [Mole of N eq.]: A1-A3 0.08765, C2 4.15269e-5, C3 0.000298563, D -0.000530615
- Bildungspotenzial für troposphärisches Ozon (POCP) [kg NMVOC eq.]: A1-A3 0.0275435, C2 7.23785e-6, C3 4.14243e-5, D -0.000130445
- Potenzial für die Verknappung abiotischer Ressourcen nicht fossile Ressourcen (ADPE) [kg Sb eq.]: A1-A3 0.00176654, C2 2.47191e-10, C3 3.34129e-9, D -4.13954e-8
- Potenzial für die Verknappung abiotischer Ressourcen fossile Brennstoffe (ADPF) [MJ]: A1-A3 267.792, C2 0.0376661, C3 0.190875, D -2.07559
- Wasser-Entzugspotenzial (Benutzer) (WDP) [m³ world equiv.]: A1-A3 -0.0554086, C2 1.10468e-5, C3 0.0372858, D -0.00158509

## Use advice
Dieser Datensatz bezieht sich auf die Herstellung von 1 kg Folie aus Polytetrafluorethylen. Eine Faserverstärkung wurde nicht berücksichtigt. Die Rohdichte beträgt 2200 kg/m³. Der Datensatz kann näherungsweise für die Abschätzung einer PTFE Folie mit einer Dichte von 2100 - 2300 kg/m³, sowie für die Abschätzung von glasfaserverstärkten PTFE Folien verwendet werden (worst-case Abschätzung).

Der Datensatz repräsentiert ein Cradle to Gate Inventar. Er kann verwendet werden, um die Lieferkette des jeweiligen Produktes in einer repräsentativen Weise zu charakterisieren. Die Kombination mit einzelnen Einheitenprozessen und diesem Produkt ermöglicht die Erstellung von anwenderspezifischen (Produkt-) LCAs

## Data sources
- GaBi databases
- Documentation of data quality management
- GaBi Database Edition 2021, CUP2021.01
- GaBi database (all versions)
