# Mikroporöse Calciumsilikat-Wärmedämmstoffe

Dataset: ILCD process, EPD, average dataset
Geography: DE
Reference year: 2018
Valid until: 2023
Classification: OEKOBAU.DAT: Dämmstoffe / Calciumsilikat / Calcium-Silikathydrat / Calciumsilikat
Classification: IBUCategories: 02 Bauprodukte / Wärmedämmungsprodukte / Calciumsilikat-Dämmstoffe
Method details: Calciumsilikat-Dämmstoffe.pdf
Generated by: Sphera Solutions GmbH
Registration number: EPD-CSP-20180010-IBC1-DE
Owner: Silca Service- und Vertriebsgesellschaft für Dämmstoffe mbH
Compliance: DIN EN 15804; ISO 14025
Review: Accredited third party review by Institut Bauen und Umwelt e. V.
Amounts: rows without a unit in brackets have none in this file; such an amount is in the reference unit of its flow, which a separate flow dataset defines
copyright: true
licenseType: Free of charge for all users and uses
accessRestrictions: None

## General comment
Silca-, Silcal-, Microcal-Calciumsilikatplatten, Calsitherm Klimaplatte und Redboard (im Folgenden als CSP bezeichnet) sind weißfarbene bis hellgraue und bis 1100 °C dauertemperaturbeständige Dämmplatten aus Calciumsilikathydraten mit geringem eingebetteten Anteil (< 0,6 Vol. -%) an Zellstoff.

Die Produkte unterscheiden sich hinsichtlich ihrer Rohdichten und den eingesetzten Anteilen der gleichen Rohstoffe.

## Technology and included processes
Die Calciumsilikatplatten werden nach der Methode der Postautoklavierung produziert. Die in Silos gelagerten Ausgangsstoffe werden über Waagen dosiert und unter Zugabe von Wasser gemischt. Hierbei steuert die Wassermenge – neben der Korngrößenverteilung der Ausgangsstoffe, der Einsatztemperatur und der Verpressung – die Rohdichte der erzeugten Platten. In den Reaktoren erfolgt eine Vorreaktion, wodurch bereits erste Calciumsilikathydrat (CSH)-Phasen gebildet werden. Die entstehende gelartige Suspension wird mittels einer Siebbandpresse teilweise entwässert und zu einzelnen Platten geformt. Die durch die Pressung entstandenen „Grünplatten“ werden nachfolgend in Autoklaven 15 bis 25 Stunden einer Sattdampfatmosphäre mit Drücken von 10 bis 20 bar ausgesetzt. Hier verfestigt die Kristallbildung bei Temperaturen zwischen 150 °C und 200 °C die eingesetzten Rohstoffe zu Calciumsilikathydraten. Anschließend erfolgt die Trocknung der Platten bis auf eine vorgegebene Restfeuchte von unter 10 %. Danach können diese geschliffen und gesägt werden. Der beim Schleifen anfallende Schleifstaub kommt als Ausgangsstoff wieder zum Einsatz (siehe Annahme für die Berechnung in Kap. 3.3). Zertifizierung nach /DIN EN ISO 9001:2015/ vorhanden.
Deklarierte Einheit:
Die deklarierte Einheit ist 1 t CSP mit einer durchschnittlichen gewichteten Rohdichte von 259 kg/m³. Für die Durchschnittsbildung wurden die Rohdichten der beiden Hauptprodukte SILCAL (inkl. MICROCAL), KLIMAPLATTE und REDBOARD (Verkaufsanteil zusammen 95 %) verwendet. Die Rohdichten von SILCA und MICROCAL werden nachfolgend ebenfalls genannt:

SILCAL 250-260 kg/m³

KLIMAPLATTE 170-250 kg/m³

REDBOARD 170-250 kg/m³

MICROCAL 240 kg/m³

SILCA 180-550 kg/m³

## Technical purpose
Platten zur Hochtemperaturdämmung für wärmetechnische Anlagen.

Wärme- und Brandschutzplatten für den gesamten Hochbau, insbesondere Kamin- und Kachelofenbau.

Platten für Innenausbau, Sanierung von Altbauten, Fachwerkhäusern und Feuchträumen. Hier insbesondere zur Dämmung und Feuchteregulierung mit schimmelhemmender Wirkung.

Verbesserung des Feuchte- und Wärmehaushaltes in kurzzeitig genutzten Räumen z. B. in Schulen, Kirchen, Tagungsräumen.

In der Denkmalpflege zur Erhaltung der Fassadengestaltung, da Innendämmung.

## Reference product
- Mikroporöse Calciumsilikat-Wärmedämmstoffe: 1000

## Inputs
- Erneuerbare Primärenergie als Energieträger (PERE) [MJ]: A1-A3 8199, A5 47.519, C4 399.2, D -28.4
- Erneuerbare Primärenergie zur stofflichen Nutzung (PERM) [MJ]: A1-A3 421, A5 -47, C4 -374, D 0
- Total erneuerbare Primärenergie (PERT) [MJ]: A1-A3 8620, A5 0.519, C4 25.2, D -28.4
- Nicht-erneuerbare Primärenergie als Energieträger (PENRE) [MJ]: A1-A3 23328, A5 75.18, C4 216, D -144
- Nicht-erneuerbare Primärenergie zur stofflichen Nutzung (PENRM) [MJ]: A1-A3 72, A5 -72, C4 0, D 0
- Total nicht erneuerbare Primärenergie (PENRT) [MJ]: A1-A3 23400, A5 3.18, C4 216, D -139
- Einsatz von Sekundärstoffen (SM) [kg]: A1-A3 315, A5 0, C4 0, D 0
- Erneuerbare Sekundärbrennstoffe (RSF) [MJ]: A1-A3 0, A5 0, C4 0, D 0
- Nicht erneuerbare Sekundärbrennstoffe (NRSF) [MJ]: A1-A3 0, A5 0, C4 0, D 0
- Einsatz von Süßwasserressourcen (FW) [m^3]: A1-A3 6.05, A5 0.0414, C4 0.041, D -0.0193

## Outputs
- Gefährlicher Abfall zur Deponie (HWD) [kg]: A1-A3 6.7e-5, A5 1.84e-8, C4 3.42e-6, D -5.28e-8
- Entsorgter nicht gefährlicher Abfall (NHWD) [kg]: A1-A3 102, A5 0.122, C4 1000, D -0.0725
- Entsorgter radioaktiver Abfall (RWD) [kg]: A1-A3 0.637, A5 0.000144, C4 0.00292, D -0.00606
- Komponenten für die Wiederverwendung (CRU) [kg]: A1-A3 0, A5 0, C4 0, D 0
- Stoffe zum Recycling (MFR) [kg]: A1-A3 0, A5 0, C4 0, D 0
- Stoffe für die Energierückgewinnung (MER) [kg]: A1-A3 0, A5 0, C4 0, D 0
- Exportierte elektrische Energie (EEE) [MJ]: A1-A3 0, A5 30.4, C4 0, D 0
- Exportierte thermische Energie (EET) [MJ]: A1-A3 0, A5 68.6, C4 0, D 0

## Impact indicators
- Globales Erwärmungspotenzial (GWP) [kg CO_(2)-Äq.]: A1-A3 2010, A5 17.8, C4 16.1, D -9.74
- Abbau Potential der stratosphärischen Ozonschicht (ODP) [kg CFC11-Äq.]: A1-A3 2.45e-9, A5 1.43e-12, C4 1.52e-11, D -1.96e-11
- Versauerungspotenzial von Boden und Wasser (AP) [kg SO_(2)-Äq.]: A1-A3 2.4, A5 0.00176, C4 0.0954, D -0.0107
- Eutrophierungspotenzial (EP) [kg PO_(4)^(3)-Äq.]: A1-A3 0.49, A5 0.000365, C4 0.013, D -0.00169
- Bildungspotential für troposphärisches Ozon (POCP) [kg Ethen-Äq.]: A1-A3 0.205, A5 0.000118, C4 0.00751, D -0.00108
- Potenzial für den abiotischen Abbau nicht fossiler Ressourcen (ADPE) [kg Sb-Äq.]: A1-A3 0.000441, A5 1.82e-7, C4 5.79e-6, D -2.84e-6
- Potenzial für den abiotischen Abbau fossiler Brennstoffe (ADPF) [MJ]: A1-A3 21800, A5 2.81, C4 209, D -124

## Use advice
Gültigkeitsbereich:
Diese Umwelt-Produktdeklaration bezieht sich auf die folgenden Calsitherm Produkte aus dem Werk Paderborn:

Calsitherm Klimaplatte-F,-WF

Redboard pro; Redboard basic

Silcal-900; -1000; -1100;
Silca 170 SB; -200; -250; -250 KM; -250 SB; -T300.

Es handelt sich um eine Durchschnitts-EPD für ein Calsitherm Produkt mit einer durchschnittlichen Rohdichte; die produktspezifischen Rohdichten sind unter "2.3 Technische Daten" benannt.
Systemgrenze:
Typ der EPD: Wiege bis Werkstor mit Optionen. Die Ökobilanz berücksichtigt die Rohstoff- und Energiegewinnung, Rohstofftransporte und die eigentliche Produktherstellung (Module A1-A3), sowie den Einbau ins Gebäude (A5, hier fällt nur die Verpackungsverwertung an) sowie das End-of-Life bzw. Entsorgungsstadium (C und D). In Modul C4 ist die Deponierung der Calciumsilikatplatten deklariert und in Modul D die aus A5 resultierenden Nutzenpotentiale außerhalb der Systemgrenze.

## Data sources
- GaBi Database (all versions)
- GaBi database SP34 2017
