# GUTEX Thermoflex

Dataset: ILCD process, EPD, specific dataset
Geography: RER
Reference year: 2018
Valid until: 2023
Classification: OEKOBAU.DAT: Dämmstoffe / Holzfasern / Holzfaserdämmplatte
Classification: IBUCategories: 02 Bauprodukte / Holzwerkstoffe / Holzwerkstoffe
Method details: Holzwerkstoffe.pdf
Generated by: Thünen-Institut für Holzforschung
Registration number: EPD-GTX-20180071-IBA1-DE
Owner: GUTEX Holzfaserplattenwerk H. Henselmann GmbH + Co KG
Compliance: DIN EN 15804; ISO 14025
Review: Accredited third party review by Institut Bauen und Umwelt e. V.
Amounts: rows without a unit in brackets have none in this file; such an amount is in the reference unit of its flow, which a separate flow dataset defines
copyright: true
licenseType: Free of charge for all users and uses
accessRestrictions: None

## General comment
GUTEX Thermoflex sind flexible, einschichtige Holzfaserdämmmatten, die nach /DIN EN 13171/ im Trockenverfahren unter Zugabe von Bikofasern hergestellt werden. Der Dickenbereich der Dämmprodukte beträgt 30-240 mm, die Material-Rohdichte ca. 50 kg/m³.

## Technology and included processes
Abb.1: Schematische Darstellung des Herstellungsverfahrens der GUTEX Thermoflex. Rohholz wird zu Hackschnitzeln aufbereitet die Hackschnitzel werden unter Feuchte- und Hitzeeinfluss aufgeweicht und anschließend zerfasert (defibriert) die Fasern werden auf dem weiteren Transportweg getrocknet, Staubpartikel werden abgeschieden und Bikomponentenfasern zugegeben das Fasergemisch wird zu einer Matte für eine angedachte Materialstärke ausgestreut in einem thermischen Prozess werden die Bindefasern aktiviert, es entsteht ein flexibles, zusammenhängendes Mattengefüge die produzierte Matte wird abschließend zugeschnitten, verpackt und ins Lager transportiert Für die Produktion des Dämmproduktes GUTEX Thermoflex wird sowohl eine interne als auch externe Qualitätsüberwachung vorgenommen. (/DIN EN ISO 9001/ sowie CE-Kennzeichnung nach /DIN EN 13171/ mit freiwilliger KEYMARK-Zertifizierung).
Technische Daten:
Die im folgenden benannten bautechnischen Daten sind im Auslieferungszustand für die

GUTEX Thermoflex Dämmstoffmatten gültig. Weitergehende Daten können dem technischen Datenblatt unter www.gutex.de (Downloadbereich) entnommen werden.
Deklarierte Einheit:
Die deklarierte Einheit der ökologischen Betrachtung ist die Bereitstellung von 1 m³ Gutex Thermoflex mit einer Dichte von 50 kg/m³ bei 7,83 % Holzfeuchte bzw. 6,5 % Wasseranteil und 10,5 % Zusatzstoffstoffanteil. Alle Angaben zu eingesetzten Zusätzen wurden auf Grundlage spezifischer Daten berechnet.

## Technical purpose
Der flexible Holzfaserdämmstoff GUTEX Thermoflex wird als Gefachdämmung zwischen Sparren, Deckenbalken, Wandstielen oder ähnlichen Rahmenkonstruktionen eingesetzt.

Dabei sind die Anwendungsbereiche nach /DIN 4108-10/ zu beachten.

## Reference product
- Thermoflex (): 1

## Inputs
- Erneuerbare Primärenergie als Energieträger (PERE) [MJ]: A1 10.24, A2 0.20806, A3 54.7222, A5 79.3577, C2 0.0303837, C3 25.3577, D 631.959
- Erneuerbare Primärenergie zur stofflichen Nutzung (PERM) [MJ]: A1 799.746, A2 0, A3 78.905, A5 -78.905, C2 0, C3 -799.746, D 0
- Total erneuerbare Primärenergie (PERT) [MJ]: A1 809.986, A2 0.20806, A3 133.627, A5 0.452758, C2 0.0303837, C3 -774.389, D 631.959
- Nicht-erneuerbare Primärenergie als Energieträger (PENRE) [MJ]: A1 181.273, A2 4.40435, A3 627.87, A5 37.216, C2 0.643183, C3 58.8385, D -733.973
- Nicht-erneuerbare Primärenergie zur stofflichen Nutzung (PENRM) [MJ]: A1 52.5, A2 0, A3 34.632, A5 -34.632, C2 0, C3 -52.5, D 0
- Total nicht erneuerbare Primärenergie (PENRT) [MJ]: A1 233.773, A2 4.40435, A3 662.502, A5 2.58399, C2 0.643183, C3 6.33847, D -733.973
- Einsatz von Sekundärstoffen (SM) [kg]: A1 0, A2 0, A3 0, A5 0, C2 0, C3 0, D 0
- Erneuerbare Sekundärbrennstoffe (RSF) [MJ]: A1 0, A2 0, A3 0, A5 0, C2 0, C3 0, D 799.746
- Nicht erneuerbare Sekundärbrennstoffe (NRSF) [MJ]: A1 0, A2 0, A3 0, A5 0, C2 0, C3 0, D 52.5
- Einsatz von Süßwasserressourcen (FW) [m^3]: A1 0.0736356, A2 0.000409112, A3 0.210318, A5 0.0238933, C2 5.97441e-5, C3 0.0172206, D 0.0974862

## Outputs
- Gefährlicher Abfall zur Deponie (HWD) [kg]: A1 0, A2 0, A3 0, A5 0, C2 0, C3 0, D 0
- Entsorgter nicht gefährlicher Abfall (NHWD) [kg]: A1 0, A2 0, A3 0.01924, A5 0, C2 0, C3 0, D 0
- Entsorgter radioaktiver Abfall (RWD) [kg]: A1 0.00295093, A2 6.01633e-6, A3 0.00213694, A5 0.000107077, C2 8.78584e-7, C3 0.00541091, D -0.0357334
- Komponenten für die Wiederverwendung (CRU) [kg]: A1 0, A2 0, A3 0, A5 0, C2 0, C3 0, D 0
- Stoffe zum Recycling (MFR) [kg]: A1 0, A2 0, A3 0, A5 0, C2 0, C3 0, D 0
- Stoffe für die Energierückgewinnung (MER) [kg]: A1 0, A2 0, A3 0, A5 0, C2 0, C3 50, D 0
- Exportierte elektrische Energie (EEE) [MJ]: A1 0, A2 0, A3 0, A5 13.8536, C2 0, C3 0, D 0
- Exportierte thermische Energie (EET) [MJ]: A1 0, A2 0, A3 0, A5 33.5353, C2 0, C3 0, D 0

## Impact indicators
- Globales Erwärmungspotenzial (GWP) [kg CO_(2)-Äq.]: A1 -67.4829, A2 0.313609, A3 29.2885, A5 10.0155, C2 0.0457974, C3 80.6627, D -42.5756
- Abbau Potential der stratosphärischen Ozonschicht (ODP) [kg CFC11-Äq.]: A1 2.88738e-11, A2 1.61767e-13, A3 1.4667e-11, A5 7.14576e-13, C2 2.36234e-14, C3 1.74868e-11, D -1.13475e-10
- Versauerungspotenzial von Boden und Wasser (AP) [kg SO_(2)-Äq.]: A1 0.0213442, A2 0.00132451, A3 0.027859, A5 0.00129394, C2 0.000193423, C3 0.00690091, D -0.0531466
- Eutrophierungspotenzial (EP) [kg PO_(4)^(3)-Äq.]: A1 0.0037269, A2 0.000330032, A3 0.00410925, A5 0.000203946, C2 4.81957e-5, C3 0.00110326, D -0.00822269
- Bildungspotential für troposphärisches Ozon (POCP) [kg Ethen-Äq.]: A1 0.00179554, A2 -0.000538839, A3 0.00484481, A5 7.098e-5, C2 -7.86884e-5, C3 0.000478307, D -0.00557397
- Potenzial für den abiotischen Abbau nicht fossiler Ressourcen (ADPE) [kg Sb-Äq.]: A1 2.63311e-6, A2 1.94249e-8, A3 7.12855e-6, A5 2.57694e-7, C2 2.83668e-9, C3 2.33554e-6, D -1.51462e-5
- Potenzial für den abiotischen Abbau fossiler Brennstoffe (ADPF) [MJ]: A1 226.331, A2 4.38895, A3 622.481, A5 2.31411, C2 0.640934, C3 45.1963, D -696.378

## Use advice
Gültigkeitsbereich:
Diese Umwelt-Produktdeklaration gilt für die im Werk Gutenburg (s. Herstelleradresse) produzierten Holzfaserdämmmatten GUTEX Thermoflex.
Systemgrenze:
Der Deklarationstyp entspricht einer EPD „von der Wiege bis Werkstor mit Optionen“. Inhalte sind das Stadium der Produktion, also von der Bereitstellung der Rohstoffe bis zum Werkstor der Produktion (cradle-to-gate, Module A1 bis A3), sowie die Entsorgung der Produktverpackung in Modul A5 und Teile des Endes des Lebensweges (Modul C2 bis C4). Darüber hinaus erfolgt eine Betrachtung des potenziellen Nutzens und der Lasten über den Lebensweg des Produktes hinaus (Modul D).

Im Einzelnen werden in Modul A1 die Bereitstellung des Holz-Rohstoffes in Form von Hackschnitzeln aus dem Forst und die Bereitstellung der Zusätze bilanziert. Die Transporte dieser Stoffe werden in Modul A2 berücksichtigt. Modul A3 umfasst die Bereitstellung der Brennstoffe, Betriebsmittel und Strom sowie die Herstellungsprozesse vor Ort. Diese sind im Wesentlichen die Zerfaserung, die Fasertrocknung, das Verpressen und das Zuschneiden sowie die Verpackung der Produkte.

Modul A5 beinhaltet ausschließlich die Entsorgung der Packungsmaterialien.

Modul C2 berücksichtigt den Transport zum Entsorger, Modul C3 die Aufbereitung und Sortierung des Altholzes. Zudem werden gemäß /EN 16485/ die CO2-Äquivalente des in Produkt und Verpackung befindlichen holzinhärenten Kohlenstoffs sowie die im Produkt und seiner Verpackung enthaltene erneuerbare und nicht erneuerbare Primärenergie (PERM und PENRM) als Abgänge in Modul C3 verbucht. Die sich aus der thermischen Verwertung des Produkts ergebenden Lasten und Potenziale am Ende seines Lebenswegs sowie der potenzielle Nutzen durch Substitution fossiler Brennstoffe im Zuge der Energieerzeugung bei thermischer Verwertung der Produktverpackung werden in Modul D bilanziert.

## Data sources
- GaBi Database (all versions)
- GaBi database SP33 2017
