# Balkenschichtholz Nadelholz (generisch); 515 kg/m3 density at 12% moisture

Dataset: ILCD process, EPD, generic dataset
Geography: DE
Reference year: 2021
Valid until: 2022
Classification: oekobau.dat: Holz / Vollholz / Balkenschichtholz (Duo-Triobalken)
Owner: Sphera Solutions GmbH
Compliance: EN 15804+A2
Review: Dependent internal review by Sphera Solutions GmbH; Independent external review by GaBi user forum
Amounts: rows without a unit in brackets have none in this file; such an amount is in the reference unit of its flow, which a separate flow dataset defines
copyright: true
licenseType: Free of charge for all users and uses
accessRestrictions: The license conditions as stated on https://www.oekobaudat.de/ apply.
accessRestrictions: Es gelten die Lizenzbedingungen wie sie auf https://www.oekobaudat.de/ genannt sind.

## General comment
Dieser Datensatz wurde nach dem European Standard EN 15804+A2 für Nachhaltiges Bauen modelliert. Ergebnisse werden in Modulen abgebildet, die den strukturierten Ausdruck von Ergebnissen über den gesamten Lebenszyklus zulassen.

## Geography
Der Datensatz bildet die länderspezifische Situation in Deutschland ab. Dabei werden Haupttechnologien, spezifische regionale Charakteristiken und ggf. Importstatistiken berücksichtigt.

## Time period
Jährlicher Durchschnitt

## Technology and included processes
Balkenschichtholz (andere Bezeichnung: Duo-/Triobalken) besteht aus verklebten Platten, die auch als Lamellen bezeichnet werden. Balkenschichtholz weist im Vergleich zu Brettschichtholz eine größere Lamellendicke auf (45mm) und benötigt deshalb weniger Leim (PU- oder Phenolharz-basierte Klebesysteme) pro m3. Die Lamellen werden derart verklebt, dass die Fasern parallel verlaufen, so dass größere Träger produziert werden können. Die Prozessschritte für die Produktion entsprechen denen von Brettschichtholz und gliedern sich wie folgt:
1. Transport der Fichtenhölzer zum Produktionsort und Lagerung
2. Trocknung
3. Vorschneiden
4. Keilzinkung
5. Schneiden der Lamellen
6. Verklebung
7. Endbearbeitung

In Modul C1 wird ein manueller Rückbau (lastenfrei) angenommen. Sammelverluste werden vernachlässigt.
Der Transport in Modul C2 zur Verwertungsanlage erfolgt mit einem LKW (50km).
In Modul C3 wird die Zerkleinerung und thermische Behandlung (Verbrennung) des Materials berücksichtigt. Es wird angenommen, dass das Material das Ende der Abfalleigenschaft direkt nach der Zerkleinerung erreicht. Das im Material durch Photosynthese aufgenommene und gespeicherte CO2 (aus Modul A1) wird in C3 ausgebucht (CO2 Neutralität innerhalb des Produktsystems gemäß EN 16485: Round and sawn timber - Environmental Product Declarations - Product category rules for wood and wood-based products for use in construction, 2014),
Modul D enthält die Lasten durch den Betrieb der Verwertungsanlage (exkl. biogenes CO2, siehe oben) sowie Gutschriften für die Substitution von Strom (deutscher Strommix) und thermischer Energie (aus Erdgas). Bei der Berechnung der Verbrennungsemissionen und Gutschriften wird der spezifische Heizwert des jeweiligen Materials sowie die Materialzusammensetzung berücksichtigt.

## Technical purpose
Dieses Produkt kann im Baubereich verwendet werden.

## Safety margin
10 %. Produktsystem weitgehend vollständig abgebildet. Gute technologische, zeitliche und geographische Repräsentativität.

## Reference product
- Balkenschichtholz Nadelholz (generisch): 1

## Inputs
- Erneuerbare Primärenergie als Energieträger (PERE) [MJ]: A1-A3 1813.33, C2 1.03205, C3 10944.7, D -1552.04
- Erneuerbare Primärenergie zur stofflichen Nutzung (PERM) [MJ]: A1-A3 9891.84, C2 0, C3 -9891.84, D 0
- Total erneuerbare Primärenergie (PERT) [MJ]: A1-A3 11705.2, C2 1.03205, C3 1052.9, D -1552.04
- Nicht-erneuerbare Primärenergie als Energieträger (PENRE) [MJ]: A1-A3 3226.99, C2 17.7823, C3 258.182, D -4650.04
- Nicht-erneuerbare Primärenergie zur stofflichen Nutzung (PENRM) [MJ]: A1-A3 0, C2 0, C3 0, D 0
- Total nicht-erneuerbare Primärenergie (PENRT) [MJ]: A1-A3 3226.99, C2 17.7823, C3 258.182, D -4650.04
- Einsatz von Sekundärstoffen (SM) [kg]: A1-A3 0, C2 0, C3 0, D 0
- Erneuerbare Sekundärbrennstoffe (SF) [MJ]: A1-A3 0, C2 0, C3 0, D 0
- Nicht erneuerbare Sekundärbrennstoffe (NRSF) [MJ]: A1-A3 0, C2 0, C3 0, D 0
- Nettoeinsatz von Süßwasserressourcen (FW) [m3]: A1-A3 0.687259, C2 0.000917236, C3 2.48689, D -0.577503

## Outputs
- Gefährlicher Abfall zur Deponie (HWD) [kg]: A1-A3 1.20847e-6, C2 7.43242e-10, C3 5.91072e-8, D -1.61055e-6
- Entsorgter nicht gefährlicher Abfall (NHWD) [kg]: A1-A3 2.00461, C2 0.00287047, C3 7.05173, D -2.4398
- Entsorgter radioaktiver Abfall (RWD) [kg]: A1-A3 0.16445, C2 1.70644e-5, C3 0.00782504, D -0.166922
- Komponenten für die Wiederverwendung (CRU) [kg]: A1-A3 0, C2 0, C3 0, D 0
- Stoffe zum Recycling (MFR) [kg]: A1-A3 0, C2 0, C3 0, D 0
- Stoffe für die Energierückgewinnung (MER) [kg]: A1-A3 0, C2 0, C3 0, D 0
- Exportierte elektrische Energie (EEE) [MJ]: A1-A3 0, C2 0, C3 1139.61, D 0
- Exportierte thermische Energie (EET) [MJ]: A1-A3 0, C2 0, C3 2671.75, D 0

## Impact indicators
- Globales Erwärmungspotenzial - total (GWP-total) [kg CO2 eq.]: A1-A3 -588.177, C2 1.35076, C3 941.69, D -298.544
- Globales Erwärmungspotenzial - fossil (GWP-fossil) [kg CO2 eq.]: A1-A3 228.938, C2 1.34153, C3 18.5856, D -295.22
- Globales Erwärmungspotenzial - biogen (GWP-biogenic) [kg CO2 eq.]: A1-A3 -817.954, C2 0.000606236, C3 923.083, D -2.89508
- Globales Erwärmungspotenzial - luluc (GWP-luluc) [kg CO2 eq.]: A1-A3 0.837938, C2 0.0086157, C3 0.021091, D -0.428863
- Abbaupotenzial der stratosphärischen Ozonschicht (ODP) [kg CFC-11 eq.]: A1-A3 6.634e-12, C2 3.43264e-16, C3 2.61971e-13, D -6.77521e-12
- Versauerungspotenzial, kumulierte Überschreitung (AP) [Mole of H+ eq.]: A1-A3 0.797108, C2 0.00380356, C3 0.188816, D -0.301565
- Eutrophierungspotenzial - Süßwasser (EP-freshwater) [kg P eq.]: A1-A3 0.000958551, C2 2.75902e-6, C3 3.56178e-5, D -0.000713595
- Eutrophierungspotenzial - Salzwasser (EP-marine) [kg N eq.]: A1-A3 0.342742, C2 0.00175222, C3 0.0529335, D -0.111108
- Eutrophierungspotenzial - Land (EP-terrestrial) [Mole of N eq.]: A1-A3 3.7276, C2 0.0196041, C3 0.903071, D -1.18408
- Bildungspotenzial für troposphärisches Ozon (POCP) [kg NMVOC eq.]: A1-A3 1.22414, C2 0.00341687, C3 0.138849, D -0.291227
- Potenzial für die Verknappung abiotischer Ressourcen nicht fossile Ressourcen (ADPE) [kg Sb eq.]: A1-A3 8.51775e-5, C2 1.16695e-7, C3 3.68691e-6, D -9.17979e-5
- Potenzial für die Verknappung abiotischer Ressourcen fossile Brennstoffe (ADPF) [MJ]: A1-A3 3226.24, C2 17.7815, C3 258.115, D -4649.38
- Wasser-Entzugspotenzial (Benutzer) (WDP) [m³ world equiv.]: A1-A3 4.56611, C2 0.00521501, C3 105.553, D -3.50674

## Use advice
Der Datensatz repräsentiert ein Cradle to Gate Inventar. Er kann verwendet werden, um die Lieferkette des jeweiligen Produktes in einer repräsentativen Weise zu charakterisieren. Die Kombination mit einzelnen Einheitenprozessen und diesem Produkt ermöglicht die Erstellung von anwenderspezifischen (Produkt-) LCAs.

## Data sources
- Informationsdienst Holz: Ökobilanzen Holz, 1997
- Informationsdienst Holz: Erstellung von Ökobilanzen, 1997
- Analyse und Bewertung der forstlichen Produktion
- ÖkoPot-Projektbericht, 2008
- NetLZ-Projektbericht "Grundsätze für Holz und Holzwerkstoffe", 2007
- Vergleichende Oekobilanzierung der Rundholzproduktion in verschiedenen Forstbetrieben BFH Report 204
- Ökologische Bilanzierung von Bauschnittholz und veredelten Vollholzprodukten, 2000
- Documentation of data quality management
- GaBi Database Edition 2021, CUP2021.01
- GaBi database (all versions)
