# Blähton LB Planstein Außenwand; expanded clay, solid block, density 0,5, 500 kg/m3

Dataset: ILCD process, EPD, generic dataset
Geography: DE
Reference year: 2018
Valid until: 2022
Classification: oekobau.dat: Mineralische Baustoffe / Steine und Elemente / Leichtbeton
Owner: thinkstep
Compliance: DIN EN 15804
Review: Dependent internal review by thinkstep, IABP-GaBi, IBP-GaBi; Independent external review by GaBi user forum, GaBi bug forum, GaBi user community
Amounts: rows without a unit in brackets have none in this file; such an amount is in the reference unit of its flow, which a separate flow dataset defines
copyright: true

## General comment
Dieser Datensatz wurde nach dem European Standard EN 15804 für Nachhaltiges Bauen modelliert. Ergebnisse werden in Modulen abgebildet, die den strukturierten Ausdruck von Ergebnissen über den gesamten Lebenszyklus zulassen.

## Geography
Der Datensatz bildet die länderspezifische Situation in Deutschland ab. Dabei werden Haupttechnologien, spezifische regionale Charakteristiken und ggf. Importstatistiken berücksichtigt.

## Time period
Jährlicher Durchschnitt

## Technology and included processes
Der Leichtbeton-Mix wird in einem Mischer aus gewaschenem Bimsstein und genau dosierten Mengen von Wasser und Bindemitteln produziert. Die Mixtur kommt in den Tank der Steingussmaschine, welche die Ofenbatterie auflädt. Die Ofenbatterie geht über in die Metallform (die auf einem Brett befestigt ist), und füllt diese auf. Die Steinformen enthalten genug Cores (für die spezielle Steinform) für Rillen und Kammern. Durch zusätzliche Belastung und Vibration wird die Mixtur verdichtet und der Stein aus der Form gedrückt. Die Steine auf den darunterliegenden Brettern werden in ein Hochregallager gebracht wo sie für 24 bis 36 Stunden verbleiben. Sie werden für 6 Wochen an einem Lagerplatz eingelagert, länger als der erforderliche Standard von 28 Tagen.

Hintergrundsystem:
Strom: Die Stromerzeugung wird entsprechend der länderspezifischen Randbedingungen modelliert. Die landesspezifische Analyse beinhaltet:
1.: Spezifische Kraftwerke der verschiedenen fossilen Energieträger und der Einsatz erneuerbarer Energien sind entsprechend der länderspezifischen Energieträgermixe modelliert. Die Analyse bezieht Stromimporte aus den Nachbarländern, Transmissions-und Verteilungsverluste und den Eigenverbrauch im Kraftwerk und bei der Verteilung bzw. Speicherung, z. B. durch Pumpspeicherwerke, ein.
2.: Die landes-/regionalspezifischen Technologiestandards sowie die Erzeugung in Elektrizitätskraftwerken und/oder in speziellen Kraftwerken mit Kraft-Wärme-Kopplung (KWK) sind berücksichtigt.
3.: Die länderspezifische Energieträgerbereitstellung (mit Anteil der Importe und/oder Eigenversorgung) einschließlich der Energieträger-Eigenschaften (z. B. Elementar- und Energiegehalte) werden berücksichtigt.
4.: Die Förderung, Produktion, Verarbeitung und Transportprozesse werden entsprechend der Situation im jeweiligen Stromerzeugerland modelliert. Die unterschiedlichen Produktions- und Verarbeitungsverfahren (Emissionen und Wirkungsgrade) in den verschiedenen Energieerzeugerländern werden einbezogen, z. B. Rohöl-Veredelungsverfahren oder Abfackel-Raten an den Ölplattformen.
Thermische Energie, Prozessdampf: Die Erzeugung von Dampf und thermischer Energie in Heizkraftwerken wird entsprechend der landesspezifischen Situation (Emissionsgrenzwerte, Energieträgerbasis) modelliert.
Der Wirkungsgrad für die thermische Energieerzeugung beträgt per Definition 100% des Energieträgereinsatzes. Für Prozessdampf liegt der Wirkungsgrad im Bereich von 85-95%. Die zur Heizenergie-Erzeugung verwendeten Energieträger werden entsprechend der nationalen Situation modelliert (siehe Kapitel Strom oben).
Transporte: Alle relevanten und bekannten Transportprozesse in Form von See- und Binnenschiffsverkehr sowie Bahn-, Lkw- und der Leitungstransport sind enthalten.
Energieträger: Die Energieträger werden entsprechend der spezifischen Versorgungslage modelliert (siehe Kapitel Strom oben).
Raffinerieprodukte: Diesel, Benzin, technische Gase, Heizöl, Schmierstoffe und Rückstände, wie Bitumen, werden mit einem parametrierten länderspezifische Raffineriemodell modelliert. Das Raffinerie-Modell bezieht die länderspezifischen Veredelungsverfahren (z. B. Emissionspegel, interner Energieverbrauch etc.) und das länderspezifische Produktspektrum ein, das sich je nach Land stark unterscheiden kann. Die Rohöl-Förderung wird gemäß der länderspezifischen Situation mit den jeweiligen Energieträger-Eigenschaften modelliert.

## Technical purpose
Dieses Produkt kann im Baubereich verwendet werden.

## Safety margin
10 %. Produktsystem weitgehend vollständig abgebildet. Gute technologische, zeitliche und geographische Repräsentativität.

## Reference product
- Blähton LB Planstein Außenwand (m3): 1

## Inputs
- Erneuerbare Primärenergie als Energieträger (PERE) [MJ]: A1-A3 371.942, C1 0.259624, C2 0.9988, C3 6.02744, D -3.90881
- Erneuerbare Primärenergie zur stofflichen Nutzung (PERM) [MJ]: A1-A3 0, C1 0, C2 0, C3 0, D 0
- Total erneuerbare Primärenergie (PERT) [MJ]: A1-A3 371.942, C1 0.259624, C2 0.9988, C3 6.02744, D -3.90881
- Nicht-erneuerbare Primärenergie als Energieträger (PENRE) [MJ]: A1-A3 1629.47, C1 4.45967, C2 17.1568, C3 55.8404, D -13.7047
- Nicht-erneuerbare Primärenergie zur stofflichen Nutzung (PENRM) [MJ]: A1-A3 0, C1 0, C2 0, C3 0, D 0
- Total nicht erneuerbare Primärenergie (PENRT) [MJ]: A1-A3 1629.47, C1 4.45967, C2 17.1568, C3 55.8404, D -13.7047
- Einsatz von Sekundärstoffen (SM) [kg]: A1-A3 38.9677, C1 0, C2 0, C3 0, D 0
- Erneuerbare Sekundärbrennstoffe (RSF) [MJ]: A1-A3 0.867705, C1 0, C2 0, C3 0, D 0
- Nicht erneuerbare Sekundärbrennstoffe (NRSF) [MJ]: A1-A3 9.12758, C1 0, C2 0, C3 0, D 0
- Einsatz von Süßwasserressourcen (FW) [m3]: A1-A3 0.384609, C1 0.000232515, C2 0.000894509, C3 0.0143271, D -0.00253487

## Outputs
- Gefährlicher Abfall zur Deponie (HWD) [kg]: A1-A3 6.49535e-6, C1 1.66653e-7, C2 6.41131e-7, C3 1.01148e-6, D -2.58311e-7
- Entsorgter nicht gefährlicher Abfall (NHWD) [kg]: A1-A3 3.15939, C1 0.000782751, C2 0.00301132, C3 141.901, D -8.05555
- Entsorgter radioaktiver Abfall (RWD) [kg]: A1-A3 0.030661, C1 4.69512e-6, C2 1.80626e-5, C3 0.00053816, D -0.000510276
- Komponenten für die Wiederverwendung (CRU) [kg]: A1-A3 0, C1 0, C2 0, C3 0, D 0
- Stoffe zum Recycling (MFR) [kg]: A1-A3 0, C1 0, C2 0, C3 425.258, D 0
- Stoffe für die Energierückgewinnung (MER) [kg]: A1-A3 0, C1 0, C2 0, C3 0, D 0
- Exportierte elektrische Energie (EEE) [MJ]: A1-A3 0, C1 0, C2 0, C3 0, D 0
- Exportierte thermische Energie (EET) [MJ]: A1-A3 0, C1 0, C2 0, C3 0, D 0

## Impact indicators
- Globales Erwärmungspotenzial (GWP) [kg CO2 Äquiv.]: A1-A3 172.05, C1 0.329482, C2 1.27649, C3 3.36289, D -1.02699
- Abbaupotenzial der stratosphärischen Ozonschicht (ODP) [kg R11 Äquiv.]: A1-A3 1.25995e-12, C1 1.09829e-16, C2 4.22522e-16, C3 1.90498e-14, D -1.98209e-14
- Versauerungspotential (AP) [kg SO2 Äquiv.]: A1-A3 0.671603, C1 0.00114922, C2 0.00257837, C3 0.021748, D -0.00242521
- Eutrophierungspotential (EP) [kg Phosphat Äquiv.]: A1-A3 0.0541851, C1 0.000271152, C2 0.000612949, C3 0.0037005, D -0.000471907
- Bildungspotenzial für troposphärisches Ozon (POCP) [kg Ethen Äquiv.]: A1-A3 0.0244514, C1 0.000113554, C2 -0.000842702, C3 0.00197365, D 0.000222936
- Potenzial für den abiotischen Abbau nicht fossiler Ressourcen (ADPE) [kg Sb Äquiv.]: A1-A3 1.77227e-5, C1 2.79217e-8, C2 1.07417e-7, C3 1.80702e-6, D -2.28249e-7
- Potenzial für den abiotischen Abbau fossiler Brennstoffe (ADPF) [MJ]: A1-A3 1552.05, C1 4.44767, C2 17.1106, C3 54.4809, D -12.4165

## Use advice
Der Datensatz repräsentiert ein Cradle to Gate Inventar. Er kann verwendet werden, um die Lieferkette des jeweiligen Produktes in einer repräsentativen Weise zu charakterisieren. Die Kombination mit einzelnen Einheitenprozessen und diesem Produkt ermöglicht die Erstellung von anwenderspezifischen (Produkt-) LCAs.

## Data sources
- GaBi Database Edition 2020, SP40
- GaBi database (all versions)
- Leichtbeton Handbuch, 2006
