# Ytong® - Porenbeton

Dataset: ILCD process, EPD, average dataset
Geography: DE
Reference year: 2017
Valid until: 2022
Classification: OEKOBAU.DAT: Mineralische Baustoffe / Steine und Elemente / Porenbeton
Classification: IBUCategories: 02 Bauprodukte / Mauerwerk und Mörtel / Porenbeton
Method details: Porenbeton.pdf
Generated by: Sphera Solutions GmbH
Registration number: EPD-XEL-20170147-IAD1-DE
Owner: Xella Deutschland GmbH
Compliance: DIN EN 15804; ISO 14025
Review: Accredited third party review by Institut Bauen und Umwelt e. V.
Amounts: rows without a unit in brackets have none in this file; such an amount is in the reference unit of its flow, which a separate flow dataset defines
copyright: true
licenseType: Free of charge for all users and uses
accessRestrictions: None

## General comment
Die genannten Produkte sind unbewehrte Bausteine unterschiedlicher Formate aus Porenbeton. Porenbeton gehört zur Gruppe der porosierten dampfgehärteten Leichtbetone.

## Technology and included processes
Der gemahlene Quarzsand wird mit Kalk, Zement und zerkleinertem Porenbeton-Recyclingmaterial, unter Zugabe von Wasser und Aluminiumpulver oder -paste, in einem Mischer zu einer wässrigen Suspension gemischt und in Gießformen gegossen. Das Wasser löscht unter Wärmeentwicklung den Kalk. Das Aluminium reagiert im alkalischen Milieu. Dabei bildet sich gasförmiger Wasserstoff, der die Poren in der Masse erzeugt und ohne Rückstände entweicht. Die Poren besitzen meist einen Durchmesser von 0,5 – 1,5 mm und sind ausschließlich mit Luft gefüllt. Nach dem ersten Abbinden entstehen halbfeste Rohblöcke, aus denen maschinell und mit hoher Genauigkeit die Porenbetonbauteile geschnitten werden. Die Ausbildung der endgültigen Porenbetoneigenschaften erfolgt während der anschließenden Dampfhärtung über 5 – 12 Stunden bei etwa 190 °C und einem Druck von ca. 12 bar in Dampfdruckkesseln, den sog. Autoklaven. Hier bilden sich aus den eingesetzten Stoffen Calcium-Silikathydrate, die dem in der Natur vorkommenden Mineral Tobermorit entsprechen. Die Reaktion des Materials ist mit der Entnahme aus dem Autoklav abgeschlossen. Der Dampf wird nach Abschluss des Härtungsprozesses für weitere Autoklavzyklen verwandt. Das anfallende Kondensat wird als Prozesswasser genutzt. Auf diese Weise wird Energie eingespart und eine Belastung der Umwelt mit heißem Abdampf und Abwasser vermieden. Porenbeton-Bausteine werden anschließend auf Holzpaletten gestapelt und in recycelbare Schrumpffolie aus Polyethylen (PE) eingeschweißt.
Technische Daten:
Leistungswerte des Produkts entsprechend der Leistungserklärung in Bezug auf dessen Wesentliche Merkmale gemäß /EN 771-4:2015-11/.
Deklarierte Einheit:
Die Umweltproduktdeklaration bezieht sich auf das Produktionsstadium (Modul A1-A3) von 1 m³ Ytong®-Porenbeton unbewehrt mit einer durchschnittlichen Rohdichte von 438 kg/m³.

Die produzierten Porenbetonsteine haben dabei eine Rohdichte von 350 kg/m³ bis 700 kg/m³. Die Ergebnisse repräsentieren den durchschnittlichen Produktionsmix von Xella (Deutschland).

## Technical purpose
Unbewehrte Bausteine für gemauerte, monolithische, tragende und nichttragende Wände. Bestimmungsgemäß wird ein direkter Kontakt mit Wasser bautechnisch vermieden.

## Reference product
- 1m³ Ytong® Porenbeton: 1

## Inputs
- Erneuerbare Primärenergie als Energieträger (PERE) [MJ]: A1-A3 198
- Erneuerbare Primärenergie zur stofflichen Nutzung (PERM) [MJ]: A1-A3 165
- Total erneuerbare Primärenergie (PERT) [MJ]: A1-A3 363
- Nicht-erneuerbare Primärenergie als Energieträger (PENRE) [MJ]: A1-A3 1020
- Nicht-erneuerbare Primärenergie zur stofflichen Nutzung (PENRM) [MJ]: A1-A3 68.7
- Total nicht erneuerbare Primärenergie (PENRT) [MJ]: A1-A3 1090
- Einsatz von Sekundärstoffen (SM) [kg]: A1-A3 0
- Erneuerbare Sekundärbrennstoffe (RSF) [MJ]: A1-A3 0
- Nicht erneuerbare Sekundärbrennstoffe (NRSF) [MJ]: A1-A3 0
- Einsatz von Süßwasserressourcen (FW) [m^3]: A1-A3 0.247

## Outputs
- Gefährlicher Abfall zur Deponie (HWD) [kg]: A1-A3 4.02e-6
- Entsorgter nicht gefährlicher Abfall (NHWD) [kg]: A1-A3 14.5
- Entsorgter radioaktiver Abfall (RWD) [kg]: A1-A3 0.0321
- Komponenten für die Wiederverwendung (CRU) [kg]: A1-A3 0
- Stoffe zum Recycling (MFR) [kg]: A1-A3 0
- Stoffe für die Energierückgewinnung (MER) [kg]: A1-A3 0
- Exportierte elektrische Energie (EEE) [MJ]: A1-A3 0
- Exportierte thermische Energie (EET) [MJ]: A1-A3 0

## Impact indicators
- Globales Erwärmungspotenzial (GWP) [kg CO_(2)-Äq.]: A1-A3 167
- Abbau Potential der stratosphärischen Ozonschicht (ODP) [kg CFC11-Äq.]: A1-A3 1.62e-10
- Versauerungspotenzial von Boden und Wasser (AP) [kg SO_(2)-Äq.]: A1-A3 0.183
- Eutrophierungspotenzial (EP) [kg PO_(4)^(3)-Äq.]: A1-A3 0.0233
- Bildungspotential für troposphärisches Ozon (POCP) [kg Ethen-Äq.]: A1-A3 0.0168
- Potenzial für den abiotischen Abbau nicht fossiler Ressourcen (ADPE) [kg Sb-Äq.]: A1-A3 0.000448
- Potenzial für den abiotischen Abbau fossiler Brennstoffe (ADPF) [MJ]: A1-A3 1000

## Use advice
Gültigkeitsbereich:
Die Ökobilanz beruht auf der Berücksichtigung aller 10 deutschen Porenbeton-Werke der Xella-Gruppe und der Datenbasis des Jahres 2016.
Systemgrenze:
Typ der EPD: Wiege bis Werkstor.

Die Ökobilanz für Ytong®-Porenbeton berücksichtigt die Lebenszyklusphasen der Produkt-Herstellung (A1-A3).

Der Produkteinbau (Modul A4-A5) sowie das Nutzungsstadium (Modul B) ist in dieser Studie nicht berücksichtigt. Die Entsorgung (Modul C) ist in dieser Studie ebenfalls nicht berücksichtigt. Aus der Bilanzierung der betrachteten Module ergeben sich keine Gutschriften und Lasten außerhalb der Systemgrenze.

## Data sources
- GaBi Database (all versions)
- GaBi database SP29 2016
