# Tragdeckschicht; 2400 kg/m3

Dataset: ILCD process, EPD, generic dataset
Geography: DE
Reference year: 2021
Valid until: 2022
Classification: oekobau.dat: Mineralische Baustoffe / Asphalt / Tragschichten
Owner: Sphera Solutions GmbH
Compliance: EN 15804+A2
Review: Dependent internal review by Sphera Solutions GmbH; Independent external review by GaBi user forum
Amounts: rows without a unit in brackets have none in this file; such an amount is in the reference unit of its flow, which a separate flow dataset defines
copyright: true
licenseType: Free of charge for all users and uses
accessRestrictions: The license conditions as stated on https://www.oekobaudat.de/ apply.
accessRestrictions: Es gelten die Lizenzbedingungen wie sie auf https://www.oekobaudat.de/ genannt sind.

## General comment
Dieser Datensatz wurde nach dem European Standard EN 15804+A2 für Nachhaltiges Bauen modelliert. Ergebnisse werden in Modulen abgebildet, die den strukturierten Ausdruck von Ergebnissen über den gesamten Lebenszyklus zulassen.

## Geography
Der Datensatz bildet die länderspezifische Situation in Deutschland ab. Dabei werden Haupttechnologien, spezifische regionale Charakteristiken und ggf. Importstatistiken berücksichtigt.

## Time period
Jährlicher Durchschnitt

## Technology and included processes
Die Lebenszyklusanalyse der Asphaltdeckschicht umfasst die Lebenswegabschnitte cradle to gate, d. h. insbesondere die Prozesse der Gewinnung der Zuschläge und der Herstellung von Bitumen. Berücksichtigt wurden die Transporte der Rezepturbestandteile zur Asphaltmischanlage sowie der Herstellungsaufwand. Das Modul A5 beinhaltet eine Maschine und Treibstoff.
Transporte vom Werk zur Baustelle sind nicht berücksichtigt und müssen bei Systembetrachtungen eingerechnet werden.

In der Entsorgungsphase wird in Modul C1 ein maschineller Rückbau (Asphaltfräse) bilanziert. Sowohl der Meiselverbrauch, als auch der Dieselverbrauch werden dabei berücksichtigt. Es wird angenommen, dass der Ausbauasphalt das Ende der Abfalleigenschaft direkt nach dem Abfräsen erreicht. Das heißt die Lasten für die Aufbereitung (Erwärmen und Mischen) werden in Modul D ausgewiesen.
Der Transport in Modul C2 zur Asphaltmischanlage erfolgt mit einem LKW (50km).
In Modul D wird ein Materialverlust von 3% angenommen. Das Mischen und Erwärmen wird ebenfalls in Modul D bilanziert. Es erfolgt eine Gutschrift für die Netto-Materialmenge (zurückgebaute Menge abzüglich Aufbereitungsverluste) für die Substitution einer Asphalttragschicht.

## Technical purpose
Dieses Produkt kann im Baubereich verwendet werden.

## Safety margin
20 %. Produktsystem bis auf wenige Prozesse/Flüsse abgebildet. Technologische, zeitliche und geographische Repräsentativität teilweise gegeben.

## Reference product
- Tragdeckschicht: 1

## Inputs
- Erneuerbare Primärenergie als Energieträger (PERE) [MJ]: A1-A3 0.0716789, A5 0.000675097, C1 0.00242734, D -0.0247153
- Erneuerbare Primärenergie zur stofflichen Nutzung (PERM) [MJ]: A1-A3 0, A5 0, C1 0, D 0
- Total erneuerbare Primärenergie (PERT) [MJ]: A1-A3 0.0716789, A5 0.000675097, C1 0.00242734, D -0.0247153
- Nicht-erneuerbare Primärenergie als Energieträger (PENRE) [MJ]: A1-A3 1.06589, A5 0.0116319, C1 0.044172, D -1.54108
- Nicht-erneuerbare Primärenergie zur stofflichen Nutzung (PENRM) [MJ]: A1-A3 2.5, A5 0, C1 -2.5, D 2.5
- Total nicht-erneuerbare Primärenergie (PENRT) [MJ]: A1-A3 3.56589, A5 0.0116319, C1 -2.45583, D 0.95892
- Einsatz von Sekundärstoffen (SM) [kg]: A1-A3 0, A5 0, C1 0, D 0
- Erneuerbare Sekundärbrennstoffe (SF) [MJ]: A1-A3 0, A5 0, C1 0, D 0
- Nicht erneuerbare Sekundärbrennstoffe (NRSF) [MJ]: A1-A3 0, A5 0, C1 0, D 0
- Nettoeinsatz von Süßwasserressourcen (FW) [m3]: A1-A3 7.61961e-5, A5 5.99993e-7, C1 2.70515e-6, D -3.81236e-5

## Outputs
- Gefährlicher Abfall zur Deponie (HWD) [kg]: A1-A3 6.89372e-11, A5 4.86178e-13, C1 1.98119e-12, D -2.56182e-11
- Entsorgter nicht gefährlicher Abfall (NHWD) [kg]: A1-A3 0.0132844, A5 1.87766e-6, C1 0.00138685, D 0.0228625
- Entsorgter radioaktiver Abfall (RWD) [kg]: A1-A3 8.55502e-6, A5 1.11624e-8, C1 5.48362e-8, D -3.13929e-6
- Komponenten für die Wiederverwendung (CRU) [kg]: A1-A3 0, A5 0, C1 0, D 0
- Stoffe zum Recycling (MFR) [kg]: A1-A3 0, A5 0, C1 1, D 0
- Stoffe für die Energierückgewinnung (MER) [kg]: A1-A3 0, A5 0, C1 0, D 0
- Exportierte elektrische Energie (EEE) [MJ]: A1-A3 0, A5 0, C1 0, D 0
- Exportierte thermische Energie (EET) [MJ]: A1-A3 0, A5 0, C1 0, D 0

## Impact indicators
- Globales Erwärmungspotenzial - total (GWP-total) [kg CO2 eq.]: A1-A3 0.0827845, A5 0.000864155, C1 0.000589909, D -0.0174263
- Globales Erwärmungspotenzial - fossil (GWP-fossil) [kg CO2 eq.]: A1-A3 0.0822051, A5 0.000858492, C1 0.00067857, D -0.0171079
- Globales Erwärmungspotenzial - biogen (GWP-biogenic) [kg CO2 eq.]: A1-A3 0.000490057, A5 2.6505e-8, C1 -0.000107825, D -0.000297063
- Globales Erwärmungspotenzial - luluc (GWP-luluc) [kg CO2 eq.]: A1-A3 8.928e-5, A5 5.6358e-6, C1 1.91641e-5, D -2.13622e-5
- Abbaupotenzial der stratosphärischen Ozonschicht (ODP) [kg CFC-11 eq.]: A1-A3 2.61314e-16, A5 2.24539e-19, C1 1.12018e-18, D -9.55735e-17
- Versauerungspotenzial, kumulierte Überschreitung (AP) [Mole of H+ eq.]: A1-A3 0.000154729, A5 1.22498e-6, C1 4.02494e-6, D -7.15973e-5
- Eutrophierungspotenzial - Süßwasser (EP-freshwater) [kg P eq.]: A1-A3 8.61844e-8, A5 1.80476e-9, C1 6.66737e-9, D 4.33876e-7
- Eutrophierungspotenzial - Salzwasser (EP-marine) [kg N eq.]: A1-A3 4.04493e-5, A5 4.86653e-7, C1 5.26031e-7, D -2.42263e-5
- Eutrophierungspotenzial - Land (EP-terrestrial) [Mole of N eq.]: A1-A3 0.000447841, A5 5.56218e-6, C1 1.38749e-5, D -0.000266444
- Bildungspotenzial für troposphärisches Ozon (POCP) [kg NMVOC eq.]: A1-A3 0.000147575, A5 0.000433682, C1 1.68923e-6, D -0.000358846
- Potenzial für die Verknappung abiotischer Ressourcen nicht fossile Ressourcen (ADPE) [kg Sb eq.]: A1-A3 1.38676e-8, A5 7.63337e-11, C1 4.92676e-10, D -5.14898e-9
- Potenzial für die Verknappung abiotischer Ressourcen fossile Brennstoffe (ADPF) [MJ]: A1-A3 4.06581, A5 0.0116315, C1 0.0441389, D -1.54106
- Wasser-Entzugspotenzial (Benutzer) (WDP) [m³ world equiv.]: A1-A3 0.0016092, A5 3.4113e-6, C1 3.8474e-5, D -0.000961534

## Use advice
Der Datensatz repräsentiert ein Cradle to Gate Inventar. Er kann verwendet werden, um die Lieferkette des jeweiligen Produktes in einer repräsentativen Weise zu charakterisieren. Die Kombination mit einzelnen Einheitenprozessen und diesem Produkt ermöglicht die Erstellung von anwenderspezifischen (Produkt-) LCAs.

## Data sources
- Ökoprofil für Asphalt- und Betonbauweisen von Fahrbahnen, Aktualisierung 2009
- Ökobilanzen im Brückenbau, 1999
- BAFU Information, 2004
- Schneider Bautabellen für Ingenieure, 2006
- Documentation of data quality management
- GaBi Database Edition 2021, CUP2021.01
- GaBi database (all versions)
