# Befestigungssysteme für vorgehängte hinterlüftete Fassaden (VHF)

Dataset: ILCD process, EPD, average dataset
Geography: RER
Reference year: 2021
Valid until: 2026
Classification: OEKOBAU.DAT: Komponenten von Fenstern und Vorhangfassaden / Beschläge / Befestigungen
Classification: IBUCategories: 02 Bauprodukte / Befestigungen / Dübel aus Kunststoff und Metall
Method details: Dübel aus Kunststoff und Metall.pdf
Generated by: brands and values GmbH
Registration number: EPD-EJO-20210061-IBD1-DE
Owner: EJOT BAUBEFESTIGUNGEN GmbH
Compliance: DIN EN 15804+A2; ISO 14025
Review: Accredited third party review by Institut Bauen und Umwelt e. V.
Amounts: rows without a unit in brackets have none in this file; such an amount is in the reference unit of its flow, which a separate flow dataset defines
copyright: true
licenseType: Free of charge for all users and uses
accessRestrictions: None

## General comment
Verbindungs-, Befestigungs-, und Verankerungselemente der EJOT Baubefestigungen GmbH sind Fertigerzeugnisse, die aus

einer Kunststoffhülse und einem Spreizelement aus Stahl oder Edelstahl, nur aus einem Kunststoffelement

oder nur aus einem oder aus mehreren Stahlteilen bestehen.

Die Deklaration gilt für alle nachfolgend genannten Verankerungs-, Verbindungs- und Befestigungselemente, die vorzugsweise

im VHF-System oder in Verbindung mit dem VHF-System eingesetzt werden.

## Technology and included processes
Die Dübelhülsen aus Kunststoff werden nach konventionellen Spritzgusstechniken hergestellt. Dazu wird mit einer Spritzgießmaschine der jeweilige Kunststoff in einer Spritzeinheit plastifiziert und in ein Spritzgießwerkzeug eingespritzt. Der Hohlraum (die Kavität) des Werkzeugs bestimmt die Form und die Oberflächenstruktur des fertigen Teils (hier Kunststoffdübel). Schrauben: Der weitaus größte Teil von Schrauben und Verbindungselementen wird durch spanlose Kaltumformung hergestellt. Das Kaltfließpressverfahren: Das Ausgangsmaterial wird als „Draht“ auf Spulen aufgewickelt angeliefert und in den Pressen vorgeschalteten Anlagen abgehaspelt, gerichtet und gegebenenfalls auf den gewünschten Durchmesser reduziert. Moderne Kaltfließpressen arbeiten mehrstufig, d. h. pro Hub sind mehrere Operationen hintereinander verkettet, bspw. Schraubenkopf vorformen, stauchen, abgraten und Gewindeteil reduzieren. Im nachfolgenden Prozess werden die Gewinde durch Gewindewalzmaschinen mit Flachbacken oder Roll- und Segmentwerkzeugen spanlos auf die reduzierten Gewindeteile aufgerollt. Vorzugsweise verwendet man Kaltfließpressen mit integrierter Gewinderollmaschine. Die EJOT Baubefestigungen GmbH ist gemäß ISO 9001 zertifiziert.
Technische Daten:
Die technischen Daten sind beispielhaft und repräsentativ für jedes der 3 durchschnittlich deklarierten Produkte gegeben.
Deklarierte Einheit:
Die deklarierte Einheit ist ein durchschnittliches Dübelsystem für den Einsatz in 1 m2 VHF mit einer spezifischen Länge von 120 mm, das aus vier einzelnen Systemen besteht.

„Durchschnittlich“ beschreibt sämtliche produzierte Dübeltypen des Systems im Durchschnitt gemäß Produktionsanteilen gewichtet auf Basis einer Parameteranalyse gerechnet. Das bedeutet, dass ein hypothetisches Dübelsystem berechnet wird, welches das gesamte VHF-System repräsentiert. Um die deklarierte Einheit auf kg umrechnen zu können wird das Gewicht pro System angeführt.

## Technical purpose
1.) Folgende Produkte werden vorzugsweise zur Verankerung, Verbindung und / oder Befestigung von Fassadenbekleidungen verwendet:

- Dämmhalter: DH

- Dämmstoffmetallhalter / -halteteller: DMH, DMT

- Verbindungsmittel Schrauben: JT3 & JT4 (Edelstahl A2) JT6 & JT9 (Edelstahl A4)

- Fassadendübel 8 mm, 10 mm und 14 mm: SDF, SDP

2.) Folgende Produkte werden vorzugsweise zur Sanierung von Außenwandelementen verwendet:

- Verblendsanierdübel: VSD

- Wetterschalen-Sanieranker: WSS

- KERI-Anker

3.) Folgende Produkte werden zur Verankerung von tragenden Bauteilen in Beton verwendet:

- EJOT Bolzenanker BA und BA-Plus

## Reference product
- durchschnittliche Dübelsysteme für VHF von 120 mm Länge (): 1

## Inputs
- Erneuerbare Primärenergie als Energieträger (PERE) [MJ]: A1-A3 1.81303, C1 0.00198, C2 0.000691, C3 0.000477, C4 0.00222, D 0.0974
- Erneuerbare Primärenergie zur stofflichen Nutzung (PERM) [MJ]: A1-A3 0.30697, C1 0, C2 0, C3 0, C4 0, D 0
- Total erneuerbare Primärenergie (PERT) [MJ]: A1-A3 2.12, C1 0.00198, C2 0.000691, C3 0.000477, C4 0.00222, D 0.0974
- Nicht-erneuerbare Primärenergie als Energieträger (PENRE) [MJ]: A1-A3 8.16233, C1 0.0343, C2 0.012, C3 1.11429, C4 0.0316, D -1.26
- Nicht-erneuerbare Primärenergie zur stofflichen Nutzung (PENRM) [MJ]: A1-A3 1.10767, C1 0, C2 0, C3 -1.10767, C4 0, D 0
- Total nicht erneuerbare Primärenergie (PENRT) [MJ]: A1-A3 9.27, C1 0.0343, C2 0.012, C3 0.00662, C4 0.0316, D -1.26
- Einsatz von Sekundärstoffen (SM) [kg]: A1-A3 0.0544334, C1 0, C2 0, C3 0, C4 0, D 0.0864943
- Erneuerbare Sekundärbrennstoffe (RSF) [MJ]: A1-A3 0, C1 0, C2 0, C3 0, C4 0, D 0
- Nicht erneuerbare Sekundärbrennstoffe (NRSF) [MJ]: A1-A3 0, C1 0, C2 0, C3 0, C4 0, D 0
- Einsatz von Süßwasserressourcen (FW) [m^3]: A1-A3 0.0024, C1 2.3e-6, C2 8.05e-7, C3 1.86e-6, C4 3.88e-7, D -0.000258

## Outputs
- Gefährlicher Abfall zur Deponie (HWD) [kg]: A1-A3 2.03e-8, C1 1.59e-9, C2 5.54e-10, C3 1.73e-10, C4 1.15e-10, D -1.61e-7
- Entsorgter nicht gefährlicher Abfall (NHWD) [kg]: A1-A3 0.04, C1 5.44e-6, C2 1.9e-6, C3 1.79e-6, C4 0.0304, D 0.015
- Entsorgter radioaktiver Abfall (RWD) [kg]: A1-A3 0.000235, C1 6.32e-8, C2 2.21e-8, C3 8.74e-8, C4 3.82e-7, D 4.46e-8
- Komponenten für die Wiederverwendung (CRU) [kg]: A1-A3 0, C1 0, C2 0, C3 0, C4 0, D 0
- Stoffe zum Recycling (MFR) [kg]: A1-A3 0.00529892, C1 0, C2 0, C3 0.098884, C4 0, D 0
- Stoffe für die Energierückgewinnung (MER) [kg]: A1-A3 0.0128173, C1 0, C2 0, C3 0, C4 0, D 0
- Exportierte elektrische Energie (EEE) [MJ]: A1-A3 0, C1 0, C2 0, C3 0, C4 0, D 0
- Exportierte thermische Energie (EET) [MJ]: A1-A3 0, C1 0, C2 0, C3 0, C4 0, D 0

## Impact indicators
- Globales Erwärmungspotenzial total (GWP-total) [kg CO_(2)-Äq.]: A1-A3 0.671, C1 0.00256, C2 0.000895, C3 0.000341, C4 0.00221, D -0.146
- Globales Erwärmungspotenzial fossil (GWP-fossil) [kg CO_(2)-Äq.]: A1-A3 0.67, C1 0.00254, C2 0.000888, C3 0.000338, C4 0.00221, D -0.146
- Globales Erwärmungspotenzial biogen (GWP-biogenic) [kg CO_(2)-Äq.]: A1-A3 0, C1 0, C2 0, C3 0, C4 0, D 0
- Globales Erwärmungspotenzial luluc (GWP-luluc) [kg CO_(2)-Äq.]: A1-A3 0.000548, C1 2.07e-5, C2 7.25e-6, C3 2.31e-6, C4 1.79e-6, D 4.17e-6
- Abbau Potential der stratosphärischen Ozonschicht (ODP) [kg CFC11-Äq.]: A1-A3 3.87e-11, C1 4.7e-19, C2 1.64e-19, C3 8.21e-19, C4 5e-18, D 3.19e-16
- Versauerungspotenzial von Boden und Wasser (AP) [mol H^(+)-Äq.]: A1-A3 0.00243, C1 1.29e-5, C2 5.46e-6, C3 3.32e-6, C4 6.68e-6, D -0.000325
- Eutrophierungspotenzial Süßwasser (EP-freshwater) [kg PO_(4)-Äq.]: A1-A3 1.76e-6, C1 7.8e-9, C2 2.73e-9, C3 9.87e-10, C4 4.03e-7, D -8.27e-8
- Eutrophierungspotenzial Salzwasser (EP-marine) [kg N-Äq.]: A1-A3 0.000464, C1 6.14e-6, C2 2.64e-6, C3 1.61e-6, C4 1.48e-6, D -5.93e-5
- Eutrophierungspotenzial Land (EP-terrestrial) [mol N-Äq.]: A1-A3 0.00482, C1 6.82e-5, C2 2.93e-5, C3 1.77e-5, C4 1.62e-5, D -0.000601
- Bildungspotential für troposphärisches Ozon (POCP) [kg NMVOC-Äq.]: A1-A3 0.00136, C1 1.25e-5, C2 5.1e-6, C3 4.7e-6, C4 4.82e-6, D -0.000245
- Potenzial für den abiotischen Abbau nicht fossiler Ressourcen (ADPE) [kg Sb-Äq.]: A1-A3 9.11e-5, C1 2.07e-10, C2 7.24e-11, C3 3.71e-10, C4 1.49e-10, D -2.37e-6
- Potenzial für den abiotischen Abbau fossiler Brennstoffe (ADPF) [MJ]: A1-A3 9.26, C1 0.0342, C2 0.0119, C3 0.00661, C4 0.0316, D -1.26
- Wassernutzung (WDP) [m^(3) Welt-Äq. entzogen]: A1-A3 0.0716, C1 2.5e-5, C2 8.73e-6, C3 6.52e-5, C4 -2.48e-5, D -0.011
- Auftreten von Krankheiten aufgrund von Feinstaubemissionen (PM) [Krankheitsfälle]
- Wirkung durch Exposition des Menschen mit U235 (IR) [kBq U235-Äq.]
- Toxizitätsvergleichseinheit für Ökosysteme (ETP-fw) [CTUe]
- Toxizitätsvergleichseinheit für Menschen (krebserregend) (HTP-c) [CTUh]
- Toxizitätsvergleichseinheit für Menschen (nicht krebserregend) (HTP-nc) [CTUh]
- Bodenqualitätsindex (SQP) [SQP]

## Use advice
Gültigkeitsbereich:
Die EPD bezieht sich auf alle Produkte im EJOT Portfolio, welche in vorgehängten, hinterlüfteten Fassadensystemen zum Einsatz kommen. Das deklarierte Produkt wird in den Werken Ciasna in Polen, Tambach in Deutschland und Dozwil in der Schweiz hergestellt. Die Datenbasis ist das Jahr 2012. Die deklarierten Ergebnisse gelten für eine Länge von 120 mm, für alle weiteren Längen können die Ergebnisse mit der angegebenen Formel extrapoliert werden.
Systemgrenze:
Typ der EPD: Wiege bis Werkstor - mit Optionen.

Die Umweltproduktdeklaration bezieht sich auf das Produktionsstadium (Modul A1–A3), das Entsorgungsstadium (Module C1–C4) sowie Gutschriften und Lasten außerhalb der Systemgrenze (Modul D).

In dem Produktionsstadium wird die Beschaffung der Rohstoffe inklusive der entsprechenden Vorketten, die notwendigen Beschaffungstransporte zu den Werken sowie die für die Produktion der Dübelsysteme werden notwendigen Energien betrachtet.Für die Werke wurde jeweils der länderspezifische Strommix modelliert. Die Materialzusammensetzung und der Energiebedarf der deklarierten Dübelsysteme wurde gemäß ihrer Produktionsanteile in jedem Werk berechnet.

In der Entsorgungsphase wird der Rückbau der Dübelsysteme (Modul C1), der Transport zur Abfallbehandlung (Modul C2), die Abfallaufbereitung (Modul C3) sowie die Deponierung der Kunststoffe (Modul C4) betrachtet. Vermiedene Lasten aus dem Recycling der Metalle werden in Modul D ausgewiesen. Hierfür werden lediglich die Nettoschrottmengen betrachtet.

## Data sources
- GaBi Database (all versions)
- GaBi database SP40 2020
