# Betonpflasterstein mit schwarz-weiß meliertem Vorsatz

Dataset: ILCD process, EPD, specific dataset
Geography: DE
Reference year: 2017
Valid until: 2022
Classification: OEKOBAU.DAT: Mineralische Baustoffe / Steine und Elemente / Betonfertigteile und Betonwaren
Classification: IBUCategories: 02 Bauprodukte / Tiefbauprodukte / Oberbaumaterialien für Verkehrswege im Aussenbereich
Method details: Oberbaumaterialien für Verkehrswege im Aussenbereich.pdf
Generated by: Sphera Solutions GmbH
Registration number: EPD-KRO-20160234-CCA1-DE
Owner: Kronimus AG - Betonsteinwerke
Compliance: DIN EN 15804; ISO 14025
Review: Accredited third party review by Institut Bauen und Umwelt e. V.
Amounts: rows without a unit in brackets have none in this file; such an amount is in the reference unit of its flow, which a separate flow dataset defines
copyright: true
licenseType: Free of charge for all users and uses
accessRestrictions: None

## General comment
Die deklarierten Produkte sind Pflastersteine unterschiedlicher Formate in der Steinstärke 6 cm. Das Flächengewicht beträgt 135 kg/m² mit einer mischfarbigen (melierten) Oberfläche, bestehend aus Weiß- und Grauzement mit Sandbestandteilen, ansonsten unbearbeitet. Der Beton wird aus Zuschlägen (Gesteinkörnungen) Zement, Wasser, Zusatzmitteln und Zusatzstoffen hergestellt.
Für den Kernbeton wird nur Grauzement verwendet. Im Gegensatz dazu enthält der Vorsatz aufgrund der Schwarz-Weiß-Melierung teilweise Weißzement und zusätzlich Grauzement unter Zugabe von Pigmenten.
Maßgeblich für die Fertigung und Qualitätsbeurteilung ist die /EN 1338/ mit Ausnahme Frost- und Tausalzbeständigkeit und Abrieb.

## Technology and included processes
Die deklarierten Produkte sind Pflastersteine unterschiedlicher Formate in der Steinstärke 6 cm. Das Flächengewicht beträgt 135 kg/m² mit einer mischfarbigen (melierten) Oberfläche, bestehend aus Weiß- und Grauzement mit Sandbestandteilen, ansonsten unbearbeitet. Der Beton wird aus Zuschlägen (Gesteinkörnungen) Zement, Wasser, Zusatzmitteln und Zusatzstoffen hergestellt. Für den Kernbeton wird nur Grauzement verwendet. Im Gegensatz dazu enthält der Vorsatz aufgrund der Schwarz-Weiß-Melierung teilweise Weißzement und zusätzlich Grauzement unter Zugabe von Pigmenten. Die Ökobilanz beinhaltet die Herstellung des Betonpflastersteins inclusive Rohstoffgewinnung, Energiebereitstellung, Rohstofftransport zum Werk sowie Aufwände für die eigentliche Herstellung.
Technische Daten:
Folgende technische Eigenschaften sind gemäß Leistungserklärung für Pflastersteine aus Beton nach /EN 1338/ im Lieferzustand gegeben:
Deklarierte Einheit:
Die Deklaration bezieht sich auf die Herstellung von 1 m² Betonpflasterstein mit schwarz-weiß meliertem Vorsatz und einer Steindicke von 6 cm. Das Flächengewicht beträgt 135 kg/m².
In einem EPD-Anhang erfolgt die Ausweisung der Umweltergebnisse pro 1 cm Dicke, so dass eine Variation der Steindicke möglich ist. Darüber hinaus sind die Umweltergebnisse für die Oberflächenbehandlungen Sandstrahlen und Schleifen sowie die Kombination beider pro 1 m² ausgewiesen.

## Technical purpose
Diese Betonpflastersteine sind einsetzbar im Außenbereich, z. B. Höfen, Gärten- und Gehwegen, auf Dächern und in überdeckten Bereichen.

## Reference product
- Betonpflasterstein mit schwarz-weiß meliertem Vorsatz: 1

## Inputs
- Erneuerbare Primärenergie als Energieträger (PERE) [MJ]: A1-A3 11.9
- Erneuerbare Primärenergie zur stofflichen Nutzung (PERM) [MJ]: A1-A3 11.5
- Total erneuerbare Primärenergie (PERT) [MJ]: A1-A3 23.4
- Nicht-erneuerbare Primärenergie als Energieträger (PENRE) [MJ]: A1-A3 110.3
- Nicht-erneuerbare Primärenergie zur stofflichen Nutzung (PENRM) [MJ]: A1-A3 0.7
- Total nicht erneuerbare Primärenergie (PENRT) [MJ]: A1-A3 111
- Einsatz von Sekundärstoffen (SM) [kg]: A1-A3 3.68
- Erneuerbare Sekundärbrennstoffe (RSF) [MJ]: A1-A3 0
- Nicht erneuerbare Sekundärbrennstoffe (NRSF) [MJ]: A1-A3 0
- Einsatz von Süßwasserressourcen (FW) [m^3]: A1-A3 0.07

## Outputs
- Gefährlicher Abfall zur Deponie (HWD) [kg]: A1-A3 0.0003
- Entsorgter nicht gefährlicher Abfall (NHWD) [kg]: A1-A3 2.04
- Entsorgter radioaktiver Abfall (RWD) [kg]: A1-A3 0.00505
- Komponenten für die Wiederverwendung (CRU) [kg]: A1-A3 0
- Stoffe zum Recycling (MFR) [kg]: A1-A3 0
- Stoffe für die Energierückgewinnung (MER) [kg]: A1-A3 0
- Exportierte elektrische Energie (EEE) [MJ]: A1-A3 0
- Exportierte thermische Energie (EET) [MJ]: A1-A3 0

## Impact indicators
- Globales Erwärmungspotenzial (GWP) [kg CO_(2)-Äq.]: A1-A3 18.1
- Abbau Potential der stratosphärischen Ozonschicht (ODP) [kg CFC11-Äq.]: A1-A3 9.12e-10
- Versauerungspotenzial von Boden und Wasser (AP) [kg SO_(2)-Äq.]: A1-A3 0.0295
- Eutrophierungspotenzial (EP) [kg PO_(4)^(3)-Äq.]: A1-A3 0.00389
- Bildungspotential für troposphärisches Ozon (POCP) [kg Ethen-Äq.]: A1-A3 0.00271
- Potenzial für den abiotischen Abbau nicht fossiler Ressourcen (ADPE) [kg Sb-Äq.]: A1-A3 2.77e-5
- Potenzial für den abiotischen Abbau fossiler Brennstoffe (ADPF) [MJ]: A1-A3 98.4

## Use advice
Gültigkeitsbereich:
Die vorliegende Umweltproduktdeklaration bildet 1 m² Betonpflasterstein in melierter Oberflächenausführung, hergestellt in den Werken der Kronimus-Gruppe ab. Sie beruht auf den Produktionsdaten der Werke 76473 Iffezheim, 79258 Hartheim a. Rhein, 74076 Heilbronn und F-57281 Maizières- Lès- Metz. Die Werte wurden gemäß Produktionsanteil des einzelnen Standortes gewichtet und basieren auf dem Durchschnitt des Jahres 2014.
Systemgrenze:
Typ der EPD: Wiege bis Werkstor.
Die Ökobilanz beinhaltet die Herstellung des Betonpflastersteins inclusive Rohstoffgewinnung, Energiebereitstellung, Rohstofftransport zum Werk sowie Aufwände für die eigentliche Herstellung.

Einflüsse von Abfällen werden in den Modulen berücksichtigt, in denen diese anfallen. Pflastersteine, die den Qualitätsanforderungen nicht entsprechen, werden jeweils in örtlichen Recycling-Betrieben zu Straßenunterbaumaterial gebrochen und einer weiteren Verwendung zugeführt.
In der Herstellung benötigte Maschinen, Anlagen und Infrastruktur werden vernachlässigt.

## Data sources
- GaBi Database (all versions)
- GaBi database SP29 2016
