# Sikaplan G

Dataset: ILCD process, EPD, specific dataset
Geography: DE
Reference year: 2021
Valid until: 2026
Classification: OEKOBAU.DAT: Kunststoffe / Dachbahnen / PVC-Dachbahnen
Classification: IBUCategories: 02 Bauprodukte / Abdichtungen / Dach- und Dichtungsbahnsysteme aus Kunststoffen und Elastomeren
Method details: Dach- und Dichtungsbahnsysteme aus Kunststoffen und Elastomeren.pdf
Generated by: Sika Services AG
Registration number: EPD-SIK-20210140-IBA1-DE
Owner: Sika Deutschland GmbH
Compliance: DIN EN 15804+A2; ISO 14025
Review: Accredited third party review by Institut Bauen und Umwelt e. V.
Amounts: rows without a unit in brackets have none in this file; such an amount is in the reference unit of its flow, which a separate flow dataset defines
copyright: true
licenseType: Free of charge for all users and uses
accessRestrictions: None

## General comment
Sikaplan® G ist eine mehrschichtige Kunststoffabdich-tungsbahn, basierend auf Polyvinylchlorid (PVC) mit innenliegendem Polyestergewebe (DE/E1 PVC-P-NB-V-PG).

Die Sikaplan® G Kunststoffabdichtungsbahnen sind in den Dicken 1,5 mm (G-15), 1,8 mm (G-18), 2,0 mm

(G-20) und 2,4 mm (G-24) erhältlich.

Bei der Berechnung der Ökobilanz erfolgte keine Durchschnittsbildung über verschiedene Dicken der Kunststoffabdichtungsbahn Sikaplan® G. Alle angege-benen Werte beziehen sich auf Sikaplan® G-15; eine Formel zur eigenständigen Berechnung weiterer Dicken findet sich in Kapitel 5.

## Technology and included processes
Der Herstellungsprozess der Sikaplan® G Kunststoff-abdichtungsbahn verläuft in folgenden Schritten: Dosierung der einzelnen Rohstoffe und Plastifi-zierung der Mischung in einem ExtruderAuswalzen des Plastifikats zu Kunststofffolien im Kalander-Verfahren sowie anschließendes Kühlen und Aufrollen der MembranenZusammenfügen von Ober- und Unterbahn (mit bereits am Kalander eingebettetem Polyester-gewebe) auf einer Triplieranlage durch ErhitzenZuschneiden und Aufwickeln der Kunststoff-abdichtungsbahn auf Rollenkerne aus Altpapier-kartonagePalettierung und Verpacken der Rollen mit einer Polyethylen (PE)-Stretch-Folie Das Werk Troisdorf verfügt über zertifizierte Qualitäts- und Energiemanagementsysteme nach ISO 9001 und ISO 50001. In CH-3186 Düdingen befindet sich eine weitere Pro-duktionsstätte der Kunststoffdachabdichtungsbahn Sikaplan® G. Die Dachbahnen für den deutschen Markt stammen im Normalfall aus dem Werk Troisdorf, auf das sich die Daten dieser EPD beziehen.
Deklarierte Einheit:
Diese Deklaration bezieht sich auf 1 m² Sikaplan® G Kunststoffabdichtungsbahn mit der Dicke 1,5 mm. Für andere Dicken wird eine Formel zur eigenständigen Berechnung der Werte angegeben.

## Technical purpose
Sikaplan® G Kunststoffabdichtungsbahnen dienen hauptsächlich der Abdichtung von Flachdächern. Die Dachbahnen können auf Dächern bis zu einer Dach-neigung von ≤ 20° lose verlegt und mechanisch befestigt werden.

## Scenarios
- S0: Szenario 0
- S1: 100 % material recycling
- S2: 100 % thermal energy recovery

## Reference product
- Sikaplan® G-15 (): 1

## Inputs
- Erneuerbare Primärenergie als Energieträger (PERE) [MJ]: A1-A3 11.6, A4 0.0441, A5 0.266, C1 0, C2 (S1) 0.0377, C2 (S2) 0.00538, C3 (S1) 0.784, C3 (S2) 2.04, C4 0, D (S1) -8.92, D (S2) -6.53
- Erneuerbare Primärenergie zur stofflichen Nutzung (PERM) [MJ]: A1-A3 2.47, A4 0, A5 -0.116, C1 0, C2 (S1) 0, C2 (S2) 0, C3 (S1) 0, C3 (S2) 0, C4 0, D (S1) 0, D (S2) 0
- Total erneuerbare Primärenergie (PERT) [MJ]: A1-A3 14.1, A4 0.0441, A5 0.149, C1 0, C2 (S1) 0.0377, C2 (S2) 0.00538, C3 (S1) 0.784, C3 (S2) 2.04, C4 0, D (S1) -8.92, D (S2) -6.53
- Nicht-erneuerbare Primärenergie als Energieträger (PENRE) [MJ]: A1-A3 84, A4 0.789, A5 6.37, C1 0, C2 (S1) 0.676, C2 (S2) 0.0965, C3 (S1) 41.8, C3 (S2) 49.7, C4 0, D (S1) -85, D (S2) -21.5
- Nicht-erneuerbare Primärenergie zur stofflichen Nutzung (PENRM) [MJ]: A1-A3 28.9, A4 0, A5 3.05, C1 0, C2 (S1) 0, C2 (S2) 0, C3 (S1) -40.5, C3 (S2) -40.5, C4 0, D (S1) 0, D (S2) 0
- Total nicht erneuerbare Primärenergie (PENRT) [MJ]: A1-A3 113, A4 0.789, A5 9.43, C1 0, C2 (S1) 0.676, C2 (S2) 0.0965, C3 (S1) 1.24, C3 (S2) 9.16, C4 0, D (S1) -85, D (S2) -21.5
- Einsatz von Sekundärstoffen (SM) [kg]: A1-A3 0.0711, A4 0, A5 0.00569, C1 0, C2 (S1) 0, C2 (S2) 0, C3 (S1) 0, C3 (S2) 0, C4 0, D (S1) -1.81, D (S2) 0
- Erneuerbare Sekundärbrennstoffe (RSF) [MJ]: A1-A3 0, A4 0, A5 0, C1 0, C2 (S1) 0, C2 (S2) 0, C3 (S1) 0, C3 (S2) 0, C4 0, D (S1) 0, D (S2) 0
- Nicht erneuerbare Sekundärbrennstoffe (NRSF) [MJ]: A1-A3 0, A4 0, A5 0, C1 0, C2 (S1) 0, C2 (S2) 0, C3 (S1) 0, C3 (S2) 0, C4 0, D (S1) 0, D (S2) 0
- Einsatz von Süßwasserressourcen (FW) [m^3]: A1-A3 0.0227, A4 3.93e-5, A5 0.00244, C1 0, C2 (S1) 4.31e-5, C2 (S2) 6.16e-6, C3 (S1) 0.000719, C3 (S2) 0.00997, C4 0, D (S1) -0.0136, D (S2) -0.0031

## Outputs
- Gefährlicher Abfall zur Deponie (HWD) [kg]: A1-A3 1.01e-6, A4 3.19e-11, A5 8.08e-8, C1 0, C2 (S1) 3.4e-11, C2 (S2) 4.86e-12, C3 (S1) 4.42e-10, C3 (S2) 1.63e-9, C4 0, D (S1) -1.69e-6, D (S2) -6.91e-9
- Entsorgter nicht gefährlicher Abfall (NHWD) [kg]: A1-A3 0.0559, A4 0.000125, A5 0.0642, C1 0, C2 (S1) 0.0001, C2 (S2) 1.43e-5, C3 (S1) 0.0174, C3 (S2) 3.03, C4 0, D (S1) -0.0387, D (S2) -0.0114
- Entsorgter radioaktiver Abfall (RWD) [kg]: A1-A3 0.00178, A4 7.61e-7, A5 0.000165, C1 0, C2 (S1) 8.17e-7, C2 (S2) 1.17e-7, C3 (S1) 9.74e-5, C3 (S2) 0.000269, C4 0, D (S1) -0.00155, D (S2) -0.000802
- Komponenten für die Wiederverwendung (CRU) [kg]: A1-A3 0, A4 0, A5 0, C1 0, C2 (S1) 0, C2 (S2) 0, C3 (S1) 0, C3 (S2) 0, C4 0, D (S1) 0, D (S2) 0
- Stoffe zum Recycling (MFR) [kg]: A1-A3 0, A4 0, A5 0, C1 0, C2 (S1) 0, C2 (S2) 0, C3 (S1) 1.81, C3 (S2) 0, C4 0, D (S1) 0, D (S2) 0
- Stoffe für die Energierückgewinnung (MER) [kg]: A1-A3 0, A4 0, A5 0, C1 0, C2 (S1) 0, C2 (S2) 0, C3 (S1) 0, C3 (S2) 0, C4 0, D (S1) 0, D (S2) 0
- Exportierte elektrische Energie (EEE) [MJ]: A1-A3 0, A4 0, A5 0.314, C1 0, C2 (S1) 0, C2 (S2) 0, C3 (S1) 0.134, C3 (S2) 4.99, C4 0, D (S1) 0, D (S2) 0
- Exportierte thermische Energie (EET) [MJ]: A1-A3 0, A4 0, A5 0.568, C1 0, C2 (S1) 0, C2 (S2) 0, C3 (S1) 0.251, C3 (S2) 9.09, C4 0, D (S1) 0, D (S2) 0

## Impact indicators
- Globales Erwärmungspotenzial total (GWP-total) [kg CO_(2)-Äq.]: A1-A3 4.62, A4 0.0599, A5 0.622, C1 0, C2 (S1) 0.00533, C2 (S2) 0.000762, C3 (S1) 0.262, C3 (S2) 4.95, C4 0, D (S1) -3.47, D (S2) -1.46
- Globales Erwärmungspotenzial fossil (GWP-fossil) [kg CO_(2)-Äq.]: A1-A3 4.78, A4 0.0595, A5 0.496, C1 0, C2 (S1) 0.00722, C2 (S2) 0.00103, C3 (S1) 0.258, C3 (S2) 4.95, C4 0, D (S1) -3.44, D (S2) -1.45
- Globales Erwärmungspotenzial biogen (GWP-biogenic) [kg CO_(2)-Äq.]: A1-A3 -0.222, A4 3.18e-5, A5 0.12, C1 0, C2 (S1) -0.00231, C2 (S2) -0.000329, C3 (S1) 0.00341, C3 (S2) 0.00132, C4 0, D (S1) -0.029, D (S2) -0.012
- Globales Erwärmungspotenzial luluc (GWP-luluc) [kg CO_(2)-Äq.]: A1-A3 0.0624, A4 0.000367, A5 0.00506, C1 0, C2 (S1) 0.000415, C2 (S2) 5.93e-5, C3 (S1) 0.000243, C3 (S2) 0.00111, C4 0, D (S1) -0.00447, D (S2) -0.00204
- Abbau Potential der stratosphärischen Ozonschicht (ODP) [kg CFC11-Äq.]: A1-A3 3.16e-9, A4 1.49e-17, A5 2.53e-10, C1 0, C2 (S1) 6.48e-18, C2 (S2) 9.25e-19, C3 (S1) 3.23e-15, C3 (S2) 7.92e-15, C4 0, D (S1) -2.15e-10, D (S2) -2.7e-14
- Versauerungspotenzial von Boden und Wasser (AP) [mol H^(+)-Äq.]: A1-A3 0.00767, A4 0.00015, A5 0.000692, C1 0, C2 (S1) 2.98e-5, C2 (S2) 4.26e-6, C3 (S1) 0.000217, C3 (S2) 0.00134, C4 0, D (S1) -0.00521, D (S2) -0.00154
- Eutrophierungspotenzial Süßwasser (EP-freshwater) [kg PO_(4)-Äq.]: A1-A3 3.64e-5, A4 1.18e-7, A5 2.97e-6, C1 0, C2 (S1) 1.5e-7, C2 (S2) 2.15e-8, C3 (S1) 4.03e-7, C3 (S2) 1.22e-6, C4 0, D (S1) -7.45e-6, D (S2) -3.36e-6
- Eutrophierungspotenzial Salzwasser (EP-marine) [kg N-Äq.]: A1-A3 0.00248, A4 4.14e-5, A5 0.000223, C1 0, C2 (S1) 5.7e-6, C2 (S2) 8.14e-7, C3 (S1) 7.72e-5, C3 (S2) 0.000449, C4 0, D (S1) -0.00173, D (S2) -0.000551
- Eutrophierungspotenzial Land (EP-terrestrial) [mol N-Äq.]: A1-A3 0.0262, A4 0.00047, A5 0.0024, C1 0, C2 (S1) 7.63e-5, C2 (S2) 1.09e-5, C3 (S1) 0.000837, C3 (S2) 0.00554, C4 0, D (S1) -0.019, D (S2) -0.00586
- Bildungspotential für troposphärisches Ozon (POCP) [kg NMVOC-Äq.]: A1-A3 0.013, A4 0.000115, A5 0.00111, C1 0, C2 (S1) 2.27e-5, C2 (S2) 3.25e-6, C3 (S1) 0.000191, C3 (S2) 0.0013, C4 0, D (S1) -0.00902, D (S2) -0.00144
- Potenzial für den abiotischen Abbau nicht fossiler Ressourcen (ADPE) [kg Sb-Äq.]: A1-A3 5.5e-6, A4 5.05e-9, A5 4.45e-7, C1 0, C2 (S1) 3.86e-9, C2 (S2) 5.51e-10, C3 (S1) 3.89e-8, C3 (S2) 1.13e-7, C4 0, D (S1) -6.61e-7, D (S2) -3.75e-7
- Potenzial für den abiotischen Abbau fossiler Brennstoffe (ADPF) [MJ]: A1-A3 113, A4 0.789, A5 9.43, C1 0, C2 (S1) 0.675, C2 (S2) 0.0964, C3 (S1) 1.24, C3 (S2) 9.16, C4 0, D (S1) -85, D (S2) -21.5
- Wassernutzung (WDP) [m^(3) Welt-Äq. entzogen]: A1-A3 -0.00392, A4 0.000226, A5 0.0241, C1 0, C2 (S1) 0.00044, C2 (S2) 6.29e-5, C3 (S1) 0.017, C3 (S2) 0.381, C4 0, D (S1) 0.213, D (S2) -0.0175
- Auftreten von Krankheiten aufgrund von Feinstaubemissionen (PM) [Krankheitsfälle]: A1-A3 51.5, A4 0.652, A5 4.38, C1 0, C2 (S1) 0.488, C2 (S2) 0.0697, C3 (S1) 0.481, C3 (S2) 7.5, C4 0, D (S1) -42.2, D (S2) -3.87
- Wirkung durch Exposition des Menschen mit U235 (IR) [kBq U235-Äq.]: A1-A3 1.97e-9, A4 1.29e-11, A5 1.67e-10, C1 0, C2 (S1) 9.84e-12, C2 (S2) 1.41e-12, C3 (S1) 2.01e-11, C3 (S2) 3.01e-10, C4 0, D (S1) -1.21e-9, D (S2) -2.46e-10
- Toxizitätsvergleichseinheit für Ökosysteme (ETP-fw) [CTUe]: A1-A3 1.49e-7, A4 6.35e-10, A5 1.27e-8, C1 0, C2 (S1) 5.01e-10, C2 (S2) 7.16e-11, C3 (S1) 9.28e-10, C3 (S2) 3.19e-8, C4 0, D (S1) -5.06e-8, D (S2) -1.23e-8
- Toxizitätsvergleichseinheit für Menschen (krebserregend) (HTP-c) [CTUh]: A1-A3 31.6, A4 0.237, A5 2.63, C1 0, C2 (S1) 0.232, C2 (S2) 0.0331, C3 (S1) 0.618, C3 (S2) 2.01, C4 0, D (S1) -7.53, D (S2) -5.11
- Toxizitätsvergleichseinheit für Menschen (nicht krebserregend) (HTP-nc) [CTUh]: A1-A3 0, A4 0, A5 0, C1 0, C2 (S1) 0, C2 (S2) 0, C3 (S1) 0, C3 (S2) 0, C4 0, D (S1) 0, D (S2) 0
- Bodenqualitätsindex (SQP) [SQP]: A1-A3 0, A4 0, A5 0, C1 0, C2 (S1) 0, C2 (S2) 0, C3 (S1) 0, C3 (S2) 0, C4 0, D (S1) 0, D (S2) 0

## Use advice
Gültigkeitsbereich:
Dieses Dokument bezieht sich auf die von der Sika Trocal GmbH in D-53840 Troisdorf hergestellten Sikaplan® G Kunststoffabdichtungsbahnen in den Dicken 1,5, 1,8, 2,0 und 2,4 mm.

Die EPD umfasst die Produktion der Dachbahn, den Transport des Produkts zur Baustelle, die Installation der Dachbahn, die Entsorgung sowie Potenziale und Lasten außerhalb der Systemgrenze. Das Modell wurde auf Basis der Produktionsdaten aus dem Jahr 2020 von der Sika Technology AG für die Dicke 1,5 mm modelliert.
Systemgrenze:
Typ der EPD: Wiege bis Werkstor - mit Optionen

Die Systemgrenze der EPD folgt dem modularen Auf-bau gemäß EN 15804. In der Ökobilanz werden die folgenden Module berücksichtigt:

A1-A3: Gewinnung, Verarbeitung und Transport von Rohstoffen (u.a. Polymere, Pigmente, Verar-beitungshilfsmittel, Stabilisatoren, Füllstoffe, Flammschutzmittel und Trägermaterialien), die für die Herstellung der Vorprodukte und der Dach-bahnen verwendet werden, sowie der Verpack-ungsmaterialien, die zum Verpacken der Dach-bahnen verwendet werden, wie z. B. Holzpaletten, Karton und PE-Folie, zum Werk. Abfallverarbeitung von Produktionsabfällen (Rand-beschnitt), die bei der Herstellung der Dachbah-nen anfallen. A4: Transport der Kunststoffabdichtungsbahnen zur Baustelle A5: Einbau der Kunststoffabdichtungsbahnen ins Gebäude mittels Heißluftschweißen (inkl. Schweißenergie und Wasserverbrauch), Entsor-gung bzw. stoffliches Recycling von Verpackung und Verschnitt der Dachbahn C1: Manueller Rückbau der Dachabdichtung C2: Transport der rückgebauten Abdichtungs-bahnen zur Abfallbewirtschaftung C3: Abfallverarbeitung der rückgebauten Abdichtungsbahnen über stoffliches Recycling (Szenario 1 - C3/1) oder thermische Verwertung (Szenario 2 - C3/2) C4: Abfallentsorgung der rückgebauten Abdich-tungsbahnen auf Deponien D: Wiederverwendungs-, Rückgewinnungs- und Recyclingpotenziale (aus der thermischen Verwer-tung und dem stofflichen Recycling der Kunststoff-abdichtungsbahnen sowie der Wiederverwendung der Holzpaletten)

## Data sources
- GaBi Database (all versions)
- GaBi database SP40 2020
