# Korkplatten 1m2, 4 mm (generisch); 1,8 kg/m2

Dataset: ILCD process, EPD, generic dataset
Geography: DE
Reference year: 2021
Valid until: 2022
Classification: oekobau.dat: Holz / Holzböden / Kork
Owner: Sphera Solutions GmbH
Compliance: EN 15804+A2
Review: Dependent internal review by Sphera Solutions GmbH; Independent external review by GaBi user forum
Amounts: rows without a unit in brackets have none in this file; such an amount is in the reference unit of its flow, which a separate flow dataset defines
copyright: true
licenseType: Free of charge for all users and uses
accessRestrictions: The license conditions as stated on https://www.oekobaudat.de/ apply.
accessRestrictions: Es gelten die Lizenzbedingungen wie sie auf https://www.oekobaudat.de/ genannt sind.

## General comment
Dieser Datensatz wurde nach dem European Standard EN 15804+A2 für Nachhaltiges Bauen modelliert. Ergebnisse werden in Modulen abgebildet, die den strukturierten Ausdruck von Ergebnissen über den gesamten Lebenszyklus zulassen.

## Geography
Der Datensatz bildet die länderspezifische Situation in Deutschland ab. Dabei werden Haupttechnologien, spezifische regionale Charakteristiken und ggf. Importstatistiken berücksichtigt.

## Time period
Jährlicher Durchschnitt

## Technology and included processes
Die Lebenszyklusanalyse von Korkplatten umfasst die Lebenswegabschnitte "cradle to gate", d. h. insbesondere die Herstellung der Rezepturkomponenten sowie deren Verpressen. Hauptbestandteil ist hierbei Korkmehl, welches aus Portugal importiert wird. Bei der Herstellung des Korkmehls sind die forstliche Produktion, das Waschen/Kochen, Trocknen und Mahlen berücksichtigt. Es wird davon ausgegangen, dass die Herstellung der Korkplatten analog zur Spanplattenherstellung erfolgt. Menge (6%). Die Art des Bindemittels (Melaminharz und Phenol-Formaldehydharz) wurden geschätzt. Die Systemgrenze bildet das fertige Produkt am Werkstor. Transporte vom Werk zur Baustelle sind nicht berücksichtigt und müssen bei Systembetrachtungen eingerechnet werden.

In Modul C1 wird ein manueller Rückbau (lastenfrei) angenommen. Sammelverluste werden vernachlässigt.
Der Transport in Modul C2 zur Verwertungsanlage erfolgt mit einem LKW (50km).
In Modul C3 wird die Zerkleinerung und thermische Behandlung (Verbrennung) des Materials berücksichtigt. Es wird angenommen, dass das Material das Ende der Abfalleigenschaft direkt nach der Zerkleinerung erreicht. Das im Material durch Photosynthese aufgenommene und gespeicherte CO2 (aus Modul A1) wird in C3 ausgebucht (CO2 Neutralität innerhalb des Produktsystems gemäß EN 16485: Round and sawn timber - Environmental Product Declarations - Product category rules for wood and wood-based products for use in construction, 2014),
Modul D enthält die Lasten durch den Betrieb der Verwertungsanlage (exkl. biogenes CO2, siehe oben) sowie Gutschriften für die Substitution von Strom (deutscher Strommix) und thermischer Energie (aus Erdgas). Bei der Berechnung der Verbrennungsemissionen und Gutschriften wird der spezifische Heizwert des jeweiligen Materials sowie die Materialzusammensetzung berücksichtigt.

## Technical purpose
Dieses Produkt kann im Baubereich verwendet werden.

## Safety margin
20 %. Produktsystem bis auf wenige Prozesse/Flüsse abgebildet. Technologische, zeitliche und geographische Repräsentativität teilweise gegeben.

## Reference product
- Korkplatten 1m2, 4 mm (generisch): 1

## Inputs
- Erneuerbare Primärenergie als Energieträger (PERE) [MJ]: A1-A3 0.473813, C2 0.0039351, C3 36.9769, D -3.88669
- Erneuerbare Primärenergie zur stofflichen Nutzung (PERM) [MJ]: A1-A3 30.6, C2 0, C3 -30.6, D 0
- Total erneuerbare Primärenergie (PERT) [MJ]: A1-A3 31.0738, C2 0.0039351, C3 6.37687, D -3.88669
- Nicht-erneuerbare Primärenergie als Energieträger (PENRE) [MJ]: A1-A3 14.2897, C2 0.0678018, C3 2.56142, D -11.3145
- Nicht-erneuerbare Primärenergie zur stofflichen Nutzung (PENRM) [MJ]: A1-A3 1.08, C2 0, C3 -1.08, D 0
- Total nicht-erneuerbare Primärenergie (PENRT) [MJ]: A1-A3 15.3697, C2 0.0678018, C3 1.48142, D -11.3145
- Einsatz von Sekundärstoffen (SM) [kg]: A1-A3 0, C2 0, C3 0, D 0
- Erneuerbare Sekundärbrennstoffe (SF) [MJ]: A1-A3 0, C2 0, C3 0, D 0
- Nicht erneuerbare Sekundärbrennstoffe (NRSF) [MJ]: A1-A3 0, C2 0, C3 0, D 0
- Nettoeinsatz von Süßwasserressourcen (FW) [m3]: A1-A3 0.00270571, C2 3.49732e-6, C3 0.00883662, D -0.00144541

## Outputs
- Gefährlicher Abfall zur Deponie (HWD) [kg]: A1-A3 5.98524e-9, C2 2.8339e-12, C3 3.06736e-10, D -3.9395e-9
- Entsorgter nicht gefährlicher Abfall (NHWD) [kg]: A1-A3 0.0136935, C2 1.09448e-5, C3 0.0263144, D -0.0060063
- Entsorgter radioaktiver Abfall (RWD) [kg]: A1-A3 0.000245319, C2 6.50647e-8, C3 3.1536e-5, D -0.00041802
- Komponenten für die Wiederverwendung (CRU) [kg]: A1-A3 0, C2 0, C3 0, D 0
- Stoffe zum Recycling (MFR) [kg]: A1-A3 0, C2 0, C3 0, D 0
- Stoffe für die Energierückgewinnung (MER) [kg]: A1-A3 0, C2 0, C3 0, D 0
- Exportierte elektrische Energie (EEE) [MJ]: A1-A3 0, C2 0, C3 3.11394, D 0
- Exportierte thermische Energie (EET) [MJ]: A1-A3 0, C2 0, C3 6.96649, D 0

## Impact indicators
- Globales Erwärmungspotenzial - total (GWP-total) [kg CO2 eq.]: A1-A3 -2.86445, C2 0.00515009, C3 3.96226, D -0.729422
- Globales Erwärmungspotenzial - fossil (GWP-fossil) [kg CO2 eq.]: A1-A3 0.915463, C2 0.00511512, C3 0.088693, D -0.720517
- Globales Erwärmungspotenzial - biogen (GWP-biogenic) [kg CO2 eq.]: A1-A3 -3.7835, C2 2.11888e-6, C3 3.87348, D -0.00783139
- Globales Erwärmungspotenzial - luluc (GWP-luluc) [kg CO2 eq.]: A1-A3 0.00359137, C2 3.28507e-5, C3 8.50587e-5, D -0.00107331
- Abbaupotenzial der stratosphärischen Ozonschicht (ODP) [kg CFC-11 eq.]: A1-A3 2.80131e-15, C2 1.30883e-18, C3 1.05526e-15, D -1.69687e-14
- Versauerungspotenzial, kumulierte Überschreitung (AP) [Mole of H+ eq.]: A1-A3 0.00398641, C2 1.45025e-5, C3 0.00212452, D -0.000743452
- Eutrophierungspotenzial - Süßwasser (EP-freshwater) [kg P eq.]: A1-A3 8.00297e-6, C2 1.05198e-8, C3 1.51412e-7, D -1.78547e-6
- Eutrophierungspotenzial - Salzwasser (EP-marine) [kg N eq.]: A1-A3 0.0020405, C2 6.68101e-6, C3 0.000952541, D -0.00027286
- Eutrophierungspotenzial - Land (EP-terrestrial) [Mole of N eq.]: A1-A3 0.0206497, C2 7.47484e-5, C3 0.0115784, D -0.00290576
- Bildungspotenzial für troposphärisches Ozon (POCP) [kg NMVOC eq.]: A1-A3 0.00381352, C2 1.30281e-5, C3 0.00243661, D -0.000713931
- Potenzial für die Verknappung abiotischer Ressourcen nicht fossile Ressourcen (ADPE) [kg Sb eq.]: A1-A3 1.08487e-7, C2 4.44944e-10, C3 1.58872e-8, D -2.28439e-7
- Potenzial für die Verknappung abiotischer Ressourcen fossile Brennstoffe (ADPF) [MJ]: A1-A3 15.5778, C2 0.067799, C3 1.26515, D -11.3129
- Wasser-Entzugspotenzial (Benutzer) (WDP) [m³ world equiv.]: A1-A3 0.366261, C2 1.98842e-5, C3 0.374234, D -0.00877249

## Use advice
Der Datensatz repräsentiert ein Cradle to Gate Inventar. Er kann verwendet werden, um die Lieferkette des jeweiligen Produktes in einer repräsentativen Weise zu charakterisieren. Die Kombination mit einzelnen Einheitenprozessen und diesem Produkt ermöglicht die Erstellung von anwenderspezifischen (Produkt-) LCAs.

## Data sources
- ULLMANN'S Encyclopedia of Industrial Chemistry
- Documentation of data quality management
- GaBi Database Edition 2021, CUP2021.01
- GaBi database (all versions)
