# Glas - AGC Glass Europe - Pyrobel 16

Dataset: ILCD process, EPD, specific dataset
Geography: BE
Reference year: 2018
Valid until: 2026
Classification: OEKOBAU.DAT: Komponenten von Fenstern und Vorhangfassaden / Füllungen / Transparente Füllungen
Synonyms: PYROBEL; PYROBELite; Brandschutzglas
Method details: EPD PYROBEL und PYROBELite (2021); Produktkategorieregeln Teil A; Produktkategorieregeln Teil B – für Flachglas im Bauwesen
Owner: AGC Glass Europe
Compliance: EN 15804
Review: Independent external review by Patrick Wortner
Amounts: rows without a unit in brackets have none in this file; such an amount is in the reference unit of its flow, which a separate flow dataset defines
copyright: true

## General comment
A1-A3 sowie Module A4, A5, C2, C3, C4, D. Das Umweltprofil beinhaltet die Aufwendungen für die Lebenszyklus-Stadien cradle to gate mit Optionen (Modul A1-A3). Die Herstellung der Verpackung wurde innerhalb der Module A1-A3 berücksichtigt.

## Geography
Dieser Datensatz repräsentiert die Situation des Unternehmens AGC Glass Europe in BE-7180 Seneffe, im Hinblick auf die wichtigsten Technologien und die gesetzlichen Rahmenbedingungen.

## Time period
jährlicher Durchschnitt

## Technology and included processes
Die Ökobilanzergebnisse umfassen die Lebenszyklusstadien der Herstellung der Vorprodukte bis hin zur Rohstoffgewinnung und Verarbeitungsprozesse von als Input dienenden Sekundärstoffen (z.B. Recyclingprozesse), deren Transporte zum Werk sowie die Produktion selbst, einschließlich der Bereitstellung von allen Hilfs- und Betriebsstoffen, Energie, sowie die vollständige Abfallbehandlung oder die Deponierung der Restabfälle während des Stadiums der Produktion. Die Module A1, A2 und A3 sind hier als ein aggregiertes Modul A1-A3 ausgewiesen. Falls für diesen Datensatz weitere Module berechnet wurden, sind diese separat zu finden und können für eine Betrachtung des gesamten Lebenszyklus zusammengeführt werden.

## Technical purpose
Brandschutzglas kann entweder als Bestandteil einer Außenverglasung oder als innere Raumteilung verwendet werden.

## Reference product
- Glas - AGC Glass Europe - Pyrobel 16: 1

## Inputs
- Frischwasserverbrauch (FW) [m3]: A1-A3 0.169, A4 0.00238, A5 0.00153, C2 0.000141, C3 0, C4 0.00209, D 0.00365
- Nicht-erneuerbare Primärenergie als Energieträger (PENRE) [MJ]: A1-A3 910, A4 36.6, A5 0.81, C2 2.17, C3 0, C4 8.28, D 18.8
- Nicht-erneuerbare Primärenergie zur stofflichen Nutzung (PENRM) [MJ]: A1-A3 0.0221, A4 0, A5 -0.0221, C2 0, C3 0, C4 0, D 0
- Verbrauch nicht erneuerbarer Sekundärbrennstoffe (NRSF) [MJ]: A1-A3 0, A4 0, A5 0, C2 0, C3 0, C4 0, D 0
- Erneuerbare Primärenergie als Energieträger (PERE) [MJ]: A1-A3 119, A4 2.06, A5 0.288, C2 0.122, C3 0, C4 1.08, D -4.29
- Erneuerbare Primärenergie zur stofflichen Nutzung (PERM) [MJ]: A1-A3 9.79, A4 0, A5 -9.79, C2 0, C3 0, C4 0, D 0
- Erneuerbare Sekundärbrennstoffe (RSF) [MJ]: A1-A3 0, A4 0, A5 0, C2 0, C3 0, C4 0, D 0
- Einsatz von Sekundärstoffen (SM) [kg]: A1-A3 3.24, A4 0, A5 0, C2 0, C3 0, C4 0, D 0
- Total nicht erneuerbare Primärenergie (PENRT) [MJ]: A1-A3 910, A4 36.6, A5 0.787, C2 2.17, C3 0, C4 8.28, D 18.8
- Gesamtverbrauch von erneuerbarer Primärenergie (PERT) [MJ]: A1-A3 129, A4 2.06, A5 -9.5, C2 0.122, C3 0, C4 1.08, D -4.29

## Outputs
- Komponenten für die Wiederverwendung (CRU) [kg]: A1-A3 0, A4 0, A5 0, C2 0, C3 0, C4 0, D 0
- Exportierte elektrische Energie (EEE) [MJ]: A1-A3 0.176, A4 0, A5 0.742, C2 0, C3 0, C4 0, D 0
- Exportierte thermische Energie (EET) [MJ]: A1-A3 0.395, A4 0, A5 1.29, C2 0, C3 0, C4 0, D 0
- Gefährlicher Abfall zur Beseitigung (HWD) [kg]: A1-A3 2.09e-6, A4 1.7e-6, A5 4.02e-9, C2 1.01e-7, C3 0, C4 1.26e-7, D 3.63e-8
- Stoff für die Energierückgewinnung (MER) [kg]: A1-A3 0, A4 0, A5 0, C2 0, C3 0, C4 0, D 0
- Stoffe zum Recycling (MFR) [kg]: A1-A3 2.42, A4 0, A5 0.353, C2 0, C3 0, C4 0, D 0
- Ungefährlicher Abfall zur Beseitigung (NHWD) [kg]: A1-A3 1.26, A4 0.0056, A5 0.0263, C2 0.000332, C3 0, C4 41.6, D 0.0698
- Entsorgter radioaktiver Abfall (RWD) [kg]: A1-A3 0.0403, A4 4.53e-5, A5 9.58e-5, C2 2.69e-6, C3 0, C4 9.41e-5, D -0.00015

## Impact indicators
- Potenzial für den abiotischen Abbau nicht fossiler Ressourcen (ADPE) / Potencial de agotamiento de recursos abióticos para recursos no fósiles (ADPE) [kg Sb eq.]: A1-A3 4.65e-5, A4 1.97e-7, A5 1.19e-8, C2 1.17e-8, C3 0, C4 5.72e-8, D 1.59e-7
- Potenzial für den abiotischen Abbau fossiler Brennstoffe (ADPF) / Potencial de agotamiento de recursos abióticos para recursos fósiles (ADPF) [MJ]: A1-A3 775, A4 36.4, A5 0.565, C2 2.16, C3 0, C4 8.03, D 16.3
- Versauerungspotenzial von Boden und Wasser (AP) / Potencial de acidificación del suelo y de los recursos de agua (AP) [kg SO2 eq.]: A1-A3 0.209, A4 0.00613, A5 0.000151, C2 0.000915, C3 0, C4 0.00361, D 0.00367
- Eutrophierungspotenzial (EP) / Potencial de eutrofización (EP) [kg (PO4)3- eq.]: A1-A3 0.0322, A4 0.00145, A5 3.23e-5, C2 0.000231, C3 0, C4 0.000405, D 0.00071
- Globales Erwärmungspotenzial (GWP) / Potencial de calentamiento global (GWP) [kg CO2 eq.]: A1-A3 60.5, A4 2.7, A5 0.595, C2 0.158, C3 0, C4 0.567, D 2.24
- Abbau Potential der stratosphärischen Ozonschicht (ODP) / Potencial de agotamiento de la capa de ozono estratosférico (ODP) [kg CFC 11 eq.]: A1-A3 4.2e-8, A4 4.4e-16, A5 1.07e-15, C2 2.61e-17, C3 0, C4 3.12e-15, D 2.67e-9
- Bildungspotential für troposphärisches Ozon (POCP) / Potencial de formación de ozono troposférico (POCP) [kg C2H2 eq.]: A1-A3 0.0132, A4 -0.00212, A5 8.55e-6, C2 -0.000413, C3 0, C4 0.000273, D 0.000285

## Use advice
Dieser Datensatz beinhaltet die Ergebnisse für die Module A1-A3 sowie die Module A4, A5, C2, C3, C4, D gemäß EN 15804.
Ein Vergleich mit anderen Produkten ist nur mit einer vergleichbaren Anwendung im Gebäude zulässig. Grundsätzlich ist eine Gegenüberstellung oder die Bewertung von EPD Daten nur möglich, wenn alle zu vergleichenden Datensätze nach EN 15804 erstellt wurden und der Gebäudekontext, bzw. die produktspezifischen Leistungsmerkmale berücksichtigt werden.

## Review details
Die angewendete LCI Methode ist in Übereinstimmung mit ISO 14040 und 14044. Die Dokumentation enthält alle relevanten Informationen im Hinblick auf die Datenqualität und den Umfang der Anwendung der jeweiligen LCI Ergebnisse bzw. der Datensätze. Der Datensatz repräsentiert den Stand der Technik bezogen auf die funktionelle Einheit.

## Data sources
- GaBi database (general)
