# Mauerziegel (ungefüllt)

Dataset: ILCD process, EPD, average dataset
Geography: DE
Reference year: 2021
Valid until: 2026
Classification: OEKOBAU.DAT: Mineralische Baustoffe / Steine und Elemente / Ziegel
Classification: IBUCategories: 02 Bauprodukte / Mauerwerk und Mörtel / Ziegel
Method details: Ziegel.pdf
Generated by: Life Cycle Engineering Experts GmbH
Registration number: EPD-BDZ-20210066-ICG1-DE
Owner: Bundesverband der Deutschen Ziegelindustrie e.V.
Compliance: DIN EN 15804+A2; ISO 14025
Review: Accredited third party review by Institut Bauen und Umwelt e. V.
Amounts: rows without a unit in brackets have none in this file; such an amount is in the reference unit of its flow, which a separate flow dataset defines
copyright: true
licenseType: Free of charge for all users and uses
accessRestrictions: None

## General comment
Mauerziegel sind Bauprodukte aus gebranntem Ton. Es wird unterschieden in Hochlochziegel und Formteile für tragendes und nichttragendes Mauerwerk und Mauertafeln (Ziegelelemente als Montageteile) jeweils für Außen- und Innenwände von Gebäuden. Es werden Ziegel für geschütztes und ungeschütztes Mauerwerk in dieser EPD behandelt, siehe auch die Rohdichtespanne von 550–2000 kg/m³. Bei hochwärmedämmenden Ziegeln werden Porosierungsmittel in der Produktion zugegeben. Mauerziegel können zusätzlich mit verschiedenen Dämmstoffen verfüllt werden. Diese Ziegel werden in einer eigenen EPD behandelt. Grundlage der Ökobilanzergebnisse in dieser EPD ist eine Durchschnittsbildung aller deutschen Werke, die als gewichteter Mittelwert bezogen auf den Anteil der einzelnen Produktionsstätten an der Gesamtjahresproduktion erfolgte. Als repräsentatives Produkt wurde ein Ziegel mit einer Rohdichte von 575 kg/m³ ausgewählt.

## Technology and included processes
Nach dem Tonabbau im Tagebau erfolgt der Transport zur Zwischenlagerung auf dem Werksgelände. Die mechanische Aufbereitung der Tone, wie das Zerkleinern und Mischen, geschieht im Kollergang und den Walzwerken. Die o. g. Grundstoffe werden in bestimmten optimierten Verhältnissen zerkleinert (aufbereitet) gemischt und befeuchtet. Es folgt eine Lagerung im Sumpfhaus. Die Zugabeder Porosierungsmittel erfolgt vor oder nach der Lagerung im Sumpfhaus. Nach Durchlaufen des Feinwalzwerkes und erneuter Wasserzugabe erfolgt die Formgebung der Rohlinge durch Strangpressen mit entsprechenden Mundstücken und nachgeschaltetem Abschneider. Das so geformte Material kommt in den Trockner, der im Wesentlichen mit der Abwärme des Tunnelofens betrieben wird. Die Trocknungszeit variiert je nach Format und Rohdichte und beträgt in der Regel 24 Stunden. Danach werden die getrockneten Rohlinge bei ca. 1000 °C innerhalb von bis zu maximal 24 Stunden im Tunnelofen gebrannt. Die Verbrennung der Porosierungsstoffe bewirkt eine Feinporosierung. Zur Herstellung von Planziegeln werden die Ziegel plangeschliffen. Die Ziegel werden gestapelt, in recyclebare PE-Folie eingeschweißt oder mit Polyester- oder Stahlbändern umreift. Der Energiebedarf für die Ziegelherstellung betrifft hauptsächlich den Brennvorgang und das Trocknen. Die elektrische Energie wird hauptsächlich in der Aufbereitung verbraucht.
Deklarierte Einheit:
Die Deklaration bezieht sich auf einen Kubikmeter Mauerziegel mit einer Rohdichte von 575 kg/m3 (Mittelwert der Rohdichtklasse 600 kg/m3). Grundlage der Ökobilanzergebnisse in dieser EPD ist eine Durchschnittsbildung aller deutschen Werke, die als gewichteter Mittelwert bezogen auf den Anteil der einzelnen Produktionsstätten an der Gesamtjahresproduktion erfolgte.

## Technical purpose
Je nach Konstruktion der Wände finden Mauerziegel verschiedener Formen Anwendung für massive Bauteile wie Kellerwände, Außenwände, tragende und nicht tragende Innenwände.

## Scenarios
- S1: 1

## Reference product
- Mauerziegel (575 kg/m³): 1

## Inputs
- Erneuerbare Primärenergie als Energieträger (PERE) [MJ]: A1-A3 215, A4 3.19, A5 0.0559, C1 0.271, C2 0.725, C3 2.28, C4 1.7, D (S0) -5.45, D (S1) -3.78
- Erneuerbare Primärenergie zur stofflichen Nutzung (PERM) [MJ]: A1-A3 0, A4 0, A5 0, C1 0, C2 0, C3 0, C4 0, D (S0) 0, D (S1) 0
- Total erneuerbare Primärenergie (PERT) [MJ]: A1-A3 215, A4 3.19, A5 0.0559, C1 0.271, C2 0.725, C3 2.28, C4 1.7, D (S0) -5.45, D (S1) -3.78
- Nicht-erneuerbare Primärenergie als Energieträger (PENRE) [MJ]: A1-A3 1180, A4 54.8, A5 0.292, C1 4.66, C2 12.5, C3 27.1, C4 12.9, D (S0) -19.1, D (S1) -15.1
- Nicht-erneuerbare Primärenergie zur stofflichen Nutzung (PENRM) [MJ]: A1-A3 0, A4 0, A5 0, C1 0, C2 0, C3 0, C4 0, D (S0) 0, D (S1) 0
- Total nicht erneuerbare Primärenergie (PENRT) [MJ]: A1-A3 1180, A4 54.8, A5 0.292, C1 4.66, C2 12.5, C3 27.1, C4 12.9, D (S0) -19.1, D (S1) -15.1
- Einsatz von Sekundärstoffen (SM) [kg]: A1-A3 142, A4 0, A5 0, C1 0, C2 0, C3 539, C4 0, D (S0) 0, D (S1) 0
- Erneuerbare Sekundärbrennstoffe (RSF) [MJ]: A1-A3 0, A4 0, A5 0, C1 0, C2 0, C3 0, C4 0, D (S0) 0, D (S1) 0
- Nicht erneuerbare Sekundärbrennstoffe (NRSF) [MJ]: A1-A3 0, A4 0, A5 0, C1 0, C2 0, C3 0, C4 0, D (S0) 0, D (S1) 0
- Einsatz von Süßwasserressourcen (FW) [m^3]: A1-A3 0.171, A4 0.00286, A5 0.00405, C1 0.000243, C2 0.00065, C3 0.00709, C4 0.00326, D (S0) 0.00354, D (S1) 0.00206

## Outputs
- Gefährlicher Abfall zur Deponie (HWD) [kg]: A1-A3 1.47e-6, A4 2.05e-6, A5 2.28e-10, C1 1.74e-7, C2 4.66e-7, C3 5.7e-7, C4 1.08e-7, D (S0) -3.6e-7, D (S1) -7.95e-9
- Entsorgter nicht gefährlicher Abfall (NHWD) [kg]: A1-A3 1.71, A4 0.00962, A5 0.00761, C1 0.000818, C2 0.00219, C3 0.00815, C4 35.7, D (S0) -11.2, D (S1) -0.00712
- Entsorgter radioaktiver Abfall (RWD) [kg]: A1-A3 0.0171, A4 5.77e-5, A5 8.1e-6, C1 4.91e-6, C2 1.31e-5, C3 0.000217, C4 7.96e-5, D (S0) -0.000712, D (S1) -0.000548
- Komponenten für die Wiederverwendung (CRU) [kg]: A1-A3 0, A4 0, A5 0, C1 0, C2 0, C3 0, C4 0, D (S0) 0, D (S1) 0
- Stoffe zum Recycling (MFR) [kg]: A1-A3 0, A4 0, A5 0, C1 0, C2 0, C3 539, C4 0, D (S0) 0, D (S1) 0
- Stoffe für die Energierückgewinnung (MER) [kg]: A1-A3 0, A4 0, A5 0, C1 0, C2 0, C3 0, C4 0, D (S0) 0, D (S1) 0
- Exportierte elektrische Energie (EEE) [MJ]: A1-A3 0, A4 0, A5 3.42, C1 0, C2 0, C3 0, C4 0, D (S0) 0, D (S1) 0
- Exportierte thermische Energie (EET) [MJ]: A1-A3 0, A4 0, A5 7.88, C1 0, C2 0, C3 0, C4 0, D (S0) 0, D (S1) 0

## Impact indicators
- Globales Erwärmungspotenzial total (GWP-total) [kg CO_(2)-Äq.]: A1-A3 113, A4 4.15, A5 0.824, C1 0.352, C2 0.942, C3 -10.1, C4 0.5, D (S0) -1.46, D (S1) -1.06
- Globales Erwärmungspotenzial fossil (GWP-fossil) [kg CO_(2)-Äq.]: A1-A3 112.8, A4 4.13, A5 0.83, C1 0.366, C2 0.938, C3 1.44, C4 0.541, D (S0) -1.45, D (S1) -1.05
- Globales Erwärmungspotenzial biogen (GWP-biogenic) [kg CO_(2)-Äq.]: A1-A3 0.18, A4 0.00166, A5 -0.0039, C1 -0.0156, C2 0.000377, C3 -11.5, C4 -0.0429, D (S0) -0.00909, D (S1) -0.00439
- Globales Erwärmungspotenzial luluc (GWP-luluc) [kg CO_(2)-Äq.]: A1-A3 0.0518, A4 0.0173, A5 -0.00132, C1 0.00147, C2 0.00392, C3 0.00529, C4 0.00156, D (S0) -0.00484, D (S1) -0.00135
- Abbau Potential der stratosphärischen Ozonschicht (ODP) [kg CFC11-Äq.]: A1-A3 4.91e-13, A4 1.01e-15, A5 -1.59e-14, C1 8.61e-17, C2 2.3e-16, C3 6.11e-15, C4 2.03e-15, D (S0) -2.07e-14, D (S1) -1.61e-14
- Versauerungspotenzial von Boden und Wasser (AP) [mol H^(+)-Äq.]: A1-A3 0.0924, A4 0.00383, A5 -0.000866, C1 0.00173, C2 0.000871, C3 0.0135, C4 0.00388, D (S0) -0.00461, D (S1) -0.00116
- Eutrophierungspotenzial Süßwasser (EP-freshwater) [kg PO_(4)-Äq.]: A1-A3 9.27e-5, A4 8.99e-6, A5 -2.17e-6, C1 7.64e-7, C2 2.04e-6, C3 3.43e-6, C4 9.32e-7, D (S0) -4.41e-6, D (S1) -2.2e-6
- Eutrophierungspotenzial Salzwasser (EP-marine) [kg N-Äq.]: A1-A3 0.0269, A4 0.00119, A5 -0.000329, C1 0.000816, C2 0.000271, C3 0.00664, C4 0.000999, D (S0) -0.00175, D (S1) -0.000375
- Eutrophierungspotenzial Land (EP-terrestrial) [mol N-Äq.]: A1-A3 0.341, A4 0.0145, A5 -0.00265, C1 0.00904, C2 0.00329, C3 0.073, C4 0.011, D (S0) -0.0192, D (S1) -0.004
- Bildungspotential für troposphärisches Ozon (POCP) [kg NMVOC-Äq.]: A1-A3 0.0765, A4 0.00315, A5 -0.000881, C1 0.00228, C2 0.000717, C3 0.0193, C4 0.00302, D (S0) -0.00414, D (S1) -0.00101
- Potenzial für den abiotischen Abbau nicht fossiler Ressourcen (ADPE) [kg Sb-Äq.]: A1-A3 9.9e-6, A4 3.43e-7, A5 -2.25e-7, C1 2.92e-8, C2 7.79e-8, C3 1.58e-6, C4 4.88e-8, D (S0) -3.14e-7, D (S1) -2.28e-7
- Potenzial für den abiotischen Abbau fossiler Brennstoffe (ADPF) [MJ]: A1-A3 1150, A4 54.8, A5 -14.9, C1 4.66, C2 12.5, C3 27.1, C4 6.9, D (S0) -19.1, D (S1) -15.1
- Wassernutzung (WDP) [m^(3) Welt-Äq. entzogen]: A1-A3 2.37, A4 0.0178, A5 0.161, C1 0.00151, C2 0.00404, C3 0.242, C4 0.0565, D (S0) -0.0355, D (S1) -0.012
- Auftreten von Krankheiten aufgrund von Feinstaubemissionen (PM) [Krankheitsfälle]
- Wirkung durch Exposition des Menschen mit U235 (IR) [kBq U235-Äq.]
- Toxizitätsvergleichseinheit für Ökosysteme (ETP-fw) [CTUe]
- Toxizitätsvergleichseinheit für Menschen (krebserregend) (HTP-c) [CTUh]
- Toxizitätsvergleichseinheit für Menschen (nicht krebserregend) (HTP-nc) [CTUh]
- Bodenqualitätsindex (SQP) [SQP]

## Use advice
Gültigkeitsbereich:
Die Anwendung dieses Dokumentes ist auf Mauerziegel beschränkt, die von Mitgliedsunternehmen des Bundesverbands der Deutschen Ziegelindustrie e.V. in Deutschland hergestellt werden. Für diese Deklaration wurden von 20 Mitgliedsunternehmen Daten aus dem Jahr 2019 zur Verfügung gestellt. Diese Mitglieder repräsentieren nach Anzahl 90 % der im Bundesverband zusammengeschlossenen Hersteller von Mauerziegeln. Das Produktionsvolumen dieser Firmen liegt - nach Produktionsmenge - bei etwa 90 % des deutschen Marktes.
Systemgrenze:
Typ der EPD: Wiege bis zum Werkstor – mit Optionen. Die Ökobilanz berücksichtigt die Rohstoffgewinnung, die Rohstofftransporte und die eigentliche Produktherstellung inklusive der Verpackungsmaterialien (Module A1–A3). Der Transport zur Baustelle (Modul A4) sowie die Behandlung der Verpackungsmaterialien in Müllverbrennungsanlagen nach dem Einbau des Produktes (Modul A5) sind ebenfalls Teil der Systemgrenzen. Nach Ablauf der Nutzungsdauer wird das Produkt rückgebaut (Modul C1). Nach dem Transport des rückgebauten Produktes (Modul C2) ist für rund 6 % der Ziegel eine Deponierung auf einer Inertstoffdeponie vorgesehen (Modul C4), 94 % können weiterverwertet werden. Gutschriften infolge des Recyclings von Ziegelbruch sind in Modul D deklariert. Gutschriften für Strom und thermische Energie infolge der thermischen Verwertung der Verpackung innerhalb des Moduls A5 werden ebenfalls in Modul D berücksichtigt.

## Data sources
- GaBi Database (all versions)
- GaBi database SP39 2019
