# Phenolharz Hartschaum

Dataset: ILCD process, EPD, generic dataset
Geography: DE
Reference year: 2021
Valid until: 2022
Classification: oekobau.dat: Dämmstoffe / Phenolharz-Hartschaum (PF) / PF-Platten
Owner: Sphera Solutions GmbH
Compliance: EN 15804+A2
Review: Dependent internal review by Sphera Solutions GmbH; Independent external review by GaBi user forum
Amounts: rows without a unit in brackets have none in this file; such an amount is in the reference unit of its flow, which a separate flow dataset defines
copyright: true
licenseType: Free of charge for all users and uses
accessRestrictions: The license conditions as stated on https://www.oekobaudat.de/ apply.
accessRestrictions: Es gelten die Lizenzbedingungen wie sie auf https://www.oekobaudat.de/ genannt sind.

## General comment
Dieser Datensatz wurde nach dem European Standard EN 15804+A2 für Nachhaltiges Bauen modelliert. Ergebnisse werden in Modulen abgebildet, die den strukturierten Ausdruck von Ergebnissen über den gesamten Lebenszyklus zulassen.

## Geography
Der Datensatz bildet die länderspezifische Situation in Deutschland ab. Dabei werden Haupttechnologien, spezifische regionale Charakteristiken und ggf. Importstatistiken berücksichtigt.

## Time period
Jährlicher Durchschnitt

## Technology and included processes
Phenolharz Hartschaum Platten werden in einem Aufschäumprozess unter Verwendung von thermischer und elektrischer Energie hergestellt. Anschließend findet die Formatierung statt. Die Vorkette der verschiedenen Harzmischungen dominiert dabei die Ökobilanz. Eine Kaschierung wurde aufgrund der untergeordneten ökobilanziellen Relevanz nicht berücksichtigt.

In Modul C1 wird ein manueller Rückbau (lastenfrei) angenommen. Sammelverluste werden vernachlässigt.
Der Transport in Modul C2 zur Verwertungsanlage erfolgt mit einem LKW (50km).
In Modul C3 wird die Zerkleinerung und thermische Behandlung (Verbrennung) des Materials berücksichtigt. Bei der Berechnung der Verbrennungsemissionen und Gutschriften wird der spezifische Heizwert des jeweiligen Materials sowie die Materialzusammensetzung berücksichtigt.
In Modul D erfolgen Gutschriften für die Substitution von Strom (deutscher Strommix) und thermischer Energie (aus Erdgas).

## Technical purpose
Phenolharz Hartschaum Platten werden als Dämmstoff, z.B. als Aufdach- oder Zwischensparrendämmung eingesetzt. Auch der Einsatz als Wärmedämmverbundsystem (WDVS) ist möglich.

## Safety margin
20 %. Produktsystem bis auf wenige Prozesse/Flüsse abgebildet. Technologische, zeitliche und geographische Repräsentativität teilweise gegeben.

## Reference product
- Phenolharz Hartschaum: 1

## Inputs
- Erneuerbare Primärenergie als Energieträger (PERE) [MJ]: A1-A3 120.01, C2 0.0874466, C3 5.08779, D -137.058
- Erneuerbare Primärenergie zur stofflichen Nutzung (PERM) [MJ]: A1-A3 0, C2 0, C3 0, D 0
- Total erneuerbare Primärenergie (PERT) [MJ]: A1-A3 120.01, C2 0.0874466, C3 5.08779, D -137.058
- Nicht-erneuerbare Primärenergie als Energieträger (PENRE) [MJ]: A1-A3 1562.32, C2 1.50671, C3 1065, D -393.492
- Nicht-erneuerbare Primärenergie zur stofflichen Nutzung (PENRM) [MJ]: A1-A3 864, C2 0, C3 -864, D 0
- Total nicht-erneuerbare Primärenergie (PENRT) [MJ]: A1-A3 2426.32, C2 1.50671, C3 201.005, D -393.492
- Einsatz von Sekundärstoffen (SM) [kg]: A1-A3 0, C2 0, C3 0, D 0
- Erneuerbare Sekundärbrennstoffe (SF) [MJ]: A1-A3 0, C2 0, C3 0, D 0
- Nicht erneuerbare Sekundärbrennstoffe (NRSF) [MJ]: A1-A3 0, C2 0, C3 0, D 0
- Nettoeinsatz von Süßwasserressourcen (FW) [m3]: A1-A3 0.501558, C2 7.77182e-5, C3 0.207848, D -0.0509568

## Outputs
- Gefährlicher Abfall zur Deponie (HWD) [kg]: A1-A3 0.00158953, C2 6.29755e-11, C3 6.91704e-9, D -1.37361e-7
- Entsorgter nicht gefährlicher Abfall (NHWD) [kg]: A1-A3 1.18628, C2 0.000243217, C3 0.458462, D -0.210079
- Entsorgter radioaktiver Abfall (RWD) [kg]: A1-A3 0.0127535, C2 1.44588e-6, C3 0.00062455, D -0.0147409
- Komponenten für die Wiederverwendung (CRU) [kg]: A1-A3 0, C2 0, C3 0, D 0
- Stoffe zum Recycling (MFR) [kg]: A1-A3 0, C2 0, C3 0, D 0
- Stoffe für die Energierückgewinnung (MER) [kg]: A1-A3 0, C2 0, C3 40, D 0
- Exportierte elektrische Energie (EEE) [MJ]: A1-A3 0, C2 0, C3 109.818, D 0
- Exportierte thermische Energie (EET) [MJ]: A1-A3 0, C2 0, C3 240.13, D 0

## Impact indicators
- Globales Erwärmungspotenzial - total (GWP-total) [kg CO2 eq.]: A1-A3 91.9186, C2 0.114446, C3 90.2781, D -25.408
- Globales Erwärmungspotenzial - fossil (GWP-fossil) [kg CO2 eq.]: A1-A3 90.778, C2 0.113669, C3 90.0574, D -25.0953
- Globales Erwärmungspotenzial - biogen (GWP-biogenic) [kg CO2 eq.]: A1-A3 -0.213918, C2 4.70863e-5, C3 0.21903, D -0.274869
- Globales Erwärmungspotenzial - luluc (GWP-luluc) [kg CO2 eq.]: A1-A3 1.35451, C2 0.000730015, C3 0.00167847, D -0.0378376
- Abbaupotenzial der stratosphärischen Ozonschicht (ODP) [kg CFC-11 eq.]: A1-A3 2.35514e-7, C2 2.9085e-17, C3 2.0891e-14, D -5.98404e-13
- Versauerungspotenzial, kumulierte Überschreitung (AP) [Mole of H+ eq.]: A1-A3 0.139391, C2 0.000322279, C3 0.0601991, D -0.0260213
- Eutrophierungspotenzial - Süßwasser (EP-freshwater) [kg P eq.]: A1-A3 0.000211689, C2 2.33774e-7, C3 3.08016e-6, D -6.29361e-5
- Eutrophierungspotenzial - Salzwasser (EP-marine) [kg N eq.]: A1-A3 0.0492417, C2 0.000148467, C3 0.0276412, D -0.00953243
- Eutrophierungspotenzial - Land (EP-terrestrial) [Mole of N eq.]: A1-A3 0.491346, C2 0.00166107, C3 0.33231, D -0.101478
- Bildungspotenzial für troposphärisches Ozon (POCP) [kg NMVOC eq.]: A1-A3 0.217049, C2 0.000289514, C3 0.0705988, D -0.0249198
- Potenzial für die Verknappung abiotischer Ressourcen nicht fossile Ressourcen (ADPE) [kg Sb eq.]: A1-A3 8.95037e-5, C2 9.88765e-9, C3 3.27201e-7, D -8.03148e-6
- Potenzial für die Verknappung abiotischer Ressourcen fossile Brennstoffe (ADPF) [MJ]: A1-A3 2598.64, C2 1.50664, C3 28.1991, D -393.434
- Wasser-Entzugspotenzial (Benutzer) (WDP) [m³ world equiv.]: A1-A3 4.07878, C2 0.000441872, C3 8.81951, D -0.309194

## Use advice
Dieser Datensatz bezieht sich auf die Herstellung von 1 m³ Phenolharz Hartschaum. Eine Kaschierung wurde nicht berücksichtigt. Die Rohdichte beträgt 40 kg/m³. Die Wärmeleitfähigkeit 0,024 W/mK. Der Datensatz kann näherungsweise für die Abschätzung Phenolharz Hartschaum mit einer Dichte von 35 - 45 kg/m³, sowie für die Abschätzung von Platten mit dünner Glasfaserkaschierung verwendet werden.

Der Datensatz repräsentiert ein Cradle to Gate Inventar. Er kann verwendet werden, um die Lieferkette des jeweiligen Produktes in einer repräsentativen Weise zu charakterisieren. Die Kombination mit einzelnen Einheitenprozessen und diesem Produkt ermöglicht die Erstellung von anwenderspezifischen (Produkt-) LCAs

## Data sources
- GaBi databases
- Documentation of data quality management
- GaBi Database Edition 2021, CUP2021.01
- GaBi database (all versions)
