# PU-Dämmplatten mit Aluminium-Mehrlagen-Deckschicht

Dataset: ILCD process, EPD, average dataset
Geography: DE
Reference year: 2021
Valid until: 2026
Classification: OEKOBAU.DAT: Dämmstoffe / Polyurethan-Hartschaum (PU) / PU mit Aluminium
Classification: IBUCategories: 02 Bauprodukte / Wärmedämmungsprodukte / Dämmstoffe aus Schaumkunststoffen
Method details: Dämmstoffe aus Schaumkunststoffen.pdf
Generated by: Sphera Solutions GmbH
Registration number: EPD-IVP-20210003-IBE2-DE
Owner: Industrieverband Polyurethan-Hartschaum e.V.
Compliance: DIN EN 15804; ISO 14025
Review: Accredited third party review by Institut Bauen und Umwelt e. V.
Amounts: rows without a unit in brackets have none in this file; such an amount is in the reference unit of its flow, which a separate flow dataset defines
copyright: true
licenseType: Free of charge for all users and uses
accessRestrictions: None

## General comment
Polyurethan-Hartschaum (PU) ist ein geschlossenzelliger Schaumstoff, der als werkmäßig hergestellter Wärmedämmstoff in Form von Dämmplatten im Hochbau und für haus- und betriebstechnische Anlagen eingesetzt wird. Die Produktfamilie der Polyurethan-Dämmstoffe (PU) umfasst hauptsächlich die Produktvariante Polyurethan – siehe EN 13165. PU-Dämmstoffe werden u. a. als Dämmplatten mit flexiblen Deckschichten hergestellt.

Diese Produktdeklaration bezieht sich auf beidseitig mit Aluminium-Mehrlagen-Folie kaschierten PU-Dämmplatten.

## Technology and included processes
Polyurethan-Hartschaumdämmplatten mit flexiblen Aluminium-Mehrlagen-Deckschichten werden in einem kontinuierlichen Verfahren auf einer Doppelbandanlage hergestellt. Bei diesem Fertigungsprozess strömt das Polyurethan-Reaktionsgemisch aus einem Mischkopf auf die untere Aluminium-Mehrlagen-Deckschicht, schäumt auf und verklebt innerhalb der Druckzone der Anlage mit einer von oben zugeführten Aluminium-Mehrlagen-Deckschicht. Die Bandschaumplatten werden nach dem Durchlauf durch die Doppelbandanlage in die gewünschten Abmessungen zugeschnitten. Gütesicherung Die deklarierten Produkte sind qualitätsüberwacht. Diese Gütesicherung basiert auf der Überwachung und Zertifizierung durch unabhängige, bauaufsichtlich anerkannte Stellen.
Technische Daten:
Zur Bestimmung der technischen Daten werden die Prüfmethoden gemäß DIN EN 13165 verwendet. Die Rohdichte von PU-Dämmplatten mit Aluminium-Mehrlagen-Deckschichten für den Hochbau beträgt ca. 31 - 32 kg/m³.

Die Platten werden in der Wärmeleitfähigkeitsstufe (WLS) 023 hergestellt. Diese Stufe entspricht dem Bemessungswert der Wärmeleitfähigkeit von 0,023 W/(m·K). Zusätzlich kann der Nennwert des Wärmedurchlasswiderstandes R 5,45 (m²·K)/W und die Dicke von 22 mm der Dämmplatte bei R = 1 (m²·K)/W angegeben werden.

Die Nenndruckspannung oder Nenndruckfestigkeit bei 10% Stauchung beträgt 100 kPa (dh) oder 150 kPa (ds) nach DIN 4108-10. Höhere Druckfestigkeiten sind möglich. Die Nennzugfestigkeit senkrecht zur Dämmplattenebenebeträgt 40 kPa. Höhere Zugfestigkeiten sind möglich.

PU-Dämmplatten mit Aluminium-Mehrlagen-Deckschichten sind für Wasserdampf undurchlässig und nehmen keine Feuchte auf.

Polyurethan-Hartschaum besitzt ausgeprägt duroplastische Eigenschaften und ist daher nicht schmelzbar.
Deklarierte Einheit:
Die deklarierte Einheit ist 1 m² installierte PU-Dämmplatte mit Aluminium-Mehrlagen-Deckschicht (beidseitig) und den folgenden Spezifikationen:

## Technical purpose
Das Anwendungsgebiet von PU-Hartschaum-Dämmstoffen ist die Wärmedämmung im Hochbau (z.B. Steildach, Flachdach, Boden, Decke und Außenwand (außen und innen)). Darüber hinaus wird PU-Hartschaum für die Dämmung haus- und betriebstechnischer Anlagen verwendet.

## Reference product
- 1 m² of installierte PU-Dämmplatte mit Aluminium-Mehrlagen-Deckschicht: 1

## Inputs
- Erneuerbare Primärenergie als Energieträger (PERE) [MJ]: A1-A3 24, A4 0.327, A5 1.87, C2 0.0631, C3 1.036, D -15.8
- Erneuerbare Primärenergie zur stofflichen Nutzung (PERM) [MJ]: A1-A3 3.09, A4 0, A5 -1.84, C2 0, C3 0, D 0
- Total erneuerbare Primärenergie (PERT) [MJ]: A1-A3 27.1, A4 0.327, A5 0.0253, C2 0.0631, C3 1.036, D -15.8
- Nicht-erneuerbare Primärenergie als Energieträger (PENRE) [MJ]: A1-A3 91.5, A4 5.82, A5 20.4, C2 1.12, C3 174.11, D -70.7
- Nicht-erneuerbare Primärenergie zur stofflichen Nutzung (PENRM) [MJ]: A1-A3 190, A4 0, A5 -20.3, C2 0, C3 -170.21, D 0
- Total nicht erneuerbare Primärenergie (PENRT) [MJ]: A1-A3 282, A4 5.82, A5 0.102, C2 1.12, C3 3.9, D -70.7
- Einsatz von Sekundärstoffen (SM) [kg]: A1-A3 0, A4 0, A5 0, C2 0, C3 0, D 0
- Erneuerbare Sekundärbrennstoffe (RSF) [MJ]: A1-A3 0, A4 0, A5 0, C2 0, C3 0, D 0
- Nicht erneuerbare Sekundärbrennstoffe (NRSF) [MJ]: A1-A3 0, A4 0, A5 0, C2 0, C3 0, D 0
- Einsatz von Süßwasserressourcen (FW) [m^3]: A1-A3 0.0885, A4 0.000378, A5 0.000813, C2 7.3e-5, C3 0.021014, D -0.0203

## Outputs
- Gefährlicher Abfall zur Deponie (HWD) [kg]: A1-A3 9.14e-6, A4 2.71e-7, A5 5.7e-11, C2 5.23e-8, C3 2.068e-9, D -1.98e-8
- Entsorgter nicht gefährlicher Abfall (NHWD) [kg]: A1-A3 0.378, A4 0.00089, A5 0.00176, C2 0.000172, C3 0.04863, D -0.142
- Entsorgter radioaktiver Abfall (RWD) [kg]: A1-A3 0.00678, A4 7.2e-6, A5 8.13e-6, C2 1.39e-6, C3 0.0003331, D -0.00517
- Komponenten für die Wiederverwendung (CRU) [kg]: A1-A3 0, A4 0, A5 0, C2 0, C3 0, D 0
- Stoffe zum Recycling (MFR) [kg]: A1-A3 0, A4 0, A5 0, C2 0, C3 0, D 0.26
- Stoffe für die Energierückgewinnung (MER) [kg]: A1-A3 0, A4 0, A5 0, C2 0, C3 0, D 3.78
- Exportierte elektrische Energie (EEE) [MJ]: A1-A3 0, A4 0, A5 0.371, C2 0, C3 14.9, D 0
- Exportierte thermische Energie (EET) [MJ]: A1-A3 0, A4 0, A5 0.66, C2 0, C3 26.9, D 0

## Impact indicators
- Globales Erwärmungspotenzial (GWP) [kg CO_(2)-Äq.]: A1-A3 11.2, A4 0.425, A5 0.362, C2 0.082, C3 8.7786, D -4.2
- Abbau Potential der stratosphärischen Ozonschicht (ODP) [kg CFC11-Äq.]: A1-A3 1.84e-5, A4 6.99e-17, A5 9.98e-17, C2 1.35e-17, C3 4.09e-15, D -5.31e-14
- Versauerungspotenzial von Boden und Wasser (AP) [kg SO_(2)-Äq.]: A1-A3 0.0227, A4 0.000344, A5 8.41e-5, C2 6.64e-5, C3 0.003492, D -0.00576
- Eutrophierungspotenzial (EP) [kg PO_(4)^(3)-Äq.]: A1-A3 0.00321, A4 6.4e-5, A5 2.07e-5, C2 1.24e-5, C3 0.0008688, D -0.000672
- Bildungspotential für troposphärisches Ozon (POCP) [kg Ethen-Äq.]: A1-A3 0.012, A4 -5.59e-6, A5 5.85e-6, C2 -1.08e-6, C3 0.0002252, D -0.000521
- Potenzial für den abiotischen Abbau nicht fossiler Ressourcen (ADPE) [kg Sb-Äq.]: A1-A3 1.64e-6, A4 3.13e-8, A5 1.17e-9, C2 6.05e-9, C3 4.71e-8, D -6.96e-7
- Potenzial für den abiotischen Abbau fossiler Brennstoffe (ADPF) [MJ]: A1-A3 265, A4 5.8, A5 0.0817, C2 1.12, C3 3.062, D -57.7

## Use advice
Gültigkeitsbereich:
Diese Umwelt-Produktdeklaration gilt für die deklarierten Produkte der IVPU-Mitglieder Karl Bachl GmbH & Co KG, IKO Insulation BV, Kingspan Insulation GmbH & Co KG, puren gmbh, Recticel Dämmsysteme GmbH, Soprema GmbH, Steinbacher Dämmstoff-GmbH, Unilin Insulation bv. Der IVPU repräsentiert über 90 % des Polyurethan-Dämmstoffmarktes in Deutschland. Diese Umwelt-Produktdeklaration basiert auf gewichteten Mittelwerten, bestimmt auf Basis der Einzelwerte aus den Produktionswerken der genannten Herstellerfirmen (siehe Abschnitt 3.1).
Systemgrenze:
Typ der EPD: Wiege bis Werkstor - mit OptionenDie Ökobilanz betrachtet folgende Punkte des Lebenszyklus:
Rohstoffgewinnung und -bereitstellung (A1)
Transporte der Rohstoffe (A2)
Herstellung inklusive Verpackung (A3)
Transport zur Baustelle (A4)
Einbau ins Gebäude (Recycling bzw. thermische Verwertung der Verschnitte und Verpackungsabfälle) (A5)
Transport zum End-of-Life (C2)
Abfallbehandlung: Energie für Schredder (C3)
thermische Verwertung (PU Schaum) (C3)
Recycling- bzw. Nutzenpotenzial außerhalb der Systemgrenze (D)

## Data sources
- GaBi Database (all versions)
- GaBi database SP40 2020
