# JACKOBOARD®

Dataset: ILCD process, EPD, average dataset
Geography: DE
Reference year: 2017
Valid until: 2022
Classification: OEKOBAU.DAT: Dämmstoffe / Extrudiertes Polystyrol (XPS) / XPS weiß
Classification: IBUCategories: 02 Bauprodukte / Wärmedämmungsprodukte / Dämmstoffe aus Schaumkunststoffen
Method details: Dämmstoffe aus Schaumkunststoffen.pdf
Owner: JACKON Insulation GmbH
Compliance: DIN EN 15804; ISO 14025
Review: Accredited third party review by IBU
Amounts: rows without a unit in brackets have none in this file; such an amount is in the reference unit of its flow, which a separate flow dataset defines
copyright: true

## General comment
JACKOBOARD® Bauplatten bestehen aus extrudiertem Polystyrol-Hartschaumplatten (XPS) mit einer beidseitigen Beschichtung aus Spezialmörtel und Glasgewebe.
XPS ist ein Kunststoffschaumdämmstoff entsprechend der /DIN EN 13164/, der in Form von Platten mit einer mittleren Rohdichte von 34,85 kg/m³ produziert wird. Die kalkulatorische Dichte der Bauplatte unter Einbeziehung der Beschichtung beträgt 170 kg/m³.

Die Platten werden im Dickenbereich 4 bis 100 mm und mit Glattkanten geliefert.

## Technology and included processes
XPS wird in einem kontinuierlichen Extrusionsprozess mit Strom als Hauptenergieträger hergestellt. Polystyrol-Granulat wird zusammen mit den genannten Hilfsstoffen im Extruder unter hohem Druck aufgeschmolzen. Das Treibmittel wird der Schmelze hinzugegeben und in ihr gelöst. Die Schmelze wird durch eine Breitschlitzdüse ausgetragen. Durch den dabei abfallenden Gegendruck schäumt das Treibmittel die Schmelze auf, kühlt diese dabei ab und das Polystyrol verfestigt sich. Es entsteht ein endloser Strang aus homogenem und geschlossenzelligem Polystyrolhartschaum. Dieser wird weiter abgekühlt und die Extrusionshaut entfernt. Zur Mörtelbeschichtung wird der Mörtel mit Wasser angemischt und zusammen mit dem Glasgewebe auf den XPS-Kern aufgebracht, getrocknet und die Platten abschließend dimensioniert. Diese werden palettiert in Polyethylen-Folie verpackt. XPS aus Produktionsabschnitten und Produktionsausschuss kann direkt in der Produktion rezykliert und wieder zur Produktion von XPS eingesetzt. Polystyrol ist ein thermoplastisches Material und kann deshalb einfach und kostengünstig durch Aufschmelzen rezykliert werden.
Deklarierte Einheit:
Diese Deklaration bezieht sich auf 1 m² JACKOBOARD Platte, bestehend aus einer 18,5 mm starken XPS-Platte und beidseitiger Beschichtung mit Glasarmierungsgewebe und Mörtel von je 0,75 mm Stärke. Das Flächengewicht beträgt 3,42 kg/m².

## Technical purpose
Für die Verwendung gelten die jeweiligen nationalen Bestimmungen. JACKOBOARD® Bauplatten können mit Putzen und Fliesen aller Art beschichtet werden. Die Oberflächen des JACKOBOARD® Systems bieten einen starken Haftgrund und können auf nahezu jedem Untergrund verarbeitet werden. Dabei sind sie wasserabweisend, wärmedämmend, leicht und druckfest.
Die JACKOBOARD® Bauplatte ist daher ideal geeignet für den Bad- und Wellnessbereich, insbesondere für den Nassbereich. Sie wird sowohl im Neubau als auch in der Sanierung eingesetzt. Sie findet Einsatz als Fliesenträgerplatte im Wandbereich, auf Trennwandkonstruktionen und im Bodenbereich. Weiterhin dient sie als Fliesenträger- und Konstruktionsplatte im Wellnessbereich wie z. B. Badmöbel, Waschtische, Sitzbänke, Liegen, Regale und Nischen.

## Scenarios
- S1: thermische Verwertung
- S2: Deponierung in der Nachnutzungsphase

## Reference product
- 1 m² JACKOBOARD-Platte mit 20 mm Dicke (3,42 kg/m²): 1

## Inputs
- Erneuerbare Primärenergie als Energieträger (PERE) [MJ]: A1-A3 7.959, A4 0.007372, C2 0.03296, C4 (S1) 0.1119, C4 (S2) 0.08423, D (S1) -2.813, D (S2) 0
- Erneuerbare Primärenergie zur stofflichen Nutzung (PERM) [MJ]: A1-A3 0, A4 0, C2 0, C4 (S1) 0, C4 (S2) 0, D (S1) 0, D (S2) 0
- Total erneuerbare Primärenergie (PERT) [MJ]: A1-A3 7.959, A4 0.007372, C2 0.03296, C4 (S1) 0.1119, C4 (S2) 0.08423, D (S1) -2.813, D (S2) 0
- Nicht-erneuerbare Primärenergie als Energieträger (PENRE) [MJ]: A1-A3 59.77, A4 2.177, C2 0.4853, C4 (S1) 27.687, C4 (S2) 0.7405, D (S1) -15.78, D (S2) 0
- Nicht-erneuerbare Primärenergie zur stofflichen Nutzung (PENRM) [MJ]: A1-A3 33.7, A4 0, C2 0, C4 (S1) -26.84, C4 (S2) 0, D (S1) 0, D (S2) 0
- Total nicht erneuerbare Primärenergie (PENRT) [MJ]: A1-A3 93.47, A4 2.177, C2 0.4853, C4 (S1) 0.8466, C4 (S2) 0.7405, D (S1) -15.78, D (S2) 0
- Einsatz von Sekundärstoffen (SM) [kg]: A1-A3 0, A4 0, C2 0, C4 (S1) 0, C4 (S2) 0, D (S1) 0, D (S2) 0
- Erneuerbare Sekundärbrennstoffe (RSF) [MJ]: A1-A3 0.000471, A4 0, C2 0, C4 (S1) 0, C4 (S2) 0, D (S1) 0, D (S2) 0
- Nicht erneuerbare Sekundärbrennstoffe (NRSF) [MJ]: A1-A3 0.004946, A4 0, C2 0, C4 (S1) 0, C4 (S2) 0, D (S1) 0, D (S2) 0
- Einsatz von Süßwasserressourcen (FW) [m^3]: A1-A3 0.01613, A4 9.68e-6, C2 4.977e-5, C4 (S1) 0.004124, C4 (S2) 0.0001508, D (S1) -0.002114, D (S2) 0

## Outputs
- Gefährlicher Abfall zur Deponie (HWD) [kg]: A1-A3 0.0002631, A4 7.679e-10, C2 6.245e-8, C4 (S1) 7.214e-8, C4 (S2) 1.693e-8, D (S1) -9.972e-9, D (S2) 0
- Entsorgter nicht gefährlicher Abfall (NHWD) [kg]: A1-A3 0.3125, A4 1.618e-5, C2 5.999e-5, C4 (S1) 2.808, C4 (S2) 3.429, D (S1) -0.007444, D (S2) 0
- Entsorgter radioaktiver Abfall (RWD) [kg]: A1-A3 0.001808, A4 2.007e-6, C2 6.57e-7, C4 (S1) 1.87e-5, C4 (S2) 1.023e-5, D (S1) -0.0006761, D (S2) 0
- Komponenten für die Wiederverwendung (CRU) [kg]: A1-A3 0, A4 0, C2 0, C4 (S1) 0, C4 (S2) 0, D (S1) 0, D (S2) 0
- Stoffe zum Recycling (MFR) [kg]: A1-A3 0, A4 0, C2 0, C4 (S1) 0, C4 (S2) 0, D (S1) 0, D (S2) 0
- Stoffe für die Energierückgewinnung (MER) [kg]: A1-A3 0, A4 0, C2 0, C4 (S1) 0, C4 (S2) 0, D (S1) 0, D (S2) 0
- Exportierte elektrische Energie (EEE) [MJ]: A1-A3 0, A4 0, C2 0, C4 (S1) 3.29, C4 (S2) 0, D (S1) 0, D (S2) 0
- Exportierte thermische Energie (EET) [MJ]: A1-A3 0, A4 0, C2 0, C4 (S1) 7.98, C4 (S2) 0, D (S1) 0, D (S2) 0

## Impact indicators
- Globales Erwärmungspotenzial (GWP) [kg CO_(2)-Äq.]: A1-A3 4.771, A4 0.1565, C2 0.03569, C4 (S1) 2.147, C4 (S2) 0.05513, D (S1) -1.085, D (S2) 0
- Abbau Potential der stratosphärischen Ozonschicht (ODP) [kg CFC11-Äq.]: A1-A3 1.048e-8, A4 1.01e-13, C2 7.36e-14, C4 (S1) 9.551e-13, C4 (S2) 5.406e-13, D (S1) -3.338e-11, D (S2) 0
- Versauerungspotenzial von Boden und Wasser (AP) [kg SO_(2)-Äq.]: A1-A3 0.01023, A4 0.0003535, C2 8.634e-5, C4 (S1) 0.000385, C4 (S2) 0.0003294, D (S1) -0.001155, D (S2) 0
- Eutrophierungspotenzial (EP) [kg PO_(4)^(3)-Äq.]: A1-A3 0.001172, A4 7.769e-5, C2 2.164e-5, C4 (S1) 6.185e-5, C4 (S2) 4.482e-5, D (S1) -0.0001804, D (S2) 0
- Bildungspotential für troposphärisches Ozon (POCP) [kg Ethen-Äq.]: A1-A3 0.00261, A4 -0.0001232, C2 -2.786e-5, C4 (S1) 4.05e-5, C4 (S2) 3.166e-5, D (S1) -0.0001267, D (S2) 0
- Potenzial für den abiotischen Abbau nicht fossiler Ressourcen (ADPE) [kg Sb-Äq.]: A1-A3 1.738e-5, A4 5.596e-9, C2 2.691e-9, C4 (S1) 3.586e-8, C4 (S2) 1.901e-8, D (S1) -2.728e-7, D (S2) 0
- Potenzial für den abiotischen Abbau fossiler Brennstoffe (ADPF) [MJ]: A1-A3 88.95, A4 2.172, C2 0.4836, C4 (S1) 0.7995, C4 (S2) 0.7147, D (S1) -14.08, D (S2) 0

## Use advice
Gültigkeitsbereich:
Die Ökobilanz beruht auf den Daten des Jahres 2015
aus dem JACKON-Werk Arendsee, Deutschland.
Systemgrenze:
Typ der EPD: Wiege bis Werktor (A1-A3) – mit Optionen

Die Ökobilanz betrachtet die folgenden Punkte des Lebenszyklus:
Extraktion und Aufbereitung von Rohstoffen (A1)
Transport zur Herstellung (A2)
Herstellung der JACKOBOARD-Platte (A3)
Herstellung der Verpackung (A3)
Transporte zur Nutzung (A4)
Abfallbeseitigung (C4) mit zwei Szenarien:
1. thermische Verwertung (EoL1) in einer Anlage mit einer Effizienz R1 kleiner 0,6
2. Deponierung (EoL2)

Rückgewinnungs- und Recyclingpotentiale (D) - außerhalb der Systemgrenzen

## Data sources
- JACKOBOARD®.pdf
- GaBi Database (all versions)
- GaBi database SP29 2016
