# Wellplatten

Dataset: ILCD process, EPD, average dataset
Geography: DK
Reference year: 2016
Valid until: 2022
Classification: OEKOBAU.DAT: Mineralische Baustoffe / Steine und Elemente / Faserzement
Classification: IBUCategories: 02 Bauprodukte / Bedachungen / Faserzement / Faserbeton
Method details: Faserzement / Faserbeton.pdf
Generated by: Sphera Solutions GmbH
Registration number: EPD-CEM-20160114-IAD1-DE
Owner: Cembrit Holding A/S
Compliance: DIN EN 15804; ISO 14025
Review: Accredited third party review by Institut Bauen und Umwelt e. V.
Amounts: rows without a unit in brackets have none in this file; such an amount is in the reference unit of its flow, which a separate flow dataset defines
copyright: true
licenseType: Free of charge for all users and uses
accessRestrictions: None

## General comment
Die Produkte sind Wellplatten aus Faserzement.

Die Platten werden gewöhnlich mit einer Beschichtung auf Wasserbasis geliefert, einige Produkte werden jedoch auch ohne Beschichtung zur Verfügung gestellt. Die Deklaration umfasst sowohl beschichtete als auch unbeschichtete Produkte.

Zubehör für die Endbearbeitung, wie Firste oder Belüftungsöffnungen, sind aus Faserzement oder Kunststoff erhältlich.

Für die Inverkehrbringung in der EU/EFTA (mit Ausnahme der Schweiz) gilt die Verordnung (EU) Nr. 305/2011. Das Produkt benötigt eine Leistungserklärung (DoP) unter Berücksichtigung der /EN 494:2012+A1:2015.

Faserzement-Wellplatten und dazugehörige Formteile —

Produktspezifikationen und Prüfverfahren /und die CE-Kennzeichnung.

Für die Anwendung und Nutzung gelten die jeweiligen nationalen Bestimmungen.

Zulassung durch /DIBt, Zulassung Z-31.1-196/ Zulassung durch /CSTB Institute 091-L2-14/ (Sumperk, CZ)

/BBA-Zertifikat Nummer 03/4049/ Produktblatt 1 (Cembonit-Programm) und Produktblatt 2 (Cemsix-Programm)

Zulassung durch /INTRON, Zertifikat CTG 480/5/(Sumperk, CZ)

## Technology and included processes
Die Cembrit-Wellplatten werden in beiden Fabriken mit Hatschek-Technologie hergestellt. Eine sehr dünne Aufschlämmung aus Wasser, Bindemittel und Fasern wird gemischt und in die Behälter der Hatschek-Maschine gegeben. Der rotierende Siebzylinder in den Behältern sammelt eine dünne Schicht festen Materials auf, welche weiter entwässert wird, während sie über ein Filzband zu einer Formatwalze bewegt wird. Die aufgewickelten Schichten werden bei der gewünschten Dicke automatisch auf die gewünschte Produktgröße zugeschnitten und in den Bereich zum Vor-Härten verbracht. Abfall wird in den Herstellungsprozess zurückgeführt. Nach dem Vor-Härten werden die Produkte bei fortlaufend kontrollierter Temperatur und Feuchte gelagert. Cembrit-Wellplatten werden als naturgraue und beschichtete Versionen in verschiedenen Farben geliefert, mit glatter, gleichmäßiger Oberfläche. Die Rückseite mit einem Antiblock-Verfahren behandelt.
Technische Daten:
Es gelten die in der Leistungserklärung aufgeführten Daten.
Deklarierte Einheit:
Die deklarierte Einheit und der Umrechnungsfaktor sind in der nachstehenden Tabelle aufgelistet.

## Technical purpose
Cembrit-Wellplatten sind für die Installation als Überdachung und/oder Verkleidung von hölzernen oder metallenen Unterkonstruktionen vorgesehen.

## Reference product
- 1 Tonne Faserzement-Wellplatten: 1000

## Inputs
- Erneuerbare Primärenergie als Energieträger (PERE) [MJ]: A1 1050.93, A2 27.2878, A3 6.33454
- Erneuerbare Primärenergie zur stofflichen Nutzung (PERM) [MJ]: A1 686.948, A2 0, A3 184.499
- Total erneuerbare Primärenergie (PERT) [MJ]: A1 1737.88, A2 27.2879, A3 190.833
- Nicht-erneuerbare Primärenergie als Energieträger (PENRE) [MJ]: A1 6668.15, A2 212.424, A3 193.238
- Nicht-erneuerbare Primärenergie zur stofflichen Nutzung (PENRM) [MJ]: A1 354.58, A2 0, A3 30.3987
- Total nicht erneuerbare Primärenergie (PENRT) [MJ]: A1 7022.73, A2 212.424, A3 223.636
- Einsatz von Sekundärstoffen (SM) [kg]
- Erneuerbare Sekundärbrennstoffe (RSF) [MJ]: A1 183.932, A2 0.00209053, A3 0.0124959
- Nicht erneuerbare Sekundärbrennstoffe (NRSF) [MJ]: A1 1038.02, A2 0.0218456, A3 0.0142922
- Einsatz von Süßwasserressourcen (FW) [m^3]: A1 2.25624, A2 0.0533712, A3 -0.47803

## Outputs
- Gefährlicher Abfall zur Deponie (HWD) [kg]: A1 0.00143106, A2 9.60606e-5, A3 7.47727e-5
- Entsorgter nicht gefährlicher Abfall (NHWD) [kg]: A1 3.09091, A2 0.0647955, A3 34.7727
- Entsorgter radioaktiver Abfall (RWD) [kg]: A1 0.402273, A2 0.0157937, A3 0.00524242
- Komponenten für die Wiederverwendung (CRU) [kg]: A1 0, A2 0, A3 0
- Stoffe zum Recycling (MFR) [kg]: A1 0, A2 0, A3 0
- Stoffe für die Energierückgewinnung (MER) [kg]: A1 0, A2 0, A3 0
- Exportierte elektrische Energie (EEE) [MJ]: A1 0, A2 0, A3 0
- Exportierte thermische Energie (EET) [MJ]: A1 0, A2 0, A3 0

## Impact indicators
- Globales Erwärmungspotenzial (GWP) [kg CO_(2)-Äq.]: A1 803.788, A2 13.803, A3 1.60606
- Abbau Potential der stratosphärischen Ozonschicht (ODP) [kg CFC11-Äq.]: A1 1.02955e-5, A2 4.40197e-9, A3 7.07576e-9
- Versauerungspotenzial von Boden und Wasser (AP) [kg SO_(2)-Äq.]: A1 2.38864, A2 0.104167, A3 0.0273485
- Eutrophierungspotenzial (EP) [kg PO_(4)^(3)-Äq.]: A1 0.226742, A2 0.0152273, A3 0.00843939
- Bildungspotential für troposphärisches Ozon (POCP) [kg Ethen-Äq.]: A1 0.228712, A2 0.000734848, A3 0.0186061
- Potenzial für den abiotischen Abbau nicht fossiler Ressourcen (ADPE) [kg Sb-Äq.]: A1 0.000956818, A2 1.3228e-6, A3 1.40379e-5
- Potenzial für den abiotischen Abbau fossiler Brennstoffe (ADPF) [MJ]: A1 5954.55, A2 172.955, A3 209.848

## Use advice
Gültigkeitsbereich:
Die Wellplatten-Dacheindeckung wird von Cembrit an zwei Produktionsstandorten in Trzemeszno, Polen und Sumperk, Tschechische Republik gefertigt. Die in dieser EPD genannten Werte stellen einen Durchschnittswert der beiden Standorte dar, gewichtet nach ihrem jeweiligen jährlichen Produktions-Output (Gewicht).

Bei diesem Dokument handelt es sich um eine vom Deutschen ins Englische übersetzte Umwelt-Produktdeklaration. Grundlage ist die englische Ursprungsversion EPD-CEM-20160114-IAD1-EN. Der Verifizierer hat keinen Einfluss auf die Qualität der Übersetzung.
Systemgrenze:
Die folgenden Prozesse wurden in der A1-A3-Herstellungsphase der Cembrit-Wellplatten berücksichtigt:

A1: Herstellung der Vorprodukte (Zement, Füllstoffe, Zellulose, PVA-Faser, Pigmente, Beschichtungen und Wasser)

A2: Transport der Rohstoffe und der Verpackung

A3: Herstellungsprozess im Werk, einschließlich Energie, Wasser, Entsorgung und Prozessemissionen

A3: Herstellung der Verpackung

## Data sources
- GaBi Database (all versions)
- GaBi database SP26 2014
