# Dachbahnen EPDM (Dicke 0,0015 m); 2 kg/m2

Dataset: ILCD process, EPD, generic dataset
Geography: DE
Reference year: 2018
Valid until: 2022
Classification: oekobau.dat: Kunststoffe / Dachbahnen / Elastomer-Dachbahnen
Owner: thinkstep
Compliance: DIN EN 15804
Review: Dependent internal review by thinkstep, IABP-GaBi, IBP-GaBi; Independent external review by GaBi user forum, GaBi bug forum, GaBi user community
Amounts: rows without a unit in brackets have none in this file; such an amount is in the reference unit of its flow, which a separate flow dataset defines
copyright: true

## General comment
Dieser Datensatz wurde nach dem European Standard EN 15804 für Nachhaltiges Bauen modelliert. Ergebnisse werden in Modulen abgebildet, die den strukturierten Ausdruck von Ergebnissen über den gesamten Lebenszyklus zulassen.

## Geography
Der Datensatz bildet die länderspezifische Situation in Deutschland ab. Dabei werden Haupttechnologien, spezifische regionale Charakteristiken und ggf. Importstatistiken berücksichtigt.

## Time period
Jährlicher Durchschnitt

## Technology and included processes
Die Lebenszyklusanalyse der EPDM-Dachbahnen umfasst die Lebenszyklusphasen cradle to gate. Die Systemgrenze ist das (verkaufsfertige) Produkt. Transporte von der Fabrik bis zum Montageort werden nicht berücksichtigt und sollten in einem Systemansatz bei Bedarf integriert werden. Herstellung von EPDM: EPDM wird durch die Ko-Polymerisation von Ethylen und Propylen hergestellt. Die Polymerisation wird in einer Lösung durchgeführt. Das Verfahren wird bei 10 - 50 ° C ausgeführt und bei 1 - 20 bar in einem einzigen Tankreaktor kontinuierlichen gerührt, wobei ein Katalysator verwendet wird. Da die Polymerisation stark exotherm ist, wird eine Kühlung erforderlich. Organische Lösemittel/Lösungsmittel wie Hexan werden verwendet. Nicht umgesetztes Propen wird zurückgeführt und wieder in den Reaktor eingeführt. Das Lösungsmittel wird ebenfalls rückgewonnen. Vom Reaktor ausgehend wird das Reaktionsgemisch mit Wasser, Alkohol oder anderen polaren Flüssigkeiten abgestoppt. Die Polymerlösung wird mit Natriumhydroxid gemischt, um Katalysatorrückstände zu entfernen. Nach Zugabe von Chemikalien wie Strecköl/Extenderöl/Weichmacheröl wird die Polymerlösung mit Dampf und heißem Wasser abgestreift, um nicht umgesetzte Monomere und Lösungsmittel zu entfernen. Antiagglomerante und Antischaummittel können zugesetzt werden, um die Krümel-Agglomeration des Gummiproduktes zu steuern. Das Produkt wird dann über ein Sieb gegeben und getrocknet.

Hintergrundsystem:
Strom: Die Stromerzeugung wird entsprechend der länderspezifischen Randbedingungen modelliert. Die landesspezifische Analyse beinhaltet:
1.: Spezifische Kraftwerke der verschiedenen fossilen Energieträger und der Einsatz erneuerbarer Energien sind entsprechend der länderspezifischen Energieträgermixe modelliert. Die Analyse bezieht Stromimporte aus den Nachbarländern, Transmissions-und Verteilungsverluste und den Eigenverbrauch im Kraftwerk und bei der Verteilung bzw. Speicherung, z. B. durch Pumpspeicherwerke, ein.
2.: Die landes-/regionalspezifischen Technologiestandards sowie die Erzeugung in Elektrizitätskraftwerken und/oder in speziellen Kraftwerken mit Kraft-Wärme-Kopplung (KWK) sind berücksichtigt.
3.: Die länderspezifische Energieträgerbereitstellung (mit Anteil der Importe und/oder Eigenversorgung) einschließlich der Energieträger-Eigenschaften (z. B. Elementar- und Energiegehalte) werden berücksichtigt.
4.: Die Förderung, Produktion, Verarbeitung und Transportprozesse werden entsprechend der Situation im jeweiligen Stromerzeugerland modelliert. Die unterschiedlichen Produktions- und Verarbeitungsverfahren (Emissionen und Wirkungsgrade) in den verschiedenen Energieerzeugerländern werden einbezogen, z. B. Rohöl-Veredelungsverfahren oder Abfackel-Raten an den Ölplattformen.
Thermische Energie, Prozessdampf: Die Erzeugung von Dampf und thermischer Energie in Heizkraftwerken wird entsprechend der landesspezifischen Situation (Emissionsgrenzwerte, Energieträgerbasis) modelliert.
Der Wirkungsgrad für die thermische Energieerzeugung beträgt per Definition 100% des Energieträgereinsatzes. Für Prozessdampf liegt der Wirkungsgrad im Bereich von 85-95%. Die zur Heizenergie-Erzeugung verwendeten Energieträger werden entsprechend der nationalen Situation modelliert (siehe Kapitel Strom oben).
Transporte: Alle relevanten und bekannten Transportprozesse in Form von See- und Binnenschiffsverkehr sowie Bahn-, Lkw- und der Leitungstransport sind enthalten.
Energieträger: Die Energieträger werden entsprechend der spezifischen Versorgungslage modelliert (siehe Kapitel Strom oben).
Raffinerieprodukte: Diesel, Benzin, technische Gase, Heizöl, Schmierstoffe und Rückstände, wie Bitumen, werden mit einem parametrierten länderspezifische Raffineriemodell modelliert. Das Raffinerie-Modell bezieht die länderspezifischen Veredelungsverfahren (z. B. Emissionspegel, interner Energieverbrauch etc.) und das länderspezifische Produktspektrum ein, das sich je nach Land stark unterscheiden kann. Die Rohöl-Förderung wird gemäß der länderspezifischen Situation mit den jeweiligen Energieträger-Eigenschaften modelliert.

## Technical purpose
Dieses Produkt kann im Baubereich verwendet werden.

## Safety margin
30 %. Wichtige Prozesse/Flüsse können fehlen oder sind abgeschätzt. Stark eingeschränkte technologische, zeitliche oder geographische Repräsentativität.

## Reference product
- Dachbahn EPDM (m2): 1

## Inputs
- Erneuerbare Primärenergie als Energieträger (PERE) [MJ]: A1-A3 9.62142, C1 0, C2 0.0047216, C3 0.307989, D -14.2696
- Erneuerbare Primärenergie zur stofflichen Nutzung (PERM) [MJ]: A1-A3 0, C1 0, C2 0, C3 0, D 0
- Total erneuerbare Primärenergie (PERT) [MJ]: A1-A3 9.62142, C1 0, C2 0.0047216, C3 0.307989, D -14.2696
- Nicht-erneuerbare Primärenergie als Energieträger (PENRE) [MJ]: A1-A3 179.606, C1 0, C2 0.0811048, C3 68.9246, D -49.5888
- Nicht-erneuerbare Primärenergie zur stofflichen Nutzung (PENRM) [MJ]: A1-A3 67.6, C1 0, C2 0, C3 -67.6, D 0
- Total nicht erneuerbare Primärenergie (PENRT) [MJ]: A1-A3 247.206, C1 0, C2 0.0811048, C3 1.32459, D -49.5888
- Einsatz von Sekundärstoffen (SM) [kg]: A1-A3 0, C1 0, C2 0, C3 0, D 0
- Erneuerbare Sekundärbrennstoffe (RSF) [MJ]: A1-A3 0, C1 0, C2 0, C3 0, D 0
- Nicht erneuerbare Sekundärbrennstoffe (NRSF) [MJ]: A1-A3 0, C1 0, C2 0, C3 0, D 0
- Einsatz von Süßwasserressourcen (FW) [m3]: A1-A3 0.0293422, C1 0, C2 4.22859e-6, C3 0.01746, D -0.00665575

## Outputs
- Gefährlicher Abfall zur Deponie (HWD) [kg]: A1-A3 9.27607e-7, C1 0, C2 3.0308e-9, C3 2.84876e-9, D -2.62541e-8
- Entsorgter nicht gefährlicher Abfall (NHWD) [kg]: A1-A3 0.124724, C1 0, C2 1.42353e-5, C3 0.0883749, D -0.023406
- Entsorgter radioaktiver Abfall (RWD) [kg]: A1-A3 0.00140452, C1 0, C2 8.53867e-8, C3 4.43322e-5, D -0.00172401
- Komponenten für die Wiederverwendung (CRU) [kg]: A1-A3 0, C1 0, C2 0, C3 0, D 0
- Stoffe zum Recycling (MFR) [kg]: A1-A3 0, C1 0, C2 0, C3 0, D 0
- Stoffe für die Energierückgewinnung (MER) [kg]: A1-A3 0, C1 2.6, C2 0, C3 0, D 0
- Exportierte elektrische Energie (EEE) [MJ]: A1-A3 0, C1 0, C2 0, C3 14.824, D 0
- Exportierte thermische Energie (EET) [MJ]: A1-A3 0, C1 0, C2 0, C3 33.7749, D 0

## Impact indicators
- Globales Erwärmungspotenzial (GWP) [kg CO2 Äquiv.]: A1-A3 8.59954, C1 0, C2 0.0060343, C3 6.79964, D -3.39139
- Abbaupotenzial der stratosphärischen Ozonschicht (ODP) [kg R11 Äquiv.]: A1-A3 5.18776e-14, C1 0, C2 1.99738e-18, C3 1.73181e-15, D -7.89063e-14
- Versauerungspotential (AP) [kg SO2 Äquiv.]: A1-A3 0.00828074, C1 0, C2 1.21886e-5, C3 0.000567172, D -0.00286918
- Eutrophierungspotential (EP) [kg Phosphat Äquiv.]: A1-A3 0.00119985, C1 0, C2 2.89758e-6, C3 0.00012915, D -0.00054391
- Bildungspotenzial für troposphärisches Ozon (POCP) [kg Ethen Äquiv.]: A1-A3 0.00126116, C1 0, C2 -3.37081e-6, C3 4.27606e-5, D -0.000291849
- Potenzial für den abiotischen Abbau nicht fossiler Ressourcen (ADPE) [kg Sb Äquiv.]: A1-A3 3.0702e-6, C1 0, C2 5.07791e-10, C3 1.84929e-8, D -8.46058e-7
- Potenzial für den abiotischen Abbau fossiler Brennstoffe (ADPF) [MJ]: A1-A3 243.659, C1 0, C2 0.0808866, C3 1.21268, D -45.2366

## Use advice
Der Datensatz repräsentiert ein Cradle to Gate Inventar. Er kann verwendet werden, um die Lieferkette des jeweiligen Produktes in einer repräsentativen Weise zu charakterisieren. Die Kombination mit einzelnen Einheitenprozessen und diesem Produkt ermöglicht die Erstellung von anwenderspezifischen (Produkt-) LCAs.

## Data sources
- GaBi Database Edition 2020, SP40
- GaBi database (all versions)
