# Holzfaserdämmstoff Trockenverfahren (Durchschnitt DE)

Dataset: ILCD process, EPD, representative dataset
Geography: DE
Reference year: 2021
Valid until: 2026
Classification: OEKOBAU.DAT: Dämmstoffe / Holzfasern / Holzfaserdämmplatte
Method details: EN 15804; ILCD format
Generated by: Thünen-Institut für Holzforschung
Owner: Thünen-Institut für Holzforschung
Compliance: EN 16485; EN 15804+A2
Review: Dependent internal review by Thünen-Institut für Holzforschung
Amounts: rows without a unit in brackets have none in this file; such an amount is in the reference unit of its flow, which a separate flow dataset defines
copyright: true

## General comment
Weitere Informationen zur deklarierten Einheit (Zusammensetzung) und die auf Herstellerangaben beruhende Sachbilanz (In- und Output der Stoff- und Energieströme) stehen als Excel-Datei unter dem Unterpunkt Hintergrund-Bericht zum Download bereit.
Der Datensatz wurde 2021 als Aktualisierung mit gleichbleibendem Vordergrundsystem erstellt. Alle Hintergrunddaten entstammen der GaBi Professional Datenbank in der Content Version 2021.1. Die Modellierung und Berechnung der Ökobilanz basiert auf den europäischen Normen EN 15804:2012+A2:2019 und EN 16485:2014. Bei Rückfragen wenden Sie sich bitte an holzundklima@thuenen.de.

## Geography
Für die Ökobilanzierung von Holzfaserdämmstoffen im Trockenverfahren in Deutschland wurden Daten von zwei Werken berücksichtigt (Möller et al. 2020). Produktionszahlen für die gesamte Produktion von Holzfaserdämmstoffen im Trockenverfahren in Deutschland in 2018 liegen nicht vor, und können nur grob abgeschätzt werden. Der Anteil der erhobenen Produktionsmenge für das Jahr 2018 entspricht etwa zwei Drittel (67 %) der abgeschätzten Gesamt-Produktionsmenge.

## Time period
Der Datensatz basiert auf Produktionsdaten für das Kalenderjahr 2018 (Vordergrundsystem).
Eine Aktualisierung des Hintergrundsystems erfolgte 2021.

## Technology and included processes
Zur Herstellung von Holzfaserdämmstoffen im Trockenverfahren werden zunächst Hackschnitzel aus Nadelholz zerkleinert. Die zerkleinerten Fraktionen werden anschließend unter Einwirkung von Wasserdampf mechanisch zerfasert. Die Fasern werden anschließend im Stromrohrtrockner getrocknet und nach Beimischung von Zusätzen wie Bi-Komponentenfasern oder Polyurethan-Klebstoffen auf eine Formstraße gestreut und dort durch Wärmezufuhr ausgehärtet. Im Nachgang werden die Platten auf Format gesägt und auf Paletten gelagert. Feste Platten können je nach gewünschter Anwendungsdicke schichtweise verklebt werden. Ein Sonderfall sind Einblasdämmstoffe aus Holzfasern. Die losen Fasern werden nach der Zugabe von Flammschutzmitteln direkt in Säcken verpackt und palettiert. Hackschnitzel zur Herstellung von Holzfaserdämmstoffen wurden durchschnittlich über eine Distanz von 84 km per LKW transportiert, Zusatzstoffe 332 km per LKW und 350 km per Zug. Die Holzfeuchte des Produktes liegt bei 10 %, der Wasseranteil bei 13 %.

## Technical purpose
Der Anwendungsbereich variiert je nach Ausführungsart des Dämmstoffes. Die Einblasdämmung ist eine raumfüllende Wärmedämmung, die in geschlossene Hohlräume eingeblasen werden kann. Die Anwendung ist bei Innen- und Außenwänden, sowie im Deckenbereich möglich. Für flexible Dämmmatten reicht der Anwendungsbereich von der Zwischensparrendämmung über die Gefachdämmung von Wänden in Holzrahmen- und Holzständerbauweise, Dämmung von Holzbalkendecken, Dämmung der obersten Geschossdecke bis zur Dämmung von Installationsebenen.

## Scenarios
- energetisch (Modul D): thermische Verwertung
- Entsorgung Verpackung (Modul A5): Das Modul A5 enthält ausschließlich die Entsorgung der Verpackungsmaterialien

## Reference product
- Holzfaserdämmstoff Trockenverfahren (Durchschnitt DE): 1

## Inputs
- Erneuerbare Primärenergie als Energieträger (PERE) / Uso de energía primaria renovable excluyendo los recursos de energía primaria renovable utilizada como materia prima (PERE) [MJ]: A1 57.3967, A2 1.35242, A3 752.147, A1-A3 810.896, A5 (Entsorgung Verpackung) 0.960322, C2 0.338431, C3 0.878459, D (energetisch) 1867.88
- Erneuerbare Primärenergie zur stofflichen Nutzung (PERM) / Uso de energía primaria renovable utilizada como materia prima (PERM) [MJ]: A1 2491.51, A2 0, A3 116.408, A1-A3 2607.91, A5 (Entsorgung Verpackung) -116.408, C2 0, C3 -2491.51, D (energetisch) 0
- Total erneuerbare Primärenergie (PERT) / Uso total de la energía primaria renovable (energía primaria y recursos de energía primaria renovable utilizada como materia prima) (PERT) [MJ]: A1 2548.9, A2 1.35242, A3 868.555, A1-A3 3418.81, A5 (Entsorgung Verpackung) -115.448, C2 0.338431, C3 -2490.63, D (energetisch) 1867.88
- Nicht-erneuerbare Primärenergie als Energieträger (PENRE) / Uso de energía primaria no renovable, excluyendo los recursos de energía primaria no renovable utilizada como materia prima (PENRE) [MJ]: A1 646.656, A2 17.8728, A3 1045.98, A1-A3 1710.5, A5 (Entsorgung Verpackung) 4.35208, C2 6.07239, C3 15.1364, D (energetisch) -2067.37
- Nicht-erneuerbare Primärenergie zur stofflichen Nutzung (PENRM) / Uso de la energía primaria no renovable utilizada como materia prima (PENRM) [MJ]: A1 85.5781, A2 0, A3 15.6909, A1-A3 101.269, A5 (Entsorgung Verpackung) -15.6909, C2 0, C3 -85.5781, D (energetisch) 0
- Total nicht erneuerbare Primärenergie (PENRT) / Uso total de la energía primaria no renovable (energía primaria y recursos de energía primaria renovable utilizada como materia prima) (PENRT) [MJ]: A1 732.234, A2 17.8728, A3 1061.67, A1-A3 1811.77, A5 (Entsorgung Verpackung) -11.3388, C2 6.07239, C3 -70.4418, D (energetisch) -2067.37
- Einsatz von Sekundärstoffen (SM) / Uso de materiales secundarios (SM) [kg]: A1 0, A2 0, A3 0, A1-A3 0, A5 (Entsorgung Verpackung) 0, C2 0, C3 0, D (energetisch) 0
- Erneuerbare Sekundärbrennstoffe (RSF) / Uso de combustibles secundarios renovables (RSF) [MJ]: A1 0, A2 0, A3 0, A1-A3 0, A5 (Entsorgung Verpackung) 0, C2 0, C3 0, D (energetisch) 0
- Nicht erneuerbare Sekundärbrennstoffe (NRSF) / Uso de combustibles secundarios no renovables (NRSF) [MJ]: A1 0, A2 0, A3 0, A1-A3 0, A5 (Entsorgung Verpackung) 0, C2 0, C3 0, D (energetisch) 0
- Einsatz von Süßwasserressourcen (FW) / Uso neto de recursos de agua dulce (FW) [m3]: A1 0.278755, A2 0.00147875, A3 0.491225, A1-A3 0.771459, A5 (Entsorgung Verpackung) 0.0400168, C2 0.000387388, C3 0.000780913, D (energetisch) 0.372582

## Outputs
- Gefährlicher Abfall zur Deponie (HWD) / Residuos peligrosos eliminados (HWD) [kg]: A1 1.43651e-5, A2 1.08883e-9, A3 1.40958e-6, A1-A3 1.57758e-5, A5 (Entsorgung Verpackung) 9.18801e-10, C2 3.05984e-10, C3 6.32762e-10, D (energetisch) -6.62917e-7
- Entsorgter nicht gefährlicher Abfall (NHWD) / Residuos no peligrosos eliminados (NHWD) [kg]: A1 0.285509, A2 0.00314815, A3 0.772882, A1-A3 1.06154, A5 (Entsorgung Verpackung) 0.212143, C2 0.000902064, C3 0.00244319, D (energetisch) 2.73259
- Entsorgter radioaktiver Abfall (RWD) / Residuos radiactivos eliminados (RWD) [kg]: A1 0.00736175, A2 0.00015155, A3 0.00536465, A1-A3 0.0128779, A5 (Entsorgung Verpackung) 0.000122064, C2 7.34532e-6, C3 1.45285e-5, D (energetisch) -0.076428
- Komponenten für die Wiederverwendung (CRU) / Componentes para su reutilización (CRU) [kg]: A1 0, A2 0, A3 0, A1-A3 0, A5 (Entsorgung Verpackung) 0, C2 0, C3 0, D (energetisch) 0
- Stoffe zum Recycling (MFR) / Materiales para el reciclaje (MFR) [kg]: A1 0, A2 0, A3 0, A1-A3 0, A5 (Entsorgung Verpackung) 0, C2 0, C3 0, D (energetisch) 0
- Stoffe für die Energierückgewinnung (MER) / Materiales para valorización energética (recuperación de energía) (MER) [kg]: A1 0, A2 0, A3 0, A1-A3 0, A5 (Entsorgung Verpackung) 6.04059, C2 0, C3 150.759, D (energetisch) 0
- Exportierte elektrische Energie (EEE) / Energía exportada electrica (EEE) [MJ]: A1 0, A2 0, A3 0.00888126, A1-A3 0.00888126, A5 (Entsorgung Verpackung) 21.2308, C2 0, C3 0, D (energetisch) 0
- Exportierte thermische Energie (EET) / Energía exportada termal (EET) [MJ]: A1 0, A2 0, A3 0.0206322, A1-A3 0.0206322, A5 (Entsorgung Verpackung) 48.4651, C2 0, C3 0, D (energetisch) 0

## Impact indicators
- Globales Erwärmungspotenzial - total (GWP-total) [kg CO2-Äqv.]: A1 -205.827, A2 1.29509, A3 50.6356, A1-A3 -153.897, A5 (Entsorgung Verpackung) 12.4653, C2 0.438135, C3 238.181, D (energetisch) -122.425
- Globales Erwärmungspotenzial - fossil (GWP-fossil) [kg CO2-Äqv.]: A1 31.2002, A2 1.29509, A3 61.738, A1-A3 94.2333, A5 (Entsorgung Verpackung) 1.36283, C2 0.438135, C3 1.15296, D (energetisch) -122.425
- Globales Erwärmungspotenzial - biogen (GWP-biogenic) [kg CO2-Äqv.]: A1 -237.028, A2 0, A3 -11.1024, A1-A3 -248.13, A5 (Entsorgung Verpackung) 11.1024, C2 0, C3 237.028, D (energetisch) 0
- Abbaupotenzial der stratosphärischen Ozonschicht (ODP) [kg CFC 11-Äquiv.]: A1 2.16089e-13, A2 1.3465e-15, A3 4.55601e-13, A1-A3 6.73037e-13, A5 (Entsorgung Verpackung) 3.85784e-15, C2 5.82037e-17, C3 2.92063e-16, D (energetisch) -2.57475e-12
- Versauerungspotenzial, kumulierte Überschreitung (AP) [mol H+ eqv.]: A1 0.0806242, A2 0.007505, A3 0.112874, A1-A3 0.201003, A5 (Entsorgung Verpackung) 0.00305339, C2 0.0026451, C3 0.0142829, D (energetisch) -0.105577
- Eutrophierungspotenzial - Süßwasser (EP-freshwater) [kg P eqv.]: A1 7.31743e-5, A2 3.9171e-6, A3 0.000239853, A1-A3 0.000316944, A5 (Entsorgung Verpackung) 5.81122e-7, C2 1.35236e-6, C3 2.34936e-6, D (energetisch) -0.000320695
- Eutrophierungspotenzial - Salzwasser (EP-marine) [kg N eqv.]: A1 0.0325895, A2 0.00365135, A3 0.0477682, A1-A3 0.0840091, A5 (Entsorgung Verpackung) 0.000873781, C2 0.00129606, C3 0.00643111, D (energetisch) -0.0418812
- Eutrophierungspotenzial - Land (EP-terrestrial) [mol N eqv.]: A1 0.352552, A2 0.0404003, A3 0.513245, A1-A3 0.906198, A5 (Entsorgung Verpackung) 0.0146468, C2 0.0143451, C3 0.070731, D (energetisch) -0.356937
- Bildungspotenzial für troposphärisches Ozon (POCP) [kg NMVOC eqv.]: A1 0.0965293, A2 0.00690649, A3 0.158531, A1-A3 0.261967, A5 (Entsorgung Verpackung) 0.00227151, C2 0.00244429, C3 0.0187131, D (energetisch) -0.109463
- Potenzial für die Verknappung abiotischer Ressourcen – nicht fossile Ressourcen (ADPE) [kg Sb-Äqv.]: A1 5.30236e-6, A2 1.11602e-7, A3 1.07338e-5, A1-A3 1.61477e-5, A5 (Entsorgung Verpackung) 5.64135e-8, C2 3.46823e-8, C3 9.93204e-8, D (energetisch) -3.62446e-5
- Potenzial für die Verknappung abiotischer Ressourcen – fossile Brennstoffe (ADPF) [MJ]: A1 732.039, A2 17.85, A3 1045.88, A1-A3 1795.77, A5 (Entsorgung Verpackung) 4.35073, C2 6.0643, C3 15.1357, D (energetisch) -2152.65
- Wasser-Entzugspotenzial (Benutzer) (WDP) [m3 world eqv.]: A1 0.278755, A2 0.00147875, A3 0.491225, A1-A3 0.771459, A5 (Entsorgung Verpackung) 0.0400168, C2 0.000387388, C3 0.000780913, D (energetisch) 0.372582
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
## Use advice
Aufgrund der hohen Abdeckung bildet der Datensatz die durchschnittlichen Produktionsverhältnisse und die damit verbundenen Umweltwirkungen repräsentativ für Deutschland ab. Liegen keine herstellerspezifischen Ökobilanzergebnisse des verwendeten Produkts vor, empfiehlt sich die Verwendung dieses Durchschnittsdatensatzes.

## Review details
Der repräsentative Datensatz setzt sich aus herstellerspezifischen Daten einzelner Werke zusammen, welche zum überwiegenden Teil auch separat als EPD bei einem in der Ökobaudat vertretenen Programmhalter verifiziert und veröffentlicht wurden.

## Data sources
- Möller et al. (2020) Mehr als nur Dämmung - Zusatznutzen von Dämmstoffen aus nachwachsenden Rohstoffen - Arbeitsbereich Nachhaltigkeitsbetrachtung, Hamburg, Thünen-Institut für Holzforschung, Abschlussbericht
- GaBi database (general)
