# Glas - Bundesverband Flachglas e.V. - Mehrscheibenisolierglas 3-fach Aufbau

Dataset: ILCD process, EPD, template dataset
Geography: RER
Reference year: 2017
Valid until: 2022
Classification: Komponenten von Fenstern und Vorhangfassaden / Füllungen / Transparente Füllungen
Classification: OEKOBAU.DAT: Komponenten von Fenstern und Vorhangfassaden / Füllungen / Transparente Füllungen
Synonyms: MIG; Mehrscheiben-Isolierglas
Method details: Produktkategorieregeln Teil A; Produktkategorieregeln Teil B – für Flachglas im Bauwesen
Generated by: ift Rosenheim
Registration number: M-EPD-MIG-002000
Owner: Bundesverband Flachglas e.V.
Compliance: EN 15804
Review: Independent external review by Patrick Wortner
Amounts: rows without a unit in brackets have none in this file; such an amount is in the reference unit of its flow, which a separate flow dataset defines
copyright: true
licenseType: Free of charge for all users and uses
accessRestrictions: None

## General comment
Dieser Datensatz beinhaltet die Ergebnisse für die Module A1-A3 sowie die Module C1, C2, C3, C4, D gemäß EN 15804. Ein Vergleich mit anderen Produkten ist nur mit einer vergleichbaren Anwendung im Gebäude zulässig. Grundsätzlich ist eine Gegenüberstellung oder die Bewertung von EPD Daten nur möglich, wenn alle zu vergleichenden Datensätze nach EN 15804 erstellt wurden und der Gebäudekontext, bzw. die produktspezifischen Leistungsmerkmale berücksichtigt werden.

## Geography
Dieser Datensatz repräsentiert die Situation der Mitgliedsfirmen des Bundesverbands Flachglas e.V., im Hinblick auf die wichtigsten Technologien und die gesetzlichen Rahmenbedingungen.

## Time period
jährlicher Durchschnitt

## Technology and included processes
Die Ökobilanzergebnisse umfassen die Lebenszyklusstadien der Herstellung der Vorprodukte bis hin zur Rohstoffgewinnung und Verarbeitungsprozesse von als Input dienenden Sekundärstoffen (z.B. Recyclingprozesse), deren Transporte zum Werk sowie die Produktion selbst, einschließlich der Bereitstellung von allen Hilfs- und Betriebsstoffen, Energie, sowie die vollständige Abfallbehandlung oder die Deponierung der Restabfälle während des Stadiums der Produktion. Die Module A1, A2 und A3 sind hier als ein aggregiertes Modul A1-A3 ausgewiesen. Falls für diesen Datensatz weitere Module berechnet wurden, sind diese separat zu finden und können für eine Betrachtung des gesamten Lebenszyklus zusammengeführt werden.

## Technical purpose
Mehrscheibensolierglas für den Einbau in Fenster, Türen, Vorhangfassaden, Dachkonstruktionen und Trennwänden.

## Reference product
- Glas - Bundesverband Flachglas e.V. - Mehrscheibenisolierglas 3-fach Aufbau: 1

## Inputs
- Frischwasserverbrauch (FW) [m3]: A1-A3 0.17, C1 0.00333, C2 0.000164, C3 0.00484, C4 0.000896, D -0.00981
- Nicht-erneuerbare Primärenergie als Energieträger (PENRE) [MJ]: A1-A3 749.58, C1 6.51, C2 1.61, C3 9.45, C4 20.13, D -68.1
- Nicht-erneuerbare Primärenergie zur stofflichen Nutzung (PENRM) [MJ]: A1-A3 15.44, C1 0, C2 0, C3 0, C4 -15.44, D 0
- Verbrauch nicht erneuerbarer Sekundärbrennstoffe (NRSF) [MJ]: A1-A3 2.8e-11, C1 9.68e-30, C2 1.32e-28, C3 1.4e-29, C4 8.35e-22, D -3.43e-20
- Erneuerbare Primärenergie als Energieträger (PERE) [MJ]: A1-A3 42.56, C1 2.45, C2 0.09, C3 3.55, C4 0.58, D -4.56
- Erneuerbare Primärenergie zur stofflichen Nutzung (PERM) [MJ]: A1-A3 0, C1 0, C2 0, C3 0, C4 0, D 0
- Erneuerbare Sekundärbrennstoffe (RSF) [MJ]: A1-A3 2.38e-12, C1 0, C2 8.71e-30, C3 0, C4 7.11e-23, D -2.92e-21
- Einsatz von Sekundärstoffen (SM) [kg]: A1-A3 1.32, C1 0, C2 0, C3 0, C4 0, D 0
- Total nicht erneuerbare Primärenergie (PENRT) [MJ]: A1-A3 765.02, C1 6.51, C2 1.61, C3 9.45, C4 4.69, D -68.1
- Gesamtverbrauch von erneuerbarer Primärenergie (PERT) [MJ]: A1-A3 42.56, C1 2.45, C2 0.09, C3 3.55, C4 0.58, D -4.56

## Outputs
- Komponenten für die Wiederverwendung (CRU) [kg]: A1-A3 0, C1 0, C2 0, C3 0, C4 0
- Exportierte elektrische Energie (EEE) [MJ]: A1-A3 0, C1 0, C2 0, C3 0, C4 0
- Exportierte thermische Energie (EET) [MJ]: A1-A3 0, C1 0, C2 0, C3 0, C4 0
- Gefährlicher Abfall zur Beseitigung (HWD) [kg]: A1-A3 0.00477, C1 3.06e-9, C2 9.33e-8, C3 4.43e-9, C4 8.07e-8, D -7.12e-8
- Stoff für die Energierückgewinnung (MER) [kg]: A1-A3 0, C1 0, C2 0, C3 0, C4 0
- Stoffe zum Recycling (MFR) [kg]: A1-A3 3.12, C1 0, C2 0, C3 8.97, C4 0
- Ungefährlicher Abfall zur Beseitigung (NHWD) [kg]: A1-A3 34.3, C1 0.00459, C2 0.000135, C3 0.00666, C4 22, D -0.63
- Entsorgter radioaktiver Abfall (RWD) [kg]: A1-A3 0.0156, C1 0.00108, C2 2.21e-6, C3 0.00156, C4 6.8e-5, D -0.0019

## Impact indicators
- Potenzial für den abiotischen Abbau nicht fossiler Ressourcen (ADPE) / Potencial de agotamiento de recursos abióticos para recursos no fósiles (ADPE) [kg Sb-Äqv.]: A1-A3 0.00131, C1 1.89e-7, C2 9.7e-9, C3 2.75e-7, C4 1.34e-7, D -1.01e-5
- Potenzial für den abiotischen Abbau fossiler Brennstoffe (ADPF) / Potencial de agotamiento de recursos abióticos para recursos fósiles (ADPF) [MJ]: A1-A3 725.11, C1 3.8, C2 1.61, C3 5.5, C4 4.52, D -63.31
- Versauerungspotenzial von Boden und Wasser (AP) / Potencial de acidificación del suelo y de los recursos de agua (AP) [kg SO2-Äqv.]: A1-A3 0.44, C1 0.00101, C2 0.000686, C3 0.00147, C4 0.00207, D -0.0255
- Eutrophierungspotenzial (EP) / Potencial de eutrofización (EP) [kg Phosphat-Äqv.]: A1-A3 0.0347, C1 9.49e-5, C2 0.000176, C3 0.000138, C4 0.000286, D -0.00328
- Globales Erwärmungspotenzial (GWP) / Potencial de calentamiento global (GWP) [kg CO2-Äqv.]: A1-A3 40.36, C1 0.36, C2 0.12, C3 0.52, C4 0.35, D -4.66
- Abbau Potential der stratosphärischen Ozonschicht (ODP) / Potencial de agotamiento de la capa de ozono estratosférico (ODP) [kg R11 eq.]: A1-A3 1.92e-8, C1 1.59e-12, C2 3.23e-15, C3 2.3e-12, C4 7.93e-14, D -2.71e-12
- Bildungspotential für troposphärisches Ozon (POCP) / Potencial de formación de ozono troposférico (POCP) [kg Ethen-Äqv.]: A1-A3 0.0242, C1 6.34e-5, C2 -0.000307, C3 9.19e-5, C4 0.000161, D 0.00357

## Use advice
A1-A3 sowie Module C1, C2, C3, C4, D. Das Umweltprofil beinhaltet die Aufwendungen für die Lebenszyklus-Stadien cradle to gate mit Optionen (Modul A1-A3).

Der Aufbau des Mehrscheiben-Isolierglases bezieht sich auf einen Standard-Aufbau 4/12/4/12/4.

Die Muster-EPD erlangt Gültigkeit durch die Übertragung an den Hersteller durch das ift. Aktuell gültige EPDs sind der nachfolgenden Liste zu entehmen und auf www.ift-service.de/epd veröffentlicht.
EPD-Nummer und Deklarationsinhaber:
- M-EPD-MIG-002001, Semcoglas Holding GmbH, 26655 Westerstede
- M-EPD-MIG-002002, Glas Fandel GmbH & Co. KG, 54634 Bitburg
- M-EPD-MIG-002003, Q4Glass ABJ Investors Sp. z.o.o. Sp. k., 75-209 Koszalin
- M-EPD-MIG-002004, UNIGLAS GmbH & Co. KG, 56410 Montabaur
- M-EPD-MIG-002005, Amberger Glas, 92224 Amberg
- M-EPD-MIG-002006, Hero-Glas Veredelungs GmbH, 26906 Dersum
- M-EPD-MIG-002007, WW GLASS Sp. z.o.o., Sp. k., 84-241 Gościcino
- M-EPD-MIG-002008, Glas Ockels BV, 9502 EV Stadskanaal
- M-EPD-MIG-002009, Glas Tech S.A., 62-020 Swarzedz
- M-EPD-MIG-002010, Glas Zange GmbH & Co. KG, 92637 Weiden i. d. Opf.
- M-EPD-MIG-002011, Glas Trösch GmbH, 87700 Memmingen
- M-EPD-MIG-002012, Glas Trösch GmbH, 86720 Nördlingen
- M-EPD-MIG-002013, Glas Trösch GmbH, 86637 Wertingen
- M-EPD-MIG-002014, Opolglass Sp. z.o.o., 45-125 Opole
- M-EPD-MIG-002015, thermopor glas GmbH, 52399 Merzenich
- M-EPD-MIG-002016, Glas Müller Vetri Spa, 39100 Bozen
- M-EPD-MIG-002017, Brakeler Thermo-Glas GmbH, 33034 Brakel
- M-EPD-MIG-002018, Gethke Glas Kirchheim GmbH & Co. KG, 36275 Kirchheim-Heddersdorf
- M-EPD-MIG-002019, Scheuten Glas Diest N.V., 3290 Diest
- M-EPD-MIG-002020, Scheuten Glas Nederland Iso Glass Unit, 1689 AR Zwaag
- M-EPD-MIG-002021, Scheuten Glas Nederland Iso Glass Unit, 5928 LN Venlo
- M-EPD-MIG-002022, Scheuten Glas Heiden GmbH, 46359 Heiden
- M-EPD-MIG-002023, Scheuten Glas Nederland Glass Tech Unit, 5928 LN Venlo
- M-EPD-MIG-002024, HOFFMANNGLAS GmbH & Co. Glasgroßhandlung KG, 31228 Peine
- M-EPD-MIG-002025, HOFFMANNGLAS GmbH & Co. KG, 06188 Landsberg OT Peissen
- M-EPD-MIG-002026, Kölling Glas GmbH & Co. KG – Objekt Linther Glas, 14822 Linthe
- M-EPD-MIG-002027, Flachglas Wernberg GmbH, 92533 Wernberg-Köblitz
- M-EPD-MIG-GB-002028, Pilkington Nederland B.V., 7547 SB Enschede
- M-EPD-MIG-002029, OKALUX GmbH, 97828 Marktheidenfeld-Altfeld
- M-EPD-MIG-GB-002030, Smits Isolatieglas B.V. Gemert, 5420 AA Gemert
- M-EPD-MIG-002031, Rosenheimer Glastechnik GmbH, 83101 Rohrdorf
- M-EPD-MIG-GB-002032, Pilkington Glasveredelung GmbH, 48455 Bad Bentheim
- M-EPD-MIG-002033, Isolar Glas Ostbayern GmbH, 93055 Regensburg
- M-EPD-MIG-GB-002034, Pilkington IGP Sp. O o.o, 27-600 Sandomierz
- M-EPD-MIG-002035, Hunsrücker Glasveredelung Wagener GmbH & Co. KG, 55481 Kirchberg
- M-EPD-MIG-GB-002036, PRESS GLASS SA, 42-262 Poczesna
- M-EPD-MIG-002037, Schollglas Holding und Geschäftsführungsgesellschaft mbH, 30890 Barsinghausen
- M-EPD-MIG-002038, Isophon glas GmbH, 34346 Hann. Münden
- M-EPD-MIG-GB-002039, Vitroterm-Murów S.A., 46-030 Murów
- M-EPD-MIG-002040, sedak GmbH & Co. KG, 86368 Gersthofen
- M-EPD-MIG-GB-002041, REFLEX Gornja Radgona d.o.o., 9250 Gornja Radgona
- M-EPD-MIG-GB-002042, Simon Glas GmbH&Co. KG, 31675 Bückeburg
- M-EPD-MIG-GB-002043, TVITEC SYSTEM GLASS S.L., 24492 Cubillos del Sil
- M-EPD-MIG-002044, Flachglas Sülzfeld GmbH, 98617 Sülzfeld
- M-EPD-MIG-002045, Flachglas Sachsen GmbH, 04668 Grimma

## Review details
Die angewendete LCI Methode ist in Übereinstimmung mit ISO 14040 und 14044. Die Dokumentation enthält alle relevanten Informationen im Hinblick auf die Datenqualität und den Umfang der Anwendung der jeweiligen LCI Ergebnisse bzw. der Datensätze. Der Datensatz repräsentiert den Stand der Technik bezogen auf die funktionelle Einheit.

## Data sources
- GaBi database (general)
