# Innenfarbe Dispersionsfarbe scheuerfest; 1 kg

Dataset: ILCD process, EPD, generic dataset
Geography: DE
Reference year: 2018
Valid until: 2022
Classification: oekobau.dat: Beschichtungen / Innenbeschichtungen / Innenfarben
Owner: thinkstep
Compliance: DIN EN 15804
Review: Dependent internal review by thinkstep, IABP-GaBi, IBP-GaBi; Independent external review by GaBi user forum, GaBi bug forum, GaBi user community
Amounts: rows without a unit in brackets have none in this file; such an amount is in the reference unit of its flow, which a separate flow dataset defines
copyright: true

## General comment
Dieser Datensatz wurde nach dem European Standard EN 15804 für Nachhaltiges Bauen modelliert. Ergebnisse werden in Modulen abgebildet, die den strukturierten Ausdruck von Ergebnissen über den gesamten Lebenszyklus zulassen.

## Geography
Der Datensatz bildet die länderspezifische Situation in Deutschland ab. Dabei werden Haupttechnologien, spezifische regionale Charakteristiken und ggf. Importstatistiken berücksichtigt.

## Time period
Jährlicher Durchschnitt

## Technology and included processes
Die Datensätze repräsentieren Außenfarben sowie den ersten Anstrich. Es gibt Datensätze für Latexfarben und Vorbeschichtungen auf Silikat- und Polymerbasis. Silikatfarben haben lösliches Kalium als Bindemittel/Haftvermittler. Die Aushärtung wird durch Verkieselung (kristalline Versteinerung) mit dem Untergrund erreicht. Latexsilikatfarben sind Silikatfarben mit Zusätzen von maximal 5 % organischen Bestandteilen, verglichen mit dem Gesamtgewicht des Beschichtungsmaterials. Dispersionsfarben sind wasserhaltige, aktive Farben auf Polymeremulsionsbasis in Kombination mit Dispersionshaftelementen. Dispersionsfarben kombinieren die positiven Eigenschaften mineralischer und polymergebundener Materialien. Wie Latexfarben sind sie stark wasserlöslich und zugleich wie Silikatfarben sehr dampfdurchlässig.

Die Lebenszyklusanalyse von 1 kg verschleißfester Innendispersionsbeschichtung umfasst die Lebenszyklusphasen cradle to gate mit Optionen, d.h. Herstellung von Roh- und Hilfsstoffen, sowie die Produktion einschließlich Verpackung, die Verarbeitung auf der Baustelle (Lösemittel-Emissionen) und Entsorgung. Die Beschichtung (Streichen) von Häusern und Teilen von Häusern wie Fenster, Parkett usw. wird in der Regel auf der Baustelle von Hand und ohne Abluftbehandlung durchgeführt.

Die Emissionen durch das Aufbringen der Beschichtung wurden durch Modellieren aller NMVOCs im Beschichtungsmaterial als NMVOC-Emissionen in die Luft angenommen und in Modul A5 ausgewiesen. Der Transport ist nicht im Umfang enthalten und sollte vom Nutzer des Datensatzes einzeln modelliert werden.

Das End of Life enthält die Entsorgung der Verpackung. 2 % des Beschichtungsmaterials werden als nicht verwendet (Verpackungsrückstände) und in einer städtischen Müllverbrennungsanlage verbrannt modelliert.

Hintergrundsystem:
Strom: Die Stromerzeugung wird entsprechend der länderspezifischen Randbedingungen modelliert. Die landesspezifische Analyse beinhaltet:
1.: Spezifische Kraftwerke der verschiedenen fossilen Energieträger und der Einsatz erneuerbarer Energien sind entsprechend der länderspezifischen Energieträgermixe modelliert. Die Analyse bezieht Stromimporte aus den Nachbarländern, Transmissions-und Verteilungsverluste und den Eigenverbrauch im Kraftwerk und bei der Verteilung bzw. Speicherung, z. B. durch Pumpspeicherwerke, ein.
2.: Die landes-/regionalspezifischen Technologiestandards sowie die Erzeugung in Elektrizitätskraftwerken und/oder in speziellen Kraftwerken mit Kraft-Wärme-Kopplung (KWK) sind berücksichtigt.
3.: Die länderspezifische Energieträgerbereitstellung (mit Anteil der Importe und/oder Eigenversorgung) einschließlich der Energieträger-Eigenschaften (z. B. Elementar- und Energiegehalte) werden berücksichtigt.
4.: Die Förderung, Produktion, Verarbeitung und Transportprozesse werden entsprechend der Situation im jeweiligen Stromerzeugerland modelliert. Die unterschiedlichen Produktions- und Verarbeitungsverfahren (Emissionen und Wirkungsgrade) in den verschiedenen Energieerzeugerländern werden einbezogen, z. B. Rohöl-Veredelungsverfahren oder Abfackel-Raten an den Ölplattformen.
Thermische Energie, Prozessdampf: Die Erzeugung von Dampf und thermischer Energie in Heizkraftwerken wird entsprechend der landesspezifischen Situation (Emissionsgrenzwerte, Energieträgerbasis) modelliert.
Der Wirkungsgrad für die thermische Energieerzeugung beträgt per Definition 100% des Energieträgereinsatzes. Für Prozessdampf liegt der Wirkungsgrad im Bereich von 85-95%. Die zur Heizenergie-Erzeugung verwendeten Energieträger werden entsprechend der nationalen Situation modelliert (siehe Kapitel Strom oben).
Transporte: Alle relevanten und bekannten Transportprozesse in Form von See- und Binnenschiffsverkehr sowie Bahn-, Lkw- und der Leitungstransport sind enthalten.
Energieträger: Die Energieträger werden entsprechend der spezifischen Versorgungslage modelliert (siehe Kapitel Strom oben).
Raffinerieprodukte: Diesel, Benzin, technische Gase, Heizöl, Schmierstoffe und Rückstände, wie Bitumen, werden mit einem parametrierten länderspezifische Raffineriemodell modelliert. Das Raffinerie-Modell bezieht die länderspezifischen Veredelungsverfahren (z. B. Emissionspegel, interner Energieverbrauch etc.) und das länderspezifische Produktspektrum ein, das sich je nach Land stark unterscheiden kann. Die Rohöl-Förderung wird gemäß der länderspezifischen Situation mit den jeweiligen Energieträger-Eigenschaften modelliert.

## Technical purpose
Dieses Produkt kann im Baubereich verwendet werden.

## Safety margin
10 %. Produktsystem weitgehend vollständig abgebildet. Gute technologische, zeitliche und geographische Repräsentativität.

## Reference product
- Dispersionsfarbe (scheuerfest): 1

## Inputs
- Erneuerbare Primärenergie als Energieträger (PERE) [MJ]: A1-A3 7.29298, A5 0.00420556, C2 0.00249555, C4 0.0287474, D -0.0447885
- Erneuerbare Primärenergie zur stofflichen Nutzung (PERM) [MJ]: A1-A3 0, A5 0, C2 0, C4 0, D 0
- Total erneuerbare Primärenergie (PERT) [MJ]: A1-A3 7.29298, A5 0.00420556, C2 0.00249555, C4 0.0287474, D -0.0447885
- Nicht-erneuerbare Primärenergie als Energieträger (PENRE) [MJ]: A1-A3 58.035, A5 0.0187261, C2 0.042867, C4 0.219027, D -0.158613
- Nicht-erneuerbare Primärenergie zur stofflichen Nutzung (PENRM) [MJ]: A1-A3 0, A5 0, C2 0, C4 0, D 0
- Total nicht erneuerbare Primärenergie (PENRT) [MJ]: A1-A3 58.035, A5 0.0187261, C2 0.042867, C4 0.219027, D -0.158613
- Einsatz von Sekundärstoffen (SM) [kg]: A1-A3 0, A5 0, C2 0, C4 0, D 0
- Erneuerbare Sekundärbrennstoffe (RSF) [MJ]: A1-A3 0, A5 0, C2 0, C4 0, D 0
- Nicht erneuerbare Sekundärbrennstoffe (NRSF) [MJ]: A1-A3 0, A5 0, C2 0, C4 0, D 0
- Einsatz von Süßwasserressourcen (FW) [m3]: A1-A3 0.0135003, A5 0.00012632, C2 2.23497e-6, C4 5.51079e-5, D -2.08968e-5

## Outputs
- Gefährlicher Abfall zur Deponie (HWD) [kg]: A1-A3 3.34564e-8, A5 5.40101e-11, C2 1.6019e-9, C4 3.33828e-9, D -8.3626e-11
- Entsorgter nicht gefährlicher Abfall (NHWD) [kg]: A1-A3 0.793508, A5 0.00175177, C2 7.52392e-6, C4 1.10109, D -7.41806e-5
- Entsorgter radioaktiver Abfall (RWD) [kg]: A1-A3 0.000989093, A5 6.02932e-7, C2 4.51302e-8, C4 2.45586e-6, D -5.41097e-6
- Komponenten für die Wiederverwendung (CRU) [kg]: A1-A3 0, A5 0, C2 0, C4 0, D 0
- Stoffe zum Recycling (MFR) [kg]: A1-A3 0, A5 0, C2 0, C4 0, D 0
- Stoffe für die Energierückgewinnung (MER) [kg]: A1-A3 0, A5 0, C2 0, C4 0, D 0
- Exportierte elektrische Energie (EEE) [MJ]: A1-A3 0, A5 0.0393655, C2 0, C4 0, D 0
- Exportierte thermische Energie (EET) [MJ]: A1-A3 0, A5 0.0926989, C2 0, C4 0, D 0

## Impact indicators
- Globales Erwärmungspotenzial (GWP) [kg CO2 Äquiv.]: A1-A3 2.62123, A5 0.0314319, C2 0.00319526, C4 0.0150055, D -0.010823
- Abbaupotenzial der stratosphärischen Ozonschicht (ODP) [kg R11 Äquiv.]: A1-A3 3.95041e-14, A5 2.35752e-17, C2 1.05569e-18, C4 8.33609e-17, D -2.47646e-16
- Versauerungspotential (AP) [kg SO2 Äquiv.]: A1-A3 0.00917009, A5 1.28082e-5, C2 7.11016e-6, C4 9.53255e-5, D -9.09723e-6
- Eutrophierungspotential (EP) [kg Phosphat Äquiv.]: A1-A3 0.000763057, A5 2.78529e-6, C2 1.7071e-6, C4 1.07251e-5, D -1.72266e-6
- Bildungspotenzial für troposphärisches Ozon (POCP) [kg Ethen Äquiv.]: A1-A3 0.0010842, A5 0.00337546, C2 -2.42006e-6, C4 7.22809e-6, D -9.293e-7
- Potenzial für den abiotischen Abbau nicht fossiler Ressourcen (ADPE) [kg Sb Äquiv.]: A1-A3 1.15401e-5, A5 2.5542e-10, C2 2.68387e-10, C4 1.52099e-9, D -2.66579e-9
- Potenzial für den abiotischen Abbau fossiler Brennstoffe (ADPF) [MJ]: A1-A3 55.538, A5 0.017204, C2 0.0427517, C4 0.212826, D -0.144953

## Use advice
Der Datensatz repräsentiert ein Cradle to Gate Inventar. Er kann verwendet werden, um die Lieferkette des jeweiligen Produktes in einer repräsentativen Weise zu charakterisieren. Die Kombination mit einzelnen Einheitenprozessen und diesem Produkt ermöglicht die Erstellung von anwenderspezifischen (Produkt-) LCAs.

## Data sources
- GaBi Database Edition 2020, SP40
- GaBi database (all versions)
- Ökologische Bilanzierung von Baustoffen und Gebäuden, 2000
- Lackformulierung und Lackrezeptur
- Lackrohstoffkunde
- Farben und Lacke
