# Feuerverzinktes Stahlband

Dataset: ILCD process, EPD, average dataset
Geography: AT
Reference year: 2019
Valid until: 2024
Classification: OEKOBAU.DAT: Metalle / Stahl und Eisen / Stahlbleche
Classification: IBUCategories: 02 Bauprodukte / Metallbauprodukte und Zubehör / Dünnwandige Profile und Profiltafeln aus Metall
Method details: Dünnwandige Profile und Profiltafeln aus Metall.pdf
Registration number: EPD-VOE-20190048-IBC1-DE
Owner: voestalpine AG
Compliance: DIN EN 15804; ISO 14025
Review: Accredited third party review by Institut Bauen und Umwelt e. V.
Amounts: rows without a unit in brackets have none in this file; such an amount is in the reference unit of its flow, which a separate flow dataset defines
copyright: true

## General comment
Feuerverzinktes Stahlband der voestalpine Stahl GmbH besteht aus einem über die Hochofenroute hergestellten Stahlband mit einem Zink bzw. Zink-Magnesium-Überzug sowie einer vom Kunden gewünschten Nachbehandlung (z.B. Ölung). In die Durchschnittsbetrachtung einbezogen wurden im Wesentlichen niedrig legierte Weichstähle, aber auch pressgehärtete Stähle und höherfeste Mehrphasenstähle.

Für das Inverkehrbringen von Baustählen in der EU/EFTA (mit Ausnahme der Schweiz) gilt die Verordnung (EU) Nr. 305/2011. Die Produkte benötigen eine Leistungserklärung unter Berücksichtigung der Norm /DIN EN 10025:2005/, Warmgewalzte Erzeugnisse aus Baustählen und die CE-Kennzeichnung.

## Technology and included processes
Das Ausgangsmaterial für die Herstellung des feuerverzinkten Bandes ist Rohstahl, der über die Primärroute (Hochofen, LD Stahlwerk) hergestellt wird. Der flüssige Rohstahl wird mittels Stanggussverfahren zu Brammen gegossen. Die gegossenen Brammen werden über Stoß- bzw. Hubbalkenofen erneut auf 1100 - 1250°C erwärmt und in mehreren Walzschritten zu Bändern mit einer Dicke von 1,2 - 4 mm gewalzt. Auf dem Warmband bildet sich eine Walzzunderschicht aus, die vor deren Weiterverarbeitung im Kaltwalzwerk entfernt wird (Entzundern). Dieser Produktionsschritt verläuft zuerst durch eine mechanische Lockerung der Zunderschicht (Streckrichtanlage). In weiterer Folge wird das Stahlband mittels Salz- und Schwefelsäure gebeizt. Nach dem Beizen wird das Band gespült, getrocknet und eingeölt. Das gebeizte Warmband wird im Kaltwalzwerk der voestalpine weiterverarbeitet. Das Stahlband kann auf Dicken zwischen 0,3 und 3 mm gewalzt werden. Zur Wiederherstellung der Verformbarkeit des Stahlbandes bzw. zur Herstellung eines Werkstoffes mit bestimmten Materialeigenschaften wird eine Wärmebehandlung (Haubengühe oder Kontiglühe) durchgeführt. Diese Wärmebehandlung wird in Kombination mit einem Schmelztauchverfahren zur Oberflächenveredelung in den Feuerverzinkungsanlagen der voestalpine vorgenommen. Die Oberflächenveredelung mit metallischer Beschichtung (Zink oder Zink Magnesium) sorgt für einen kathodischen Korrosionsschutz des Stahlbands.
Technische Daten:
Maßgebend sind die in der Leistungserklärung aufgeführten Daten.
Deklarierte Einheit:
Die vorliegende Umweltproduktdeklaration bezieht sich auf eine deklarierte Einheit von 1 m² feuerverzinktem Stahlband mit einem durchschnittlichen Flächengewicht von 9 kg/m² und einer Referenzstärke von 1,13 mm. Für andere Stärken ist die lineare Umrechnung der Ökobilanzergebnisse über das Flächengewicht möglich.

## Technical purpose
Die Anwendungsbereiche der feuerverzinkten Stahlbänder betreffen viele Branchen und Bereiche - aufgeteilt in mehrere Segmente:

- Hausgeräteindustrie

- Haustechnik

- Dach/Wand/Entwässerung

- Profilindustrie

- Rohrindustrie

- Nutzfahrzeugindustrie

- Automobilzulieferindustrie

- Automobilindustrie

Das feuerverzinkte Band der voestalpine wird in unterschiedlichen Zink- bzw. Zink-/Magnesium-Überzügen sowie in verschiedensten Oberflächen-Qualitäten ausgeliefert. Durch zusätzliche Nachbehandlungsschritte (Ölung, Passivierung oder Anti-Finger-Print-Systeme) weist das deklarierte Produkt einen hohen Korrosionsschutz und sehr gute Verarbeitungseigenschaften (z.B. Rollen, Tiefziehen, etc.) auf.

## Reference product
- Feuerverzinktes Stahlband [9 kg/m²]: 1

## Inputs
- Erneuerbare Primärenergie als Energieträger (PERE) [MJ]: A1-A3 11.7, C3 0, C4 0.024, D 7.54
- Erneuerbare Primärenergie zur stofflichen Nutzung (PERM) [MJ]: A1-A3 0, C3 0, C4 0, D 0
- Total erneuerbare Primärenergie (PERT) [MJ]: A1-A3 11.7, C3 0, C4 0.024, D 7.54
- Nicht-erneuerbare Primärenergie als Energieträger (PENRE) [MJ]: A1-A3 191, C3 0, C4 0.325, D -110
- Nicht-erneuerbare Primärenergie zur stofflichen Nutzung (PENRM) [MJ]: A1-A3 0, C3 0, C4 0, D 0
- Total nicht erneuerbare Primärenergie (PENRT) [MJ]: A1-A3 191, C3 0, C4 0.325, D -110
- Einsatz von Sekundärstoffen (SM) [kg]: A1-A3 1.29, C3 0, C4 0, D 7.2885
- Erneuerbare Sekundärbrennstoffe (RSF) [MJ]: A1-A3 0, C3 0, C4 0, D 0
- Nicht erneuerbare Sekundärbrennstoffe (NRSF) [MJ]: A1-A3 0, C3 0, C4 0, D 0
- Einsatz von Süßwasserressourcen (FW) [m^3]: A1-A3 0.0417, C3 0, C4 -1.53e-7, D 0.0157

## Outputs
- Gefährlicher Abfall zur Deponie (HWD) [kg]: A1-A3 3.56e-6, C3 0, C4 1.74e-9, D -7.66e-6
- Entsorgter nicht gefährlicher Abfall (NHWD) [kg]: A1-A3 0.21, C3 0, C4 0.453, D 1.26
- Entsorgter radioaktiver Abfall (RWD) [kg]: A1-A3 0.00214, C3 0, C4 4.53e-6, D 3.77e-6
- Komponenten für die Wiederverwendung (CRU) [kg]: A1-A3 0, C3 0, C4 0, D 0
- Stoffe zum Recycling (MFR) [kg]: A1-A3 0, C3 8.55, C4 0, D 0
- Stoffe für die Energierückgewinnung (MER) [kg]: A1-A3 0, C3 0, C4 0, D 0
- Exportierte elektrische Energie (EEE) [MJ]: A1-A3 0, C3 0, C4 0, D 0
- Exportierte thermische Energie (EET) [MJ]: A1-A3 0, C3 0, C4 0, D 0

## Impact indicators
- Globales Erwärmungspotenzial (GWP) [kg CO_(2)-Äq.]: A1-A3 19.9, C3 0, C4 0.0216, D -11.7
- Abbau Potential der stratosphärischen Ozonschicht (ODP) [kg CFC11-Äq.]: A1-A3 6e-11, C3 0, C4 5.72e-15, D 6.54e-8
- Versauerungspotenzial von Boden und Wasser (AP) [kg SO_(2)-Äq.]: A1-A3 0.0527, C3 0, C4 6.01e-5, D -0.0231
- Eutrophierungspotenzial (EP) [kg PO_(4)^(3)-Äq.]: A1-A3 0.00486, C3 0, C4 7.56e-6, D -0.00171
- Bildungspotential für troposphärisches Ozon (POCP) [kg Ethen-Äq.]: A1-A3 0.00608, C3 0, C4 5.41e-6, D -0.00541
- Potenzial für den abiotischen Abbau nicht fossiler Ressourcen (ADPE) [kg Sb-Äq.]: A1-A3 0.000711, C3 0, C4 2.34e-9, D -3.59e-5
- Potenzial für den abiotischen Abbau fossiler Brennstoffe (ADPF) [MJ]: A1-A3 186, C3 0, C4 0.313, D -114

## Use advice
Gültigkeitsbereich:
Die vorliegende Umweltproduktdeklaration bezieht sich auf eine deklarierte Einheit von 1 m² durchschnittlichem, feuerverzinktem Stahlband mit einem Flächengewicht von 9 kg/m² produziert am Standort Linz.
Systemgrenze:
Die Ökobilanz des durchschnittlichen feuerverzinkten Stahlbandes beinhaltet eine cradle-to-gate-Betrachtung (Wiege bis zum Werkstor) der auftretenden Umweltwirkungen mit Optionen. Die folgenden Lebenszyklusphasen werden in der Analyse berücksichtigt:

Modul A1-A3 | Produktionsstadium

Das Produktionsstadium beinhaltet die Aufwendungen der Rohstoffversorgung (Kohle, Eisenerz, Pellets, etc.) sowie der damit verbundenen Transporte zum Produktionsstandort Linz. Am Standort wurden die für die Kokerei, für die Sinteranlage, in den Hochöfen, im Stahl- und Walzwerk sowie bei der Feuerverzinkung benötigten Material- und Energieflüsse erfasst. Die Energiebereitstellung am Standort Linz erfolgt über ein Kraftwerk, in dem Hüttengase zur Energiegewinnung verwertet werden. Da mehr Energie verbraucht wird, als durch das eigene Kraftwerk zur Verfügung steht, werden zusätzlich Erdgas und elektrische Energie vom österreichischen Netz bezogen. Auch die Produktion der Verpackung des feuerverzinkten Stahlbands ist in Modul A1-A3 erfasst.

Modul C3 | Abfallbehandlung

Jener Produktfluss, der das Modul D zum Recycling erreicht, verlässt das Produktsystem in C3. Aufwendungen für die Zerkleinerung und Sortierung des Stahlschrottes sind nicht enthalten.

Modul C4 | Entsorgung

Das Modul C4 deklariert die durch die Deponierung (5 % des Produktes) entstehenden Umweltwirkungen.

Modul D | Gutschriften und Lasten außerhalb der Systemgrenze

Im Modul D werden die Substitutionspotentiale von Primärstahl durch ein Recyclingszenario (95 % des Produktes) dargestellt.

## Data sources
- Feuerverzinktes Stahlband.pdf
- GaBi Database (all versions)
- GaBi database SP33 2017
