# GIPS-KALKPUTZ / Tool

Dataset: ILCD process, EPD, average dataset
Geography: DE
Reference year: 2021
Valid until: 2026
Classification: OEKOBAU.DAT: Mineralische Baustoffe / Mörtel und Beton / Putz und Putzmörtel
Classification: IBUCategories: 02 Bauprodukte / Mauerwerk und Mörtel / Mineralische Werkmörtel
Method details: Mineralische Werkmörtel.pdf
Generated by: Sphera Solutions GmbH
Registration number: EPD-BVG-20210164-IBE1-DE
Owner: Bundesverband der Gipsindustrie e.V.
Compliance: DIN EN 15804+A2; ISO 14025
Review: Accredited third party review by Institut Bauen und Umwelt e. V.
Amounts: rows without a unit in brackets have none in this file; such an amount is in the reference unit of its flow, which a separate flow dataset defines
copyright: true
licenseType: Free of charge for all users and uses
accessRestrictions: None

## General comment
Gipsbinder nach /DIN EN 13279-1/ ist das Ausgangsprodukt für die industrielle Herstellung der verschiedenen Gips-Trockenmörtel, aber auch für alle vorgefertigten Elemente aus Gips. Er wird durch das Calcinieren von Calciumsulfat-Dihydrat (CaSO4 · 2 H2O) gewonnen und besteht aus Calciumsulfat in seinen verschiedenen Hydratphasen, z. B. Halbhydrat (CaSO4 · ½ H2O) und Anhydrit (CaSO4).

Gipsbinder ist ein abbindefähiges, zu Pulverform gemahlenes Material, dessen Abbindeprozess durch die Zugabe von Wasser gestartet wird. Dies kann auf der Baustelle geschehen (Gips-Trockenmörtel, Gipsspachtel und Gipskleber), oder aber im Werk im Rahmen der Herstellung von Platten.

Gipsbinder bildet die Grundlage für die Herstellung von Gips-Trockenmörteln (Gipsmaschinenputz, Gipshandputz), Gips-Spachtelmaterialien, Gipsklebern sowie für Modell-, Stuck- und Ansetzgipse.

## Technology and included processes
Beim Herstellungsprozess werden Rohgipse zu Gipsbinder gebrannt, dort liegen als Gipsphasen Halbhydrat, Anhydrit III und Anhydrit II vor. Gips-Trockenmörtel enthalten darüber hinaus Zuschläge wie Kalksteinmehl, Sand oder Perlite und Additive wie Abbindeverzögerer oder Cellulosederivate, die dem kalzinierten Calciumsulfaten trocken zudosiert werden.
Technische Daten:
Die technischen Daten ergeben sich aus folgenden
Normen:
Anforderungen an Gips-Trockenmörtel nach DIN EN 13279-1:2008-11, Gipsbinder und Gips-Trockenmörtel - Teil 1: Begriffe und Anforderungen. /DIN EN 13279-1/.
Daneben gilt für Füll-, Fein- und Fugenspachtel DIN EN 13963:2014-09, Materialien für das Verspachteln von Gipsplattenfugen - Begriffe, Anforderungen und Prüfverfahren /DIN EN 13963/.
Weitere technische Daten beziehen sich auf die
ausgehärteten Produkte nach der Weiterverarbeitung
mit Wasser auf der Baustelle. Diese bautechnischen
Daten, die sich auf den Lebenszyklus nach Verlassen
des Werkstores beziehen, ergeben sich erst nach
Verarbeitung gemäß den Hinweisen des Herstellers für
die Erstellung des Gebäudes. Daher werden diese
Eigenschaften hier aus systematischen Gründen nicht
aufgeführt.
Nähere Informationen dazu können bei Bedarf aus den
Normenwerken, dem Gips-Datenbuch des
Bundesverbandes der Gipsindustrie e.V. /Gips-
Datenbuch/, sowie den Informationen der Hersteller
(Mitgliedsunternehmen des Bundesverbandes der
Gipsindustrie e. V. auf
https://www.gips.de/epd-ansprechpartner/baugipse/)
entnommen werden.
Deklarierte Einheit:
Die deklarierte Einheit ist 1 kg Gips-Kalkputz in Lieferform (Pulverprodukt, unvermischt mit Wasser).

Materialbedarf und Ergiebigkeit sind den Angaben zum Produkt zu entnehmen oder können beim Hersteller angefragt werden.

## Technical purpose
Gipsbinder können für verschiedene Anwendungen hergestellt werden, die der jeweiligen Bezeichung nach europäischer Norm oder traditioneller, ggf. abweichender Bezeichnung, nur in Verbindung mit den vom Hersteller angegebenen Anwendungen entnommen werden können. Eine Übersicht gibt das Gips-Datenbuch des Bundesverbandes der Gipsindustrie e.V. /Gips-Datenbuch/ und das IGB Handbuch Gipsputze /IGB/ der Industriegruppe Baugipse im Bundesverband der Gipsindustrie e.V..

## Reference product
- 1 kg Gips-Kalkputz: 1

## Inputs
- Erneuerbare Primärenergie als Energieträger (PERE) [MJ]: A1-A3 0.04082, A4 0.000533, A5 0.000553, C1 2.73e-5, C2 0.000268, C3 0, C4 0.0261, D 0
- Erneuerbare Primärenergie zur stofflichen Nutzung (PERM) [MJ]: A1-A3 0, A4 0, A5 0, C1 0, C2 0, C3 0, C4 0, D 0
- Total erneuerbare Primärenergie (PERT) [MJ]: A1-A3 0.04082, A4 0.000533, A5 0.000553, C1 2.73e-5, C2 0.000268, C3 0, C4 0.0261, D 0
- Nicht-erneuerbare Primärenergie als Energieträger (PENRE) [MJ]: A1-A3 2.24, A4 0.169, A5 0.0015, C1 0.00867, C2 0.0849, C3 0, C4 0.199, D 0
- Nicht-erneuerbare Primärenergie zur stofflichen Nutzung (PENRM) [MJ]: A1-A3 0, A4 0, A5 0, C1 0, C2 0, C3 0, C4 0, D 0
- Total nicht erneuerbare Primärenergie (PENRT) [MJ]: A1-A3 2.24, A4 0.169, A5 0.0015, C1 0.00867, C2 0.0849, C3 0, C4 0.199, D 0
- Einsatz von Sekundärstoffen (SM) [kg]: A1-A3 0.432, A4 0, A5 0, C1 0, C2 0, C3 0, C4 0, D 0
- Erneuerbare Sekundärbrennstoffe (RSF) [MJ]: A1-A3 0, A4 0, A5 0, C1 0, C2 0, C3 0, C4 0, D 0
- Nicht erneuerbare Sekundärbrennstoffe (NRSF) [MJ]: A1-A3 0, A4 0, A5 0, C1 0, C2 0, C3 0, C4 0, D 0
- Einsatz von Süßwasserressourcen (FW) [m^3]: A1-A3 0.00010362, A4 9.57e-7, A5 0.000301, C1 4.9e-8, C2 4.8e-7, C3 0, C4 5.02e-5, D 0

## Outputs
- Gefährlicher Abfall zur Deponie (HWD) [kg]: A1-A3 2.9066e-9, A4 1.64e-11, A5 1.1e-12, C1 8.41e-13, C2 8.24e-12, C3 0, C4 3.03e-9, D 0
- Entsorgter nicht gefährlicher Abfall (NHWD) [kg]: A1-A3 0.0005125, A4 1.73e-5, A5 8.64e-5, C1 8.86e-7, C2 8.68e-6, C3 0, C4 1, D 0
- Entsorgter radioaktiver Abfall (RWD) [kg]: A1-A3 1.1703e-5, A4 1.82e-7, A5 1.84e-7, C1 9.3e-9, C2 9.11e-8, C3 0, C4 2.26e-6, D 0
- Komponenten für die Wiederverwendung (CRU) [kg]: A1-A3 0, A4 0, A5 0, C1 0, C2 0, C3 0, C4 0, D 0
- Stoffe zum Recycling (MFR) [kg]: A1-A3 0.0034, A4 0, A5 0, C1 0, C2 0, C3 0, C4 0, D 0
- Stoffe für die Energierückgewinnung (MER) [kg]: A1-A3 0, A4 0, A5 0, C1 0, C2 0, C3 0, C4 0, D 0
- Exportierte elektrische Energie (EEE) [MJ]: A1-A3 0, A4 0, A5 0.00729, C1 0, C2 0, C3 0, C4 0, D 0
- Exportierte thermische Energie (EET) [MJ]: A1-A3 0, A4 0, A5 0.0132, C1 0, C2 0, C3 0, C4 0, D 0

## Impact indicators
- Globales Erwärmungspotenzial total (GWP-total) [kg CO_(2)-Äq.]: A1-A3 0.1584, A4 0.0125, A5 9.31e-5, C1 0.000639, C2 0.00629, C3 0, C4 0.0152, D 0
- Globales Erwärmungspotenzial fossil (GWP-fossil) [kg CO_(2)-Äq.]: A1-A3 0.1564, A4 0.012, A5 8.98e-5, C1 0.000638, C2 0.00601, C3 0, C4 0.0152, D 0
- Globales Erwärmungspotenzial biogen (GWP-biogenic) [kg CO_(2)-Äq.]: A1-A3 0.0019925, A4 0.000551, A5 3.16e-6, C1 9.33e-7, C2 0.000277, C3 0, C4 6.33e-7, D 0
- Globales Erwärmungspotenzial luluc (GWP-luluc) [kg CO_(2)-Äq.]: A1-A3 3.6666e-5, A4 2.84e-7, A5 1.14e-7, C1 1.45e-8, C2 1.42e-7, C3 0, C4 4.37e-5, D 0
- Abbau Potential der stratosphärischen Ozonschicht (ODP) [kg CFC11-Äq.]: A1-A3 1.1041e-16, A4 1.26e-18, A5 1.59e-18, C1 6.45e-20, C2 6.32e-19, C3 0, C4 5.62e-17, D 0
- Versauerungspotenzial von Boden und Wasser (AP) [mol H^(+)-Äq.]: A1-A3 0.0001539, A4 1.12e-5, A5 1.92e-7, C1 3.02e-6, C2 5.64e-6, C3 0, C4 0.000109, D 0
- Eutrophierungspotenzial Süßwasser (EP-freshwater) [kg PO_(4)-Äq.]: A1-A3 5.846e-8, A4 2.55e-9, A5 3.62e-9, C1 1.31e-10, C2 1.28e-9, C3 0, C4 2.6e-8, D 0
- Eutrophierungspotenzial Salzwasser (EP-marine) [kg N-Äq.]: A1-A3 5.32e-5, A4 3.41e-6, A5 5.83e-8, C1 1.42e-6, C2 1.71e-6, C3 0, C4 2.8e-5, D 0
- Eutrophierungspotenzial Land (EP-terrestrial) [mol N-Äq.]: A1-A3 0.000585, A4 3.82e-5, A5 4.83e-7, C1 1.55e-5, C2 1.92e-5, C3 0, C4 0.000308, D 0
- Bildungspotential für troposphärisches Ozon (POCP) [kg NMVOC-Äq.]: A1-A3 0.0001594, A4 9.97e-6, A5 1.27e-7, C1 4.02e-6, C2 5e-6, C3 0, C4 8.48e-5, D 0
- Potenzial für den abiotischen Abbau nicht fossiler Ressourcen (ADPE) [kg Sb-Äq.]: A1-A3 7.47e-9, A4 3.58e-10, A5 2.15e-11, C1 1.83e-11, C2 1.79e-10, C3 0, C4 1.36e-9, D 0
- Potenzial für den abiotischen Abbau fossiler Brennstoffe (ADPF) [MJ]: A1-A3 2.243, A4 0.169, A5 0.0015, C1 0.00866, C2 0.0848, C3 0, C4 0.199, D 0
- Wassernutzung (WDP) [m^(3) Welt-Äq. entzogen]: A1-A3 0.003217, A4 2.34e-5, A5 0.0129, C1 1.2e-6, C2 1.17e-5, C3 0, C4 0.00159, D 0
- Auftreten von Krankheiten aufgrund von Feinstaubemissionen (PM) [Krankheitsfälle]: A1-A3 7.069e-9, A4 6.1e-11, A5 2.15e-12, C1 3.4e-11, C2 3.06e-11, C3 0, C4 1.35e-9, D 0
- Wirkung durch Exposition des Menschen mit U235 (IR) [kBq U235-Äq.]: A1-A3 0.0018518, A4 2.6e-5, A5 2.99e-5, C1 1.33e-6, C2 1.3e-5, C3 0, C4 0.000232, D 0
- Toxizitätsvergleichseinheit für Ökosysteme (ETP-fw) [CTUe]: A1-A3 0.847, A4 0.12, A5 0.00106, C1 0.00614, C2 0.0601, C3 0, C4 0.114, D 0
- Toxizitätsvergleichseinheit für Menschen (krebserregend) (HTP-c) [CTUh]: A1-A3 2.747e-11, A4 2.26e-12, A5 3.53e-14, C1 1.15e-13, C2 1.13e-12, C3 0, C4 1.68e-11, D 0
- Toxizitätsvergleichseinheit für Menschen (nicht krebserregend) (HTP-nc) [CTUh]: A1-A3 1.381e-9, A4 9.64e-11, A5 2.48e-12, C1 5.95e-12, C2 4.84e-11, C3 0, C4 1.86e-9, D 0
- Bodenqualitätsindex (SQP) [SQP]: A1-A3 0.04264, A4 0.000435, A5 0.000415, C1 2.23e-5, C2 0.000218, C3 0, C4 0.0415, D 0

## Use advice
Gültigkeitsbereich:
Die EPD gilt für die Mitgliedsunternehmen des
Bundesverbandes der Gipsindustrie e.V. gemäß
aktueller Mitgliederliste auf
https://www.gips.de/epd-ansprechpartner/baugipse/
für die in Deutschland hergestellten Produkte. Die
Ökobilanz berücksichtigt spezifische Informationen der
Hersteller und der Zulieferer von Komponenten für den
gesamten Lebenszyklus.
Systemgrenze:
Typ der EPD gemäß EN 15804+A2:
Von der Wiege bis zum Werkstor mit

- Optionen (A4–A5),

- Module C1–C4 und
- Modul D
(A1–A3 + C + D und zusätzliche Module: A4 und A5).

Die Module A1–A3 (Produktionsstadium) enthalten die
Rohstoffproduktion basierend auf deutschen Randbedingungen und deren Transporte, die Energiebereitstellung (Strom-Mix Deutschland) sowie Herstellungsprozesse, die für die Produktion sämtlicher Komponenten für das Erzeugnis Gips-Kalkputz erforderlich sind. Da im Allgemeinen die Gipsplatten lose zur Baustelle transportiert werden, ist keine Verpackung berücksichtigt.

Modul A4 enthält den Transport zur Baustelle.

Modul A5 umfasst den Einbau auf der Baustelle
inklusive Entsorgung etwaiger Verpackung unter Berücksichtigung europäischer Randbedingungen.

Modul C1 deklariert den Rückbau (maschinell).

Modul C2 enthält den Transport zum Ort der
Verwertung oder Entsorgung.

Modul C4 deklariert die Deponierung.

Modul D enthält potenzielle Gutschriften infolge der
energetischen Verwertung der Verpackung (in Modul
A5). In diesem Fall sind diese "0", da das Produkt lose vertrieben wird.

## Data sources
- GaBi Database (all versions)
- GaBi Database Edition 2021, CUP 2021.01
