# PVC Fußbodenbelag

Dataset: ILCD process, EPD, generic dataset
Geography: DE
Reference year: 2018
Valid until: 2022
Classification: oekobau.dat: Kunststoffe / Bodenbeläge / PVC-Bodenbeläge
Owner: thinkstep
Compliance: DIN EN 15804
Review: Dependent internal review by thinkstep, IABP-GaBi, IBP-GaBi; Independent external review by GaBi user forum, GaBi bug forum, GaBi user community
Amounts: rows without a unit in brackets have none in this file; such an amount is in the reference unit of its flow, which a separate flow dataset defines
copyright: true

## General comment
Dieser Datensatz wurde nach dem European Standard EN 15804 für Nachhaltiges Bauen modelliert. Ergebnisse werden in Modulen abgebildet, die den strukturierten Ausdruck von Ergebnissen über den gesamten Lebenszyklus zulassen.

## Geography
Der Datensatz bildet die länderspezifische Situation in Deutschland ab. Dabei werden Haupttechnologien, spezifische regionale Charakteristiken und ggf. Importstatistiken berücksichtigt.

## Time period
Jährlicher Durchschnitt

## Technology and included processes
Es gibt sechs theoretische Verfahrensschritte zur Herstellung homogener PVC-Böden. Im ersten Schritt werden die Rohstoffe gemischt und erhitzt. Die Mischung wird mit Weichmachern und Pigmenten homogenisiert. Nach dem Laminieren wird eine Platte geformt und abgekühlt, um die Lackierung der Platte zu ermöglichen. Die Oberfläche kann durch mechanische Prägung bearbeitet werden, um eine Textur zu erzeugen und das Material zu straffen. Anschließend wird die Platte beschnitten, geprüft und verpackt.

Hintergrundsystem:
Strom: Die Stromerzeugung wird entsprechend der länderspezifischen Randbedingungen modelliert. Die landesspezifische Analyse beinhaltet:
1.: Spezifische Kraftwerke der verschiedenen fossilen Energieträger und der Einsatz erneuerbarer Energien sind entsprechend der länderspezifischen Energieträgermixe modelliert. Die Analyse bezieht Stromimporte aus den Nachbarländern, Transmissions-und Verteilungsverluste und den Eigenverbrauch im Kraftwerk und bei der Verteilung bzw. Speicherung, z. B. durch Pumpspeicherwerke, ein.
2.: Die landes-/regionalspezifischen Technologiestandards sowie die Erzeugung in Elektrizitätskraftwerken und/oder in speziellen Kraftwerken mit Kraft-Wärme-Kopplung (KWK) sind berücksichtigt.
3.: Die länderspezifische Energieträgerbereitstellung (mit Anteil der Importe und/oder Eigenversorgung) einschließlich der Energieträger-Eigenschaften (z. B. Elementar- und Energiegehalte) werden berücksichtigt.
4.: Die Förderung, Produktion, Verarbeitung und Transportprozesse werden entsprechend der Situation im jeweiligen Stromerzeugerland modelliert. Die unterschiedlichen Produktions- und Verarbeitungsverfahren (Emissionen und Wirkungsgrade) in den verschiedenen Energieerzeugerländern werden einbezogen, z. B. Rohöl-Veredelungsverfahren oder Abfackel-Raten an den Ölplattformen.
Thermische Energie, Prozessdampf: Die Erzeugung von Dampf und thermischer Energie in Heizkraftwerken wird entsprechend der landesspezifischen Situation (Emissionsgrenzwerte, Energieträgerbasis) modelliert.
Der Wirkungsgrad für die thermische Energieerzeugung beträgt per Definition 100% des Energieträgereinsatzes. Für Prozessdampf liegt der Wirkungsgrad im Bereich von 85-95%. Die zur Heizenergie-Erzeugung verwendeten Energieträger werden entsprechend der nationalen Situation modelliert (siehe Kapitel Strom oben).
Transporte: Alle relevanten und bekannten Transportprozesse in Form von See- und Binnenschiffsverkehr sowie Bahn-, Lkw- und der Leitungstransport sind enthalten.
Energieträger: Die Energieträger werden entsprechend der spezifischen Versorgungslage modelliert (siehe Kapitel Strom oben).
Raffinerieprodukte: Diesel, Benzin, technische Gase, Heizöl, Schmierstoffe und Rückstände, wie Bitumen, werden mit einem parametrierten länderspezifische Raffineriemodell modelliert. Das Raffinerie-Modell bezieht die länderspezifischen Veredelungsverfahren (z. B. Emissionspegel, interner Energieverbrauch etc.) und das länderspezifische Produktspektrum ein, das sich je nach Land stark unterscheiden kann. Die Rohöl-Förderung wird gemäß der länderspezifischen Situation mit den jeweiligen Energieträger-Eigenschaften modelliert.

## Technical purpose
Homogene PVC-Bodenbeläge sind elastische Bodenbeläge, die in einer oder mehreren Schichten der gleichen Zusammensetzung und Farbe über die gesamte Dicke hergestellt werden. Elastische Bodenbeläge können verschiedene Funktionalitäten bieten (akustische, statische Kontrolle, Rutschfestigkeit, einfache Wartung usw.), um einem breiten Spektrum von Haushalts-, Gewerbe- und Industrieanwendungen gerecht zu werden. Sie sind in einer Vielzahl von Mustern und Farben erhältlich.

## Safety margin
20 %. Produktsystem bis auf wenige Prozesse/Flüsse abgebildet. Technologische, zeitliche und geographische Repräsentativität teilweise gegeben.

## Reference product
- PVC Fußbodenbelag [m2]: 1

## Inputs
- Erneuerbare Primärenergie als Energieträger (PERE) [MJ]: A1-A3 22.1819, C1 0, C2 0.00719136, C3 6.53396, D -9.09697
- Erneuerbare Primärenergie zur stofflichen Nutzung (PERM) [MJ]: A1-A3 0, C1 0, C2 0, C3 0, D 0
- Total erneuerbare Primärenergie (PERT) [MJ]: A1-A3 22.1819, C1 0, C2 0.00719136, C3 6.53396, D -9.09697
- Nicht-erneuerbare Primärenergie als Energieträger (PENRE) [MJ]: A1-A3 90.349, C1 0, C2 0.123529, C3 102.261, D -32.2779
- Nicht-erneuerbare Primärenergie zur stofflichen Nutzung (PENRM) [MJ]: A1-A3 79.2, C1 0, C2 0, C3 -79.2, D 0
- Total nicht erneuerbare Primärenergie (PENRT) [MJ]: A1-A3 169.549, C1 0, C2 0.123529, C3 23.0608, D -32.2779
- Einsatz von Sekundärstoffen (SM) [kg]: A1-A3 0, C1 0, C2 0, C3 0, D 0
- Erneuerbare Sekundärbrennstoffe (RSF) [MJ]: A1-A3 0, C1 0, C2 0, C3 0, D 0
- Nicht erneuerbare Sekundärbrennstoffe (NRSF) [MJ]: A1-A3 0, C1 0, C2 0, C3 0, D 0
- Einsatz von Süßwasserressourcen (FW) [m3]: A1-A3 0.0415336, C1 0, C2 6.44047e-6, C3 0.0222093, D -0.00424445

## Outputs
- Gefährlicher Abfall zur Deponie (HWD) [kg]: A1-A3 4.26461e-6, C1 0, C2 4.61615e-9, C3 1.17421e-7, D -1.70108e-8
- Entsorgter nicht gefährlicher Abfall (NHWD) [kg]: A1-A3 1.14218, C1 0, C2 2.16815e-5, C3 7.10882, D -0.0150817
- Entsorgter radioaktiver Abfall (RWD) [kg]: A1-A3 0.00285223, C1 0, C2 1.30051e-7, C3 0.000927671, D -0.00109901
- Komponenten für die Wiederverwendung (CRU) [kg]: A1-A3 0, C1 0, C2 0, C3 0, D 0
- Stoffe zum Recycling (MFR) [kg]: A1-A3 0, C1 0, C2 0, C3 0, D 0
- Stoffe für die Energierückgewinnung (MER) [kg]: A1-A3 0, C1 3.96, C2 0, C3 0, D 0
- Exportierte elektrische Energie (EEE) [MJ]: A1-A3 0, C1 0, C2 0, C3 8.72225, D 0
- Exportierte thermische Energie (EET) [MJ]: A1-A3 0, C1 0, C2 0, C3 20.6082, D 0

## Impact indicators
- Globales Erwärmungspotenzial (GWP) [kg CO2 Äquiv.]: A1-A3 8.191, C1 0, C2 0.0091907, C3 10.8467, D -2.20199
- Abbaupotenzial der stratosphärischen Ozonschicht (ODP) [kg R11 Äquiv.]: A1-A3 6.91302e-10, C1 0, C2 3.04216e-18, C3 3.62701e-14, D -5.02988e-14
- Versauerungspotential (AP) [kg SO2 Äquiv.]: A1-A3 0.0110353, C1 0, C2 1.85642e-5, C3 0.00245437, D -0.00184965
- Eutrophierungspotential (EP) [kg Phosphat Äquiv.]: A1-A3 0.00211538, C1 0, C2 4.41323e-6, C3 0.000521682, D -0.000350213
- Bildungspotenzial für troposphärisches Ozon (POCP) [kg Ethen Äquiv.]: A1-A3 0.00225897, C1 0, C2 -5.56184e-6, C3 0.000331428, D -0.000189028
- Potenzial für den abiotischen Abbau nicht fossiler Ressourcen (ADPE) [kg Sb Äquiv.]: A1-A3 9.55392e-6, C1 0, C2 7.73406e-10, C3 3.738e-7, D -5.41662e-7
- Potenzial für den abiotischen Abbau fossiler Brennstoffe (ADPF) [MJ]: A1-A3 162.342, C1 0, C2 0.123197, C3 20.7191, D -29.5035

## Use advice
Dieser Datensatz bezieht sich auf die Herstellung von 1 m² homogenem Polyvinylchlorid-Bodenbelag mit einem Flächengewicht von 3,3 kg/m² und einer Dicke von 2 mm. Die Hauptkomponenten sind PVC-Polymere und Füllstoffe mit Weichmachern und Additiven wie Pigmenten.

Der Datensatz repräsentiert ein Cradle to Gate Inventar. Er kann verwendet werden, um die Lieferkette des jeweiligen Produktes in einer repräsentativen Weise zu charakterisieren. Die Kombination mit einzelnen Einheitenprozessen und diesem Produkt ermöglicht die Erstellung von anwenderspezifischen (Produkt-) LCAs

## Data sources
- GaBi databases
- GaBi Database Edition 2020, SP40
- GaBi database (all versions)
