# Flachdachbefestigungssysteme

Dataset: ILCD process, EPD, average dataset
Geography: RER
Reference year: 2021
Valid until: 2026
Classification: OEKOBAU.DAT: Komponenten von Fenstern und Vorhangfassaden / Beschläge / Befestigungen
Classification: IBUCategories: 02 Bauprodukte / Befestigungen / Dübel aus Kunststoff und Metall
Method details: Dübel aus Kunststoff und Metall.pdf
Generated by: brands and values GmbH
Registration number: EPD-EJO-20210059-IBD1-DE
Owner: EJOT BAUBEFESTIGUNGEN GmbH
Compliance: DIN EN 15804+A2; ISO 14025
Review: Accredited third party review by Institut Bauen und Umwelt e. V.
Amounts: rows without a unit in brackets have none in this file; such an amount is in the reference unit of its flow, which a separate flow dataset defines
copyright: true
licenseType: Free of charge for all users and uses
accessRestrictions: None

## General comment
Das Flachdachbefestigungssystem wird aus Kombinationen der Schrauben mit Haltetellern aus Metall oder Kunststoff oder Kunststoffhülsen mit bereits vorassemblierter Schraube gebildet.

Die vorliegende Deklaration beschreibt ein hypothetisches, allgemeines Flachdachbefestigungssystem der Gesamtlänge 160mm/200mm/240mm und ist somit gültig für alle nachfolgend genannten Befestigungskombinationen, die nach /Europäisch Technischer Zulassung ETA 07-0013 für die mechanische Sicherung von Flachdachaufbauten gegen Windsogkräfte verwendet werden dürfen.

Sollten andere als die oben angeführten genannten Gesamtlängen berechnet werden müssen, so ist eine Interpolation möglich.

## Technology and included processes
Die Hülsen aus Kunststoff werden nach konventionellen Spritzgusstechniken hergestellt. Dazu wird mit einer Spritzgießmaschine der jeweilige Kunststoff in einer Spritzeinheit plastifiziert und in ein Spritzgießwerkzeug eingespritzt. Der Hohlraum, die Kavität, des Werkzeugs bestimmt die Form und die Oberflächenstruktur des fertigen Teils (hier Kunststoffhülse oder Kunststoffhalteteller). Schrauben: Der weitaus größte Teil von Schrauben und Verbindungselementen wird durch spanlose Kaltumformung hergestellt. Das Kaltfließ-pressverfahren: Das Ausgangsmaterial wird als „Draht“ auf Spulen aufgewickelt angeliefert und in den Pressen vorgeschalteten Anlagen abgehaspelt, gerichtet und gegebenenfalls auf den gewünschten Durchmesser reduziert. Moderne Kaltfließpressen arbeiten mehrstufig, d.h. pro Hub sind mehrere Operationen hintereinander verkettet, bspw. Schraubenkopf vorformen, stauchen, abgraten und Gewindeteil reduzieren. Im nachfolgenden Prozess werden die Gewinde durch Gewindewalzmaschinen mit Flachbacken oder Roll- und Segmentwerkzeugen spanlos auf die reduzierten Gewindeteile aufgerollt. Vorzugsweise verwendet man Kaltfließpressen mit integrierter Gewinderollmaschine. Die EJOT Baubefestigungen GmbH ist gemäß ISO 9001 zertifiziert.
Technische Daten:
Bautechnische Daten

Bezeichnung

Wert

Einheit

Schraubendurchmesser

4,8 – 8,0

mm

Längenspektrum

25 - 605

mm

Tellerdurchmesser

40 - 82

mm

Verankerungstiefen

20 - 65

mm

Char. Zugtragfähigkeiten

0,86 – 2,61

kN

Siehe ETA 07-0013 nach ETAG 006
Deklarierte Einheit:
Die deklarierte Einheit ist ein durchschnittliches System zur Befestigung von 1 m2 Flachdach mit einer spezifischen Länge von 200 mm, bestehend aus drei einzelnen Systemen. „Durchschnittlich“ beschreibt sämtliche produzierte Befestigungstypen des Systems im Durchschnitt gemäß Produktionsanteilen gewichtet auf Basis einer Parameteranalyse gerechnet. Das bedeutet, dass ein hypothetisches Befestigungssystem berechnet wird, welches das gesamte Flachdachbefestigungssystem repräsentiert. Um die deklarierte Einheit auf kg umrechnen zu können wird das Gewicht pro System angeführt.

## Technical purpose
Flachdachbefestigungssysteme der EJOT Baubefestigungen GmbH werden zur mechanischen Sicherung von Dampfsperren, Dämmstoffen und Dachbahnen gegen dynamisch auftretende Windsogkräfte auf den Verankerungsgründen Trapezblech, Beton, Leicht- und Porenbeton, Holz- und Holzwerkstoffen eingesetzt.

## Reference product
- durchschnittliche Flachdachbefestigungssysteme von 200 mm Länge: 1

## Inputs
- Erneuerbare Primärenergie als Energieträger (PERE) [MJ]: A1-A3 0.952858, C1 0.00197, C2 0.000508, C3 0.000357, C4 0.00176, D 0.0818
- Erneuerbare Primärenergie zur stofflichen Nutzung (PERM) [MJ]: A1-A3 0.167142, C1 0, C2 0, C3 0, C4 0, D 0
- Total erneuerbare Primärenergie (PERT) [MJ]: A1-A3 1.12, C1 0.00197, C2 0.000508, C3 0.000357, C4 0.00176, D 0.0818
- Nicht-erneuerbare Primärenergie als Energieträger (PENRE) [MJ]: A1-A3 5.80193, C1 0.0342, C2 0.00882, C3 0.733023, C4 0.025, D -1.06
- Nicht-erneuerbare Primärenergie zur stofflichen Nutzung (PENRM) [MJ]: A1-A3 0.728073, C1 0, C2 0, C3 -0.728073, C4 0, D 0
- Total nicht erneuerbare Primärenergie (PENRT) [MJ]: A1-A3 6.53, C1 0.0342, C2 0.00882, C3 0.00495, C4 0.025, D -1.06
- Einsatz von Sekundärstoffen (SM) [kg]: A1-A3 0.00604281, C1 0, C2 0, C3 0, C4 0, D 0.0726
- Erneuerbare Sekundärbrennstoffe (RSF) [MJ]: A1-A3 0, C1 0, C2 0, C3 0, C4 0, D 0
- Nicht erneuerbare Sekundärbrennstoffe (NRSF) [MJ]: A1-A3 0, C1 0, C2 0, C3 0, C4 0, D 0
- Einsatz von Süßwasserressourcen (FW) [m^3]: A1-A3 0.00104, C1 2.3e-6, C2 5.92e-7, C3 1.39e-6, C4 3.07e-7, D -0.000217

## Outputs
- Gefährlicher Abfall zur Deponie (HWD) [kg]: A1-A3 1.42e-8, C1 1.58e-9, C2 4.08e-10, C3 1.3e-10, C4 9.12e-11, D -1.35e-7
- Entsorgter nicht gefährlicher Abfall (NHWD) [kg]: A1-A3 0.00451, C1 5.42e-6, C2 1.4e-6, C3 1.34e-6, C4 0.024, D 0.0126
- Entsorgter radioaktiver Abfall (RWD) [kg]: A1-A3 0.000107, C1 6.3e-8, C2 1.62e-8, C3 6.54e-8, C4 3.01e-7, D 3.75e-8
- Komponenten für die Wiederverwendung (CRU) [kg]: A1-A3 0, C1 0, C2 0, C3 0, C4 0, D 0
- Stoffe zum Recycling (MFR) [kg]: A1-A3 0, C1 0, C2 0, C3 0.0726, C4 0, D 0
- Stoffe für die Energierückgewinnung (MER) [kg]: A1-A3 0.00207591, C1 0, C2 0, C3 0, C4 0, D 0
- Exportierte elektrische Energie (EEE) [MJ]: A1-A3 0, C1 0, C2 0, C3 0, C4 0, D 0
- Exportierte thermische Energie (EET) [MJ]: A1-A3 0, C1 0, C2 0, C3 0, C4 0, D 0

## Impact indicators
- Globales Erwärmungspotenzial total (GWP-total) [kg CO_(2)-Äq.]: A1-A3 0.491, C1 0.00256, C2 0.000658, C3 0.000255, C4 0.00174, D -0.123
- Globales Erwärmungspotenzial fossil (GWP-fossil) [kg CO_(2)-Äq.]: A1-A3 0.491, C1 0.00254, C2 0.000653, C3 0.000253, C4 0.00174, D -0.123
- Globales Erwärmungspotenzial biogen (GWP-biogenic) [kg CO_(2)-Äq.]: A1-A3 0, C1 0, C2 0, C3 0, C4 0, D 0
- Globales Erwärmungspotenzial luluc (GWP-luluc) [kg CO_(2)-Äq.]: A1-A3 0.000313, C1 2.07e-5, C2 5.33e-6, C3 1.73e-6, C4 1.41e-6, D 3.5e-6
- Abbau Potential der stratosphärischen Ozonschicht (ODP) [kg CFC11-Äq.]: A1-A3 1.75e-11, C1 4.69e-19, C2 1.21e-19, C3 6.14e-19, C4 3.95e-18, D 2.68e-16
- Versauerungspotenzial von Boden und Wasser (AP) [mol H^(+)-Äq.]: A1-A3 0.00111, C1 1.29e-5, C2 4.02e-6, C3 2.49e-6, C4 5.27e-6, D -0.000273
- Eutrophierungspotenzial Süßwasser (EP-freshwater) [kg PO_(4)-Äq.]: A1-A3 1.18e-6, C1 7.78e-9, C2 2e-9, C3 7.38e-10, C4 3.19e-7, D -6.95e-8
- Eutrophierungspotenzial Salzwasser (EP-marine) [kg N-Äq.]: A1-A3 0.000281, C1 6.13e-6, C2 1.94e-6, C3 1.21e-6, C4 1.17e-6, D -4.99e-5
- Eutrophierungspotenzial Land (EP-terrestrial) [mol N-Äq.]: A1-A3 0.00289, C1 6.8e-5, C2 2.15e-5, C3 1.33e-5, C4 1.28e-5, D -0.000505
- Bildungspotential für troposphärisches Ozon (POCP) [kg NMVOC-Äq.]: A1-A3 0.000859, C1 1.25e-5, C2 3.75e-6, C3 3.52e-6, C4 3.81e-6, D -0.000206
- Potenzial für den abiotischen Abbau nicht fossiler Ressourcen (ADPE) [kg Sb-Äq.]: A1-A3 1.32e-5, C1 2.06e-10, C2 5.32e-11, C3 2.77e-10, C4 1.18e-10, D -1.99e-6
- Potenzial für den abiotischen Abbau fossiler Brennstoffe (ADPF) [MJ]: A1-A3 6.52, C1 0.0341, C2 0.00878, C3 0.00495, C4 0.025, D -1.06
- Wassernutzung (WDP) [m^(3) Welt-Äq. entzogen]: A1-A3 0.0177, C1 2.49e-5, C2 6.42e-6, C3 4.88e-5, C4 -1.95e-5, D -0.00925
- Auftreten von Krankheiten aufgrund von Feinstaubemissionen (PM) [Krankheitsfälle]
- Wirkung durch Exposition des Menschen mit U235 (IR) [kBq U235-Äq.]
- Toxizitätsvergleichseinheit für Ökosysteme (ETP-fw) [CTUe]
- Toxizitätsvergleichseinheit für Menschen (krebserregend) (HTP-c) [CTUh]
- Toxizitätsvergleichseinheit für Menschen (nicht krebserregend) (HTP-nc) [CTUh]
- Bodenqualitätsindex (SQP) [SQP]

## Use advice
Gültigkeitsbereich:
Diese Deklaration ist gültig für alle in der Europäisch Technischen Zulassung ETA 07-0013 genannten Befestigungskombinationen, die in den Werken in Deutschland (Berghausen) und Polen (Ciasna) der EJOT Baubefestigungen GmbH gefertigt werden. Die Datenbasis ist das Jahr 2012. Die deklarierten Ergebnisse gelten für eine Länge von 200 mm, für alle weiteren Längen können die Ergebnisse mit der in Kapitel 5 angegebenen Formel extrapoliert werden.
Systemgrenze:
Typ der EPD: Wiege bis Werkstor - mit Optionen.

Die Umweltproduktdeklaration bezieht sich auf das Produktionsstadium (Modul A1–A3), das Entsorgungsstadium (Module C1–C4) sowie Gutschriften und Lasten außerhalb der Systemgrenze (Modul D).

In dem Produktionsstadium wird die Beschaffung der Rohstoffe inklusive der entsprechenden Vorketten, die notwendigen Beschaffungstransporte zu den Werken sowie die für die Produktion der Befestigungssysteme werden notwendigen Energien betrachtet.Für die Werke wurde jeweils der länderspezifische Strommix modelliert. Die Materialzusammensetzung und der Energiebedarf der deklarierten Befestigungssysteme wurde gemäß ihrer Produktionsanteile in jedem Werk berechnet.

In der Entsorgungsphase wird der Rückbau der Befestigungssysteme (Modul C1), der Transport zur Abfallbehandlung (Modul C2), die Abfallaufbereitung (Modul C3) sowie die Deponierung der Kunststoffe (Modul C4) betrachtet. Vermiedenen Lasten aus dem Recycling der Metalle werden in Modul D ausgewiesen. Hierfür werden lediglich die Nettoschrottmengen betrachtet.

## Data sources
- GaBi Database (all versions)
- GaBi database SP40 2020
