# Acetyliertes Holz (1 m³, 510 kg/m³); 510 kg/m³

Dataset: ILCD process, EPD, generic dataset
Geography: DE
Reference year: 2021
Valid until: 2022
Classification: oekobau.dat: Holz / Modifiziertes Holz / Acetyliertes Holz
Owner: Sphera Solutions GmbH
Compliance: EN 15804+A2
Review: Dependent internal review by Sphera Solutions GmbH; Independent external review by GaBi user forum
Amounts: rows without a unit in brackets have none in this file; such an amount is in the reference unit of its flow, which a separate flow dataset defines
copyright: true
licenseType: Free of charge for all users and uses
accessRestrictions: The license conditions as stated on https://www.oekobaudat.de/ apply.
accessRestrictions: Es gelten die Lizenzbedingungen wie sie auf https://www.oekobaudat.de/ genannt sind.

## General comment
Dieser Datensatz wurde nach dem European Standard EN 15804+A2 für Nachhaltiges Bauen modelliert. Ergebnisse werden in Modulen abgebildet, die den strukturierten Ausdruck von Ergebnissen über den gesamten Lebenszyklus zulassen.

## Geography
Der Datensatz bildet die länderspezifische Situation in Deutschland ab. Dabei werden Haupttechnologien, spezifische regionale Charakteristiken und ggf. Importstatistiken berücksichtigt.

## Time period
Jährlicher Durchschnitt

## Technology and included processes
Für die Herstellung von acetyliertem Holz wird für diesen Datensatz getrocknetes Bauholz aus Nadelholz eingesetzt.

Für den Acetylierungsprozess wird in spezielle, mit dem zu behandelnden Holz gefüllten Edelstahlreaktoren, eine Essigsäureanhydridlösung eingespritzt. Bei Temperaturen um 120°C wird das Holz und die Essigsäureanhydridlösung zur Reaktion gebracht. Dabei werden die Hydroxygruppen der Holzzellwand zu Essigsäureestern verestert und Essigsäure freigesetzt.

Für diesen Datensatz wurde im Sinne eines konservativen Ansatzes ausschließlich mit Essigsäureanhydrid aus Primärproduktion bilanziert (aus der entstehenden Essigsäure kann theoretisch Essigsäureanhydrid zrückgewonnen und dem Prozess wieder zugeführt werden). Die während des Prozesses entstehende Essigsäure wurde ökobilanziell als Nebenprodukt behandelt und die Umweltlasten des Acetylierungsprozesss ökonomisch alloziiert: ca. 88% der Umweltlasten wurden dem acetylierten Holz, ca. 12% der Essigsäure zugerechnet.

Die Herstellung des Essigsäureanhydrids und die Holzvorkette dominiert die Ökobilanz des Produktsystems.

In Modul C1 wird ein manueller Rückbau (lastenfrei) angenommen. Sammelverluste werden vernachlässigt.
Der Transport in Modul C2 zur Verwertungsanlage erfolgt mit einem LKW (50km).
In Modul C3 wird die Zerkleinerung und thermische Verwertung des Materials berücksichtigt. Das im Material durch Photosynthese aufgenommene und gespeicherte CO2 (aus Modul A1) wird dabei in C3 ausgebucht (CO2 Neutralität innerhalb des Produktsystems gemäß EN 16485: Round and sawn timber - Environmental Product Declarations - Product category rules for wood and wood-based products for use in construction, 2014). Weiterhin enthält das Modul C3 die Lasten für den Betrieb der Verwertungsanlage.
Modul D enthält die Gutschriften für die Substitution von Strom (deutscher Strommix) und thermischer Energie (aus Erdgas). Bei der Berechnung der Verbrennungsemissionen und Gutschriften wird der spezifische Heizwert des jeweiligen Materials sowie die Materialzusammensetzung berücksichtigt.

## Technical purpose
Acetyliertes Holz kann für tragende und nicht-tragende Anwendungen verwendet werden. Durch die verbesserte Dauerhaftigkeit wird acetyliertes Holz vor allem im Aussenbereich, sowie für Anwendungen mit Erd- und Wasserkontakt eingesetzt. Farbbeschichtungen sind möglich.

## Safety margin
20 %. Produktsystem bis auf wenige Prozesse/Flüsse abgebildet. Technologische, zeitliche und geographische Repräsentativität teilweise gegeben.

## Reference product
- Acetyliertes Holz (1 m³, 510 kg/m³): 1

## Inputs
- Erneuerbare Primärenergie als Energieträger (PERE) [MJ]: A1-A3 2141.13, C2 1.11494, C3 8092.66, D -1206.83
- Erneuerbare Primärenergie zur stofflichen Nutzung (PERM) [MJ]: A1-A3 6678, C2 0, C3 -6678, D 0
- Total erneuerbare Primärenergie (PERT) [MJ]: A1-A3 8819.13, C2 1.11494, C3 1414.66, D -1206.83
- Nicht-erneuerbare Primärenergie als Energieträger (PENRE) [MJ]: A1-A3 21881.6, C2 19.2105, C3 391.843, D -3513.18
- Nicht-erneuerbare Primärenergie zur stofflichen Nutzung (PENRM) [MJ]: A1-A3 0, C2 0, C3 0, D 0
- Total nicht-erneuerbare Primärenergie (PENRT) [MJ]: A1-A3 21881.6, C2 19.2105, C3 391.843, D -3513.18
- Einsatz von Sekundärstoffen (SM) [kg]: A1-A3 0, C2 0, C3 0, D 0
- Erneuerbare Sekundärbrennstoffe (SF) [MJ]: A1-A3 0, C2 0, C3 0, D 0
- Nicht erneuerbare Sekundärbrennstoffe (NRSF) [MJ]: A1-A3 0, C2 0, C3 0, D 0
- Nettoeinsatz von Süßwasserressourcen (FW) [m3]: A1-A3 3.64701, C2 0.000990907, C3 2.74346, D -0.448804

## Outputs
- Gefährlicher Abfall zur Deponie (HWD) [kg]: A1-A3 5.03505e-6, C2 8.02938e-10, C3 9.48522e-8, D -1.22322e-6
- Entsorgter nicht gefährlicher Abfall (NHWD) [kg]: A1-A3 7.18342, C2 0.00310102, C3 8.16985, D -1.86497
- Entsorgter radioaktiver Abfall (RWD) [kg]: A1-A3 0.0566484, C2 1.8435e-5, C3 0.00970609, D -0.129796
- Komponenten für die Wiederverwendung (CRU) [kg]: A1-A3 0, C2 0, C3 0, D 0
- Stoffe zum Recycling (MFR) [kg]: A1-A3 0, C2 0, C3 0, D 0
- Stoffe für die Energierückgewinnung (MER) [kg]: A1-A3 0, C2 0, C3 0, D 0
- Exportierte elektrische Energie (EEE) [MJ]: A1-A3 0, C2 0, C3 966.884, D 0
- Exportierte thermische Energie (EET) [MJ]: A1-A3 0, C2 0, C3 2163.11, D 0

## Impact indicators
- Globales Erwärmungspotenzial - total (GWP-total) [kg CO2 eq.]: A1-A3 197.742, C2 1.45919, C3 1012.85, D -226.487
- Globales Erwärmungspotenzial - fossil (GWP-fossil) [kg CO2 eq.]: A1-A3 955.78, C2 1.44928, C3 27.4545, D -223.722
- Globales Erwärmungspotenzial - biogen (GWP-biogenic) [kg CO2 eq.]: A1-A3 -758.337, C2 0.00060035, C3 985.372, D -2.43167
- Globales Erwärmungspotenzial - luluc (GWP-luluc) [kg CO2 eq.]: A1-A3 0.298911, C2 0.00930769, C3 0.0261952, D -0.333266
- Abbaupotenzial der stratosphärischen Ozonschicht (ODP) [kg CFC-11 eq.]: A1-A3 1.79935e-12, C2 3.70834e-16, C3 3.24768e-13, D -5.26881e-12
- Versauerungspotenzial, kumulierte Überschreitung (AP) [Mole of H+ eq.]: A1-A3 1.01236, C2 0.00410905, C3 0.659547, D -0.230844
- Eutrophierungspotenzial - Süßwasser (EP-freshwater) [kg P eq.]: A1-A3 0.00091086, C2 2.98062e-6, C3 4.66593e-5, D -0.000554393
- Eutrophierungspotenzial - Salzwasser (EP-marine) [kg N eq.]: A1-A3 0.396785, C2 0.00189295, C3 0.295727, D -0.0847237
- Eutrophierungspotenzial - Land (EP-terrestrial) [Mole of N eq.]: A1-A3 4.31348, C2 0.0211787, C3 3.5947, D -0.902247
- Bildungspotenzial für troposphärisches Ozon (POCP) [kg NMVOC eq.]: A1-A3 1.28474, C2 0.0036913, C3 0.756477, D -0.221677
- Potenzial für die Verknappung abiotischer Ressourcen nicht fossile Ressourcen (ADPE) [kg Sb eq.]: A1-A3 0.000107564, C2 1.26068e-7, C3 4.8983e-6, D -7.09308e-5
- Potenzial für die Verknappung abiotischer Ressourcen fossile Brennstoffe (ADPF) [MJ]: A1-A3 21879.8, C2 19.2097, C3 391.761, D -3512.67
- Wasser-Entzugspotenzial (Benutzer) (WDP) [m³ world equiv.]: A1-A3 12.0342, C2 0.00563386, C3 116.199, D -2.72388

## Use advice
Dieser Datensatz bezieht sich auf 1 m³ acetyliertres Holz mit einer Rohdichte von 510 kg/m³. Durch die chemische Modifikation des Holzes wird die Dauerhaftigkeit des Holzes gegenüber Pilzbefall, Fäulnis und Insektenbefall erhöht. Der Datensatz kann für die näherungsweise Abschätzung anderer Holzrohdichten von 450 - 550 kg/m³ verwendet werden.

## Data sources
- ULLMANN'S Encyclopedia of Industrial Chemistry
- Documentation of data quality management
- GaBi Database Edition 2021, CUP2021.01
- GaBi database (all versions)
