# Messing-Bauteil; Brass

Dataset: ILCD process, EPD, generic dataset
Geography: DE
Reference year: 2021
Valid until: 2022
Classification: oekobau.dat: Metalle / Kupfer / Schmiede- und Gussteile aus Kupfer und Messing
Owner: Sphera Solutions GmbH
Compliance: EN 15804+A2
Review: Dependent internal review by Sphera Solutions GmbH; Independent external review by GaBi user forum
Amounts: rows without a unit in brackets have none in this file; such an amount is in the reference unit of its flow, which a separate flow dataset defines
copyright: true
licenseType: Free of charge for all users and uses
accessRestrictions: The license conditions as stated on https://www.oekobaudat.de/ apply.
accessRestrictions: Es gelten die Lizenzbedingungen wie sie auf https://www.oekobaudat.de/ genannt sind.

## General comment
Dieser Datensatz wurde nach dem European Standard EN 15804+A2 für Nachhaltiges Bauen modelliert. Ergebnisse werden in Modulen abgebildet, die den strukturierten Ausdruck von Ergebnissen über den gesamten Lebenszyklus zulassen.

## Geography
Der Datensatz bildet die länderspezifische Situation in Deutschland ab. Dabei werden Haupttechnologien, spezifische regionale Charakteristiken und ggf. Importstatistiken berücksichtigt.

## Time period
Jährlicher Durchschnitt

## Technology and included processes
Messing sind Legierungen aus Kupfer und Zink und mittlere und starke Werkstoffe.
Die Eigenschaften des Erzes können durch Variation des Anteils von Kupfer und Zink geändert werden. Der Datensatz beschreibt das Schmelz- und Gießverfahren einer Kupfer (80 %)-, Zink (20 %)- Legierung (CuZn20). Der Schmelzprozess von Kupfer und Zink wird in einem elektrischen Tiegelofen durchgeführt, wo die meiste Energie verwendet wird. Das Erdgas, das eine zweite Energiequelle darstellt, wird während des Gießens als Prozesswärme verwendet. Messing in Europa wird hauptsächlich aus Sekundärmaterial hergestellt. Das Recyclingsystem ist gut entwickelt, sodass Sekundärmessing weitgehend verfügbar ist. Jedenfalls muss Basismaterial aus Kupfer und Zink hinzugefügt werden (Schätzung: 90 % Sekundärmaterial, 10 % Primärmaterial). Der Datensatz umfasst das Verfahren der Herstellung von Legierungen, wie oben beschrieben, und die Herstellung von Gussformen/ Pressformen. Der Transport vom Werk auf die Baustelle ist nicht inbegriffen und muss bei der Modellierung von Lebenszyklus Systeme berücksichtigt werden.

In der Entsorgungsphase wird in Modul C1 für Stahlprodukte ein maschineller Rückbau bilanziert (Bagger). Für alle anderen Metalle erfolgt ein manueller Rückbau (lastenfrei). Sammelverluste werden vernachlässigt. Es wird angenommen, dass alle Metalle das Ende der Abfalleigenschaft direkt nach dem Ausbau erreichen. Das heißt die Lasten für die Aufbereitung und die Gutschriften für die Substitution von Primärmaterial werden in Modul D ausgewiesen.
Der Transport in Modul C2 zur Aufbereitungsanlage erfolgt mit einem LKW (50km).
In Modul D sind die Lasten für die Sortierung, Umschmelzen, Schlackebehandlung, Deponierung von Reststoffen, Behandlung von Filterstäuben und Krätzebehandlung enthalten. Die Gutschriften werden für die Nettoschrottmenge (zurückgebaute Menge abzüglich ggfs. enthaltenes Sekundärmaterial, abzüglich Aufbereitungsverluste) für den durchschnittlich vorhandenen Materialmix (aus verschiedenen Legierungen) vergeben.

## Technical purpose
Dieses Produkt kann im Baubereich verwendet werden.

## Safety margin
20 %. Produktsystem bis auf wenige Prozesse/Flüsse abgebildet. Technologische, zeitliche und geographische Repräsentativität teilweise gegeben.

## Reference product
- Messing-Bauteil: 1

## Inputs
- Erneuerbare Primärenergie als Energieträger (PERE) [MJ]: A1-A3 6.2232, C1 0, C2 0.00218616, D 0.0575154
- Erneuerbare Primärenergie zur stofflichen Nutzung (PERM) [MJ]: A1-A3 0, C1 0, C2 0, D 0
- Total erneuerbare Primärenergie (PERT) [MJ]: A1-A3 6.2232, C1 0, C2 0.00218616, D 0.0575154
- Nicht-erneuerbare Primärenergie als Energieträger (PENRE) [MJ]: A1-A3 19.6184, C1 0, C2 0.0376677, D 0.343552
- Nicht-erneuerbare Primärenergie zur stofflichen Nutzung (PENRM) [MJ]: A1-A3 0, C1 0, C2 0, D 0
- Total nicht-erneuerbare Primärenergie (PENRT) [MJ]: A1-A3 19.6184, C1 0, C2 0.0376677, D 0.343552
- Einsatz von Sekundärstoffen (SM) [kg]: A1-A3 1.24467, C1 0, C2 0, D 0
- Erneuerbare Sekundärbrennstoffe (SF) [MJ]: A1-A3 0, C1 0, C2 0, D 0
- Nicht erneuerbare Sekundärbrennstoffe (NRSF) [MJ]: A1-A3 0, C1 0, C2 0, D 0
- Nettoeinsatz von Süßwasserressourcen (FW) [m3]: A1-A3 0.011102, C1 0, C2 1.94295e-6, D 0.00010442

## Outputs
- Gefährlicher Abfall zur Deponie (HWD) [kg]: A1-A3 4.27739e-9, C1 0, C2 1.57439e-12, D 3.5635e-11
- Entsorgter nicht gefährlicher Abfall (NHWD) [kg]: A1-A3 0.352328, C1 0, C2 6.08042e-6, D 0.00107141
- Entsorgter radioaktiver Abfall (RWD) [kg]: A1-A3 0.00154122, C1 0, C2 3.61471e-8, D 9.05889e-7
- Komponenten für die Wiederverwendung (CRU) [kg]: A1-A3 0, C1 0, C2 0, D 0
- Stoffe zum Recycling (MFR) [kg]: A1-A3 0, C1 1, C2 0, D 0
- Stoffe für die Energierückgewinnung (MER) [kg]: A1-A3 0, C1 0, C2 0, D 0
- Exportierte elektrische Energie (EEE) [MJ]: A1-A3 0, C1 0, C2 0, D 0
- Exportierte thermische Energie (EET) [MJ]: A1-A3 0, C1 0, C2 0, D 0

## Impact indicators
- Globales Erwärmungspotenzial - total (GWP-total) [kg CO2 eq.]: A1-A3 1.41539, C1 0, C2 0.00286116, D 0.0322526
- Globales Erwärmungspotenzial - fossil (GWP-fossil) [kg CO2 eq.]: A1-A3 1.40887, C1 0, C2 0.00284173, D 0.0321863
- Globales Erwärmungspotenzial - biogen (GWP-biogenic) [kg CO2 eq.]: A1-A3 0.00254329, C1 0, C2 1.17716e-6, D -1.53334e-5
- Globales Erwärmungspotenzial - luluc (GWP-luluc) [kg CO2 eq.]: A1-A3 0.00397644, C1 0, C2 1.82504e-5, D 8.16457e-5
- Abbaupotenzial der stratosphärischen Ozonschicht (ODP) [kg CFC-11 eq.]: A1-A3 1.69261e-14, C1 0, C2 7.27125e-19, D 1.02997e-16
- Versauerungspotenzial, kumulierte Überschreitung (AP) [Mole of H+ eq.]: A1-A3 0.0138851, C1 0, C2 8.05696e-6, D 0.000395656
- Eutrophierungspotenzial - Süßwasser (EP-freshwater) [kg P eq.]: A1-A3 3.05883e-6, C1 0, C2 5.84435e-9, D 8.35266e-8
- Eutrophierungspotenzial - Salzwasser (EP-marine) [kg N eq.]: A1-A3 0.00115235, C1 0, C2 3.71167e-6, D 3.02754e-5
- Eutrophierungspotenzial - Land (EP-terrestrial) [Mole of N eq.]: A1-A3 0.012328, C1 0, C2 4.15269e-5, D 0.000324584
- Bildungspotenzial für troposphärisches Ozon (POCP) [kg NMVOC eq.]: A1-A3 0.00364322, C1 0, C2 7.23785e-6, D 0.000106931
- Potenzial für die Verknappung abiotischer Ressourcen nicht fossile Ressourcen (ADPE) [kg Sb eq.]: A1-A3 0.000543706, C1 0, C2 2.47191e-10, D 2.25072e-5
- Potenzial für die Verknappung abiotischer Ressourcen fossile Brennstoffe (ADPF) [MJ]: A1-A3 19.6104, C1 0, C2 0.0376661, D 0.343254
- Wasser-Entzugspotenzial (Benutzer) (WDP) [m³ world equiv.]: A1-A3 0.472445, C1 0, C2 1.10468e-5, D 0.0061038

## Use advice
Der Datensatz repräsentiert ein Cradle to Gate Inventar. Er kann verwendet werden, um die Lieferkette des jeweiligen Produktes in einer repräsentativen Weise zu charakterisieren. Die Kombination mit einzelnen Einheitenprozessen und diesem Produkt ermöglicht die Erstellung von anwenderspezifischen (Produkt-) LCAs.

## Data sources
- European update Study on LCA of Copper products
- Documentation of data quality management
- GaBi Database Edition 2021, CUP2021.01
- GaBi database (all versions)
