# Automatische Faltflügeltür FFT FLEX Green

Dataset: ILCD process, EPD, representative dataset
Geography: DE
Reference year: 2016
Valid until: 2022
Classification: OEKOBAU.DAT: Komponenten von Fenstern und Vorhangfassaden / Antriebssysteme / elektrisch
Classification: IBUCategories: 02 Bauprodukte / Türen, Fenster, Beschläge und Zubehör / Automatiktüren und -tore, sowie Karusselltüranlagen
Method details: Automatiktüren und -tore, sowie Karusselltüranlagen.pdf
Generated by: brands and values GmbH
Registration number: EPD-DOR-20160041-IBA1-DE
Owner: DORMA Deutschland GmbH
Compliance: DIN EN 15804; ISO 14025
Review: Accredited third party review by Institut Bauen und Umwelt e. V.
Amounts: rows without a unit in brackets have none in this file; such an amount is in the reference unit of its flow, which a separate flow dataset defines
copyright: true
licenseType: Free of charge for all users and uses
accessRestrictions: None

## General comment
Die FFT FLEX Green ist eine automatische Faltflügeltür mit thermisch getrennten, besonders schmalen Profilen und einem leisen sowie dynamischen Antriebssystem. Sie ist besonders bei begrenztem seitlichen Bauraum geeignet, wenn dennoch eine möglichst große Durchgangsweite erzielt werden soll. Hierdurch wird auch eine maximale Fluchtwegbreite erreicht (2D-Variante). Sie ermöglicht Öffnungsweiten bis zu 2,4 m und Durchgangshöhen bis 2,5 m.

Zudem bietet die Dual Drive Technologie eine betriebssichere Lösung für Flucht- und Rettungswege nach /DIN 18650/ und /EN 16005/ (2D-Variante).

Weitere Merkmale sind:
Stromloses Öffnen der Tür durch integriertes Akkumodul
Sicherung des Fluchtwegs durch einfehlersichere Steuerungstechnik
Abgesicherte Funktionalität durch selbstüberwachte Sensoren

Die Faltflügeltür FFT FLEX Green verfügt über eine hocheffiziente thermische Trennung mit sehr guten Wärmedurchgangswerten (UD-Werten) von 1,7 bis max. 2,4 (Wärmekoeffizient), die für jedes Türsystem individuell berechnet werden können. In der Verbindung mit ISO-Gläsern sorgt die FFT FLEX Green für eine gute Wärmedämmung des Bauabschlusses.

Durch ein neues Antriebssystem, welches Kraft ohne Zahnriemen überträgt, wird die Laufruhe verbessert und die Dynamik erhöht. Zusätzlich werden Reserven gegen Windlasten geschaffen, da die FFT FLEX Green diese Windlasten erkennt und ausgleicht. In Öffnungs- und Schließrichtung werden die Fahrparameter entsprechend dynamisch verändert, um das Fahrverhalten der jeweiligen Wetterlage anzupassen.

## Technology and included processes
Die FFT FLEX Green ist eine automatische Faltflügeltür mit thermisch getrennten, besonders schmalen Profilen und einem leisen sowie dynamischen Antriebssystem. Sie ist besonders bei begrenztem seitlichen Bauraum geeignet, wenn dennoch eine möglichst große Durchgangsweite erzielt werden soll. Hierdurch wird auch eine maximale Fluchtwegbreite erreicht (2D-Variante). Sie ermöglicht Öffnungsweiten bis zu 2,4 m und Durchgangshöhen bis 2,5 m. Zudem bietet die Dual Drive Technologie eine betriebssichere Lösung für Flucht- und Rettungswege nach /DIN 18650/ und /EN 16005/ (2D-Variante). Weitere Merkmale sind:  Stromloses Öffnen der Tür durch integriertes Akkumodul  Sicherung des Fluchtwegs durch einfehlersichere Steuerungstechnik  Abgesicherte Funktionalität durch selbstüberwachte Sensoren Die Faltflügeltür FFT FLEX Green verfügt über eine hocheffiziente thermische Trennung mit sehr guten Wärmedurchgangswerten (UD-Werten) von 1,7 bis max. 2,4 (Wärmekoeffizient), die für jedes Türsystem individuell berechnet werden können. In der Verbindung mit ISO-Gläsern sorgt die FFT FLEX Green für eine gute Wärmedämmung des Bauabschlusses. Durch ein neues Antriebssystem, welches Kraft ohne Zahnriemen überträgt, wird die Laufruhe verbessert und die Dynamik erhöht. Zusätzlich werden Reserven 3 Umwelt Produktdeklaration DORMA – Automatische Faltflügeltür FFT FLEX Green gegen Windlasten geschaffen, da die FFT FLEX Green diese Windlasten erkennt und ausgleicht. In Öffnungsund Schließrichtung werden die Fahrparameter entsprechend dynamisch verändert, um das Fahrverhalten der jeweiligen Wetterlage anzupassen. Die Falttürflügel, die Feststellsäulen und die Bodenschiene der FFT FLEX Green werden im DORMA Werk Zusmarshausen hergestellt. Die elektronischen Bauteile werden ebenfalls innerhalb der DORMA-Gruppe gefertigt. Die Antriebseinheit ES 200 FFT (2D) sowie die Leiterplatinen werden im Werk Ennepetal hergestellt. Das zertifizierte Qualitätsmanagementsystem nach /DIN EN ISO 9001/ sichert den hohen Qualitätsstandard der DORMA Produkte für alle Standorte ab.
Deklarierte Einheit:
Die deklarierte Einheit ist ein (1) Stück der automatischen Faltflügeltüranlage FFT FLEX Green bestehend aus:

- der Antriebseinheit ES 200 FFT 2D

- zwei Faltflügelpaare

- zwei Feststellsäulen

- einer Bodenschiene und

- den jeweiligen Verpackungsmaterialien.

## Technical purpose
Die Faltflügeltür FFT FLEX Green kommt dann zum Einsatz, wenn bei einer geringen Bauöffnungsweite eine möglichst große Durchgangsweite erzielt werden soll. Sie ist geeignet für Außen- sowie Innentüren in schmalen Durchgängen, für barrierefreie Zugänge in öffentlichen Gebäuden sowie für Flucht- und Rettungswege.

In der Öffnungsbewegung werden die Türflügel gleichzeitig gefaltet und automatisch zur Seite gefahren.

Beidseitig öffnend

Die beiden Flügelpaare werden beim Öffnen durch eine Faltbewegung synchron gegenläufig zur Seite geschwenkt und ermöglichen so eine maximale Durchgangsweite von 2,4 m.

Einseitig öffnend

Für kleinere Anwendungen: Die Faltflügeltür FFT FLEX Green, bestehend aus nur einem Flügelpaar, ermöglicht eine maximale Durchgangsweite von 1,2 m.

## Reference product
- Automatische Faltflügeltür FFT FLEX Green: 1

## Inputs
- Erneuerbare Primärenergie als Energieträger (PERE) [MJ]: A1-A3 2570, A4 2.61, A5 0.357, B6 4150, C2 1.14, C3 27.3, D -2380
- Erneuerbare Primärenergie zur stofflichen Nutzung (PERM) [MJ]: A1-A3 144, A4 2.46e-12, A5 1.15e-11, B6 1.16e-7, C2 1.08e-12, C3 0.0261, D -0.0147
- Total erneuerbare Primärenergie (PERT) [MJ]: A1-A3 2710, A4 2.61, A5 0.357, B6 4150, C2 1.14, C3 27.3, D -2380
- Nicht-erneuerbare Primärenergie als Energieträger (PENRE) [MJ]: A1-A3 14000, A4 46.7, A5 3.72, B6 19700, C2 20.5, C3 516, D -7390
- Nicht-erneuerbare Primärenergie zur stofflichen Nutzung (PENRM) [MJ]: A1-A3 221, A4 0, A5 0, B6 0, C2 0, C3 0.00732, D -3.85e-6
- Total nicht erneuerbare Primärenergie (PENRT) [MJ]: A1-A3 14200, A4 46.7, A5 3.72, B6 19700, C2 20.5, C3 516, D -7390
- Einsatz von Sekundärstoffen (SM) [kg]: A1-A3 77.7, A4 0, A5 0, B6 0, C2 0, C3 0, D 0
- Erneuerbare Sekundärbrennstoffe (RSF) [MJ]: A1-A3 0, A4 0.00031, A5 0.000102, B6 0.26, C2 0.000136, C3 0.00702, D 0.302
- Nicht erneuerbare Sekundärbrennstoffe (NRSF) [MJ]: A1-A3 0, A4 0.00324, A5 0.00056, B6 2.72, C2 0.00142, C3 0.0574, D 3.4
- Einsatz von Süßwasserressourcen (FW) [m^3]: A1-A3 5620, A4 0.209, A5 0.341, B6 3740, C2 0.0917, C3 29, D -6010

## Outputs
- Gefährlicher Abfall zur Deponie (HWD) [kg]: A1-A3 0.087, A4 0, A5 0, B6 0, C2 0, C3 0.0528, D -0.00225
- Entsorgter nicht gefährlicher Abfall (NHWD) [kg]: A1-A3 2480, A4 0.176, A5 0.635, B6 4580, C2 0.0771, C3 86.3, D -1130
- Entsorgter radioaktiver Abfall (RWD) [kg]: A1-A3 0.719, A4 6.38e-5, A5 0.000232, B6 2.95, C2 2.8e-5, C3 0.0183, D -0.365
- Komponenten für die Wiederverwendung (CRU) [kg]: A1-A3 0, A4 0, A5 0, B6 0, C2 0, C3 0, D 0
- Stoffe zum Recycling (MFR) [kg]: A1-A3 0.775, A4 0, A5 0, B6 0, C2 0, C3 39.1, D 0
- Stoffe für die Energierückgewinnung (MER) [kg]: A1-A3 0.0145, A4 0, A5 2.03, B6 0, C2 0, C3 3.64, D 0
- Exportierte elektrische Energie (EEE) [MJ]: A1-A3 0.47, A4 0, A5 20.2, B6 0, C2 0, C3 39.2, D 0
- Exportierte thermische Energie (EET) [MJ]: A1-A3 1.52, A4 0, A5 47.1, B6 0, C2 0, C3 99.4, D 0

## Impact indicators
- Globales Erwärmungspotenzial (GWP) [kg CO_(2)-Äq.]: A1-A3 954, A4 3.39, A5 14.8, B6 1110, C2 1.49, C3 68.5, D -584
- Abbau Potential der stratosphärischen Ozonschicht (ODP) [kg CFC11-Äq.]: A1-A3 1.09e-5, A4 1.39e-11, A5 6.01e-11, B6 8.23e-7, C2 6.09e-12, C3 4.02e-7, D -1.33e-5
- Versauerungspotenzial von Boden und Wasser (AP) [kg SO_(2)-Äq.]: A1-A3 4.85, A4 0.0218, A5 0.00232, B6 5.57, C2 0.00948, C3 0.0959, D -3.08
- Eutrophierungspotenzial (EP) [kg PO_(4)^(3)-Äq.]: A1-A3 1.21, A4 0.00559, A5 0.000414, B6 0.303, C2 0.00243, C3 0.00772, D -0.194
- Bildungspotential für troposphärisches Ozon (POCP) [kg Ethen-Äq.]: A1-A3 0.232, A4 -0.00903, A5 0.000184, B6 0.325, C2 -0.00389, C3 0.00661, D -0.2
- Potenzial für den abiotischen Abbau nicht fossiler Ressourcen (ADPE) [kg Sb-Äq.]: A1-A3 0.0782, A4 1.32e-7, A5 1.77e-7, B6 0.000175, C2 5.79e-8, C3 6.71e-5, D -0.0114
- Potenzial für den abiotischen Abbau fossiler Brennstoffe (ADPF) [MJ]: A1-A3 11500, A4 46.5, A5 3.13, B6 12300, C2 20.4, C3 470, D -6500

## Use advice
Gültigkeitsbereich:
Die vorliegende EPD bezieht sich auf den gesamten Lebensweg einer Faltflügeltüranlage FFT FLEX Green von DORMA. Die technischen Eigenschaften werden in Kapitel 2.3 dargestellt. Produktionsstandort des Produkts ist DORMA Zusmarshausen, Deutschland. Daneben werden Produktkomponenten von dem DORMA Standort Ennepetal bezogen. Die Stoff- und Energieströme wurden entsprechend berücksichtigt.
Systemgrenze:
Typ der EPD: Wiege bis Werkstor mit Optionen.

Module A1-3, A4 und A5

Das Produktstadium beginnt mit der Berücksichtigung der Produktion der notwendigen Rohstoffe und Energien inklusive aller entsprechenden Vorketten sowie der tatsächlichen Beschaffungstransporte. Weiterhin wurde die gesamte Herstellungsphase abgebildet, inkl. der Behandlung von Produktionsabfällen bis zum Erreichen des End-of-Waste Status (EoW). Zudem wurden ebenfalls die Distributionstransporte und der Einbau ins Gebäude berücksichtigt.

Modul B6

Das Modul beinhaltet den Energieverbrauch für den Betrieb der deklarierten ES 200 FFT 2D Antriebseinheit über die gesamte Nutzungsdauer von 10 Jahren.

Module C2-3

Die Module beinhalten die Umweltwirkungen für die Behandlung der Abfallfraktionen bis zum Erreichen des End-of-Waste Status (EoW) inklusive der zugehörigen Transporte am Ende des Produktlebenswegs.

Modul D

Ausweis der aus der Abfallbehandlung resultierenden Gutschriften, resultierend aus einer energetischen (MVA-Route) oder werkstofflichen Verwertung (Recycling-Route) von Verpackungen (A5), der Ersatzteile (B3) und des Produktes im End of Life (C3).

## Data sources
- GaBi Database (all versions)
- GaBi database SP20 2013
