# Tür - Hodapp GmbH und Co. KG - Sicherheitstür

Dataset: ILCD process, EPD, specific dataset
Geography: DE
Reference year: 2021
Valid until: 2027
Classification: OEKOBAU.DAT: Komponenten von Fenstern und Vorhangfassaden / Türen und Tore / Stahl
Synonyms: Mehrzwecktür; Sicherheitstür, Schallschutz mit Füllung (≤40dB); Schallschutz mit Füllung (>40dB); Einbruchschutz RC-2 mit Füllung; Einbruchschutz RC-3 mit Füllung; Einbruchschutz RC-4/ Beschusshemmung FB-4 mit Füllung
Method details: Produktkategorieregeln Teil B – für Türen und Tore; Produktkategorieregeln Teil A; EPD Mehrzwecktürsystem HoSta
Generated by: ift Rosenheim
Registration number: EPD-HMZ-55.0
Owner: Hodapp GmbH und Co. KG
Compliance: EN 15804+A2
Review: Independent external review by Patrick Wortner
Amounts: rows without a unit in brackets have none in this file; such an amount is in the reference unit of its flow, which a separate flow dataset defines
copyright: true
licenseType: Free of charge for all users and uses
accessRestrictions: none

## General comment
A1-A3 sowie Module A4, A5, B2, B3, B4, B5, B6, B7, C1, C2, C3, C4, D. Das Umweltprofil beinhaltet die Aufwendungen für die Lebenszyklus-Stadien cradle to grave. Die Herstellung der Verpackung wurde innerhalb der Module A1-A3 berücksichtigt.

## Geography
Dieser Datensatz repräsentiert die Situation des Unternehmens Hodapp GmbH &Co. KG in 77855 Achern, im Hinblick auf die wichtigsten Technologien und die gesetzlichen Rahmenbedingungen.

## Time period
jährlicher Durchschnitt

## Technology and included processes
Die Ökobilanzergebnisse umfassen die Lebenszyklusstadien der Herstellung der Vorprodukte bis hin zur Rohstoffgewinnung und Verarbeitungsprozesse von als Input dienenden Sekundärstoffen (z.B. Recyclingprozesse), deren Transporte zum Werk sowie die Produktion selbst, einschließlich der Bereitstellung von allen Hilfs- und Betriebsstoffen, Energie, sowie die vollständige Abfallbehandlung oder die Deponierung der Restabfälle während des Stadiums der Produktion. Die Module A1, A2 und A3 sind hier als ein aggregiertes Modul A1-A3 ausgewiesen. Falls für diesen Datensatz weitere Module berechnet wurden, sind diese separat zu finden und können für eine Betrachtung des gesamten Lebenszyklus zusammengeführt werden.

## Technical purpose
Sicherheitstür mit wahlweisen Leistungseigenschaften.

## Reference product
- Tür - Hodapp GmbH und Co. KG - Sicherheitstür: 1

## Inputs
- Frischwasserverbrauch (FW) [m3]: A1-A3 1.25, A4 0.00185, A5 0.0279, B2 0.13, B3 1.08, B4 0, B5 0, B6 0, B7 0, C1 0, C2 0.000126, C3 0.0348, C4 0.00227, D -0.13
- Nicht-erneuerbare Primärenergie als Energieträger (PENRE) [MJ]: A1-A3 4249.45, A4 28.8, A5 9.06, B2 13, B3 2990, B4 0, B5 0, B6 0, B7 0, C1 0, C2 1.97, C3 55.7, C4 8.97, D -823
- Nicht-erneuerbare Primärenergie zur stofflichen Nutzung (PENRM) [MJ]: A1-A3 23.88, A4 0, A5 -1.86, B2 0, B3 0, B4 0, B5 0, B6 0, B7 0, C1 0, C2 0, C3 -20.92, C4 -1.1, D 0
- Verbrauch nicht erneuerbarer Sekundärbrennstoffe (NRSF) [MJ]: A1-A3 6.82e-19, A4 0, A5 0, B2 0, B3 6.82e-19, B4 0, B5 0, B6 0, B7 0, C1 0, C2 0, C3 0, C4 0, D 0
- Erneuerbare Primärenergie als Energieträger (PERE) [MJ]: A1-A3 1112.29, A4 1.63, A5 4.39, B2 0.21, B3 653, B4 0, B5 0, B6 0, B7 0, C1 0, C2 0.11, C3 30.7, C4 1.35, D -136
- Erneuerbare Primärenergie zur stofflichen Nutzung (PERM) [MJ]: A1-A3 87.36, A4 0, A5 -87.36, B2 0, B3 0, B4 0, B5 0, B6 0, B7 0, C1 0, C2 0, C3 0, C4 0, D 0
- Erneuerbare Sekundärbrennstoffe (RSF) [MJ]: A1-A3 5.8e-20, A4 0, A5 0, B2 0, B3 5.8e-20, B4 0, B5 0, B6 0, B7 0, C1 0, C2 0, C3 0, C4 0, D 0
- Einsatz von Sekundärstoffen (SM) [kg]: A1-A3 2.51, A4 0, A5 0, B2 0, B3 2.51, B4 0, B5 0, B6 0, B7 0, C1 0, C2 0, C3 0, C4 0, D 0
- Total nicht erneuerbare Primärenergie (PENRT) [MJ]: A1-A3 4249.45, A4 28.8, A5 9.06, B2 13, B3 2990, B4 0, B5 0, B6 0, B7 0, C1 0, C2 1.97, C3 55.7, C4 8.97, D -823
- Gesamtverbrauch von erneuerbarer Primärenergie (PERT) [MJ]: A1-A3 1112.29, A4 1.63, A5 4.39, B2 0.21, B3 653, B4 0, B5 0, B6 0, B7 0, C1 0, C2 0.11, C3 30.7, C4 1.35, D -136

## Outputs
- Komponenten für die Wiederverwendung (CRU) [kg]: A1-A3 0, A4 0, A5 0, B2 0, B3 0, B4 0, B5 0, B6 0, B7 0, C1 0, C2 0, C3 0, C4 0, D 0
- Exportierte elektrische Energie (EEE) [MJ]: A1-A3 2.67, A4 0, A5 12.3, B2 0, B3 1.48, B4 0, B5 0, B6 0, B7 0, C1 0, C2 0, C3 3.93, C4 0, D 0
- Exportierte thermische Energie (EET) [MJ]: A1-A3 6.22, A4 0, A5 28.8, B2 0, B3 3.39, B4 0, B5 0, B6 0, B7 0, C1 0, C2 0, C3 9.02, C4 0, D 0
- Gefährlicher Abfall zur Beseitigung (HWD) [kg]: A1-A3 3.37e-6, A4 1.38e-10, A5 8.32e-10, B2 1.87e-10, B3 2.92e-6, B4 0, B5 0, B6 0, B7 0, C1 0, C2 9.45e-12, C3 4.83e-9, C4 4.61e-10, D -1.01e-7
- Stoff für die Energierückgewinnung (MER) [kg]: A1-A3 0, A4 0, A5 0, B2 0, B3 0, B4 0, B5 0, B6 0, B7 0, C1 0, C2 0, C3 0, C4 0, D 0
- Stoffe zum Recycling (MFR) [kg]: A1-A3 25.11, A4 0, A5 0, B2 0, B3 62, B4 0, B5 0, B6 0, B7 0, C1 0, C2 0, C3 51.3, C4 0, D 0
- Ungefährlicher Abfall zur Beseitigung (NHWD) [kg]: A1-A3 70.01, A4 0.00413, A5 0.1, B2 0.04, B3 66.1, B4 0, B5 0, B6 0, B7 0, C1 0, C2 0.000283, C3 0.0913, C4 45.9, D -4.63
- Entsorgter radioaktiver Abfall (RWD) [kg]: A1-A3 0.32, A4 3.55e-5, A5 0.00114, B2 5.77e-5, B3 0.28, B4 0, B5 0, B6 0, B7 0, C1 0, C2 2.43e-6, C3 0.00882, C4 9.99e-5, D -0.02

## Impact indicators
- Potenzial für die Verknappung abiotischer Ressourcen – nicht fossile Ressourcen (ADPE) [kg Sb-Äqv.]: A1-A3 0.000112, A4 1.8e-7, A5 1.36e-7, B2 4.3e-8, B3 8.61e-5, B4 0, B5 0, B6 0, B7 0, C1 0, C2 1.23e-8, C3 8.36e-7, C4 7.01e-8, D -7.47e-6
- Potenzial für die Verknappung abiotischer Ressourcen – fossile Brennstoffe (ADPF) [MJ]: A1-A3 4241.44, A4 28.7, A5 9.05, B2 13, B3 2990, B4 0, B5 0, B6 0, B7 0, C1 0, C2 1.97, C3 55.7, C4 8.96, D -822
- Versauerungspotenzial, kumulierte Überschreitung (AP) [mol H+ eqv.]: A1-A3 1.44, A4 0.00275, A5 0.0027, B2 0.000877, B3 1.21, B4 0, B5 0, B6 0, B7 0, C1 0, C2 0.000171, C3 0.00735, C4 0.00485, D -0.29
- Eutrophierungspotenzial - Süßwasser (EP-freshwater) [kg P eqv.]: A1-A3 0.000714, A4 6.42e-6, A5 1.41e-6, B2 2.18e-6, B3 0.00051, B4 0, B5 0, B6 0, B7 0, C1 0, C2 4.4e-7, C3 8.95e-6, C4 1.16e-6, D -6.63e-5
- Eutrophierungspotenzial - Salzwasser (EP-marine) [kg N eqv.]: A1-A3 0.28, A4 0.00101, A5 0.000717, B2 0.000142, B3 0.22, B4 0, B5 0, B6 0, B7 0, C1 0, C2 6e-5, C3 0.00171, C4 0.00124, D -0.08
- Eutrophierungspotenzial - Land (EP-terrestrial) [mol N eqv.]: A1-A3 3.2, A4 0.0117, A5 0.0109, B2 0.00153, B3 2.55, B4 0, B5 0, B6 0, B7 0, C1 0, C2 0.000704, C3 0.019, C4 0.0136, D -0.89
- Globales Erwärmungspotenzial - total (GWP-total) [kg CO2-Äqv.]: A1-A3 265.76, A4 2.17, A5 10.4, B2 0.29, B3 171, B4 0, B5 0, B6 0, B7 0, C1 0, C2 0.15, C3 5.41, C4 0.67, D -63.7
- Globales Erwärmungspotenzial - fossil (GWP-fossil) [kg CO2-Äqv.]: A1-A3 271.47, A4 2.16, A5 0.77, B2 0.28, B3 169, B4 0, B5 0, B6 0, B7 0, C1 0, C2 0.15, C3 5.38, C4 0.68, D -63.4
- Globales Erwärmungspotenzial - biogen (GWP-biogenic) [kg CO2-Äqv.]: A1-A3 -5.69, A4 -0.00297, A5 9.62, B2 0.00264, B3 1.04, B4 0, B5 0, B6 0, B7 0, C1 0, C2 -0.000203, C3 0.0275, C4 -0.0203, D -0.2
- Globales Erwärmungspotenzial - luluc (GWP-luluc) [kg CO2-Äqv.]: A1-A3 0.2, A4 0.012, A5 0.000113, B2 1.74e-5, B3 0.16, B4 0, B5 0, B6 0, B7 0, C1 0, C2 0.000821, C3 0.000654, C4 0.00126, D -0.01
- Abbaupotenzial der stratosphärischen Ozonschicht (ODP) [kg CFC 11-Äquiv.]: A1-A3 1.2e-7, A4 1.29e-13, A5 6.84e-12, B2 3e-13, B3 1.19e-7, B4 0, B5 0, B6 0, B7 0, C1 0, C2 8.82e-15, C3 4.48e-11, C4 1.61e-12, D -2.51e-10
- Bildungspotenzial für troposphärisches Ozon (POCP) [kg NMVOC eqv.]: A1-A3 0.93, A4 0.00244, A5 0.00189, B2 0.00067, B3 0.62, B4 0, B5 0, B6 0, B7 0, C1 0, C2 0.00015, C3 0.0046, C4 0.00377, D -0.18
- Wasser-Entzugspotenzial (Benutzer) (WDP) [m3 world eqv.]: A1-A3 29.21, A4 0.0192, A5 1.12, B2 5.38, B3 28.9, B4 0, B5 0, B6 0, B7 0, C1 0, C2 0.00132, C3 0.93, C4 0.0748, D -2.02
- Potenzielles Auftreten von Krankheiten aufgrund von Feinstaubemissionen (PM) [disease incidence]: A1-A3 1.46e-5, A4 1.58e-8, A5 1.69e-8, B2 5.45e-9, B3 1.08e-5, B4 0, B5 0, B6 0, B7 0, C1 0, C2 1.03e-9, C3 5.9e-8, C4 5.97e-8, D -2.06e-6
- Potenzielle Wirkung durch Exposition des Menschen mit U235 (IRP) [kBq U235 eqv.]: A1-A3 49.14, A4 0.0052, A5 0.19, B2 0.01, B3 45.2, B4 0, B5 0, B6 0, B7 0, C1 0, C2 0.000356, C3 1.49, C4 0.0111, D -3.22
- Potenzielle Toxizitätsvergleichseinheit für Ökosysteme (ETP-fw) [CTUe]: A1-A3 4119.43, A4 20, A5 3.89, B2 8.85, B3 3790, B4 0, B5 0, B6 0, B7 0, C1 0, C2 1.37, C3 24.4, C4 5.02, D -674
- Potenzielle Toxizitätsvergleichseinheit für den Menschen - kanzerogene Wirkung (HTP-c) [CTUh]: A1-A3 1.85e-7, A4 4.02e-10, A5 1.51e-10, B2 1.75e-10, B3 9.12e-8, B4 0, B5 0, B6 0, B7 0, C1 0, C2 2.75e-11, C3 7.17e-10, C4 7.66e-10, D -2.77e-8
- Potenzielle Toxizitätsvergleichseinheit für den Menschen - nicht kanzerogene Wirkung (HTP-nc) [CTUh]: A1-A3 5.03e-6, A4 2.12e-8, A5 5.71e-9, B2 7.88e-9, B3 2.5e-6, B4 0, B5 0, B6 0, B7 0, C1 0, C2 1.44e-9, C3 2.69e-8, C4 8.49e-8, D -8.09e-7
- Potenzieller Bodenqualitätsindex (SQP) [dimensionless]: A1-A3 2160.09, A4 9.89, A5 3.15, B2 0.14, B3 597, B4 0, B5 0, B6 0, B7 0, C1 0, C2 0.68, C3 20, C4 1.86, D -97.5

## Use advice
Dieser Datensatz beinhaltet die Ergebnisse für die Module A1-A3 sowie die Module A4, A5, B2, B3, B4, B5, B6, B7, C1, C2, C3, C4, D gemäß EN 15804. Ein Vergleich mit anderen Produkten ist nur mit einer vergleichbaren Anwendung im Gebäude zulässig. Grundsätzlich ist eine Gegenüberstellung oder die Bewertung von EPD Daten nur möglich, wenn alle zu vergleichenden Datensätze nach EN 15804 erstellt wurden und der Gebäudekontext, bzw. die produktspezifischen Leistungsmerkmale berücksichtigt werden.

## Review details
Die angewendete LCI Methode ist in Übereinstimmung mit ISO 14040 und 14044. Die Dokumentation enthält alle relevanten Informationen im Hinblick auf die Datenqualität und den Umfang der Anwendung der jeweiligen LCI Ergebnisse bzw. der Datensätze. Der Datensatz repräsentiert den Stand der Technik bezogen auf die funktionelle Einheit.

## Data sources
- GaBi database (general)
