# Fassaden - Schindler Fenster+Fassaden GmbH - HMEF 2020 mit Holz-Aluminium-Einsatzfenster

Dataset: ILCD process, EPD, specific dataset
Geography: DE
Reference year: 2020
Valid until: 2026
Classification: OEKOBAU.DAT: Komponenten von Fenstern und Vorhangfassaden / Fassaden / Vorhangfassade - Element-Fassaden
Synonyms: Holz-Aluminium-Fassade; HMEF 2020 Holz-Aluminium Elementfassade; Fassadensystem HMEF 2020
Method details: Produktkategorieregeln Teil A; Produktkategorieregeln Teil B – für Fassaden und Dächer aus Glas und Kunststoff
Generated by: ift Rosenheim
Registration number: EPD-SFA-GB-49.0
Owner: Schindler Fenster+Fassaden GmbH
Compliance: EN 15804
Review: Independent external review by Patrick Wortner
Amounts: rows without a unit in brackets have none in this file; such an amount is in the reference unit of its flow, which a separate flow dataset defines
copyright: true
licenseType: Free of charge for all users and uses

## General comment
Holz-Aluminium Element-Fassadensysteme mit Ansichtsbreiten von 90mm.

Dieser Datensatz beinhaltet die Ergebnisse für die Module A1-A3 sowie die Module B2, B3, B4, B5, B6, B7, C1, C2, C3, C4, und D gemäß EN 15804. Das Umweltprofil beinhaltet die Aufwendungen für die Lebenszyklus-Stadien cradle to gate mit Optionen. Die Herstellung der Verpackung wurde innerhalb der Module A1-A3 berücksichtigt.

## Geography
Dieser Datensatz repräsentiert die Situation der Schindler Fenster+Fassaden GmbH im Hinblick auf die wichtigsten Technologien und die gesetzlichen Rahmenbedingungen.

## Time period
jährlicher Durchschnitt

## Technology and included processes
Die Ökobilanzergebnisse umfassen die Lebenszyklusstadien der Herstellung der Vorprodukte bis hin zur Rohstoffgewinnung und Verarbeitungsprozesse von als Input dienenden Sekundärstoffen (z.B. Recyclingprozesse), deren Transporte zum Werk sowie die Produktion selbst, einschließlich der Bereitstellung von allen Hilfs- und Betriebsstoffen, Energie, sowie die vollständige Abfallbehandlung oder die Deponierung der Restabfälle während des Stadiums der Produktion. Die Module A1, A2 und A3 sind hier als ein aggregiertes Modul A1-A3 ausgewiesen. Falls für diesen Datensatz weitere Module berechnet wurden, sind diese separat zu finden und können für eine Betrachtung des gesamten Lebenszyklus zusammengeführt werden.

## Technical purpose
Elementfassaden für den Einsatz als äußere Gebäudehülle im Objektbau

## Reference product
- Fassaden - Schindler Fenster+Fassaden GmbH - HMEF 2020 mit Holz-Aluminium-Einsatzfenster: 1

## Inputs
- Frischwasserverbrauch (FW) [m3]: A1-A3 0.55, A4 0.00136, A5 0.0038, B2 0.57, B3 0.31, B4 0, B5 0, B6 0, B7 0, C1 0, C2 6.49e-5, C3 2.13, C4 0.00156, D -0.23
- Nicht-erneuerbare Primärenergie als Energieträger (PENRE) [MJ]: A1-A3 2230.9, A4 20.8, A5 12.29, B2 2990, B3 1310, B4 0, B5 0, B6 0, B7 0, C1 0, C2 1.02, C3 545.16, C4 8.19, D -1370
- Nicht-erneuerbare Primärenergie zur stofflichen Nutzung (PENRM) [MJ]: A1-A3 39.1, A4 0, A5 -2.09, B2 0, B3 0, B4 0, B5 0, B6 0, B7 0, C1 0, C2 0, C3 -35.16, C4 -1.85, D 0
- Verbrauch nicht erneuerbarer Sekundärbrennstoffe (NRSF) [MJ]: A1-A3 0.00697, A4 0, A5 0, B2 0, B3 4.09e-11, B4 0, B5 0, B6 0, B7 0, C1 0, C2 0, C3 0, C4 0, D -3.19e-11
- Erneuerbare Primärenergie als Energieträger (PERE) [MJ]: A1-A3 1011.72, A4 1.19, A5 6.64, B2 42.6, B3 196, B4 0, B5 0, B6 0, B7 0, C1 0, C2 0.0567, C3 227.14, C4 79.99, D -587
- Erneuerbare Primärenergie zur stofflichen Nutzung (PERM) [MJ]: A1-A3 158.28, A4 0, A5 0, B2 0, B3 0, B4 0, B5 0, B6 0, B7 0, C1 0, C2 0, C3 -79.14, C4 -79.14, D 0
- Erneuerbare Sekundärbrennstoffe (RSF) [MJ]: A1-A3 3.48e-12, A4 0, A5 0, B2 0, B3 3.48e-12, B4 0, B5 0, B6 0, B7 0, C1 0, C2 0, C3 0, C4 0, D -2.72e-12
- Einsatz von Sekundärstoffen (SM) [kg]: A1-A3 2.91, A4 0, A5 0, B2 0, B3 1.94, B4 0, B5 0, B6 0, B7 0, C1 0, C2 0, C3 0, C4 0, D -1.51
- Total nicht erneuerbare Primärenergie (PENRT) [MJ]: A1-A3 2270, A4 20.8, A5 10.2, B2 2990, B3 1310, B4 0, B5 0, B6 0, B7 0, C1 0, C2 1.02, C3 510, C4 6.34, D -1370
- Gesamtverbrauch von erneuerbarer Primärenergie (PERT) [MJ]: A1-A3 1170, A4 1.19, A5 6.64, B2 42.6, B3 196, B4 0, B5 0, B6 0, B7 0, C1 0, C2 0.0567, C3 148, C4 0.85, D -587

## Outputs
- Komponenten für die Wiederverwendung (CRU) [kg]: A1-A3 0, A4 0, A5 0, B2 0, B3 0, B4 0, B5 0, B6 0, B7 0, C1 0, C2 0, C3 0, C4 0, D 0
- Exportierte elektrische Energie (EEE) [MJ]: A1-A3 7.79, A4 0, A5 0.57, B2 0, B3 20.1, B4 0, B5 0, B6 0, B7 0, C1 0, C2 0, C3 20.8, C4 0, D 0
- Exportierte thermische Energie (EET) [MJ]: A1-A3 17.5, A4 0, A5 1.32, B2 0, B3 45.2, B4 0, B5 0, B6 0, B7 0, C1 0, C2 0, C3 46.7, C4 0, D 0
- Gefährlicher Abfall zur Beseitigung (HWD) [kg]: A1-A3 0.00697, A4 1.09e-9, A5 3.71e-9, B2 4.1e-7, B3 0.00697, B4 0, B5 0, B6 0, B7 0, C1 0, C2 5.13e-11, C3 1.12e-7, C4 6.73e-10, D -0.00544
- Stoff für die Energierückgewinnung (MER) [kg]: A1-A3 0, A4 0, A5 0, B2 0, B3 0, B4 0, B5 0, B6 0, B7 0, C1 0, C2 0, C3 0, C4 0, D 0
- Stoffe zum Recycling (MFR) [kg]: A1-A3 5.3, A4 0, A5 0, B2 0, B3 48.4, B4 0, B5 0, B6 0, B7 0, C1 0, C2 0, C3 21.1, C4 0, D 0
- Ungefährlicher Abfall zur Beseitigung (NHWD) [kg]: A1-A3 61, A4 0.00326, A5 0.00919, B2 0.9, B3 50.3, B4 0, B5 0, B6 0, B7 0, C1 0, C2 0.000151, C3 103, C4 31.6, D -39.4
- Entsorgter radioaktiver Abfall (RWD) [kg]: A1-A3 0.0334, A4 3.77e-5, A5 0.000815, B2 0.00669, B3 0.0257, B4 0, B5 0, B6 0, B7 0, C1 0, C2 1.23e-6, C3 0.0176, C4 6.65e-5, D -0.025

## Impact indicators
- Potenzial für den abiotischen Abbau nicht fossiler Ressourcen (ADPE) / Potencial de agotamiento de recursos abióticos para recursos no fósiles (ADPE) [kg Sb-Äqv.]: A1-A3 0.00284, A4 1.52e-7, A5 3.58e-7, B2 2.13e-5, B3 0.00192, B4 0, B5 0, B6 0, B7 0, C1 0, C2 6.5e-9, C3 0.000147, C4 1.67e-7, D -0.002
- Potenzial für den abiotischen Abbau fossiler Brennstoffe (ADPF) / Potencial de agotamiento de recursos abióticos para recursos fósiles (ADPF) [MJ]: A1-A3 1820, A4 20.7, A5 8.15, B2 2980, B3 1250, B4 0, B5 0, B6 0, B7 0, C1 0, C2 1.01, C3 465, C4 6.17, D -1160
- Versauerungspotenzial von Boden und Wasser (AP) / Potencial de acidificación del suelo y de los recursos de agua (AP) [kg SO2-Äqv.]: A1-A3 0.88, A4 0.00145, A5 0.00107, B2 0.0955, B3 0.66, B4 0, B5 0, B6 0, B7 0, C1 0, C2 6.42e-5, C3 0.0945, C4 0.00273, D -0.61
- Eutrophierungspotenzial (EP) / Potencial de eutrofización (EP) [kg Phosphat-Äqv.]: A1-A3 0.0754, A4 0.000332, A5 0.000199, B2 0.0159, B3 0.0548, B4 0, B5 0, B6 0, B7 0, C1 0, C2 1.48e-5, C3 0.023, C4 0.00031, D -0.0483
- Globales Erwärmungspotenzial (GWP) / Potencial de calentamiento global (GWP) [kg CO2-Äqv.]: A1-A3 114, A4 1.53, A5 1.12, B2 97.7, B3 71.4, B4 0, B5 0, B6 0, B7 0, C1 0, C2 0.0747, C3 86.7, C4 0.45, D -77
- Abbau Potential der stratosphärischen Ozonschicht (ODP) / Potencial de agotamiento de la capa de ozono estratosférico (ODP) [kg R11 eq.]: A1-A3 2.28e-6, A4 4.09e-16, A5 3.66e-14, B2 2.09e-13, B3 2.8e-8, B4 0, B5 0, B6 0, B7 0, C1 0, C2 1.3e-17, C3 7.86e-13, C4 2.47e-15, D -1.55e-6
- Bildungspotential für troposphärisches Ozon (POCP) / Potencial de formación de ozono troposférico (POCP) [kg Ethen-Äqv.]: A1-A3 0.0488, A4 -0.00014, A5 7.57e-5, B2 0.0261, B3 0.0376, B4 0, B5 0, B6 0, B7 0, C1 0, C2 -6.12e-6, C3 0.00889, C4 0.000208, D -0.0335

## Use advice
Dieser Datensatz beinhaltet die Ergebnisse für die Module A1-A3 sowie die Module A4, A5, B2, B3, B4, B5, B6, B7, C1, C2, C3, C4, D gemäß EN 15804.
Ein Vergleich mit anderen Produkten ist nur mit einer vergleichbaren Anwendung im Gebäude zulässig. Grundsätzlich ist eine Gegenüberstellung oder die Bewertung von EPD Daten nur möglich, wenn alle zu vergleichenden Datensätze nach EN 15804 erstellt wurden und der Gebäudekontext, bzw. die produktspezifischen Leistungsmerkmale berücksichtigt werden.

## Review details
Die angewendete LCI Methode ist in Übereinstimmung mit ISO 14040 und 14044. Die Dokumentation enthält alle relevanten Informationen im Hinblick auf die Datenqualität und den Umfang der Anwendung der jeweiligen LCI Ergebnisse bzw. der Datensätze. Der Datensatz repräsentiert den Stand der Technik bezogen auf die funktionelle Einheit.

## Data sources
- GaBi database (general)
