# TECU Bronze

Dataset: ILCD process, EPD, specific dataset
Geography: DE
Reference year: 2019
Valid until: 2024
Classification: OEKOBAU.DAT: Metalle / Kupfer / Kupferbleche
Classification: IBUCategories: 02 Bauprodukte / Metallbauprodukte und Zubehör / Baumetalle
Method details: Baumetalle.pdf
Generated by: SUSTAINUM Institut für zukunftsfähiges Wirtschaften Berlin eG
Registration number: EPD-KME-20190039-IBA1-DE
Owner: KME Germany GmbH & Co. KG
Compliance: DIN EN 15804; ISO 14025
Review: Accredited third party review by Institut Bauen und Umwelt e. V.
Amounts: rows without a unit in brackets have none in this file; such an amount is in the reference unit of its flow, which a separate flow dataset defines
copyright: true
licenseType: Free of charge for all users and uses
accessRestrictions: None

## General comment
Die Kupferlegierung TECU® Bronze besteht aus Cu- DHP und aus Zinn. Sie wird nach /EN 1172/ gefertigt und trägt die Werkstoffbezeichnung CuSn4 CW450K.

Die ursprünglich glänzende warme rot-braune Oberfläche entwickelt sich durch Bewitterung über verschiedene Braunrot- und Braungrau-Töne ganz allmählich hin zu einer dunkelbraunen-anthrazit Oberfläche. Die charakteristische grüne Patinabildung, an geneigten Flächen, erfolgt erheblich langsamer als bei klassischem nicht legiertem Kupfer.

## Technology and included processes
TECU® Bronze Kupferlegierungen werden in 7 Prozessschritten anwendungsfertig produziert: Abgießen TECU® Bronze wird auf speziellen Legierungslinien zu Bändern abgegossen. Fräsen Durch die hohe Temperatur beim Abgießen entsteht auf der Oberfläche durch Wärmeoxidation eine Zunderschicht, die vor den weiteren Arbeitsschritten durch einen Fräsvorgang entfernt wird. Dabei werden auf jeder Seite einige Zehntelmillimeter des Materials abgenommen. Kalt vorwalzen Auf einem Reversier-Quarto (Vierwalzengerüst) werden die TECU® Bronze Bänder anschließend kalt in weiteren Stichen heruntergewalzt, dabei verfestigen sie sich durch die Umformung. Zwischenglühen Zur Weiterbearbeitung wird deshalb eine Wärmebehandlung durch Zwischenglühen durchgeführt, die eine gezielte Entfestigung der Kupferlegierung bewirkt. Dieser Vorgang erfolgt in einer Schutzgasatmosphäre, um eine erneute Wärmeoxidation der Oberfläche auszuschließen. Fertigwalzen Die Enddicke von TECU® Bronze wird in der Festigkeits- oder Zustandswalzung erreicht. Streckrichten Auf einer Streckricht-Anlage werden die Toleranzen bzgl. Geradheit und Planheit weiter eingeengt. Verpackung In Querrichtung kann durch Tafelscheren eine Teilung der großen Bänder/Coils in z.B. Kleincoils oder Tafeln erfolgen. Anschließend werden die TECU® Bronze Erzeugnisse verpackt.
Technische Daten:
Es gelten die Leistungswerte des Produkts entsprechend der Leistungserklärung in Bezug auf dessen Wesentliche Merkmale gemäß EN 14783:2013 sowie die folgenden technischen Daten und Prüfnormen für die TECU® Bronze: /ISO 6507-1/, /ISO 6507-2/, /ISO 6892-1/, /ISO 1811- 2/, /ISO 4739/
Deklarierte Einheit:
Die Deklaration bezieht sich auf TECU® Bronze Kupferlegierungen.

Die deklarierte Einheit ist 1 kg Kupferblech legiert (TECU® Bronze).

## Technical purpose
TECU® Bronze Kupferlegierungen in Tafeln und Bändern werden für die Fassadengestaltung und Dachdeckung verwendet. Systeme zur Dachentwässerung (Dachrinnen, Fallrohre und Zubehör) sind möglich.

## Reference product
- TECU Bronze Kupferlegierung (): 1

## Inputs
- Erneuerbare Primärenergie als Energieträger (PERE) [MJ]: A1-A3 4.2243, C2 0.00666, C3 0, D 0.0681
- Erneuerbare Primärenergie zur stofflichen Nutzung (PERM) [MJ]: A1-A3 0, C2 0, C3 0, D 0
- Total erneuerbare Primärenergie (PERT) [MJ]: A1-A3 4.2243, C2 0.00666, C3 0, D 0.0681
- Nicht-erneuerbare Primärenergie als Energieträger (PENRE) [MJ]: A1-A3 11.467, C2 0.0988, C3 0, D 0.411
- Nicht-erneuerbare Primärenergie zur stofflichen Nutzung (PENRM) [MJ]: A1-A3 0, C2 0, C3 0, D 0
- Total nicht erneuerbare Primärenergie (PENRT) [MJ]: A1-A3 11.467, C2 0.0988, C3 0, D 0.411
- Einsatz von Sekundärstoffen (SM) [kg]: A1-A3 1.091, C2 0, C3 0, D 0
- Erneuerbare Sekundärbrennstoffe (RSF) [MJ]: A1-A3 0, C2 0, C3 0, D 0
- Nicht erneuerbare Sekundärbrennstoffe (NRSF) [MJ]: A1-A3 0, C2 0, C3 0, D 0
- Einsatz von Süßwasserressourcen (FW) [m^3]: A1-A3 0.0405785, C2 7.72e-6, C3 0, D 0.000577

## Outputs
- Gefährlicher Abfall zur Deponie (HWD) [kg]: A1-A3 3.10464e-8, C2 0, C3 0, D 2.64421e-9
- Entsorgter nicht gefährlicher Abfall (NHWD) [kg]: A1-A3 4.11668, C2 0.000532769, C3 0, D 2.96671
- Entsorgter radioaktiver Abfall (RWD) [kg]: A1-A3 0.000976186, C2 1.19334e-7, C3 0, D 6.3842e-6
- Komponenten für die Wiederverwendung (CRU) [kg]: A1-A3 0, C2 0, C3 0, D 0
- Stoffe zum Recycling (MFR) [kg]: A1-A3 0, C2 0, C3 -0.00949, D 0
- Stoffe für die Energierückgewinnung (MER) [kg]: A1-A3 0, C2 0, C3 0, D 0
- Exportierte elektrische Energie (EEE) [MJ]: A1-A3 0, C2 0, C3 0, D 0
- Exportierte thermische Energie (EET) [MJ]: A1-A3 0, C2 0, C3 0, D 0

## Impact indicators
- Globales Erwärmungspotenzial (GWP) [kg CO_(2)-Äq.]: A1-A3 0.8157, C2 0.00731, C3 0, D 0.0352
- Abbau Potential der stratosphärischen Ozonschicht (ODP) [kg CFC11-Äq.]: A1-A3 1.20157e-12, C2 1.55e-16, C3 0, D 8.15e-15
- Versauerungspotenzial von Boden und Wasser (AP) [kg SO_(2)-Äq.]: A1-A3 0.001625, C2 2.8e-5, C3 0, D 0.000247
- Eutrophierungspotenzial (EP) [kg PO_(4)^(3)-Äq.]: A1-A3 0.0002323, C2 7.1e-6, C3 0, D 1.48e-5
- Bildungspotential für troposphärisches Ozon (POCP) [kg Ethen-Äq.]: A1-A3 5.92e-5, C2 -1.05e-5, C3 0, D 1.36e-5
- Potenzial für den abiotischen Abbau nicht fossiler Ressourcen (ADPE) [kg Sb-Äq.]: A1-A3 0.000217354, C2 7.63e-10, C3 0, D 3.91e-5
- Potenzial für den abiotischen Abbau fossiler Brennstoffe (ADPF) [MJ]: A1-A3 9.016, C2 0.0985, C3 0, D 0.395

## Use advice
Gültigkeitsbereich:
Dieses Dokument bezieht sich auf TECU® Bronze der Firma KME Germany GmbH & Co. KG, hergestellt in Osnabrück, Deutschland. Die deklarierte Einheit bezieht sich auf 1 kg Kupferblech, legiert. Die Datenerhebung für die Herstellung des deklarierten Produktes erfolgte werksspezifisch mit aktuellen Jahresdaten von 2017. Der Deklarationsinhaber ist verantwortlich für die zugrunde liegenden Daten und deren Verifizierung.
Systemgrenze:
Die Ökobilanz betrachtet die Systemgrenzen "Wiege bis Werkstor - mit Optionen" und folgt dem modularen Aufbau nach /EN 15804/. Die Ökobilanz berücksichtigt folgende Module:

A1-A3: Rohstoffversorgung, Transport, Herstellung
C2: Transport
C3: Abfallbehandlung
D: Wiederverwendungs-, Rückgewinnungs- oder Recyclingpotenzial

## Data sources
- GaBi Database (all versions)
- GaBi database SP36 2018
