# Stampflehmwand; 2000 kg/m3

Dataset: ILCD process, EPD, generic dataset
Geography: DE
Reference year: 2021
Valid until: 2022
Classification: oekobau.dat: Mineralische Baustoffe / Steine und Elemente / Lehmsteine
Owner: Sphera Solutions GmbH
Compliance: EN 15804+A2
Review: Dependent internal review by Sphera Solutions GmbH; Independent external review by GaBi user forum
Amounts: rows without a unit in brackets have none in this file; such an amount is in the reference unit of its flow, which a separate flow dataset defines
copyright: true
licenseType: Free of charge for all users and uses
accessRestrictions: The license conditions as stated on https://www.oekobaudat.de/ apply.
accessRestrictions: Es gelten die Lizenzbedingungen wie sie auf https://www.oekobaudat.de/ genannt sind.

## General comment
Dieser Datensatz wurde nach dem European Standard EN 15804+A2 für Nachhaltiges Bauen modelliert. Ergebnisse werden in Modulen abgebildet, die den strukturierten Ausdruck von Ergebnissen über den gesamten Lebenszyklus zulassen.

## Geography
Der Datensatz bildet die länderspezifische Situation in Deutschland ab. Dabei werden Haupttechnologien, spezifische regionale Charakteristiken und ggf. Importstatistiken berücksichtigt.

## Time period
Jährlicher Durchschnitt

## Technology and included processes
Stampflehmwände bestehen aus Lehm, Sand, Strohhäckseln und weiteren Zuschlagstoffen. Bei Lehm mit vielen grobkörnigen Bestandteilen ist die Zugabe von Zuschlägen nicht notwendig, was insbesondere für den Süden Deutschlands typisch ist. Die Verarbeitung des Stampflehms erfolgt mit einem pneumatischen Stampfer, wodurch das Material sorgfältig, lagenweise verdichtet wird. Die Systemgrenze bildet das fertige Produkt der Stampflehmwand mit einer Dichte von 2000 kg/m3.

In der Entsorgungsphase wird in Modul C1 für Putze, Mörtel und Bauplatten aus Lehm ein manueller Rückbau, für Stapflehmwände und Lehmmauerwerk ein maschineller Rückbau berücksichtigt.
Der Transport in Modul C2 zur Aufbereitungsanlage erfolgt mit einem LKW (50km).
In Modul C3 wird eine Aufbereitung des Lehmprodukts bilanziert, wobei 3% Material verloren gehen.
In Modul D erfolgt eine Gutschrift für die Netto-Materialmenge (zurückgebaute Menge abzüglich Aufbereitungsverluste, inkl. eventueller Faserbewehrungen) für die Substitution von Lehmpulver.

## Technical purpose
Dieses Produkt kann im Baubereich verwendet werden.

## Safety margin
30 %. Wichtige Prozesse/Flüsse können fehlen oder sind abgeschätzt. Stark eingeschränkte technologische, zeitliche oder geographische Repräsentativität.

## Reference product
- Stampflehmwand: 1

## Inputs
- Erneuerbare Primärenergie als Energieträger (PERE) [MJ]: A1-A3 2.95591, C1 0.541745, C2 4.73669, C3 11.5677, D -1.8116
- Erneuerbare Primärenergie zur stofflichen Nutzung (PERM) [MJ]: A1-A3 0, C1 0, C2 0, C3 0, D 0
- Total erneuerbare Primärenergie (PERT) [MJ]: A1-A3 2.95591, C1 0.541745, C2 4.73669, C3 11.5677, D -1.8116
- Nicht-erneuerbare Primärenergie als Energieträger (PENRE) [MJ]: A1-A3 124.788, C1 9.33428, C2 81.6133, C3 130.911, D -31.214
- Nicht-erneuerbare Primärenergie zur stofflichen Nutzung (PENRM) [MJ]: A1-A3 0, C1 0, C2 0, C3 0, D 0
- Total nicht-erneuerbare Primärenergie (PENRT) [MJ]: A1-A3 124.788, C1 9.33428, C2 81.6133, C3 130.911, D -31.214
- Einsatz von Sekundärstoffen (SM) [kg]: A1-A3 0, C1 0, C2 0, C3 0, D 0
- Erneuerbare Sekundärbrennstoffe (SF) [MJ]: A1-A3 0, C1 0, C2 0, C3 0, D 0
- Nicht erneuerbare Sekundärbrennstoffe (NRSF) [MJ]: A1-A3 0, C1 0, C2 0, C3 0, D 0
- Nettoeinsatz von Süßwasserressourcen (FW) [m3]: A1-A3 0.00269494, C1 0.000481476, C2 0.00420973, C3 0.0339469, D -0.00161006

## Outputs
- Gefährlicher Abfall zur Deponie (HWD) [kg]: A1-A3 6.12686e-7, C1 3.90143e-10, C2 3.41117e-9, C3 7.60401e-9, D -1.30464e-9
- Entsorgter nicht gefährlicher Abfall (NHWD) [kg]: A1-A3 0.0173195, C1 0.00150677, C2 0.0131743, C3 0.0376991, D -0.00503865
- Entsorgter radioaktiver Abfall (RWD) [kg]: A1-A3 0.000119233, C1 8.95746e-6, C2 7.83186e-5, C3 0.000963798, D -2.99539e-5
- Komponenten für die Wiederverwendung (CRU) [kg]: A1-A3 0, C1 0, C2 0, C3 0, D 0
- Stoffe zum Recycling (MFR) [kg]: A1-A3 0, C1 0, C2 0, C3 1939.86, D 0
- Stoffe für die Energierückgewinnung (MER) [kg]: A1-A3 0, C1 0, C2 0, C3 0, D 0
- Exportierte elektrische Energie (EEE) [MJ]: A1-A3 0, C1 0, C2 0, C3 0, D 0
- Exportierte thermische Energie (EET) [MJ]: A1-A3 0, C1 0, C2 0, C3 0, D 0

## Impact indicators
- Globales Erwärmungspotenzial - total (GWP-total) [kg CO2 eq.]: A1-A3 9.68714, C1 0.698317, C2 6.19898, C3 6.99111, D -2.33462
- Globales Erwärmungspotenzial - fossil (GWP-fossil) [kg CO2 eq.]: A1-A3 9.6598, C1 0.693656, C2 6.15709, C3 6.93939, D -2.3187
- Globales Erwärmungspotenzial - biogen (GWP-biogenic) [kg CO2 eq.]: A1-A3 0.00692608, C1 0.000138744, C2 0.00235432, C3 0.013706, D -0.000794145
- Globales Erwärmungspotenzial - luluc (GWP-luluc) [kg CO2 eq.]: A1-A3 0.0204123, C1 0.00452255, C2 0.0395425, C3 0.0380083, D -0.0151235
- Abbaupotenzial der stratosphärischen Ozonschicht (ODP) [kg CFC-11 eq.]: A1-A3 2.63065e-15, C1 1.80186e-16, C2 1.57544e-15, C3 3.09441e-14, D -6.02545e-16
- Versauerungspotenzial, kumulierte Überschreitung (AP) [Mole of H+ eq.]: A1-A3 0.0459683, C1 0.00933926, C2 0.0174568, C3 0.0646708, D -0.0260423
- Eutrophierungspotenzial - Süßwasser (EP-freshwater) [kg P eq.]: A1-A3 9.13483e-6, C1 1.44827e-6, C2 1.26628e-5, C3 1.58028e-5, D -4.84302e-6
- Eutrophierungspotenzial - Salzwasser (EP-marine) [kg N eq.]: A1-A3 0.0202595, C1 0.00424877, C2 0.00804196, C3 0.0319914, D -0.0132677
- Eutrophierungspotenzial - Land (EP-terrestrial) [Mole of N eq.]: A1-A3 0.240092, C1 0.0467157, C2 0.0899749, C3 0.351577, D -0.145921
- Bildungspotenzial für troposphärisches Ozon (POCP) [kg NMVOC eq.]: A1-A3 0.0631258, C1 0.0127246, C2 0.015682, C3 0.0929889, D -0.0383998
- Potenzial für die Verknappung abiotischer Ressourcen nicht fossile Ressourcen (ADPE) [kg Sb eq.]: A1-A3 5.11432e-7, C1 6.12555e-8, C2 5.35581e-7, C3 7.64729e-6, D -2.04839e-7
- Potenzial für die Verknappung abiotischer Ressourcen fossile Brennstoffe (ADPF) [MJ]: A1-A3 124.785, C1 9.33389, C2 81.6099, C3 130.903, D -31.2127
- Wasser-Entzugspotenzial (Benutzer) (WDP) [m³ world equiv.]: A1-A3 0.0216014, C1 0.00273746, C2 0.0239347, C3 1.16543, D -0.00915411

## Use advice
Der Datensatz repräsentiert ein Cradle to Gate Inventar. Er kann verwendet werden, um die Lieferkette des jeweiligen Produktes in einer repräsentativen Weise zu charakterisieren. Die Kombination mit einzelnen Einheitenprozessen und diesem Produkt ermöglicht die Erstellung von anwenderspezifischen (Produkt-) LCAs.

## Data sources
- Stampflehm, 2001
- Homepage Lehmbauwerk, 2008
- Documentation of data quality management
- GaBi Database Edition 2021, CUP2021.01
- GaBi database (all versions)
