# Befestigungssysteme für WDVS

Dataset: ILCD process, EPD, average dataset
Geography: RER
Reference year: 2021
Valid until: 2026
Classification: OEKOBAU.DAT: Komponenten von Fenstern und Vorhangfassaden / Beschläge / Befestigungen
Classification: IBUCategories: 02 Bauprodukte / Befestigungen / Dübel aus Kunststoff und Metall
Method details: Dübel aus Kunststoff und Metall.pdf
Generated by: brands and values GmbH
Registration number: EPD-EJO-20210060-IBD1-DE
Owner: EJOT BAUBEFESTIGUNGEN GmbH
Compliance: DIN EN 15804+A2; ISO 14025
Review: Accredited third party review by Institut Bauen und Umwelt e. V.
Amounts: rows without a unit in brackets have none in this file; such an amount is in the reference unit of its flow, which a separate flow dataset defines
copyright: true
licenseType: Free of charge for all users and uses
accessRestrictions: None

## General comment
Die deklarierten Produkte der EJOT Baubefestigungen GmbH, Geschäftsbereich ETICS Fasteners, werden aus verschiedenen Kunststoffen und/oder Stahl hergestellt. Die Produkte können über den Anwendungsfall und die Nutzlänge differenziert werden. Im Rahmen dieser Deklaration werden durchschnittliche Dübel und Schrauben mit Nutzlängen von 175, 195 und 215 mm betrachtet. Für nicht ausgewiesene Längen ist eine lineare Extrapolation zulässig. Die Deklaration umfasst dabei alle im Portfolio befindlichen Produkte der folgenden Produktgruppen:

Tellerdübel (Schraub- und Schlagdübel)
Zusatzteller für Tellerdübel
Fassadendübel (Schraub- und Schlagdübel)
Schraubdübel für die Sicherung von zweischaligem Mauerwerk
Betonschrauben für die Befestigung von Unterdeckendämmung
Zubehör

Dabei handelt es sich um europäisch oder national bauaufsichtlich zugelassene sowie konstruktive Produkte ohne Zulassung. Dadurch ergeben sich die folgenden Varianten:

## Technology and included processes
Die Dübelhülsen aus Kunststoff werden nach konventionellen Spritzgusstechniken hergestellt. Dazu wird mit einer Spritzgießmaschine der jeweilige Kunststoff in einer Spritzeinheit plastifiziert und in ein Spritzgießwerkzeug eingespritzt. Der Hohlraum (die Kavität) des Werkzeugs bestimmt die Form und die Oberflächenstruktur des fertigen Produktes. Schrauben: Der weitaus größte Teil von Schrauben und Verbindungselementen wird durch spanlose Kaltumformung im sog. Kaltfließpressverfahren hergestellt. Dabei wird das Ausgangsmaterial als „Draht“ auf Spulen aufgewickelt angeliefert und in den Pressen vorgeschalteten Anlagen abgehaspelt, gerichtet und gegebenenfalls auf den gewünschten Durchmesser reduziert. Moderne Kaltfließpressen arbeiten mehrstufig, d. h. pro Hub sind mehrere Operationen hintereinander verkettet, bspw. Schraubenkopf vorformen, stauchen, abgraten und Gewindeteil reduzieren. Im nachfolgenden Prozess werden die Gewinde durch Gewindewalzmaschinen mit Flachbacken oder Roll- und Segmentwerkzeugen spanlos auf die reduzierten Gewindeteile aufgerollt. Vorzugsweise verwendet man Kaltfließpressen mit integrierter Gewinderollmaschine. Die EJOT Baubefestigungen GmbH ist gemäß ISO 9001 zertifiziert. Stopfen und Rondellen werden zugekauft, sie werden aus Polystyrol unter Dampfzufuhr formgeschäumt und verpackt.
Deklarierte Einheit:
Die deklarierte Einheit ist ein durchschnittliches Dübelsystem zur Befestigung von 1 m2 WDVS mit einer spezifischen Länge von 195 mm, das aus sechs einzelnen Systemen besteht.

"Durchschnittlich“ beschreibt sämtliche produzierte Dübeltypen des Systems im Durchschnitt gemäß Produktionsanteilen gewichtet auf Basis einer Parameteranalyse gerechnet. Das bedeutet, dass ein hypothetisches Dübelsystem berechnet wird, welches das gesamte WDVS-System repräsentiert. Um die deklarierte Einheit auf kg umrechnen zu können wird das Gewicht pro System angeführt.

## Technical purpose
Die im Rahmen dieser Deklaration behandelten Produkte werden hauptsächlich für die mechanische Befestigung von Wärmedämm-Verbundsystemen auf unterschiedlichen Untergründen verwendet. Ein Teil des betrachteten Produktportfolios wird zur Sicherung von zweischaligem Mauerwerk oder zur Befestigung von Unterdeckendämmung verwendet.

## Reference product
- durchschnittliche Dübelsysteme für WDVS von 195 mm (): 1

## Inputs
- Erneuerbare Primärenergie als Energieträger (PERE) [MJ]: A1-A3 1.89704, C1 0.00198, C2 0.00097, C3 0.000736, C4 0.0044, D 0.156
- Erneuerbare Primärenergie zur stofflichen Nutzung (PERM) [MJ]: A1-A3 0.712959, C1 0, C2 0, C3 0, C4 0, D 0
- Total erneuerbare Primärenergie (PERT) [MJ]: A1-A3 2.61, C1 0.00198, C2 0.00097, C3 0.000736, C4 0.0044, D 0.156
- Nicht-erneuerbare Primärenergie als Energieträger (PENRE) [MJ]: A1-A3 9.31922, C1 0.0343, C2 0.0168, C3 2.09098, C4 0.0626, D -2.02
- Nicht-erneuerbare Primärenergie zur stofflichen Nutzung (PENRM) [MJ]: A1-A3 2.08078, C1 0, C2 0, C3 -2.08078, C4 0, D 0
- Total nicht erneuerbare Primärenergie (PENRT) [MJ]: A1-A3 11.4, C1 0.0343, C2 0.0168, C3 0.0102, C4 0.0626, D -2.02
- Einsatz von Sekundärstoffen (SM) [kg]: A1-A3 0.000674854, C1 0, C2 0, C3 0, C4 0, D 0.13866
- Erneuerbare Sekundärbrennstoffe (RSF) [MJ]: A1-A3 0, C1 0, C2 0, C3 0, C4 0, D 0
- Nicht erneuerbare Sekundärbrennstoffe (NRSF) [MJ]: A1-A3 0, C1 0, C2 0, C3 0, C4 0, D 0
- Einsatz von Süßwasserressourcen (FW) [m^3]: A1-A3 0.00218, C1 2.3e-6, C2 1.13e-6, C3 2.87e-6, C4 7.68e-7, D -0.000414

## Outputs
- Gefährlicher Abfall zur Deponie (HWD) [kg]: A1-A3 3.75e-8, C1 1.59e-9, C2 7.79e-10, C3 2.67e-10, C4 2.28e-10, D -2.58e-7
- Entsorgter nicht gefährlicher Abfall (NHWD) [kg]: A1-A3 0.0104, C1 5.44e-6, C2 2.67e-6, C3 2.76e-6, C4 0.06, D 0.024
- Entsorgter radioaktiver Abfall (RWD) [kg]: A1-A3 0.000253, C1 6.33e-8, C2 3.1e-8, C3 1.35e-7, C4 7.55e-7, D 7.17e-8
- Komponenten für die Wiederverwendung (CRU) [kg]: A1-A3 0, C1 0, C2 0, C3 0, C4 0, D 0
- Stoffe zum Recycling (MFR) [kg]: A1-A3 0, C1 0, C2 0, C3 0.13866, C4 0, D 0
- Stoffe für die Energierückgewinnung (MER) [kg]: A1-A3 0.00246125, C1 0, C2 0, C3 0, C4 0, D 0
- Exportierte elektrische Energie (EEE) [MJ]: A1-A3 0, C1 0, C2 0, C3 0, C4 0, D 0
- Exportierte thermische Energie (EET) [MJ]: A1-A3 0, C1 0, C2 0, C3 0, C4 0, D 0

## Impact indicators
- Globales Erwärmungspotenzial total (GWP-total) [kg CO_(2)-Äq.]: A1-A3 0.811, C1 0.00257, C2 0.00126, C3 0.000526, C4 0.00437, D -0.234
- Globales Erwärmungspotenzial fossil (GWP-fossil) [kg CO_(2)-Äq.]: A1-A3 0.811, C1 0.00255, C2 0.00125, C3 0.000522, C4 0.00436, D -0.234
- Globales Erwärmungspotenzial biogen (GWP-biogenic) [kg CO_(2)-Äq.]: A1-A3 0, C1 0, C2 0, C3 0, C4 -3.97e-7, D 0
- Globales Erwärmungspotenzial luluc (GWP-luluc) [kg CO_(2)-Äq.]: A1-A3 0.000642, C1 2.08e-5, C2 1.02e-5, C3 3.57e-6, C4 3.54e-6, D 6.69e-6
- Abbau Potential der stratosphärischen Ozonschicht (ODP) [kg CFC11-Äq.]: A1-A3 2.91e-11, C1 4.71e-19, C2 2.31e-19, C3 1.27e-18, C4 9.88e-18, D 5.12e-16
- Versauerungspotenzial von Boden und Wasser (AP) [mol H^(+)-Äq.]: A1-A3 0.00225, C1 1.3e-5, C2 7.67e-6, C3 5.12e-6, C4 1.32e-5, D -0.000522
- Eutrophierungspotenzial Süßwasser (EP-freshwater) [kg PO_(4)-Äq.]: A1-A3 2.49e-6, C1 7.81e-9, C2 3.83e-9, C3 1.52e-9, C4 7.98e-7, D -1.33e-7
- Eutrophierungspotenzial Salzwasser (EP-marine) [kg N-Äq.]: A1-A3 0.000555, C1 6.15e-6, C2 3.71e-6, C3 2.49e-6, C4 2.93e-6, D -9.53e-5
- Eutrophierungspotenzial Land (EP-terrestrial) [mol N-Äq.]: A1-A3 0.00588, C1 6.83e-5, C2 4.11e-5, C3 2.73e-5, C4 3.21e-5, D -0.000965
- Bildungspotential für troposphärisches Ozon (POCP) [kg NMVOC-Äq.]: A1-A3 0.00173, C1 1.25e-5, C2 7.17e-6, C3 7.25e-6, C4 9.54e-6, D -0.000393
- Potenzial für den abiotischen Abbau nicht fossiler Ressourcen (ADPE) [kg Sb-Äq.]: A1-A3 2.53e-5, C1 2.07e-10, C2 1.02e-10, C3 5.72e-10, C4 2.94e-10, D -3.81e-6
- Potenzial für den abiotischen Abbau fossiler Brennstoffe (ADPF) [MJ]: A1-A3 11.4, C1 0.0342, C2 0.0168, C3 0.0102, C4 0.0625, D -2.02
- Wassernutzung (WDP) [m^(3) Welt-Äq. entzogen]: A1-A3 0.03, C1 2.5e-5, C2 1.23e-5, C3 0.000101, C4 -4.89e-5, D -0.0177
- Auftreten von Krankheiten aufgrund von Feinstaubemissionen (PM) [Krankheitsfälle]
- Wirkung durch Exposition des Menschen mit U235 (IR) [kBq U235-Äq.]
- Toxizitätsvergleichseinheit für Ökosysteme (ETP-fw) [CTUe]
- Toxizitätsvergleichseinheit für Menschen (krebserregend) (HTP-c) [CTUh]
- Toxizitätsvergleichseinheit für Menschen (nicht krebserregend) (HTP-nc) [CTUh]
- Bodenqualitätsindex (SQP) [SQP]

## Use advice
Gültigkeitsbereich:
Die EPD bezieht sich auf die im Portfolio WDVS befindlichen Befestigungselemente einschließlich Zubehör. Diese Produkte werden in den Herstellwerken in Ciasna (Polen) und Dozwil (Schweiz) produziert. Die Ergebnisse werden für die Nutzlänge 195 mm angegeben. Für alle weiteren Längen kann eine Inter- bzw. Extrapolation mit der in Kapitel 5 angegebenen Formel durchgeführt werden.
Systemgrenze:
Typ der EPD: Wiege bis Werkstor - mit Optionen.

Die Umwelt-Produktdeklaration bezieht sich auf das Produktionsstadium (Modul A1–A3), das Entsorgungsstadium (Module C1–C4) sowie Gutschriften und Lasten außerhalb der Systemgrenze (Modul D).

In dem Produktionsstadium wird die Beschaffung der Rohstoffe inklusive der entsprechenden Vorketten, die notwendigen Beschaffungstransporte zu den Werken sowie die für die Produktion der Dübelsysteme notwendigen Energien betrachtet.Für die Werke wurde jeweils der länderspezifische Strommix modelliert. Die Materialzusammensetzung und der Energiebedarf der deklarierten Dübelsysteme wurde gemäß ihrer Produktionsanteile in jedem Werk berechnet.

In der Entsorgungsphase wird der Rückbau der Dübelsysteme (Modul C1), der Transport zur Abfallbehandlung (Modul C2), die Abfallaufbereitung (Modul C3) sowie die Deponierung der Kunststoffe (Modul C4) betrachtet. Vermiedene Lasten aus dem Recycling der Metalle werden in Modul D ausgewiesen. Hierfür werden lediglich die Nettoschrottmengen betrachtet.

## Data sources
- GaBi Database (all versions)
- GaBi database SP40 2020
