# MAXI-TEC® CW- und UW-Profile

Dataset: ILCD process, EPD, average dataset
Geography: DE
Reference year: 2019
Valid until: 2024
Classification: OEKOBAU.DAT: Metalle / Edelstahl / Edelstahlprofile
Classification: IBUCategories: 02 Bauprodukte / Metallbauprodukte und Zubehör / Dünnwandige Profile und Profiltafeln aus Metall
Method details: Dünnwandige Profile und Profiltafeln aus Metall.pdf
Registration number: 10849
Owner: Profil-Vertrieb GmbH/PROTEKTORWERK Florenz Maisch GmbH & Co. KG
Compliance: DIN EN 15804; ISO 14025
Review: Accredited third party review by Institut Bauen und Umwelt e. V.
Amounts: rows without a unit in brackets have none in this file; such an amount is in the reference unit of its flow, which a separate flow dataset defines
copyright: true

## General comment
MAXI-TEC® Profile sind werkseitig vorgefertigte, dünnwandige Profile aus feuerverzinktem Spaltband. Als repräsentatives Produkt für alle MAXI-TEC® Profile wurde das Profil MAXI-TEC® CW 75-06 in einer Lieferlänge von 300 cm gewählt, das zum einen das geometrisch durchschnittliche Produkt ist und darüber hinaus auch die marktgängigste Geometrie und durchschnittliche Werte für alle MAXI-TEC® Profile aufweist. Die Verwendung dieses Profils kann als Worst-Case Ansatz angesehen werden, da es mit 0,706 kg/lfm schwerer ist, als das Durchschnittsgewicht aller Profile (ca. 0,647 kg/lfm).

## Technology and included processes
MAXI-TEC® Profile werden durch einen Schneid- und Umformprozess aus feuerverzinktem Stahl-Spaltband hergestellt. Das Spaltband wird im Bandverfahren kontinuierlich zugeführt. Im ersten Schritt wird der Mittelbereich geschnitten und geprägt und anschließend durch eine geeignete Vorrichtung kontinuierlich gespreizt. Der gefaltete Bereich des Bandes wird eben gewalzt und danach wird das so modifizierte Spaltband walzprofiliert. Anschließend erfolgt die Kennzeichnung durch Tintenstrahlbeschriftung. Abschließend werden die Profile durch einen Scherprozess abgelängt und im Bund zu 8 Stück verpackt. Das Material wird abfallfrei verarbeitet.

## Technical purpose
MAXI-TEC® Profile werden als Unterkonstruktion für nichttragende ein- oder zweischalige Innenwandkonstruktionen und Vorsatzschalen nach /DIN 4103-1/ und /DIN 18183-1/ eingesetzt.

Die Konstruktionen sind für den Einsatz in normal klimatisierten Innenräumen geeignet. Der Korrosionsschutz entspricht /DIN EN 14195/ bzw. /DIN 18182-1/.

## Reference product
- 1 lfm MAXI-TEC®: 1

## Inputs
- Erneuerbare Primärenergie als Energieträger (PERE) [MJ]: A1-A3 0.752, A4 0.00529, A5 0.000297, C4 0.00281, D 0.451
- Erneuerbare Primärenergie zur stofflichen Nutzung (PERM) [MJ]: A1-A3 0, A4 0, A5 0, C4 0, D 0
- Total erneuerbare Primärenergie (PERT) [MJ]: A1-A3 0.752, A4 0.00529, A5 0.000297, C4 0.00281, D 0.451
- Nicht-erneuerbare Primärenergie als Energieträger (PENRE) [MJ]: A1-A3 21, A4 0.0786, A5 0.847, C4 0.0226, D -8.25
- Nicht-erneuerbare Primärenergie zur stofflichen Nutzung (PENRM) [MJ]: A1-A3 0, A4 0, A5 -0.836, C4 0, D 0
- Total nicht erneuerbare Primärenergie (PENRT) [MJ]: A1-A3 21, A4 0.0786, A5 0.0111, C4 0.0226, D -8.25
- Einsatz von Sekundärstoffen (SM) [kg]: A1-A3 0, A4 0, A5 0, C4 0, D 0
- Erneuerbare Sekundärbrennstoffe (RSF) [MJ]: A1-A3 0, A4 0, A5 0, C4 0, D 0
- Nicht erneuerbare Sekundärbrennstoffe (NRSF) [MJ]: A1-A3 0, A4 0, A5 0, C4 0, D 0
- Einsatz von Süßwasserressourcen (FW) [m^3]: A1-A3 0.00348, A4 6.14e-6, A5 0.000111, C4 4.31e-6, D 0.00106

## Outputs
- Gefährlicher Abfall zur Deponie (HWD) [kg]: A1-A3 2.93e-9, A4 0, A5 0, C4 0, D 0.000508
- Entsorgter nicht gefährlicher Abfall (NHWD) [kg]: A1-A3 6.54, A4 0.000424, A5 0.00142, C4 0.216, D 0.115
- Entsorgter radioaktiver Abfall (RWD) [kg]: A1-A3 0.000259, A4 9.49e-8, A5 6.42e-7, C4 0, D 1.48e-5
- Komponenten für die Wiederverwendung (CRU) [kg]: A1-A3 0, A4 0, A5 0, C4 0, D 0
- Stoffe zum Recycling (MFR) [kg]: A1-A3 0, A4 0, A5 0, C4 0, D 0.552
- Stoffe für die Energierückgewinnung (MER) [kg]: A1-A3 0, A4 0, A5 0.019, C4 0, D 0
- Exportierte elektrische Energie (EEE) [MJ]: A1-A3 0, A4 0, A5 0.1, C4 0, D 0
- Exportierte thermische Energie (EET) [MJ]: A1-A3 0, A4 0, A5 0.33, C4 0, D 0

## Impact indicators
- Globales Erwärmungspotenzial (GWP) [kg CO_(2)-Äq.]: A1-A3 1.49, A4 0.00586, A5 0.0537, C4 0.00169, D -0.863
- Abbau Potential der stratosphärischen Ozonschicht (ODP) [kg CFC11-Äq.]: A1-A3 1.22e-7, A4 1.23e-16, A5 5.23e-11, C4 3.75e-16, D 4.69e-9
- Versauerungspotenzial von Boden und Wasser (AP) [kg SO_(2)-Äq.]: A1-A3 0.00397, A4 1.44e-5, A5 4.74e-6, C4 9.89e-6, D -0.00166
- Eutrophierungspotenzial (EP) [kg PO_(4)^(3)-Äq.]: A1-A3 0.000374, A4 3.51e-6, A5 8.2e-7, C4 1.36e-6, D -0.000127
- Bildungspotential für troposphärisches Ozon (POCP) [kg Ethen-Äq.]: A1-A3 0.000577, A4 -5.26e-6, A5 3.87e-7, C4 7.85e-7, D -0.000386
- Potenzial für den abiotischen Abbau nicht fossiler Ressourcen (ADPE) [kg Sb-Äq.]: A1-A3 2.54e-5, A4 6.12e-10, A5 2.72e-10, C4 6.36e-10, D -2.41e-6
- Potenzial für den abiotischen Abbau fossiler Brennstoffe (ADPF) [MJ]: A1-A3 19.9, A4 0.0784, A5 0.0089, C4 0.0218, D -8.51

## Use advice
Gültigkeitsbereich:
Die Deklaration gilt für die Produkte MAXI-TEC® aus dem Werk Gaggenau der Profil-Vertrieb GmbH/PROTEKTORWERK Florenz Maisch GmbH & Co. KG. Die Deklaration ist repräsentativ für die CW Profile 50-06, 75-06, 100-06 sowie die UW-Profile 50-06, 75-06 und 100-06.
Systemgrenze:
Typ der EPD: Wiege bis Werkstor mit Optionen

Zur Berechnung der Ökobilanz wurden folgende Module berücksichtigt:

A1: Rohstoffbereitstellung und –verarbeitung

A2: Transport und Anlieferung des Ausgangsmaterials

A3: Produktionsprozess

A4: Transport der Profile zur Baustelle

A5: Behandlung von Abfällen aus der Produktverpackung

C4: Deponierung

D: Wiederverwendungs-, Rückgewinnungs- und/oder Recyclingpotentiale

## Data sources
- MAXI-TEC® CW- und UW-Profile.pdf
- GaBi Database (all versions)
- GaBi database SP35 2018
