# LED Bürobeleuchtung

Dataset: ILCD process, EPD, generic dataset
Geography: DE
Reference year: 2018
Valid until: 2022
Classification: oekobau.dat: Gebäudetechnik / Elektro / Beleuchtung
Owner: thinkstep
Compliance: DIN EN 15804
Review: Dependent internal review by thinkstep, IABP-GaBi, IBP-GaBi; Independent external review by GaBi user forum, GaBi bug forum, GaBi user community
Amounts: rows without a unit in brackets have none in this file; such an amount is in the reference unit of its flow, which a separate flow dataset defines
copyright: true

## General comment
Dieser Datensatz wurde nach dem European Standard EN 15804 für Nachhaltiges Bauen modelliert. Ergebnisse werden in Modulen abgebildet, die den strukturierten Ausdruck von Ergebnissen über den gesamten Lebenszyklus zulassen.

## Geography
Der Datensatz bildet die länderspezifische Situation in Deutschland ab. Dabei werden Haupttechnologien, spezifische regionale Charakteristiken und ggf. Importstatistiken berücksichtigt.

## Time period
Jährlicher Durchschnitt

## Technology and included processes
Bei den eingesetzten LEDs handelt es sich um surface-mounted devices (SMD) LEDs. Weitere Hauptbestandteile der hier berechneten Leuchte sind Stahl, Kunststoff, Aluminium sowie Elektronikkomponenten (Vorschaltgerät, Kabel).

Für die Berechnung des Energieverbrauch der LED Beleuchtung wurden die Rechenregeln der Produktkategorieregeln des Instituts Bauen und Umwelt e.V. Teil B: "Anforderungen an die EPD für Leuchten, Lampen und Komponenten für Leuchten" (https://epd-online.com), unter Annahme folgender Parameter verwendet:

- Betrachtungszeitraum: 1 a

- Nennleistung: 52 W

- Passivleistung: 1 W

- Aktive Laufzeit: 2.500 h

- Passive Laufzeit: 6.260 h

- Korrekturfaktoren FCP/FD/FO für Dimmung/Präsenzmeldung: 1/0,9/1

Der Energieverbrauch im Betrachtungszeitraum von einem Jahr beträgt damit 125 kWh. Es wurde der deutsche Strommix für die Berechnung der Umweltwirkungen in der Nutzungsphase verwendet.

Hintergrundsystem:
Strom: Die Stromerzeugung wird entsprechend der länderspezifischen Randbedingungen modelliert. Die landesspezifische Analyse beinhaltet:
1.: Spezifische Kraftwerke der verschiedenen fossilen Energieträger und der Einsatz erneuerbarer Energien sind entsprechend der länderspezifischen Energieträgermixe modelliert. Die Analyse bezieht Stromimporte aus den Nachbarländern, Transmissions-und Verteilungsverluste und den Eigenverbrauch im Kraftwerk und bei der Verteilung bzw. Speicherung, z. B. durch Pumpspeicherwerke, ein.
2.: Die landes-/regionalspezifischen Technologiestandards sowie die Erzeugung in Elektrizitätskraftwerken und/oder in speziellen Kraftwerken mit Kraft-Wärme-Kopplung (KWK) sind berücksichtigt.
3.: Die länderspezifische Energieträgerbereitstellung (mit Anteil der Importe und/oder Eigenversorgung) einschließlich der Energieträger-Eigenschaften (z. B. Elementar- und Energiegehalte) werden berücksichtigt.
4.: Die Förderung, Produktion, Verarbeitung und Transportprozesse werden entsprechend der Situation im jeweiligen Stromerzeugerland modelliert. Die unterschiedlichen Produktions- und Verarbeitungsverfahren (Emissionen und Wirkungsgrade) in den verschiedenen Energieerzeugerländern werden einbezogen, z. B. Rohöl-Veredelungsverfahren oder Abfackel-Raten an den Ölplattformen.
Thermische Energie, Prozessdampf: Die Erzeugung von Dampf und thermischer Energie in Heizkraftwerken wird entsprechend der landesspezifischen Situation (Emissionsgrenzwerte, Energieträgerbasis) modelliert.
Der Wirkungsgrad für die thermische Energieerzeugung beträgt per Definition 100% des Energieträgereinsatzes. Für Prozessdampf liegt der Wirkungsgrad im Bereich von 85-95%. Die zur Heizenergie-Erzeugung verwendeten Energieträger werden entsprechend der nationalen Situation modelliert (siehe Kapitel Strom oben).
Transporte: Alle relevanten und bekannten Transportprozesse in Form von See- und Binnenschiffsverkehr sowie Bahn-, Lkw- und der Leitungstransport sind enthalten.
Energieträger: Die Energieträger werden entsprechend der spezifischen Versorgungslage modelliert (siehe Kapitel Strom oben).
Raffinerieprodukte: Diesel, Benzin, technische Gase, Heizöl, Schmierstoffe und Rückstände, wie Bitumen, werden mit einem parametrierten länderspezifische Raffineriemodell modelliert. Das Raffinerie-Modell bezieht die länderspezifischen Veredelungsverfahren (z. B. Emissionspegel, interner Energieverbrauch etc.) und das länderspezifische Produktspektrum ein, das sich je nach Land stark unterscheiden kann. Die Rohöl-Förderung wird gemäß der länderspezifischen Situation mit den jeweiligen Energieträger-Eigenschaften modelliert.

## Technical purpose
Es handelt sich um eine LED Bürobeleuchtung für den Innenbereich.

## Safety margin
20 %. Produktsystem bis auf wenige Prozesse/Flüsse abgebildet. Technologische, zeitliche und geographische Repräsentativität teilweise gegeben.

## Reference product
- LED Bürobeleuchtung [Stück]: 1

## Inputs
- Erneuerbare Primärenergie als Energieträger (PERE) [MJ]: A1-A3 75.4936, B6 672.139, C1 0.00181265, C2 0.0129662, C3 0.685614, D -30.3117
- Erneuerbare Primärenergie zur stofflichen Nutzung (PERM) [MJ]: A1-A3 0, B6 0, C1 0, C2 0, C3 0, D 0
- Total erneuerbare Primärenergie (PERT) [MJ]: A1-A3 75.4936, B6 672.139, C1 0.00181265, C2 0.0129662, C3 0.685614, D -30.3117
- Nicht-erneuerbare Primärenergie als Energieträger (PENRE) [MJ]: A1-A3 510.892, B6 1003.7, C1 0.0311366, C2 0.222726, C3 2.58694, D -153.343
- Nicht-erneuerbare Primärenergie zur stofflichen Nutzung (PENRM) [MJ]: A1-A3 0, B6 0, C1 0, C2 0, C3 0, D 0
- Total nicht erneuerbare Primärenergie (PENRT) [MJ]: A1-A3 510.892, B6 1003.7, C1 0.0311366, C2 0.222726, C3 2.58694, D -153.343
- Einsatz von Sekundärstoffen (SM) [kg]: A1-A3 0.687686, B6 0, C1 0, C2 0, C3 0, D 0
- Erneuerbare Sekundärbrennstoffe (RSF) [MJ]: A1-A3 0, B6 0, C1 0, C2 0, C3 0, D 0
- Nicht erneuerbare Sekundärbrennstoffe (NRSF) [MJ]: A1-A3 0, B6 0, C1 0, C2 0, C3 0, D 0
- Einsatz von Süßwasserressourcen (FW) [m3]: A1-A3 0.149164, B6 0.310783, C1 1.62338e-6, C2 1.16124e-5, C3 0.0134437, D -0.0678726

## Outputs
- Gefährlicher Abfall zur Deponie (HWD) [kg]: A1-A3 1.46229e-6, B6 6.88339e-7, C1 1.16354e-9, C2 8.32305e-9, C3 9.72802e-9, D -1.48795e-7
- Entsorgter nicht gefährlicher Abfall (NHWD) [kg]: A1-A3 2.69833, B6 0.781403, C1 5.46502e-6, C2 3.90924e-5, C3 0.570216, D -1.72794
- Entsorgter radioaktiver Abfall (RWD) [kg]: A1-A3 0.0155829, B6 0.0813233, C1 3.27805e-8, C2 2.34485e-7, C3 9.79047e-5, D -0.00586364
- Komponenten für die Wiederverwendung (CRU) [kg]: A1-A3 0, B6 0, C1 0, C2 0, C3 0, D 0
- Stoffe zum Recycling (MFR) [kg]: A1-A3 0, B6 0, C1 4.98, C2 0, C3 0, D 0
- Stoffe für die Energierückgewinnung (MER) [kg]: A1-A3 0, B6 0, C1 2.16, C2 0, C3 0, D 0
- Exportierte elektrische Energie (EEE) [MJ]: A1-A3 0, B6 0, C1 0, C2 0, C3 10.1678, D 0
- Exportierte thermische Energie (EET) [MJ]: A1-A3 0, B6 0, C1 0, C2 0, C3 23.3446, D 0

## Impact indicators
- Globales Erwärmungspotenzial (GWP) [kg CO2 Äquiv.]: A1-A3 33.4641, B6 79.6768, C1 0.00230039, C2 0.0165711, C3 5.46256, D -13.7268
- Abbaupotenzial der stratosphärischen Ozonschicht (ODP) [kg R11 Äquiv.]: A1-A3 1.97518e-10, B6 3.72606e-12, C1 7.66805e-19, C2 5.48511e-18, C3 3.82718e-15, D 2.17945e-12
- Versauerungspotential (AP) [kg SO2 Äquiv.]: A1-A3 0.101947, B6 0.0940082, C1 8.02362e-6, C2 3.34719e-5, C3 0.000609966, D -0.0485117
- Eutrophierungspotential (EP) [kg Phosphat Äquiv.]: A1-A3 0.00804791, B6 0.018674, C1 1.89314e-6, C2 7.95719e-6, C3 0.000135812, D -0.00282215
- Bildungspotenzial für troposphärisches Ozon (POCP) [kg Ethen Äquiv.]: A1-A3 0.00858585, B6 0.00779188, C1 7.92817e-7, C2 -1.00282e-5, C3 5.65142e-5, D -0.00352813
- Potenzial für den abiotischen Abbau nicht fossiler Ressourcen (ADPE) [kg Sb Äquiv.]: A1-A3 0.00104441, B6 3.52558e-5, C1 1.94944e-10, C2 1.39447e-9, C3 3.98098e-8, D -0.000911493
- Potenzial für den abiotischen Abbau fossiler Brennstoffe (ADPF) [MJ]: A1-A3 471.298, B6 798.406, C1 0.0310529, C2 0.222127, C3 2.3398, D -138.488

## Use advice
Dieser Datensatz bezieht sich auf ein Stück LED Bürobeleuchtung inklusive Vorschaltgerät mit folgenden Spezifikationen:

- Leistung: 52 W

- Lichtausbeute: 75 lm/W

- Lichtstrom: 3.900 lm

- Gewicht: 5,95 kg

Betrachtet wird der Transport der Vorprodukte, die Herstellung der Beleuchtung sowie die Nutzungsphase.

Eine Skalierung des Datensatzes in Bezug auf die Herstellungsphase (Module A1-A3) auf andere LED Leuchten ist aufgrund der komplexen Materialzusammensetzung nicht möglich/empfehlenswert. Die Skalierung der Nutzungsphase (Modul B6) ist uneingeschränkt möglich.

Der Datensatz repräsentiert ein Cradle to Gate Inventar. Er kann verwendet werden, um die Lieferkette des jeweiligen Produktes in einer repräsentativen Weise zu charakterisieren. Die Kombination mit einzelnen Einheitenprozessen und diesem Produkt ermöglicht die Erstellung von anwenderspezifischen (Produkt-) LCAs

## Data sources
- GaBi databases
- GaBi Database Edition 2020, SP40
- GaBi database (all versions)
