# Lithiumbromid

Dataset: ILCD process, EPD, generic dataset
Geography: DE
Reference year: 2018
Valid until: 2022
Classification: oekobau.dat: Gebäudetechnik / Klimatisierung und Lüftung / Kältemittel
Owner: thinkstep
Compliance: DIN EN 15804
Review: Dependent internal review by thinkstep, IABP-GaBi, IBP-GaBi; Independent external review by GaBi user forum, GaBi bug forum, GaBi user community
Amounts: rows without a unit in brackets have none in this file; such an amount is in the reference unit of its flow, which a separate flow dataset defines
copyright: true

## General comment
Dieser Datensatz wurde nach dem European Standard EN 15804 für Nachhaltiges Bauen modelliert. Ergebnisse werden in Modulen abgebildet, die den strukturierten Ausdruck von Ergebnissen über den gesamten Lebenszyklus zulassen.

## Geography
Der Datensatz bildet die länderspezifische Situation in Deutschland ab. Dabei werden Haupttechnologien, spezifische regionale Charakteristiken und ggf. Importstatistiken berücksichtigt.

## Time period
Jährlicher Durchschnitt

## Technology and included processes
Lithiumbromid wird zusammen mit Wasser in Absorbitionskälteanlagen eingesetzt, wobei Wasser das Kältemittel darstellt. Je nach Anlage und Randbedingungen werden verschiedene Mischungsverhältnisse verwendet. Diese müssen auf Gebäudeebene festgelegt werden.

Die Herstellung wurde mit Lithiumhydroxid und Bromwasserstoffsäure als Grundstoffen modelliert, wobei Bromwasserstoffsäure die Ökobilanz dominiert.

In der Nutzungsphase (Modul B1) sind keine Emissionen in die Luft zu erwarten (Lithiumbromid ist ein nicht flüchtiger Feststoff).

In der Entsorgungsphase wurden eventuelle Lasten durch den Ausbau und Transporte zum Entsorgungs- bzw. Verwertungsunternehmen vernachlässigt.

In Modul C4 wurde 100% Deponierung bilanziert. In Modul D erfolgen weder Lasten noch Gutschriften.

## Technical purpose
Üblicher Einsatzzweck ist die Verwendung in Absorbtionskältemaschinen.

## Safety margin
10 %. Produktsystem weitgehend vollständig abgebildet. Gute technologische, zeitliche und geographische Repräsentativität.

## Reference product
- Lithiumbrom 46% Lösung: 1

## Inputs
- Erneuerbare Primärenergie als Energieträger (PERE) [MJ]: A1-A3 8.5658, C4 9.80168
- Erneuerbare Primärenergie zur stofflichen Nutzung (PERM) [MJ]: A1-A3 0, C4 0
- Total erneuerbare Primärenergie (PERT) [MJ]: A1-A3 8.5658, C4 9.80168
- Nicht-erneuerbare Primärenergie als Energieträger (PENRE) [MJ]: A1-A3 127.092, C4 142.472
- Nicht-erneuerbare Primärenergie zur stofflichen Nutzung (PENRM) [MJ]: A1-A3 0, C4 0
- Total nicht erneuerbare Primärenergie (PENRT) [MJ]: A1-A3 127.092, C4 142.472
- Einsatz von Sekundärstoffen (SM) [kg]: A1-A3 0, C4 0
- Erneuerbare Sekundärbrennstoffe (RSF) [MJ]: A1-A3 0, C4 0
- Nicht erneuerbare Sekundärbrennstoffe (NRSF) [MJ]: A1-A3 0, C4 0
- Einsatz von Süßwasserressourcen (FW) [m3]: A1-A3 0.0432543, C4 0.0449826

## Outputs
- Gefährlicher Abfall zur Deponie (HWD) [kg]: A1-A3 1.21037e-6, C4 1.22456e-6
- Entsorgter nicht gefährlicher Abfall (NHWD) [kg]: A1-A3 1.24065, C4 3.05321
- Entsorgter radioaktiver Abfall (RWD) [kg]: A1-A3 0.00154794, C4 0.00172085
- Komponenten für die Wiederverwendung (CRU) [kg]: A1-A3 0, C4 0
- Stoffe zum Recycling (MFR) [kg]: A1-A3 0, C4 0
- Stoffe für die Energierückgewinnung (MER) [kg]: A1-A3 0, C4 0
- Exportierte elektrische Energie (EEE) [MJ]: A1-A3 0, C4 0
- Exportierte thermische Energie (EET) [MJ]: A1-A3 0, C4 0

## Impact indicators
- Globales Erwärmungspotenzial (GWP) [kg CO2 Äquiv.]: A1-A3 8.08139, C4 9.23499
- Abbaupotenzial der stratosphärischen Ozonschicht (ODP) [kg R11 Äquiv.]: A1-A3 1.80999e-10, C4 1.81005e-10
- Versauerungspotential (AP) [kg SO2 Äquiv.]: A1-A3 0.0239287, C4 0.0258334
- Eutrophierungspotential (EP) [kg Phosphat Äquiv.]: A1-A3 0.00313545, C4 0.00335069
- Bildungspotenzial für troposphärisches Ozon (POCP) [kg Ethen Äquiv.]: A1-A3 0.00177036, C4 0.00204487
- Potenzial für den abiotischen Abbau nicht fossiler Ressourcen (ADPE) [kg Sb Äquiv.]: A1-A3 2.40762e-6, C4 2.51357e-6
- Potenzial für den abiotischen Abbau fossiler Brennstoffe (ADPF) [MJ]: A1-A3 123.243, C4 138.186

## Use advice
Der Datensatz bezieht sich auf die Herstellung, Nutzung und Recycling von 1 kg Kältemittel. Der Datensatz kann nicht für die Abschätzung anderer Kältemittel verwendet werden, da Umweltwirkungen, Haltbarkeit und Einsatzzweck sehr unterschiedlich sein können.
Für die Berechnung der potentiellen Umweltwirkungen durch den Einsatz des Kühlmittels auf Gebäudeebene sind die Vorgaben des jeweiligen Zertifizierungssystems zu beachten. Für eine erste Abschätzung können folgende Formeln verwendet werden:

I_tot= I_(Herst.)+ I_(Nutz.)+ I_(Ent.)

mit

I_(Herst.) = I_(A1-A3) × m × a_Geb/a_KM
I_(Nutz.) = (I_(A1-A3) × L × a_Geb ) + (I_B1 ×L × a_Geb )
I_(Ent.)= (I_B1 × m × a_Geb/a_KM ×E ) + (I_C4 × m × a_Geb/a_KM × (1-E)) + (I_D × m × a_Geb/a_KM × (1-E))

Dabei ist:

I Indikatorwert der jeweiligen Lebenszyklusphase
m Masse des Kältemittels [kg]
a_Geb Lebensdauer des Gebäudes [a]
a_KM Lebensdauer des Kältemittels [a]
L Leckage Rate [%/a]
E Entsorgungsverluste [%]

Übliche Werte für die benötigte Masse m des Kühlmittels in kg je kW Nennkälteleistung können Tabelle 46 /UBA/ entnommen werden (siehe Abbildungen).
Näherungswerte für die übliche Lebensdauer a_KM, Leckage Raten L und Entsorgungsverluste E können Tabelle 50 /UBA/ entnommen werden (siehe Abbildungen).
/UBA/: Umwelt Bundesamt (UBA), Klimaschonende Klimatisierung (Heizen und Kühlen) mit natürlichen Kältemitteln Konzepte für Nichtwohngebäude mit Serverräumen/Rechenzentren, 2016

## Data sources
- GaBi Database Edition 2020, SP40
- GaBi database (all versions)
