# Sarnafil TS 77-E

Dataset: ILCD process, EPD, specific dataset
Geography: DE
Reference year: 2020
Valid until: 2025
Classification: OEKOBAU.DAT: Kunststoffe / Dachbahnen / TPO-Dachbahnen (FPO)
Classification: IBUCategories: 02 Bauprodukte / Abdichtungen / Dach- und Dichtungsbahnsysteme aus Kunststoffen und Elastomeren
Method details: Dach- und Dichtungsbahnsysteme aus Kunststoffen und Elastomeren.pdf
Generated by: Sika Services AG
Registration number: EPD-SIK-20190187-IBA1-DE
Owner: Sika Deutschland GmbH
Compliance: DIN EN 15804; ISO 14025
Review: Accredited third party review by Institut Bauen und Umwelt e. V.
Amounts: rows without a unit in brackets have none in this file; such an amount is in the reference unit of its flow, which a separate flow dataset defines
copyright: true
licenseType: Free of charge for all users and uses
accessRestrictions: None

## General comment
Sarnafil® TS 77-E Kunststoffabdichtungsbahnen beste-hen aus flexiblen Polyolefinen (FPO) und werden zu-sätzlich mit UV-Lichtschutzmittel und Flammschutz-mittel ausgerüstet. Als Verstärkung dient eine innen-liegende Kombination aus Glasvlies und Polyester-gelege. Die Sarnafil® TS 77-E Kunststoffabdichtungs-bahnen sind in den Dicken 1,5 mm (TS 77-15 E), 1,8 mm (TS 77-18 E) und 2,0 mm (TS 77-20 E) erhältlich.

## Technology and included processes
Der Herstellungsprozess der Sarnafil® TS 77-E Kunst-stoffabdichtungsbahnen verläuft auf eigens entwickel-ten Produktionsanlagen in folgenden Schritten: Aufschmelzen der Kunststoffkomponenten sowie ihrer Additive in ExtrudernDispergieren der aufgeschmolzenen MaterialienAufbringen der Schichten auf den Träger bzw. die Armierung, so dass eine homogene Einbettung erfolgtKühlen der KunststoffabdichtungsbahnAufwickeln der Kunststoffabdichtungsbahn auf Rollenkerne aus AltpapierkartonageVerpacken der einzelnen Rollen mit einer PE-Folie Das Werk Sarnen verfügt seit 1993 über ein zertifizier-tes Qualitätsmanagementsystem nach /ISO 9001/.
Deklarierte Einheit:
Diese Deklaration bezieht sich auf 1 m2 verlegte Sarnafil® TS 77-E Kunststoffabdichtungsbahn mit der Dicke 2,0 mm.

Für andere Dicken wird in Kapitel 5 eine Formel zur eigenständigen Berechnung der Werte angegeben.

## Technical purpose
Sarnafil® TS 77-E Kunststoffabdichtungsbahnen dienen ausschließlich der Abdichtung von Flach-dächern ohne Auflast. Die Dachbahnen werden vorzugsweise auf Dächern mit einer Dachneigung

≥ 20° lose verlegt und mechanisch befestigt. Die Sarnafil® TS 77-E Dachabdichtungsbahnen bieten im Vergleich zu den Sarnafil® TS 77 Dachabdichtungs-bahnen einen erhöhten Brandschutz.

## Scenarios
- S0: Szenario 0
- S1: 100% recycling
- S2: 100 % thermische Verwertung

## Reference product
- 1 m² Dachbahn (): 1

## Inputs
- Erneuerbare Primärenergie als Energieträger (PERE) [MJ]: A1-A3 8.38, A4 0.0902, A5 1.06, C1 0, C2 (S1) 0.0369, C2 (S2) 0.00737, C3 (S1) 0.929, C3 (S2) 0.178, C4 0, D (S1) -6.71, D (S2) -18.6
- Erneuerbare Primärenergie zur stofflichen Nutzung (PERM) [MJ]: A1-A3 1.99, A4 0, A5 -0.159, C1 0, C2 (S1) 0, C2 (S2) 0, C3 (S1) 0, C3 (S2) 0, C4 0, D (S1) 0, D (S2) 0
- Total erneuerbare Primärenergie (PERT) [MJ]: A1-A3 10.4, A4 0.0902, A5 0.905, C1 0, C2 (S1) 0.0369, C2 (S2) 0.00737, C3 (S1) 0.929, C3 (S2) 0.178, C4 0, D (S1) -6.71, D (S2) -18.6
- Nicht-erneuerbare Primärenergie als Energieträger (PENRE) [MJ]: A1-A3 49.5, A4 1.48, A5 4.26, C1 0, C2 (S1) 0.636, C2 (S2) 0.127, C3 (S1) 62, C3 (S2) 61.2, C4 0, D (S1) -142, D (S2) -59.9
- Nicht-erneuerbare Primärenergie zur stofflichen Nutzung (PENRM) [MJ]: A1-A3 57, A4 0, A5 4.53, C1 0, C2 (S1) 0, C2 (S2) 0, C3 (S1) -60.2, C3 (S2) -60.2, C4 0, D (S1) 0, D (S2) 0
- Total nicht erneuerbare Primärenergie (PENRT) [MJ]: A1-A3 106, A4 1.48, A5 8.8, C1 0, C2 (S1) 0.636, C2 (S2) 0.127, C3 (S1) 1.78, C3 (S2) 1, C4 0, D (S1) -142, D (S2) -59.9
- Einsatz von Sekundärstoffen (SM) [kg]: A1-A3 0.0687, A4 0, A5 0.0055, C1 0, C2 (S1) 0, C2 (S2) 0, C3 (S1) 0, C3 (S2) 0, C4 0, D (S1) -2.43, D (S2) 0
- Erneuerbare Sekundärbrennstoffe (RSF) [MJ]: A1-A3 1.78e-21, A4 0, A5 1.42e-22, C1 0, C2 (S1) 0, C2 (S2) 0, C3 (S1) 0, C3 (S2) 0, C4 0, D (S1) 0, D (S2) 0
- Nicht erneuerbare Sekundärbrennstoffe (NRSF) [MJ]: A1-A3 2.08e-20, A4 0, A5 1.67e-21, C1 0, C2 (S1) 0, C2 (S2) 0, C3 (S1) 0, C3 (S2) 0, C4 0, D (S1) 0, D (S2) 0
- Einsatz von Süßwasserressourcen (FW) [m^3]: A1-A3 0.0187, A4 0.000104, A5 0.00204, C1 0, C2 (S1) 6.23e-5, C2 (S2) 1.25e-5, C3 (S1) 0.000971, C3 (S2) 0.0173, C4 0, D (S1) -0.0163, D (S2) -0.0195

## Outputs
- Gefährlicher Abfall zur Deponie (HWD) [kg]: A1-A3 2.42e-6, A4 8.44e-8, A5 2.01e-7, C1 0, C2 (S1) 3.55e-8, C2 (S2) 7.1e-9, C3 (S1) 1.72e-9, C3 (S2) 7.98e-10, C4 0, D (S1) -3.54e-8, D (S2) -2.59e-8
- Entsorgter nicht gefährlicher Abfall (NHWD) [kg]: A1-A3 0.254, A4 9.91e-5, A5 0.0224, C1 0, C2 (S1) 5.17e-5, C2 (S2) 1.03e-5, C3 (S1) 0.0238, C3 (S2) 0.0317, C4 0, D (S1) -0.0188, D (S2) -0.0413
- Entsorgter radioaktiver Abfall (RWD) [kg]: A1-A3 0.00227, A4 1.76e-6, A5 0.000195, C1 0, C2 (S1) 8.62e-7, C2 (S2) 1.72e-7, C3 (S1) 0.000164, C3 (S2) 6.43e-5, C4 0, D (S1) -0.00138, D (S2) -0.00697
- Komponenten für die Wiederverwendung (CRU) [kg]: A1-A3 0, A4 0, A5 0, C1 0, C2 (S1) 0, C2 (S2) 0, C3 (S1) 0, C3 (S2) 0, C4 0, D (S1) 0, D (S2) 0
- Stoffe zum Recycling (MFR) [kg]: A1-A3 0, A4 0, A5 0, C1 0, C2 (S1) 0, C2 (S2) 0, C3 (S1) 2.43, C3 (S2) 0, C4 0, D (S1) 0, D (S2) 0
- Stoffe für die Energierückgewinnung (MER) [kg]: A1-A3 0, A4 0, A5 0, C1 0, C2 (S1) 0, C2 (S2) 0, C3 (S1) 0, C3 (S2) 0, C4 0, D (S1) 0, D (S2) 0
- Exportierte elektrische Energie (EEE) [MJ]: A1-A3 0, A4 0, A5 0.426, C1 0, C2 (S1) 0, C2 (S2) 0, C3 (S1) 0.605, C3 (S2) 17.5, C4 0, D (S1) 0, D (S2) 0
- Exportierte thermische Energie (EET) [MJ]: A1-A3 0, A4 0, A5 0.759, C1 0, C2 (S1) 0, C2 (S2) 0, C3 (S1) 1.1, C3 (S2) 31.1, C4 0, D (S1) 0, D (S2) 0

## Impact indicators
- Globales Erwärmungspotenzial (GWP) [kg CO_(2)-Äq.]: A1-A3 3.72, A4 0.111, A5 0.532, C1 0, C2 (S1) 0.0468, C2 (S2) 0.00936, C3 (S1) 0.294, C3 (S2) 8, C4 0, D (S1) -3.41, D (S2) -2.89
- Abbau Potential der stratosphärischen Ozonschicht (ODP) [kg CFC11-Äq.]: A1-A3 1.5e-8, A4 3.77e-17, A5 1.2e-9, C1 0, C2 (S1) 7.72e-18, C2 (S2) 1.54e-18, C3 (S1) 5.61e-15, C3 (S2) 7.43e-16, C4 0, D (S1) -2.4e-9, D (S2) -2.4e-9
- Versauerungspotenzial von Boden und Wasser (AP) [kg SO_(2)-Äq.]: A1-A3 0.00825, A4 0.000245, A5 0.000715, C1 0, C2 (S1) 0.000109, C2 (S2) 2.18e-5, C3 (S1) 0.00027, C3 (S2) 0.000515, C4 0, D (S1) -0.00541, D (S2) -0.00408
- Eutrophierungspotenzial (EP) [kg PO_(4)^(3)-Äq.]: A1-A3 0.0017, A4 6.12e-5, A5 0.000148, C1 0, C2 (S1) 2.72e-5, C2 (S2) 5.45e-6, C3 (S1) 4.53e-5, C3 (S2) 0.000109, C4 0, D (S1) -0.000729, D (S2) -0.000434
- Bildungspotential für troposphärisches Ozon (POCP) [kg Ethen-Äq.]: A1-A3 0.000991, A4 -8.7e-5, A5 7.43e-5, C1 0, C2 (S1) -3.64e-5, C2 (S2) -7.28e-6, C3 (S1) 1.74e-5, C3 (S2) 5.28e-5, C4 0, D (S1) -0.00098, D (S2) -0.000436
- Potenzial für den abiotischen Abbau nicht fossiler Ressourcen (ADPE) [kg Sb-Äq.]: A1-A3 7.48e-6, A4 1.05e-8, A5 6.05e-7, C1 0, C2 (S1) 3.6e-9, C2 (S2) 7.2e-10, C3 (S1) 6.27e-8, C3 (S2) 4.38e-8, C4 0, D (S1) -8.66e-7, D (S2) -7.76e-7
- Potenzial für den abiotischen Abbau fossiler Brennstoffe (ADPF) [MJ]: A1-A3 100, A4 1.47, A5 8.25, C1 0, C2 (S1) 0.633, C2 (S2) 0.127, C3 (S1) 1.36, C3 (S2) 0.841, C4 0, D (S1) -138, D (S2) -41.9

## Use advice
Gültigkeitsbereich:
Dieses Dokument bezieht sich auf die von der Sika AG in CH-6060 Sarnen (Schweiz) hergestellten Sarnafil® TS 77-E Kunststoffabdichtungsbahnen in den Dicken 1,5, 1,8 und 2,0 mm.

Die EPD umfasst die Produktion der Dachbahn, den Transport des Produkts zur Baustelle, die Installation der Dachbahn, die Entsorgung sowie Potenziale und Lasten außerhalb der Systemgrenze. Das Modell wurde auf Basis der Produktionsdaten aus dem Jahr 2018 von der Sika Services AG für die Dicke 2,0 mm modelliert.
Systemgrenze:
Typ der EPD: Wiege bis Werkstor - mit Optionen

Die Systemgrenze der EPD folgt dem modularen Auf-bau gemäß EN 15804. In der Ökobilanz werden die folgenden Module berücksichtigt:

A1–A3: Gewinnung, Verarbeitung und Transport von Rohstoffen (u.a. Polymere, Pigmente, Verar-beitungshilfsmittel, Stabilisatoren, Füllstoffe, Flammschutzmittel und Trägermaterialien), die für die Herstellung der Vorprodukte und der Dach-bahnen verwendet werden sowie der Verpack-ungsmaterialien, die zum Verpacken der Dach-bahnen verwendet werden, wie z. B. Holzpalet-ten, Karton und PE-Folie, zum Werk. Abfallverarbeitung von Produktionsabfällen (Randbeschnitt), die bei der Herstellung der Dachbahnen anfallen.
A4: Transport der Kunststoffabdichtungs-bahnen zur Baustelle
A5: Einbau der Kunststoffabdichtungsbahnen ins Gebäude mittels Heißluftschweißen (inkl. Schweißenergie und Wasserverbrauch), Entsorgung bzw. stoffliches Recycling von Verpackung und Verschnitt der Dachbahn
C1: Manueller Rückbau der Dachabdichtung
C2: Transport der rückgebauten Abdichtungs-bahnen zur Abfallbewirtschaftung
C3: Abfallverarbeitung der rückgebauten Abdichtungsbahnen über stoffliches Recyc-ling (Szenario 1 - C3/1) oder thermische Verwertung (Szenario 2 - C3/2)
C4: Abfallentsorgung der rückgebauten Abdichtungsbahnen auf Deponien
D: Wiederverwendungs-, Rückgewinnungs- und Recyclingpotenziale (aus der thermi-schen Verwertung und dem stofflichen Recyc-ling der Kunststoffabdichtungsbahnen sowie der Wiederverwendung der Holzpaletten)

## Data sources
- GaBi Database (all versions)
- GaBi database SP39 2019
