# Stabilenka®

Dataset: ILCD process, EPD, representative dataset
Geography: DE
Reference year: 2016
Valid until: 2021
Classification: OEKOBAU.DAT: Kunststoffe / Folien und Vliese / Technische Textilien
Classification: IBUCategories: 02 Bauprodukte / Bedachungen / Technische Textilien
Method details: Technische Textilien.pdf
Owner: HUESKER Synthetic GmbH
Compliance: DIN EN 15804; ISO 14025
Review: Accredited third party review by IBU
Amounts: rows without a unit in brackets have none in this file; such an amount is in the reference unit of its flow, which a separate flow dataset defines
copyright: false

## General comment
Stabilenka® ist ein hochwertiges, wasserdurchlässiges Gewebe zur Bodenbewehrung. Das hochfeste, kriecharme Gewebe Stabilenka® nimmt schon bei sehr geringen Dehnungen hohe Zugkräfte dauerhaft auf. Durch das kriecharme Garn treten bei einer Dauerbelastung mit 50 % der Kurzzeitfestigkeit Kriechdehnungen von weniger als 1 % nach zwei Jahren auf. Somit eignet sich Stabilenka® für verschiedenste Anwendungen wie z.B. Bewehrung von Erdbauwerken oder Schlammteichabdeckungen.

Stabilenka® wird in Längsrichtung (MD) und in Querrichtung (CMD) aus Polyester gewebt oder geraschelt. Der Einsatz hochmoduler Polyester-Multifilament-Garne und ein spezielles, patentiertes Webverfahren (straight warp) garantieren, dass Stabilenka® bei geringen Dehnungen hohe Zugkräfte mobilisiert. Stabilenka® wird in zehn Standardversionen mit einer Höchstzugfestigkeit bis 1000 kN/m in der Hauptbeanspruchungsrichtung gefertigt. Nach Anforderung werden auch Sondertypen mit höheren Festigkeiten produziert.

In der hier durchgeführten Ökobilanz wird ein durchschnittliches Produkt untersucht. Dieses Produkt basiert auf dem Durchschnitt folgender Produktartikel:

Stabilenka® 100/50 (gewebt)
Stabilenka® 150/45 (gewebt)
Stabilenka® 200/45 (gewebt)
Stabilenka® 300/45 (geraschelt)
Stabilenka® 400/50 (geraschelt)
Stabilenka® 600/50 (geraschelt)
Stabilenka® 800/100 (geraschelt)
Stabilenka® 1000/100 (geraschelt)

Zur Durchschnittsbildung wurden die Ökobilanzergebnisse der einzelnen Produktartikel addiert und über die Anzahl an Produktartikeln gemittelt. Die spezifischen Werte lassen sich für jeden Produktartikel über den Flächenbezug herleiten.
Die Produktartikel unterscheiden sich nicht in ihrer Zusammensetzung. Die Unterschiede bestehen in der Masse je Flächeneinheit sowie bei den technischen Eigenschaften.

## Technology and included processes
Die Herstellung der Gewebestruktur erfolgt auf Textilmaschinen. Dabei werden die Produktartikel Stabilenka® 100/50 bis 200/45 gewebt, die Produktartikel Stabilenka® 300/50 bis 1000/100 werden geraschelt. Die Querfäden (Schuss) und die Längsfäden (Kette) bestehen vollständig aus Polyester. Je nach Typ beträgt die Rollengröße des Geogewebes zwischen 500 und 1.500m² bei einer Breite von 5 Metern. Das Geogewebe wird auf Stahlrohren aufgerollt und mit PE-Folie verpackt.
Technische Daten:
Das folgende Kapitel enthält Angaben über die Leistung der Produkte in Bezug auf deren wesentliche Merkmale gemäß EN 13249 ff. soweit sie in der Leistungserklärung enthalten und spezifiziert sind.
Deklarierte Einheit:
Zur Durchschnittsbildung wurden die Ökobilanzergebnisse der einzelnen Produktartikel addiert und über die Anzahl an Produktartikeln gemittelt. Die spezifischen Werte lassen sich für jeden Produktartikel über den Flächenbezug herleiten.
Als deklarierte Einheit wurde gemäß /PCR Teil B/ 1 m2 geosynthetisches Gewebe gewählt.
Der Umrechnungsfaktor und der Flächenbezug der einzelnen Produktartikel können der folgenden Tabelle entnommen werden.

## Technical purpose
Stabilenka® - Geogewebe stehen seit 1974 für Bauweisen mit technischen und wirtschaftlichen Vorteilen. Die Produktgruppe Stabilenka® wird in die unterschiedlichsten Erdbauwerke als Primärbewehrung eingebaut und verwendet. So beispielsweise in den Einsatzgebieten:

Bodenbewehrung
Dammbau
Deponiebau
Wasserbau
Stützkonstruktionen aus bewehrter Erde

## Reference product
- 1 m2 geosynthetisches Gewebe: 1

## Inputs
- Erneuerbare Primärenergie als Energieträger (PERE) [MJ]: A1-A3 4.60046
- Erneuerbare Primärenergie zur stofflichen Nutzung (PERM) [MJ]
- Total erneuerbare Primärenergie (PERT) [MJ]: A1-A3 4.60046
- Nicht-erneuerbare Primärenergie als Energieträger (PENRE) [MJ]: A1-A3 68.2152
- Nicht-erneuerbare Primärenergie zur stofflichen Nutzung (PENRM) [MJ]: A1-A3 19.3
- Total nicht erneuerbare Primärenergie (PENRT) [MJ]: A1-A3 87.5108
- Einsatz von Sekundärstoffen (SM) [kg]
- Erneuerbare Sekundärbrennstoffe (RSF) [MJ]
- Nicht erneuerbare Sekundärbrennstoffe (NRSF) [MJ]
- Einsatz von Süßwasserressourcen (FW) [m^3]: A1-A3 0.0186

## Outputs
- Gefährlicher Abfall zur Deponie (HWD) [kg]: A1-A3 1.44703e-5
- Entsorgter nicht gefährlicher Abfall (NHWD) [kg]: A1-A3 5.60547
- Entsorgter radioaktiver Abfall (RWD) [kg]: A1-A3 0.00312502
- Komponenten für die Wiederverwendung (CRU) [kg]
- Stoffe zum Recycling (MFR) [kg]
- Stoffe für die Energierückgewinnung (MER) [kg]
- Exportierte elektrische Energie (EEE) [MJ]
- Exportierte thermische Energie (EET) [MJ]

## Impact indicators
- Globales Erwärmungspotenzial (GWP) [kg CO_(2)-Äq.]: A1-A3 3.77416
- Abbau Potential der stratosphärischen Ozonschicht (ODP) [kg CFC11-Äq.]: A1-A3 8.487e-10
- Versauerungspotenzial von Boden und Wasser (AP) [kg SO_(2)-Äq.]: A1-A3 0.0099114
- Eutrophierungspotenzial (EP) [kg PO_(4)^(3)-Äq.]: A1-A3 0.000786679
- Bildungspotential für troposphärisches Ozon (POCP) [kg Ethen-Äq.]: A1-A3 0.00199157
- Potenzial für den abiotischen Abbau nicht fossiler Ressourcen (ADPE) [kg Sb-Äq.]: A1-A3 9.08485e-7
- Potenzial für den abiotischen Abbau fossiler Brennstoffe (ADPF) [MJ]: A1-A3 79.6569

## Use advice
Gültigkeitsbereich:
Das geosynthetische Gewebe Stabilenka® wird in den Werken der HUESKER Synthetic GmbH in Dülmen und Gescher gefertigt. Die EPD wurde für ein durchschnittliches Produkt der Stabilenka® - Produktserie erstellt. Die spezifischen Werte lassen sich für jeden Produktartikel über den Flächenbezug herleiten.
Systemgrenze:
Bei der Umwelt-Produktdeklaration handelt es sich um eine cradle-to-gate EPD, d.h. es werden alle potenziellen Umweltauswirkungen des Produkts von der Wiege bis zum Werkstor betrachtet. Nach /DIN EN 15804/ entspricht dies den Produktphasen A1-A3. Folgende Produktionsschritte werden während der Herstellungsphase berücksichtigt:

Herstellung des synthetischen Garns
Transporte zwischen den Werken Dülmen und Gescher
Herstellung des geosynthetischen Gewebes (Zwirnprozess, Web-/Raschelprozess)
Verpacken des geosynthetischen Gewebes

## Data sources
- Stabilenka®.pdf
- GaBi Database (all versions)
- GaBi database SP29 2016
