# Scheucher Mehrschichtparkett

Dataset: ILCD process, EPD, average dataset
Geography: AT
Reference year: 2020
Valid until: 2025
Classification: OEKOBAU.DAT: Holz / Holzböden / Parkett
Classification: IBUCategories: 02 Bauprodukte / Produkte aus Bauholz / Vollholzprodukte
Method details: Vollholzprodukte.pdf
Registration number: EPD-SCP-20200238-IBC1-DE
Owner: Scheucher Holzindustrie GmbH
Compliance: DIN EN 15804; ISO 14025
Review: Accredited third party review by Institut Bauen und Umwelt e. V.
Amounts: rows without a unit in brackets have none in this file; such an amount is in the reference unit of its flow, which a separate flow dataset defines
copyright: true

## General comment
Scheucher Parkett produziert Mehrschichtparkettböden:

3-Schichtparkett WOODflor® (Schiffsböden, Landhausdielen)
Nutzschicht: verschiedene Laubhölzer
Mittellage: Fichte, Kiefer
Gegenzug: Fichte2-Schichtparkett BILAflor®
Nutzschicht: verschiedene Laubhölzer
Trägermaterial: Fichte

2-Schichtparkett MULTIflor NOVOLOC® 5G
Nutzschicht: verschiedene Laubhölzer
Trägermaterial: Sperrholzplatte

Das deklarierte Produkt stellt einen flächengewichteten Durchschnitt der hergestellten Sortimente dar.

## Technology and included processes
Zugekaufte Friesen werden nach dem Trocknen, Hobeln, Auftrennen und Sortieren zu einer Deckschicht verleimt. Diese werden dann weiter zu Schiffsböden bzw. BILAflor®- oder MULTIflor NOVOLOC® 5G-Mehrschichtparkett verarbeitet. Auch zugekaufte Deckschichten werden nach dem Qualitätssortieren zu Landhausdielen bzw. BILAflor® oder MULTIflor NOVOLOC® 5G-Mehrschichtparkett weiterverarbeitet. Deckschichten werden zusammen mit Trägermaterial und gegebenenfalls Gegenzug verleimt. Nach einer Klimatisierungsphase werden die verpressten Dielen bei Bedarf gekittet, alle Dielen werden geschliffen und mit UV-Lack oder oxidativ trocknendem Öl-Wachs-Gemisch behandelt. Nach der rundum laufenden Profilierung mit Nut/Feder-Verbindung oder einem leimlos zu verlegenden Klickprofil (NOVOLOC® 5G) werden die Dielen versandfertig verpackt und bis zur Auslieferung klimatisiert im Hochregal gelagert.
Technische Daten:
Gemäß EU-Verordnung Nr. 305/2011 sind anzugeben:
Deklarierte Einheit:
Die vorliegende Umwelt-Produktdeklaration bezieht sich auf eine deklarierte Einheit von 1 m² Scheucher Mehrschichtparkett mit einem durchschnittlichen Flächengewicht von 7,37 kg/m² und einer Auslieferungsfeuchte von 6-9 %.

## Technical purpose
Mehrschichtparkettböden aus dem Hause Scheucher sind für die Verlegung im Innenbereich in Räumen der Klasse 1 (Beheizte Innenräume mit vorwiegend konstanten Temperaturen und wohnraumüblichen klimatischen Verhältnissen) vorgesehen. Die Parkettböden können entweder verklebt oder schwimmend verlegt werden.

## Reference product
- 1 m² Mehrschichtparkett: 1

## Inputs
- Erneuerbare Primärenergie als Energieträger (PERE) [MJ]: A1-A3 124.721, C3 125.48, D -28.7997
- Erneuerbare Primärenergie zur stofflichen Nutzung (PERM) [MJ]: A1-A3 125.018, C3 -125.018, D 0
- Total erneuerbare Primärenergie (PERT) [MJ]: A1-A3 249.738, C3 0.462353, D -28.7997
- Nicht-erneuerbare Primärenergie als Energieträger (PENRE) [MJ]: A1-A3 76.4507, C3 11.7986, D -117.147
- Nicht-erneuerbare Primärenergie zur stofflichen Nutzung (PENRM) [MJ]: A1-A3 10.7545, C3 -10.7545, D 0
- Total nicht erneuerbare Primärenergie (PENRT) [MJ]: A1-A3 87.2052, C3 1.04409, D -117.147
- Einsatz von Sekundärstoffen (SM) [kg]: A1-A3 0.0378, C3 0, D 0
- Erneuerbare Sekundärbrennstoffe (RSF) [MJ]: A1-A3 1.2, C3 0, D 115.838
- Nicht erneuerbare Sekundärbrennstoffe (NRSF) [MJ]: A1-A3 0, C3 0, D -107.119
- Einsatz von Süßwasserressourcen (FW) [m^3]: A1-A3 1.05784, C3 0.0005346, D -0.0238226

## Outputs
- Gefährlicher Abfall zur Deponie (HWD) [kg]: A1-A3 8.84727e-7, C3 4.31931e-10, D -4.6363e-8
- Entsorgter nicht gefährlicher Abfall (NHWD) [kg]: A1-A3 0.145247, C3 0.000740236, D 0.00546322
- Entsorgter radioaktiver Abfall (RWD) [kg]: A1-A3 0.00459364, C3 0.000158313, D -0.00984819
- Komponenten für die Wiederverwendung (CRU) [kg]: A1-A3 0, C3 0, D 0
- Stoffe zum Recycling (MFR) [kg]: A1-A3 0, C3 0, D 0
- Stoffe für die Energierückgewinnung (MER) [kg]: A1-A3 0, C3 7.71439, D 0
- Exportierte elektrische Energie (EEE) [MJ]: A1-A3 0, C3 0, D 0
- Exportierte thermische Energie (EET) [MJ]: A1-A3 0, C3 0, D 0

## Impact indicators
- Globales Erwärmungspotenzial (GWP) [kg CO_(2)-Äq.]: A1-A3 -6.70672, C3 12.1575, D -6.48162
- Abbau Potential der stratosphärischen Ozonschicht (ODP) [kg CFC11-Äq.]: A1-A3 6.68918e-8, C3 1.74035e-15, D -1.08154e-13
- Versauerungspotenzial von Boden und Wasser (AP) [kg SO_(2)-Äq.]: A1-A3 0.0203198, C3 0.000106464, D 0.00337253
- Eutrophierungspotenzial (EP) [kg PO_(4)^(3)-Äq.]: A1-A3 0.00485619, C3 1.30307e-5, D 0.000227496
- Bildungspotential für troposphärisches Ozon (POCP) [kg Ethen-Äq.]: A1-A3 0.00323856, C3 8.70386e-6, D 0.00130513
- Potenzial für den abiotischen Abbau nicht fossiler Ressourcen (ADPE) [kg Sb-Äq.]: A1-A3 3.86667e-6, C3 1.8158e-8, D -1.29081e-6
- Potenzial für den abiotischen Abbau fossiler Brennstoffe (ADPF) [MJ]: A1-A3 74.6993, C3 0.645605, D -92.3581

## Use advice
Gültigkeitsbereich:
Die vorliegende Umwelt-Produktdeklaration bezieht sich auf eine deklarierte Einheit von 1 m² durchschnittlichem Scheucher Mehrschichtparkett produziert am Standort Mettersdorf.
Systemgrenze:
Die Ökobilanz des Scheucher Mehrschichtparketts beinhaltet eine cradle-to-gate (Wiege bis zum Werkstor) -Betrachtung der auftretenden Umweltwirkungen mit den Modulen C1­-C3 und Modul D (A1-A3,+C,+D). Die folgenden Lebenszyklusphasen werden in der Analyse berücksichtigt:
Modul A1-A3 Produktionsstadium
Das Produktionsstadium beinhaltet die Aufwendungen der Rohstoffversorgung (Holz, Leimsystem etc.) sowie die damit verbundenen Transporte bezogen auf den Produktionsstandort Mettersdorf. Die Bereitstellung thermischer Energie ist im Produktionsstadium in Form des werkseigenen Ofens berücksichtigt. Elektrische Energie wird von der Photovoltaik-Anlage am Dach der Produktionshallen sowie vom regionalen Stromnetz bezogen.

Modul C3 Abfallbehandlung
Das Modul C3 deklariert die biogenen Kohlendioxid-Emissionen in der energetischen Verwertung am Lebensende des Produktes. Darüber hinaus wird das Hacken nach Ausbau der Produkte betrachtet.

Modul D Gutschriften und Lasten außerhalb der Systemgrenzen

In Modul D wird die energetische Verwertung des Produktes am Lebensende inklusive entsprechenden energetischen Substitutionspotenzialen in Form eines europäischen Durchschnittsszenarios beschrieben.

## Data sources
- Scheucher Mehrschichtparkett.pdf
- GaBi Database (all versions)
- GaBi database SP40 2020
