# Schilliger-Leimholz nach EN 14080:2013

Dataset: ILCD process, EPD, average dataset
Geography: CH
Reference year: 2018
Valid until: 2023
Classification: OEKOBAU.DAT: Holz / Vollholz / Brettschichtholz (BSH)
Classification: IBUCategories: 02 Bauprodukte / Produkte aus Bauholz / Vollholzprodukte
Method details: Vollholzprodukte.pdf
Generated by: Dr. Frank Werner - Umwelt & Entwicklung
Registration number: EPD-SLH-20180066-IBC1-DE
Owner: Schilliger Holz AG
Compliance: DIN EN 15804; ISO 14025
Review: Accredited third party review by Institut Bauen und Umwelt e. V.
Amounts: rows without a unit in brackets have none in this file; such an amount is in the reference unit of its flow, which a separate flow dataset defines
copyright: true
licenseType: Free of charge for all users and uses
accessRestrictions: None

## General comment
Das Schilliger-Leimholz ist ein industriell gefertigtes Holzprodukt für tragende Konstruktionen. Es wird im Gebäude- und Brückenbau eingesetzt. Der Aufbau ist symmetrisch, besteht aus mindestens zwei faserparallel miteinander verklebten getrockneten Brettern oder Holzlamellen aus Nadelvollholz. Es ist in Folge der Festigkeitssortierung des Ausgangsmaterials und der Homogenisierung durch schichtweisen Aufbau vergütet und hat höhere Tragfähigkeiten als übliches Bauholz. Gemäß der /EN 14080:2013/ werden die Produktgruppen Brettschichtholz (BSH) und Balkenschichtholz (BalkenSH) definiert (/1359-CPR-0622/).

Das BSH ist durch die Lamellenstärke von 40 mm gekennzeichnet und aufgrund seiner hohen Festigkeiten und variablen Produktausprägungen in einem breiten Anwendungsgebiet einsetzbar. Das BalkenSH weist von 40 mm abweichend dünnere oder dickere Lagen auf und ist für spezielle Anforderungen entwickelt: hierunter fallen die betriebseigenen Produkte Massivholzträger (MHT), Lamellenbalken (LAM), Rigibalken (RBS) sowie Rahmenbaukanteln (RBK).

Eine ausführliche Beschreibung der BSH- und BalkenSH-Produkte befindet sich auf der Firmen-Webpage "www.schilliger.ch".

## Technology and included processes
Verwendet wird nur betriebsintern produziertes Schnittholz, das auf 12% Holzfeuchte vorgetrocknet und unbehandelt ist. Die Holzfeuchte jeder Lamelle wird gemessen, nach einer visuellen Vorsortierung werden diese 4-seitig gehobelt. Anschließend durchlaufen sie den Qualitätsscanner, welcher Fehlerstellen für die Auskappung markiert und die Lamellen nach ihrer Qualität sortiert. Nachdem die Fehlerstellen ausgekappt sind werden die Lamellen zu einem Endlosstrang keilgezinkt und kommissionsbezogen abgelängt. Nach einem weiteren Hobelvorgang werden die Lamellen verleimt und gepresst: Fünf Pressen auf einer Trommel kommen flexibel zum Einsatz. Das fertige Produkt wird abschließend gehobelt, gefast und endkontrolliert. Die Kommissionspakete werden zur Auslieferung in der Folieranlage verpackt. Während des Produktionsprozesses werden die Qualitätsanforderungen der /ISO 9001/ eingehalten (/Zertifikatsnummer 01 100 1300116 LGA-Intercert/).
Technische Daten:
Das Schilliger-Leimholz erfüllt die Anforderungen nach /EN 14080:2013/ (/1359-CPR-0622 /).

Diese werden in den Leistungserklärungen für Brettschichtholz Fi/Ta / SHI / 01-01012016 vom 1.1.2016 und für Balkenschichtholz Fi/Ta / SHI / 04-01012016 vom 1.1.2016 weiter ausgeführt.

Einzelheiten zu den Querschnittsaufbauten und Produkteigenschaften können auch den Technischen Merkblättern entnommen werden, welche der Betrieb zu jedem Produkt auf seiner Internetseite veröffentlicht.
Deklarierte Einheit:
Die deklarierten Umweltkennzahlen beziehen sich auf 1 m3 Leimholz gemäß EN 14080:2013. Darunter fallen Brettschichtholz (BSH) sowie Balkenschichtholz, wobei alle Produkte mit PUR-Kleber verleimt sind.

Bei der Modellierung wurde für die Sägereiprozesse konservativ von der Herstellung von Brettern (nicht von Balken) ausgegangen; für den Leimverbrauch wurde aber der nach Produktionsvolumen gewichtete Leimverbrauch für BSH bzw. Balkenschichtholz verwendet.

## Technical purpose
Das BSH wird im Konstruktionsbau als tragendes Element eingesetzt, z.B. in Brücken und Gebäuden, als sichtbare oder verdeckte Trägerteile.
MHT, LAM und RBS finden ebenfalls im Konstruktionsbau Anwendung, Rahmenbaukanteln sind als Ständer für den Holzrahmenbau und als Spurschwellen für den Elementbau vorgesehen.

## Reference product
- Leimholz (424 kg/m³): 1

## Inputs
- Erneuerbare Primärenergie als Energieträger (PERE) [MJ]: A1-A3 1640.7, A4 0.118, A5 0.00824, C2 0.0392, C3 8.26, C4 0, D -819.1
- Erneuerbare Primärenergie zur stofflichen Nutzung (PERM) [MJ]: A1-A3 7155, A4 0, A5 0, C2 0, C3 -7155, C4 0, D 0
- Total erneuerbare Primärenergie (PERT) [MJ]: A1-A3 8796, A4 0.12, A5 0.00824, C2 0.0392, C3 -7147, C4 0, D -819.1
- Nicht-erneuerbare Primärenergie als Energieträger (PENRE) [MJ]: A1-A3 1756, A4 56, A5 83.758, C2 18.6, C3 96.3, C4 0, D -6807
- Nicht-erneuerbare Primärenergie zur stofflichen Nutzung (PENRM) [MJ]: A1-A3 184, A4 0, A5 -83, C2 0, C3 -101, C4 0, D 0
- Total nicht erneuerbare Primärenergie (PENRT) [MJ]: A1-A3 1940, A4 56, A5 0.758, C2 18.6, C3 -4.71, C4 0, D -6807
- Einsatz von Sekundärstoffen (SM) [kg]: A1-A3 0, A4 0, A5 0, C2 0, C3 0, C4 0, D 0
- Erneuerbare Sekundärbrennstoffe (RSF) [MJ]: A1-A3 0, A4 0, A5 0, C2 0, C3 0, C4 0, D 7155
- Nicht erneuerbare Sekundärbrennstoffe (NRSF) [MJ]: A1-A3 0, A4 0, A5 0, C2 0, C3 0, C4 0, D 101
- Einsatz von Süßwasserressourcen (FW) [m^3]

## Outputs
- Gefährlicher Abfall zur Deponie (HWD) [kg]: A1-A3 0.000415, A4 1.51e-6, A5 5.11e-6, C2 5.02e-7, C3 7.43e-5, C4 0, D -0.00136
- Entsorgter nicht gefährlicher Abfall (NHWD) [kg]: A1-A3 2.72, A4 0.000838, A5 0.0841, C2 0.000278, C3 0.0474, C4 0, D 1.41
- Entsorgter radioaktiver Abfall (RWD) [kg]: A1-A3 0.0167, A4 9.7e-6, A5 5.7e-7, C2 3.23e-6, C3 0.000695, C4 0, D -0.0769
- Komponenten für die Wiederverwendung (CRU) [kg]: A1-A3 0, A4 0, A5 0, C2 0, C3 0, C4 0, D 0
- Stoffe zum Recycling (MFR) [kg]: A1-A3 0, A4 0, A5 0, C2 0, C3 0, C4 0, D 0
- Stoffe für die Energierückgewinnung (MER) [kg]: A1-A3 0, A4 0, A5 0, C2 0, C3 424, C4 0, D 0
- Exportierte elektrische Energie (EEE) [MJ]: A1-A3 0, A4 0, A5 10.8, C2 0, C3 0, C4 0, D 0
- Exportierte thermische Energie (EET) [MJ]: A1-A3 0, A4 0, A5 21.3, C2 0, C3 0, C4 0, D 0

## Impact indicators
- Globales Erwärmungspotenzial (GWP) [kg CO_(2)-Äq.]: A1-A3 -615, A4 4.12, A5 5.75, C2 1.37, C3 686, C4 0, D -196
- Abbau Potential der stratosphärischen Ozonschicht (ODP) [kg CFC11-Äq.]: A1-A3 5.24e-6, A4 1.35e-7, A5 5.22e-9, C2 4.47e-8, C3 1.93e-7, C4 0, D -3.97e-5
- Versauerungspotenzial von Boden und Wasser (AP) [kg SO_(2)-Äq.]: A1-A3 0.394, A4 0.0222, A5 0.000531, C2 0.00736, C3 0.0151, C4 0, D -0.192
- Eutrophierungspotenzial (EP) [kg PO_(4)^(3)-Äq.]: A1-A3 0.0893, A4 0.00502, A5 0.00018, C2 0.00167, C3 0.00197, C4 0, D 0.00313
- Bildungspotential für troposphärisches Ozon (POCP) [kg Ethen-Äq.]: A1-A3 0.123, A4 0.000634, A5 6.48e-6, C2 0.00021, C3 0.00064, C4 0, D -0.0128
- Potenzial für den abiotischen Abbau nicht fossiler Ressourcen (ADPE) [kg Sb-Äq.]: A1-A3 2.2e-5, A4 4.88e-9, A5 2.61e-9, C2 1.62e-9, C3 1.18e-7, C4 0, D -1.037e-5
- Potenzial für den abiotischen Abbau fossiler Brennstoffe (ADPF) [MJ]: A1-A3 1097, A4 55.5, A5 0.732, C2 18.4, C3 65.4, C4 0, D -3146

## Use advice
Gültigkeitsbereich:
Diese Deklaration umfasst das von der Schilliger Holz AG gefertigte Leimholz gemäß /EN 14080:2013/: das Brettschichtholz (BSH) sowie die folgenden Balkenschichtholz-Produkte: Massivholzträger (MHT), Lamellenbalken (LAM), Rigibalken (RBS) sowie Rahmenbaukanteln (RBK). Der Produktionsstandort ist das Werk in Küssnacht, Schweiz.
Systemgrenze:
EPD von der Wiege bis zum Werkstor - mit Optionen.

Die Herstellung der Leimholzprodukte (Module A1-A3) umfasst die Forstprozesse, den Transport des Rundholzes zur Sägerei, die Herstellung der Sägeware und daraus des Leimholzes sowie die damit zusammenhängenden Hintergrundprozesse (Stromgewinnung, Gewinnung fossiler Treib- und Brennstoffe, etc.). Weiter wird die Herstellung des Leimes sowie der Verpackung mit bilanziert. Die benötigte Infrastruktur für die Sägerei und das Leimholzwerk werden abgeschätzt.

Der Gehalt an biogenem CO2 wird gemäss PCR beim Treibhausgaspotenzial (GWP) als negativer Input verrechnet.

Abfälle, Sekundärmaterialien oder Sekundärbrennstoffe werden in der Produktion nicht eingesetzt. Rinde, Hackschnitzel/Hobelspäne und weitere rohe Sägeware verlassen das Produktsystem als Ko-Produkte.

In Modul A4 wird ein durchschnittlicher Transport des Leimholzes über 90 km auf die Baustelle bilanziert.

Modul A5 umfasst die Entsorgung der PE-Verpackung in einer Müllverbrennungsanlage (KVA). Die in der KVA erzeugte Wärme und Strom werden als exportierte Energie in Modul D verrechnet.

Installationsmaterial wird in Modul A5 nicht verrechnet, da sich Art und Menge des Installationsmaterials je nach Verwendung des Leimholzes unterscheiden; Installationsmaterial muss bei der Bilanzierung eines Gebäudes entsprechend ergänzt werden.

Modul C2 umfasst den Transport des rückgebauten Leimholzes zu einem Biomassekraftwerk.

In Modul C3 wird das Hacken des rückgebauten Leimholzes abgebildet; es wird in Übereinstimmung mit /EN 16485/ davon ausgegangen, dass nicht druckbehandeltes Altholz das Ende der Abfalleigenschaften erreicht, wenn es als Hackschnitzel verfügbar wird und als Sekundärbrennstoff mit dem entsprechenden Gehalt an biogenem C (als CO2-Äquivalent) und der gespeicherten erneuerbaren Primärenergie den Bilanzraum verlässt.

In Modul C4 fallen keine Prozesse/Umweltwirkungen an.

In Modul D ist die energetische Verwertung der Hackschnitzel in einem Biomassekraftwerk verrechnet. Dabei wird ausgegangen, dass die rückgewonnene Energie den Strommix Deutschland sowie Wärme ab industrielle Erdgasfeuerung ersetzt. Analog verrechnet wird die exportierte Energie aus der energetischen Nutzung der PE-Verpackung aus Modul A5.

## Data sources
- ecoinvent database (all versions)
- ecoinvent 2.2 database
