# Doppelbodensystem Typ NORTEC

Dataset: ILCD process, EPD, specific dataset
Geography: DE
Reference year: 2021
Valid until: 2026
Classification: OEKOBAU.DAT: Komposite / Systembauteile / Böden
Classification: IBUCategories: 02 Bauprodukte / Systemböden / Systemböden
Method details: Systemböden.pdf
Generated by: Lindner Group
Registration number: EPD-LIN-20210022-IBA1-DE
Owner: Lindner Group
Compliance: DIN EN 15804; ISO 14025
Review: Accredited third party review by Institut Bauen und Umwelt e. V.
Amounts: rows without a unit in brackets have none in this file; such an amount is in the reference unit of its flow, which a separate flow dataset defines
copyright: true
licenseType: Free of charge for all users and uses
accessRestrictions: None

## General comment
Doppelbodensysteme vom Typ NORTEC sind werksseitig industriell vorgefertigte modulare Komponenten, die einen Installationsraum für die Unterbringung aller Installationen sowie Ver- und Entsorgungsleitungen bilden und jederzeit an jeder Stelle den freien Zugang zu diesem Hohlraum gestatten.

Das Doppelbodensystem wird im Wesentlichen von der Doppelbodenplatte und der Unterkonstruktion gebildet.

Das Durchschnittsprodukt Doppelbodenplatte, Typ NORTEC, wird aus faserverstärkten Calciumsulfatplatten hergestellt. Die Doppelbodenplatten werden standardmäßig in den Abmessungen 600 x 600 mm gefertigt. Der Rohdichtebereich kann zwischen 1.280 und 1.680 kg/m³ und die Plattenstärke von 20 bis 44 mm variieren.

Als Unterkonstruktion werden Stahlstützen verwendet, die unterschiedliche Konstruktionshöhen

(28–2.000 mm) ermöglichen.

Durch das Zusammenfügen (Montage in Gebäuden) der einzelnen Komponenten zu einem Flächen-verbund, entsteht die Bauart Doppelboden. Entsprechend den speziellen Anforderungen werden die Plattentypen (Dichte und Plattendicke) und die Dimensionierung der Unterkonstruktion bestimmt.

## Technology and included processes
Herstellung und Verarbeitung der Calciumsulfatplatte: Die beiden Rohstoffe REA-Gips und Zellulosefasern werden gemischt und nach Zugabe von Wasser unter hohem Druck zu stabilen Platten gepresst, getrocknet sowie anschließend auf die benötigten Formate gefräst. In weiteren Fertigungsschritten werden die Kantenbänder angearbeitet. Herstellung der Stützen: Durch Widerstandsschweißen oder Verpressen der Einzelkomponenten Rohre, Gewindestangen und Stahlblech werden die Stützen hergestellt. Dimensionen der einzelnen Komponenten richten sich nach technischen Vorgaben. Durch Galvanotechnik (galvanische Verzinkung) werden die Stützen mit einer Zinkschicht versehen, um sie vor Korrosion zu schützen.
Deklarierte Einheit:
Die deklarierte Einheit bezieht sich jeweils auf 1 m² Doppelbodensystem Typ NORTEC mit einer durchschnittlichen Plattendicke von 33,17 mm und der durchschnittlichen Dichte von 1.467 kg/m³. Für den Einbau des Doppelbodens sind 4 dazugehörige Stützen notwendig.

In der Produktfamilie variiert die Dicke zwischen 20 und 44 mm, die Plattendicke zwischen 1.280 und 1.680 kg/m³.

Die deklarierte Einheit hat ein Gesamtgewicht für die Platte von 48,66 kg/m² zzgl. 1,34 kg für die dazugehörigen Stützen. Das Gesamtgewicht beträgt also 50,00 kg).

Für die Durchschnittsbildung der Platte wurde eine gewichtete Mittelung für eine durchschnittliche Plattenhöhe und Plattendichte durch den Prozentanteil an der Produktion errechnet. Für die Stahlstützen werden die meistverkauften, üblichen Stützen deklariert: Typ M1, 120 mm, Stückgewicht 0,33 kg.

Klasse der Deklaration ist 1c) Deklaration eines durchschnittlichen Produkts aus einem Werk eines Herstellers.

## Technical purpose
Das unter 2.2 genannte Doppelbodensystem aus faserverstärkten Calciumsulfatplatten und Doppelbodenstützen wird hauptsächlich in öffentlichen, gewerblichen und privat genutzten Gebäuden zur Herstellung von Hohlräumen/Installationsräumen eingesetzt. Doppelbodensysteme können mit allen üblichen Bodenbelägen belegt werden, müssen jedoch auf die verschiedenen Systemvarianten abgestimmt werden.

## Reference product
- Doppelbodensystem NORTEC (): 1

## Inputs
- Erneuerbare Primärenergie als Energieträger (PERE) [MJ]: A1-A3 164, A4 1.18, A5 0.0256, B1 0, B2 0, C1 0, C2 0.229, C3 0, C4 1.17, D -1.56
- Erneuerbare Primärenergie zur stofflichen Nutzung (PERM) [MJ]: A1-A3 0.0149, A4 0, A5 0, B1 0, B2 0, C1 0, C2 0, C3 0, C4 -0.0149, D -14.8
- Total erneuerbare Primärenergie (PERT) [MJ]: A1-A3 164, A4 1.18, A5 0.0256, B1 0, B2 0, C1 0, C2 0.229, C3 0, C4 1.16, D -16.36
- Nicht-erneuerbare Primärenergie als Energieträger (PENRE) [MJ]: A1-A3 292, A4 20.2, A5 0.111, B1 0, B2 0, C1 0, C2 3.93, C3 0, C4 8.9, D -23.4
- Nicht-erneuerbare Primärenergie zur stofflichen Nutzung (PENRM) [MJ]: A1-A3 0, A4 0, A5 0, B1 0, B2 0, C1 0, C2 0, C3 0, C4 0, D 0
- Total nicht erneuerbare Primärenergie (PENRT) [MJ]: A1-A3 292, A4 20.2, A5 0.111, B1 0, B2 0, C1 0, C2 3.93, C3 0, C4 8.9, D -23.4
- Einsatz von Sekundärstoffen (SM) [kg]: A1-A3 6.52, A4 0, A5 0, B1 0, B2 0, C1 0, C2 0, C3 0, C4 0, D 1.01
- Erneuerbare Sekundärbrennstoffe (RSF) [MJ]: A1-A3 3.66e-5, A4 0, A5 0, B1 0, B2 0, C1 0, C2 0, C3 0, C4 0, D 0
- Nicht erneuerbare Sekundärbrennstoffe (NRSF) [MJ]: A1-A3 0, A4 0, A5 0, B1 0, B2 0, C1 0, C2 0, C3 0, C4 0, D 0
- Einsatz von Süßwasserressourcen (FW) [m^3]: A1-A3 6.5, A4 0.271, A5 0.00181, B1 0, B2 0, C1 0, C2 0.0543, C3 0, C4 0.106, D -0.151

## Outputs
- Gefährlicher Abfall zur Deponie (HWD) [kg]: A1-A3 2.44e-6, A4 7.54e-7, A5 2.86e-10, B1 0, B2 0, C1 0, C2 1.47e-7, C3 0, C4 1.36e-7, D -1.78e-8
- Entsorgter nicht gefährlicher Abfall (NHWD) [kg]: A1-A3 1.62, A4 0.00354, A5 0.0164, B1 0, B2 0, C1 0, C2 0.000689, C3 0, C4 44.7, D -0.03
- Entsorgter radioaktiver Abfall (RWD) [kg]: A1-A3 0.00926, A4 2.14e-5, A5 5.02e-6, B1 0, B2 0, C1 0, C2 4.17e-6, C3 0, C4 9.98e-5, D -0.000206
- Komponenten für die Wiederverwendung (CRU) [kg]: A1-A3 0, A4 0, A5 0, B1 0, B2 0, C1 0, C2 0, C3 0, C4 0, D 0
- Stoffe zum Recycling (MFR) [kg]: A1-A3 0.143, A4 0, A5 0.0328, B1 0, B2 0, C1 0, C2 0, C3 0, C4 0, D 1.28
- Stoffe für die Energierückgewinnung (MER) [kg]: A1-A3 0, A4 0, A5 1.11, B1 0, B2 0, C1 0, C2 0, C3 0, C4 0, D 0
- Exportierte elektrische Energie (EEE) [MJ]: A1-A3 0, A4 0, A5 3.31, B1 0, B2 0, C1 0, C2 0, C3 0, C4 0, D 0
- Exportierte thermische Energie (EET) [MJ]: A1-A3 0, A4 0, A5 5.35, B1 0, B2 0, C1 0, C2 0, C3 0, C4 0, D 0

## Impact indicators
- Globales Erwärmungspotenzial (GWP) [kg CO_(2)-Äq.]: A1-A3 12.6, A4 1.63, A5 0.203, B1 0, B2 0, C1 0, C2 0.318, C3 0, C4 12, D -2.58
- Abbau Potential der stratosphärischen Ozonschicht (ODP) [kg CFC11-Äq.]: A1-A3 1.93e-7, A4 5.46e-16, A5 -3.86e-15, B1 0, B2 0, C1 0, C2 1.06e-16, C3 0, C4 3.69e-15, D -2.78e-15
- Versauerungspotenzial von Boden und Wasser (AP) [kg SO_(2)-Äq.]: A1-A3 0.0303, A4 0.00363, A5 0.000114, B1 0, B2 0, C1 0, C2 0.000706, C3 0, C4 0.00462, D -0.00596
- Eutrophierungspotenzial (EP) [kg PO_(4)^(3)-Äq.]: A1-A3 0.00558, A4 0.000902, A5 -2.29e-5, B1 0, B2 0, C1 0, C2 0.000176, C3 0, C4 0.00048, D -0.000557
- Bildungspotential für troposphärisches Ozon (POCP) [kg Ethen-Äq.]: A1-A3 0.00281, A4 -0.00134, A5 -1.22e-5, B1 0, B2 0, C1 0, C2 -1.22e-5, C3 0, C4 0.00032, D -0.000891
- Potenzial für den abiotischen Abbau nicht fossiler Ressourcen (ADPE) [kg Sb-Äq.]: A1-A3 1.14e-5, A4 1.5e-7, A5 1.89e-8, B1 0, B2 0, C1 0, C2 2.61e-8, C3 0, C4 0.00032, D -6.26e-9
- Potenzial für den abiotischen Abbau fossiler Brennstoffe (ADPF) [MJ]: A1-A3 263, A4 21.9, A5 -2.23, B1 0, B2 0, C1 0, C2 4.26, C3 0, C4 9.42, D -21.6

## Use advice
Gültigkeitsbereich:
Die EPD bezieht sich auf das Doppelbodensystem, Typ NORTEC. Bei dem deklarierten Produkt handelt es sich um ein Durchschnittsprodukt eines Herstellers, dessen zwei Komponenten in zwei unterschiedlichen Werken der Lindner SE gefertigt werden. Die Calciumsulfatplatte wird im Werk Dettelbach (Deutschland) und die Doppelbodenstützen werden im Werk in Arnstorf (Deutschland) hergestellt. Die gesammelten Produktionsdaten beziehen sich auf das Jahr 2019. Die Ökobilanz, die auf plausiblen, transparent nachvollziehbaren Basisdaten beruht, repräsentiert zu 100 % das genannte Systemprodukt.
Systemgrenze:
Typ der EPD: Wiege bis Werkstor mit Optionen (Cradle to Grave). Diese Ökobilanz berücksichtigt den Lebenszyklus der Produktherstellung bis hin zur Deponie. Das Produktstadium umfasst die Module A1 (Rohstoffbereitstellung), A2 (Transport) und A3 (Herstellung) (diese werden als Modul zusammengefasst (A1–A3) betrachtet), Transport zu Baustelle und Montage (A4–A5). Beim Einbau in das Gebäude werden keine weiteren Materialien berücksichtigt; das Modul A5 umfasst die Umweltlasten für die Entsorgung der Verpackung.

Für die Nutzungsphase (B1–B2) werden die Module mit 0 deklariert. Das Produkt verursacht während der Nutzungsphase keine Umweltlasten. Das Produkt selbst bedarf keiner Wartung; bei normaler Nutzung sind während der Gebäudenutzung keine Reparatur und kein Austausch zu erwarten.

Für das Entsorgungsstadium wird der Rückbau und Abriss des Produktes aus dem Gebäude (C1) sowie der Transport zur Deponie berücksichtigt. (C2)

Am Ende des Lebensweges wird das Produkt wieder in Komponenten getrennt und das realistische Szenario ausgewählt: Für die Stützen erhält ein Entsorgungsfachbetrieb für den sortierten Stahl eine Vergütung. Die Stahlstützen erreichen das Ende der Abfalleigenschaft in Modul C3. Die potentiellen Nutzen und Lasten werden im Modul D angegeben.

Die Calciumsulfatplatte erreicht das Ende der Abfalleigenschaft in Modul C4 und wird auf einer Deponie für Bauschuttabfälle entsorgt.

## Data sources
- GaBi Database (all versions)
- GaBi database SP40 2020
