# Vormauerziegel, Pflasterziegel und Riemchen

Dataset: ILCD process, EPD, average dataset
Geography: DE
Reference year: 2021
Valid until: 2026
Classification: OEKOBAU.DAT: Mineralische Baustoffe / Steine und Elemente / Ziegel
Classification: IBUCategories: 02 Bauprodukte / Mauerwerk und Mörtel / Ziegel
Method details: Ziegel.pdf
Generated by: Sphera Solutions GmbH
Registration number: EPD-ZWM-20210148-ICG1-DE
Owner: Bundesverband der Deutschen Ziegelindustrie e.V.
Compliance: DIN EN 15804; ISO 14025
Review: Accredited third party review by Institut Bauen und Umwelt e. V.
Amounts: rows without a unit in brackets have none in this file; such an amount is in the reference unit of its flow, which a separate flow dataset defines
copyright: true
licenseType: Free of charge for all users and uses
accessRestrictions: None

## General comment
Vormauerziegel, Pflasterziegel und Riemchen gehören zur Gruppe der grobkeramischen gebrannten Tonbaustoffe.
Auf Basis der massenbezogenen Jahresproduktion wurden die Anteile der einzelnen Firmen an der Gesamtproduktion ermittelt und zur Berechnung der gewichteten Durchschnittswerte verwendet.
In dieser EPD erfolgt die Darstellung der Ökobilanzergebnisse für Vormauerziegel, Pflasterziegel und Riemchen jeweils für eine Tonne [t].

## Technology and included processes
Nach dem Tonabbau im Tagebau erfolgt der Transport zur Zwischenlagerung auf dem Werksgelände. Die mechanische Aufbereitung der Tone, wie das Zerkleinern und Mischen, geschieht im Kollergang und den Walzwerken. Die o.g. Grundstoffe werden in bestimmten optimierten Verhältnissen zerkleinert (aufbereitet), gemischt und befeuchtet. Es erfolgt eine Lagerung im Sumpfhaus. Nach erneuter Wasserzugabe erfolgt die Formgebung der Rohlinge durch Pressen mit entsprechenden Mundstücken und nachgeschaltetem Abschneider. Es kommen auch Wasserstrichtellerpressen, Handform- oder Formbackanlagen zum Einsatz. Das geformte Material kommt in den Trockner, der im Wesentlichen mit der Abwärme des Tunnelofens betrieben wird. Die Trocknungszeit variiert je nach Format und Rohdichte und kann beispielsweise 48 Stunden betragen. Danach werden die getrockneten Rohlinge bei 900-1250 °C innerhalb von ca. 24-48 Stunden im Tunnelofen gebrannt. Die Ziegel werden gestapelt und in recycelbarer PE-Folie eingeschweißt. Riemchen werden überwiegend in Kartons verpackt. Der Energiebedarf für die Ziegelherstellung betrifft hauptsächlich den Brennvorgang und das Trocknen. Die elektrische Energie wird hauptsächlich in der Aufbereitung verbraucht.
Deklarierte Einheit:
Die Deklaration bezieht sich auf 1 Tonne Vormauerziegel, Pflasterziegel oder Riemchen.
Grundlage der Ökobilanzergebnisse in dieser EPD ist eine Durchschnittsbildung der teilnehmenden Werke, die als gewichteter Mittelwert bezogen auf den Anteil der einzelnen Produktionsstätten an der Gesamtjahresproduktion erfolgt.

## Technical purpose
Vormauerziegel werden als Sichtmauerwerk in zweischaligen Wandkonstruktionen im vor der Witterung ungeschützten Außenbereich oder als Sichtmauerwerk im Innenbereich verwendet. Pflasterziegel werden für Pflasterbeläge im Verkehrs- und Wegebau sowie für Innenbeläge verwendet. Riemchen werden als Außen- oder Innenwandverkleidung auf Wandkonstruktionen verklebt.

## Scenarios
- S1: 100 % Deponierung
- S2: Szenario 2

## Reference product
- 1 t Vormauerziegel, Pflasterziegel, Riemchen (): 1000

## Inputs
- Erneuerbare Primärenergie als Energieträger (PERE) [MJ]: A1-A3 229.868, A4 0, A5 0, B1 0, B2 0, B3 0, B4 0, B5 0, B6 0, B7 0, C1 0.498, C2 (S1) 0.97, C2 (S2) 1.6, C3 (S1) 3.84, C3 (S2) 0, C4 (S1) 0, C4 (S2) 24.6, D (S1) -14.4, D (S2) -8.31
- Erneuerbare Primärenergie zur stofflichen Nutzung (PERM) [MJ]: A1-A3 61.32, A4 0, A5 0, B1 0, B2 0, B3 0, B4 0, B5 0, B6 0, B7 0, C1 0, C2 (S1) 0, C2 (S2) 0, C3 (S1) 0, C3 (S2) 0, C4 (S1) 0, C4 (S2) 0, D (S1) 0, D (S2) 0
- Total erneuerbare Primärenergie (PERT) [MJ]: A1-A3 291.188, A4 0, A5 0, B1 0, B2 0, B3 0, B4 0, B5 0, B6 0, B7 0, C1 0.498, C2 (S1) 0.97, C2 (S2) 1.6, C3 (S1) 3.84, C3 (S2) 0, C4 (S1) 0, C4 (S2) 24.6, D (S1) -14.4, D (S2) -8.31
- Nicht-erneuerbare Primärenergie als Energieträger (PENRE) [MJ]: A1-A3 3810.82, A4 0, A5 0, B1 0, B2 0, B3 0, B4 0, B5 0, B6 0, B7 0, C1 7.33, C2 (S1) 14.3, C2 (S2) 23.6, C3 (S1) 51.1, C3 (S2) 0, C4 (S1) 0, C4 (S2) 216, D (S1) -95.2, D (S2) -61.5
- Nicht-erneuerbare Primärenergie zur stofflichen Nutzung (PENRM) [MJ]: A1-A3 27.258, A4 0, A5 0, B1 0, B2 0, B3 0, B4 0, B5 0, B6 0, B7 0, C1 0, C2 (S1) 0, C2 (S2) 0, C3 (S1) 0, C3 (S2) 0, C4 (S1) 0, C4 (S2) 0, D (S1) 0, D (S2) 0
- Total nicht erneuerbare Primärenergie (PENRT) [MJ]: A1-A3 3838.08, A4 170, A5 2, B1 0, B2 0, B3 0, B4 0, B5 0, B6 0, B7 0, C1 7.33, C2 (S1) 14.3, C2 (S2) 23.6, C3 (S1) 51.1, C3 (S2) 0, C4 (S1) 0, C4 (S2) 216, D (S1) -95.2, D (S2) -61.5
- Einsatz von Sekundärstoffen (SM) [kg]: A1-A3 29.5, A4 0, A5 0, B1 0, B2 0, B3 0, B4 0, B5 0, B6 0, B7 0, C1 0, C2 (S1) 0, C2 (S2) 0, C3 (S1) 0, C3 (S2) 0, C4 (S1) 0, C4 (S2) 0, D (S1) 0, D (S2) 970.5
- Erneuerbare Sekundärbrennstoffe (RSF) [MJ]: A1-A3 0.02685, A4 0.000669, A5 2.18e-5, B1 0, B2 0, B3 0, B4 0, B5 0, B6 0, B7 0, C1 2.74e-5, C2 (S1) 5.33e-5, C2 (S2) 8.81e-5, C3 (S1) -0.000125, C3 (S2) 0, C4 (S1) 0, C4 (S2) 0.401, D (S1) -0.000498, D (S2) -0.000498
- Nicht erneuerbare Sekundärbrennstoffe (NRSF) [MJ]: A1-A3 0.350578, A4 0.0102, A5 0.000252, B1 0, B2 0, B3 0, B4 0, B5 0, B6 0, B7 0, C1 0.000417, C2 (S1) 0.000812, C2 (S2) 0.00134, C3 (S1) -0.00204, C3 (S2) 0, C4 (S1) 0, C4 (S2) 0.818, D (S1) -0.00755, D (S2) -0.00755
- Einsatz von Süßwasserressourcen (FW) [m^3]: A1-A3 0.324411, A4 0.0176, A5 0.0219, B1 0, B2 0, B3 0, B4 0, B5 0, B6 0, B7 0, C1 0.000752, C2 (S1) 0.00146, C2 (S2) 0.00242, C3 (S1) 0.0144, C3 (S2) 0, C4 (S1) 0, C4 (S2) 0.044, D (S1) -0.0196, D (S2) -0.0129

## Outputs
- Gefährlicher Abfall zur Deponie (HWD) [kg]: A1-A3 0.00013452, A4 2.04e-5, A5 1.58e-8, B1 0, B2 0, B3 0, B4 0, B5 0, B6 0, B7 0, C1 9.43e-7, C2 (S1) 1.84e-6, C2 (S2) 3.04e-6, C3 (S1) 3.65e-6, C3 (S2) 0, C4 (S1) 0, C4 (S2) 4.95e-6, D (S1) -2.44e-5, D (S2) -2.38e-8
- Entsorgter nicht gefährlicher Abfall (NHWD) [kg]: A1-A3 13.8149, A4 0.0235, A5 0.0189, B1 0, B2 0, B3 0, B4 0, B5 0, B6 0, B7 0, C1 0.000906, C2 (S1) 0.00177, C2 (S2) 0.00292, C3 (S1) 0.0242, C3 (S2) 0, C4 (S1) 0, C4 (S2) 1000, D (S1) -40.5, D (S2) -0.0219
- Entsorgter radioaktiver Abfall (RWD) [kg]: A1-A3 0.0554918, A4 0.000636, A5 0.000116, B1 0, B2 0, B3 0, B4 0, B5 0, B6 0, B7 0, C1 9.93e-6, C2 (S1) 1.93e-5, C2 (S2) 3.19e-5, C3 (S1) 0.000496, C3 (S2) 0, C4 (S1) 0, C4 (S2) 0.00299, D (S1) -0.0062, D (S2) -0.00448
- Komponenten für die Wiederverwendung (CRU) [kg]: A1-A3 0, A4 0, A5 0, B1 0, B2 0, B3 0, B4 0, B5 0, B6 0, B7 0, C1 0, C2 (S1) 0, C2 (S2) 0, C3 (S1) 0, C3 (S2) 0, C4 (S1) 0, C4 (S2) 0, D (S1) 0, D (S2) 0
- Stoffe zum Recycling (MFR) [kg]: A1-A3 0, A4 0, A5 0, B1 0, B2 0, B3 0, B4 0, B5 0, B6 0, B7 0, C1 0, C2 (S1) 0, C2 (S2) 0, C3 (S1) 1000, C3 (S2) 0, C4 (S1) 0, C4 (S2) 0, D (S1) 0, D (S2) 0
- Stoffe für die Energierückgewinnung (MER) [kg]: A1-A3 0, A4 0, A5 0, B1 0, B2 0, B3 0, B4 0, B5 0, B6 0, B7 0, C1 0, C2 (S1) 0, C2 (S2) 0, C3 (S1) 0, C3 (S2) 0, C4 (S1) 0, C4 (S2) 0, D (S1) 0, D (S2) 0
- Exportierte elektrische Energie (EEE) [MJ]: A1-A3 0, A4 0, A5 0, B1 0, B2 0, B3 0, B4 0, B5 0, B6 0, B7 0, C1 0, C2 (S1) 0, C2 (S2) 0, C3 (S1) 0, C3 (S2) 0, C4 (S1) 0, C4 (S2) 0, D (S1) 0, D (S2) 0
- Exportierte thermische Energie (EET) [MJ]: A1-A3 0, A4 0, A5 0, B1 0, B2 0, B3 0, B4 0, B5 0, B6 0, B7 0, C1 0, C2 (S1) 0, C2 (S2) 0, C3 (S1) 0, C3 (S2) 0, C4 (S1) 0, C4 (S2) 0, D (S1) 0, D (S2) 0

## Impact indicators
- Globales Erwärmungspotenzial (GWP) [kg CO_(2)-Äq.]: A1-A3 255.549, A4 12.5, A5 9.28, B1 0, B2 0, B3 0, B4 0, B5 0, B6 0, B7 0, C1 0.539, C2 (S1) 1.04, C2 (S2) 1.72, C3 (S1) 2.63, C3 (S2) 0, C4 (S1) 0, C4 (S2) 16.1, D (S1) -6.12, D (S2) -3.66
- Abbau Potential der stratosphärischen Ozonschicht (ODP) [kg CFC11-Äq.]: A1-A3 3.41093e-9, A4 4.65e-11, A5 3e-11, B1 0, B2 0, B3 0, B4 0, B5 0, B6 0, B7 0, C1 1.11e-12, C2 (S1) 2.17e-12, C2 (S2) 3.58e-12, C3 (S1) 2.73e-11, C3 (S2) 0, C4 (S1) 0, C4 (S2) 1.58e-10, D (S1) -1.33e-9, D (S2) -1.21e-9
- Versauerungspotenzial von Boden und Wasser (AP) [kg SO_(2)-Äq.]: A1-A3 0.887884, A4 0.0455, A5 0.000916, B1 0, B2 0, B3 0, B4 0, B5 0, B6 0, B7 0, C1 0.002, C2 (S1) 0.00242, C2 (S2) 0.004, C3 (S1) 0.0182, C3 (S2) 0, C4 (S1) 0, C4 (S2) 0.0962, D (S1) -0.0175, D (S2) -0.00581
- Eutrophierungspotenzial (EP) [kg PO_(4)^(3)-Äq.]: A1-A3 0.0578065, A4 0.00868, A5 0.000191, B1 0, B2 0, B3 0, B4 0, B5 0, B6 0, B7 0, C1 0.00049, C2 (S1) 0.000604, C2 (S2) 0.000998, C3 (S1) 0.00439, C3 (S2) 0, C4 (S1) 0, C4 (S2) 0.0131, D (S1) -0.00299, D (S2) -0.000588
- Bildungspotential für troposphärisches Ozon (POCP) [kg Ethen-Äq.]: A1-A3 0.0537391, A4 -0.00721, A5 6.48e-5, B1 0, B2 0, B3 0, B4 0, B5 0, B6 0, B7 0, C1 0.000235, C2 (S1) -0.000761, C2 (S2) -0.00126, C3 (S1) 0.00265, C3 (S2) 0, C4 (S1) 0, C4 (S2) 0.00925, D (S1) -0.00197, D (S2) -0.000617
- Potenzial für den abiotischen Abbau nicht fossiler Ressourcen (ADPE) [kg Sb-Äq.]: A1-A3 0.000291592, A4 1.05e-6, A5 7.7e-8, B1 0, B2 0, B3 0, B4 0, B5 0, B6 0, B7 0, C1 4.07e-8, C2 (S1) 7.92e-8, C2 (S2) 1.31e-7, C3 (S1) 4.68e-6, C3 (S2) 0, C4 (S1) 0, C4 (S2) 5.55e-6, D (S1) -1.19e-6, D (S2) -6.25e-7
- Potenzial für den abiotischen Abbau fossiler Brennstoffe (ADPF) [MJ]: A1-A3 3697.99, A4 168, A5 1.71, B1 0, B2 0, B3 0, B4 0, B5 0, B6 0, B7 0, C1 7.31, C2 (S1) 14.2, C2 (S2) 23.5, C3 (S1) 49.9, C3 (S2) 0, C4 (S1) 0, C4 (S2) 209, D (S1) -79.6, D (S2) -50.3

## Use advice
Gültigkeitsbereich:
Dieses Dokument bezieht sich auf Vormauerziegel, Pflasterziegel und Riemchen der "Bauen mit Backstein Zweischalige Wand Marketing e.V." Für diese Deklaration wurden von 12 Mitgliedsunternehmen Daten aus dem Jahr 2014 zur Verfügung gestellt. Die beteiligten Firmen repräsentieren nach Anzahl 90 % der Mitgliedsfirmen der in der Zweischaligen Wand zusammengeschlossenen Hersteller von Vormauerziegeln, Pflasterziegeln und Riemchen. Das Produktionsvolumen dieser Firmen liegt bei etwa 95% des deutschen Marktes bezogen auf die Produktionsmenge.

Diese EPD ist eine Verlängerung der EPD EPD-ZWM-20160126-ICG1-DE ohne Neuberechnung.
Systemgrenze:
Typ der EPD: Wiege bis Bahre.

Die Ökobilanz berücksichtigt die Rohstoffgewinnung, die Rohstofftransporte und die eigentliche

Produktherstellung inklusive der Verpackungsmaterialien (Module A1-A3).
Der Transport zur Baustelle (Modul A4) sowie die Behandlung der Verpackungsmaterialien in Müllverbrennungsanlagen nach dem Einbau des Produktes (Modul A5) sind ebenfalls Teil der Studie.

Nach Ablauf der Nutzungsdauer wird das Produkt rückgebaut (Modul C1) und zum Recycling oder zur Entsorgung transportiert (C2).
In dieser EPD werden zwei Szenarien für das Lebensende deklariert:
- EoL-Szenario 1 bezieht sich auf die stoffliche Verwertung als Gesteinskörnung in der Bauindustrie (C3).
- EoL-Szenario 2 beschreibt die Entsorgung auf einer Bauschuttdeponie (C4).
Beide Szenarien werden für 1 t Ziegel deklariert (100%).
Gutschriften infolge des Recyclings von Tonziegeln sind in Modul D deklariert. Gutschriften für Strom und thermische Energie infolge der thermischen Verwertung der Verpackung innerhalb des Moduls A5 werden ebenfalls in Modul D berücksichtigt.
Das Nutzungsstadium (Modul B1-B5) wird in dieser Studie berücksichtigt. Es entstehen keine Umweltauswirkungen in diesen Modulen. Da sich die Module B6 und B7 auf den Betrieb des Gebäudes beziehen und die Nutzung des Produkts in keinem Zusammenhang mit dem betrieblichen Energieeinsatz und Wassereinsatz im Gebäude steht, sind diese Module nicht relevant für das deklarierte Produkt und haben damit keine Umweltauswirkungen.

## Data sources
- GaBi Database (all versions)
- GaBi database SP28 2015
