# Edelstahl Trinkwasserrohr; Stainless steel pipe

Dataset: ILCD process, EPD, generic dataset
Geography: DE
Reference year: 2018
Valid until: 2022
Classification: oekobau.dat: Metalle / Edelstahl / Edelstahl Trinkwasserrohre
Owner: thinkstep
Compliance: DIN EN 15804
Review: Dependent internal review by thinkstep, IABP-GaBi, IBP-GaBi; Independent external review by GaBi user forum, GaBi bug forum, GaBi user community
Amounts: rows without a unit in brackets have none in this file; such an amount is in the reference unit of its flow, which a separate flow dataset defines
copyright: true

## General comment
Dieser Datensatz wurde nach dem European Standard EN 15804 für Nachhaltiges Bauen modelliert. Ergebnisse werden in Modulen abgebildet, die den strukturierten Ausdruck von Ergebnissen über den gesamten Lebenszyklus zulassen.

## Geography
Der Datensatz bildet die länderspezifische Situation in Deutschland ab. Dabei werden Haupttechnologien, spezifische regionale Charakteristiken und ggf. Importstatistiken berücksichtigt.

## Time period
Jährlicher Durchschnitt

## Technology and included processes
Der Datensatz wird die Herstellung einer Trinkwasserleitung aus rostfreiem Stahl (kaltgewalzt). Dabei wird das Verfahren zum Biegen des Stahlblechs, die Herstellung der Schweißnaht sowie alle notwendigen Materialien sowie der gesamte Energieaufwand berücksichtigt. Transporte von der Fabrik zur Baustelle werden nicht berücksichtigt und müssen entsprechend den Systemgrenzen einbezogen werden.
Der Hauptverfahrensschritt ist hierbei die Schmelzung von Edelstahlschrott im Elektrolichtbogenofen (EAF), folglich besteht der Energieverbrauch hauptsächlich aus elektrischer Leistung/Energie. Das Hauptausgangsmaterial für die Lichtbögenöfen ist Eisenmetallschrott, der den Schrott innerhalb der Stahlwerke (z. B. Ausschuss), Ausschuss von Stahlproduktherstellern (z. B. Fahrzeugbauer) und Verbraucherschrott (z. B. Altprodukte/End-of-Life-Produkte) einschließt. Wie in dem integrierten Hütten-/Stahlwerk inklusive Hochöfen und Konvertern, wird Schlacke aus Kalk gebildet, um unerwünschte Komponenten im Stahl zu sammeln. Dementsprechend ist Kalk ein Zusatzstoff, ebenso wie Kohle (Kohlenstoff) ein Reduktionsmittel ist. Sauerstofflanzen und/oder Sauerstoffbrenner werden zur Unterstützung in frühen Stadien des Schmelzens verwendet. Für jede Metallfraktion wird der Transport im Datensatz berücksichtigt. Für die Herstellung von Karbonstahl und niedriglegierten Stahlen werden die folgenden Operationen durchgeführt: Rohmaterial-Verarbeitung und -Lagerung, Hochofenbeschickung mit/ohne Schrottvorwärmung, Schrott-Einschmelzung im Lichtbogenofen, Stahl- und Schlacken-Abstechen, Stahlbehandlung zur Qualitätsanpassung, Schlacketransporte und schließlich Strangguss. Für hochlegierte bzw. rostfreie Stähle ist die Arbeitsfolge komplexer und für Endprodukte maßgeschneidert. Zusätzlich zu den genannten Operationen für Kohlenstoffstähle werden verschiedene Pfannenbehandlungen (Sekundärmetallurgie) wie Entschwefelung, Entgasen zur Entfernung von gelösten Gasen wie Stickstoff und Wasserstoff, Entkohlung (AOD = Argon-Sauerstoff-Entkohlung oder VOD = Vakuum-Sauerstoff-Entkohlung) ausgeführt. Die folgenden Funktionen sind zwei Walzverfahren: das Warmbandwalzwerk und das Kaltwalzwerk. Im Warmwalzwerk wird die Platte oberhalb der Rekristallisationstemperatur verformt. Die in diesem Verfahren erhaltenen Eigenschaften sind z.B. Festigkeit und Oberflächenqualität. Während des Walzprozesses durchläuft das Material durch Ofen und die Walzlinie. Im Ofen wird das Metall durch Erdgas vorgewärmt. Es besteht keine Notwendigkeit für eine zusätzliche Erwärmung, wenn die heißen Platten direkt in das Walzwerk geladen werden. Das Formen läuft in verschiedenen Walzrahmen ab, bis die endgültige Form erhalten wird. Der Stahlschrott in diesem Prozess wird direkt recycelt. Im Kaltwalzwerk wird das Material unterhalb der Rekristallisationstemperatur verformt. Dadurch werden eine verbesserte Oberflächenqualität, eine verbesserte Maßgenauigkeit sowie eine höhere Festigkeit erzielt. Die verschiedenen Verfahrensschritte sind: Beizen, die Walzlinie und Wärmebehandlung.

Es wurde davon ausgegangen, dass große Geräte wie Heizkessel, Klima- und Lüftungsanlagen oder Fahrstühle zu 95% einem Recycling zugeführt werden. Für Rohre oder Kabel, die oft unterputzt sind wurde eine Recyclingrate von 90% angenommen. Die Recyclingquoten beziehen sich ausschließlich auf Metalle und Kunststoffe. Für mineralische Materialien wie Mineralwolle, Beton oder Keramik wurde eine Ablagerung auf einer Inertstoffdeponie angenommen. Es wurde angenommen das der Anteil an Metallen und Kunststoffen, der nicht einem Recycling zugeführt wird (5-10%) ebenfalls auf einer Inertstoffdeponie entsorgt wird (z.B. Kabelreste oder Rohrstücke im Bauschutt). Für die Kunststoffe wird davon ausgegangen, dass aufgrund der oft langen Lebensdauer und den verbundenen Verunreinigung nicht von einer stofflichen Verwertung ausgegangen werden kann und daher die Kunststoffe einer energetischen Verwertung in Müllverbrennungsanlagen (MVA) zugeführt werden. Für die Müllverbrennung wurde ein MVA-Modell mit durchschnittlichen europäischen Emissionswerten und Energieproduktion verwendet. In Abhängigkeit des zu verbrennenden Kunststoffes wurden unterschiedliche Prozesse mit den entsprechenden Elementarzusammensetzungen verwendet. Die Datensätze wurden in Zusammenarbeit mit der Confederation of European Waste-to-Energy Plants (CEWEP) erstellt und sind auf der Homepage der European Platform on LCA [EC 2008] verfügbar. Der aus der Kunststoffverbrennung erzeugte Strom sowie die erzeugte thermische Energie wurden mit dem europäischen Strom-bzw. Wärmemix gutgeschrieben. Die Gutschriften für das Recycling von Metallen oder der energetischen Verwertung von Kunststoffen, sowie die mit der Verwertung verbundenen Emissionen und Ressourcenverbräuche (Energie für Einschmelzen, Verbrennungsemissionen, Deponie) sind in den Datensätzen enthalten. Bei Materialen aus Eisen (Stahlbleche, Rohre, Grauguss) werden bei der Herstellung der Materialien bereits unterschiedliche Mengen an Stahlschrott eingesetzt. Diese Mengen wurden der recycelten Stahlmenge vor Zuführung in die Einschmelzung abgezogen, um keine Überwertung der Gutschriften zu erzeugen. Die Gutschrift wurde dann entsprechend mit primärem Stahl durchgeführt. Gutschriften für das Recycling von seltenen Erden oder Quecksilberemissionen aus Leuchtstofflampen konnten wegen fehlenden Daten nicht berücksichtigt werden. Es wurde davon ausgegangen, dass große Geräte wie Heizkessel, Klima- und Lüftungsanlagen oder Fahrstühle zu 95% einem Recycling zugeführt werden. Für Rohre oder Kabel, die oft unterputzt sind wurde eine Recyclingrate von 90% angenommen. Die Recyclingquoten beziehen sich ausschließlich auf Metalle und Kunststoffe. Für mineralische Materialien wie Mineralwolle, Beton oder Keramik wurde eine Ablagerung auf einer Inertstoffdeponie angenommen. Es wurde angenommen das der Anteil an Metallen und Kunststoffen, der nicht einem Recycling zugeführt wird (5-10%) ebenfalls auf einer Inertstoffdeponie entsorgt wird (z. B. Kabelreste oder Rohrstücke im Bauschutt). Für die Kunststoffe wird davon ausgegangen, dass aufgrund der oft langen Lebensdauer und den verbundenen Verunreinigung nicht von einer stofflichen Verwertung ausgegangen werden kann und daher die Kunststoffe einer energetischen Verwertung in Müllverbrennungsanlagen (MVA) zugeführt werden. Für die Müllverbrennung wurde ein MVA-Modell mit durchschnittlichen europäischen Emissionswerten und Energieproduktion verwendet. In Abhängigkeit des zu verbrennenden Kunststoffes wurden unterschiedliche Prozesse mit den entsprechenden Elementarzusammensetzungen verwendet. Die Datensätze wurden in Zusammenarbeit mit der Confederation of European Waste-to-Energy Plants (CEWEP) erstellt und sind auf der Homepage der European Platform on LCA [EC 2008] verfügbar. Der aus der Kunststoffverbrennung erzeugte Strom sowie die erzeugte thermische Energie wurden mit dem europäischen Strom-bzw. Wärmemix gutgeschrieben. Die Gutschriften für das Recycling von Metallen oder der energetischen Verwertung von Kunststoffen, sowie die mit der Verwertung verbundenen Emissionen und Ressourcenverbräuche (Energie für Einschmelzen, Verbrennungsemissionen, Deponie) sind in den Datensätzen enthalten. Bei Materialen aus Eisen (Stahlbleche, Rohre, Grauguss) werden bei der Herstellung der Materialien bereits unterschiedliche Mengen an Stahlschrott eingesetzt. Diese Mengen wurden der recycelten Stahlmenge vor Zuführung in die Einschmelzung abgezogen, um keine Überwertung der Gutschriften zu erzeugen. Die Gutschrift wurde dann entsprechend mit primärem Stahl durchgeführt. Gutschriften für das Recycling von seltenen Erden oder Quecksilberemissionen aus Leuchtstofflampen konnten wegen fehlenden Daten nicht berücksichtigt werden.

Hintergrundsystem:
Strom: Die Stromerzeugung wird entsprechend der länderspezifischen Randbedingungen modelliert. Die landesspezifische Analyse beinhaltet:
1.: Spezifische Kraftwerke der verschiedenen fossilen Energieträger und der Einsatz erneuerbarer Energien sind entsprechend der länderspezifischen Energieträgermixe modelliert. Die Analyse bezieht Stromimporte aus den Nachbarländern, Transmissions-und Verteilungsverluste und den Eigenverbrauch im Kraftwerk und bei der Verteilung bzw. Speicherung, z. B. durch Pumpspeicherwerke, ein.
2.: Die landes-/regionalspezifischen Technologiestandards sowie die Erzeugung in Elektrizitätskraftwerken und/oder in speziellen Kraftwerken mit Kraft-Wärme-Kopplung (KWK) sind berücksichtigt.
3.: Die länderspezifische Energieträgerbereitstellung (mit Anteil der Importe und/oder Eigenversorgung) einschließlich der Energieträger-Eigenschaften (z. B. Elementar- und Energiegehalte) werden berücksichtigt.
4.: Die Förderung, Produktion, Verarbeitung und Transportprozesse werden entsprechend der Situation im jeweiligen Stromerzeugerland modelliert. Die unterschiedlichen Produktions- und Verarbeitungsverfahren (Emissionen und Wirkungsgrade) in den verschiedenen Energieerzeugerländern werden einbezogen, z. B. Rohöl-Veredelungsverfahren oder Abfackel-Raten an den Ölplattformen.
Thermische Energie, Prozessdampf: Die Erzeugung von Dampf und thermischer Energie in Heizkraftwerken wird entsprechend der landesspezifischen Situation (Emissionsgrenzwerte, Energieträgerbasis) modelliert.
Der Wirkungsgrad für die thermische Energieerzeugung beträgt per Definition 100% des Energieträgereinsatzes. Für Prozessdampf liegt der Wirkungsgrad im Bereich von 85-95%. Die zur Heizenergie-Erzeugung verwendeten Energieträger werden entsprechend der nationalen Situation modelliert (siehe Kapitel Strom oben).
Transporte: Alle relevanten und bekannten Transportprozesse in Form von See- und Binnenschiffsverkehr sowie Bahn-, Lkw- und der Leitungstransport sind enthalten.
Energieträger: Die Energieträger werden entsprechend der spezifischen Versorgungslage modelliert (siehe Kapitel Strom oben).
Raffinerieprodukte: Diesel, Benzin, technische Gase, Heizöl, Schmierstoffe und Rückstände, wie Bitumen, werden mit einem parametrierten länderspezifische Raffineriemodell modelliert. Das Raffinerie-Modell bezieht die länderspezifischen Veredelungsverfahren (z. B. Emissionspegel, interner Energieverbrauch etc.) und das länderspezifische Produktspektrum ein, das sich je nach Land stark unterscheiden kann. Die Rohöl-Förderung wird gemäß der länderspezifischen Situation mit den jeweiligen Energieträger-Eigenschaften modelliert.
"

## Technical purpose
Dieses Produkt kann im Baubereich verwendet werden.

## Safety margin
10 %. Produktsystem weitgehend vollständig abgebildet. Gute technologische, zeitliche und geographische Repräsentativität.

## Reference product
- Stahlrohr: 1

## Inputs
- Erneuerbare Primärenergie als Energieträger (PERE) [MJ]: A1-A3 9.48788, C1 0, C2 0.0019976, D -3.09261
- Erneuerbare Primärenergie zur stofflichen Nutzung (PERM) [MJ]: A1-A3 0, C1 0, C2 0, D 0
- Total erneuerbare Primärenergie (PERT) [MJ]: A1-A3 9.48788, C1 0, C2 0.0019976, D -3.09261
- Nicht-erneuerbare Primärenergie als Energieträger (PENRE) [MJ]: A1-A3 45.4959, C1 0, C2 0.0343136, D -15.562
- Nicht-erneuerbare Primärenergie zur stofflichen Nutzung (PENRM) [MJ]: A1-A3 0, C1 0, C2 0, D 0
- Total nicht erneuerbare Primärenergie (PENRT) [MJ]: A1-A3 45.4959, C1 0, C2 0.0343136, D -15.562
- Einsatz von Sekundärstoffen (SM) [kg]: A1-A3 0.854966, C1 0, C2 0, D 0
- Erneuerbare Sekundärbrennstoffe (RSF) [MJ]: A1-A3 0, C1 0, C2 0, D 0
- Nicht erneuerbare Sekundärbrennstoffe (NRSF) [MJ]: A1-A3 0, C1 0, C2 0, D 0
- Einsatz von Süßwasserressourcen (FW) [m3]: A1-A3 0.0213028, C1 0, C2 1.78902e-6, D -0.0199985

## Outputs
- Gefährlicher Abfall zur Deponie (HWD) [kg]: A1-A3 1.11485e-7, C1 0, C2 1.28226e-9, D -9.68205e-8
- Entsorgter nicht gefährlicher Abfall (NHWD) [kg]: A1-A3 0.489991, C1 0, C2 6.02263e-6, D -0.11192
- Entsorgter radioaktiver Abfall (RWD) [kg]: A1-A3 0.0011273, C1 0, C2 3.61252e-8, D -6.39521e-5
- Komponenten für die Wiederverwendung (CRU) [kg]: A1-A3 0, C1 0, C2 0, D 0
- Stoffe zum Recycling (MFR) [kg]: A1-A3 0, C1 1.1, C2 0, D 0
- Stoffe für die Energierückgewinnung (MER) [kg]: A1-A3 0, C1 0, C2 0, D 0
- Exportierte elektrische Energie (EEE) [MJ]: A1-A3 0, C1 0, C2 0, D 0
- Exportierte thermische Energie (EET) [MJ]: A1-A3 0, C1 0, C2 0, D 0

## Impact indicators
- Globales Erwärmungspotenzial (GWP) [kg CO2 Äquiv.]: A1-A3 3.55922, C1 0, C2 0.00255297, D -1.26901
- Abbaupotenzial der stratosphärischen Ozonschicht (ODP) [kg R11 Äquiv.]: A1-A3 4.11151e-14, C1 0, C2 8.45044e-19, D -3.11714e-15
- Versauerungspotential (AP) [kg SO2 Äquiv.]: A1-A3 0.0209944, C1 0, C2 5.15673e-6, D -0.00480993
- Eutrophierungspotential (EP) [kg Phosphat Äquiv.]: A1-A3 0.00102931, C1 0, C2 1.2259e-6, D -0.000327479
- Bildungspotenzial für troposphärisches Ozon (POCP) [kg Ethen Äquiv.]: A1-A3 0.0010557, C1 0, C2 -1.6854e-6, D -0.00030828
- Potenzial für den abiotischen Abbau nicht fossiler Ressourcen (ADPE) [kg Sb Äquiv.]: A1-A3 0.000151819, C1 0, C2 2.14835e-10, D -3.92219e-5
- Potenzial für den abiotischen Abbau fossiler Brennstoffe (ADPF) [MJ]: A1-A3 42.6357, C1 0, C2 0.0342213, D -15.3927

## Use advice
Der Datensatz repräsentiert ein Cradle to Gate Inventar. Er kann verwendet werden, um die Lieferkette des jeweiligen Produktes in einer repräsentativen Weise zu charakterisieren. Die Kombination mit einzelnen Einheitenprozessen und diesem Produkt ermöglicht die Erstellung von anwenderspezifischen (Produkt-) LCAs.

## Data sources
- GaBi Database Edition 2020, SP40
- GaBi database (all versions)
