# StoVentec R

Dataset: ILCD process, EPD, average dataset
Geography: RER
Reference year: 2021
Valid until: 2025
Classification: OEKOBAU.DAT: Komposite / Systembauteile / Aussenwände
Classification: IBUCategories: 02 Bauprodukte / Fassaden / Vorhangfassaden
Method details: Vorhangfassaden.pdf
Generated by: Sphera Solutions GmbH
Registration number: EPD-STO-20200207-CBD1-DE
Owner: Sto SE & Co. KGaA
Compliance: DIN EN 15804; ISO 14025
Review: Accredited third party review by Institut Bauen und Umwelt e. V.
Amounts: rows without a unit in brackets have none in this file; such an amount is in the reference unit of its flow, which a separate flow dataset defines
copyright: true
licenseType: Free of charge for all users and uses
accessRestrictions: None

## General comment
Sto SE & Co. KGaA ist ein international führender Hersteller von Produkten und Systemen für Gebäudebeschichtungen mit mehr als 5.500 Mitarbeitern. Der Umsatz 2019 betrug 1,39 Milliarden Euro. Zum Kernsortiment gehören Fassadensysteme in Form von Wärmedämm-Verbundsystemen (WDVS) sowie vorgehängten hinterlüfteten Fassadensystemen (VHF). Sto Scandinavia AB operiert in Nordeuropa (Schweden, Norwegen, Dänemark und Finnland) als vollständige Tochtergesellschaft von Sto SE & Co KGaA. Die geschäftlichen Aktivitäten umfassen die Entwicklung, Produktion und Vermarktung sowie den Vertrieb von Produkten, Systemen und Lösungen für Fassaden, Beton, Innenräume und Böden. Produktbeschreibung/Produktdefinition

StoVentec R ist eine hinterlüftete Vorhangfassade mit fugenloser Putzoberfläche, die die Wände atmen lässt und Unebenheiten des Untergrunds ausgleicht.

StoVentec R kann auf verschiedenen Unterkonstruktionen montiert werden. Die Unterkonstruktion sowie die Dämmung werden in dieser Deklaration nicht berücksichtigt. Die Deklaration umfasst die folgenden Komponenten. Dabei können die speziellen (Sto-)Produkte einiger Komponenten variieren:

StoVentec R organisch:

- StoVentec Trägerplatte/StoVentec Trägerplatte A

- Befestigungsschrauben für StoVentec Trägerplatte
(Verwendung für diese EPD: StoVentec Schraube/
Sto-Fassadenschraube)

- Unterputz
(Verwendung für diese EPD: StoArmat Classic Plus)

- Komprimiertes Dichtband aus imprägniertem Weichschaum (Verwendung für diese EPD:
StoVentec Dichtband 10/3-7)

- Schutzprofil für Abschlusskanten der Putzträgerplatte (Verwendung für diese EPD:
Sto-Kantenschutzprofil G)

- Abschlussprofil mit Tropfkante
(Verwendung für diese EPD: Sto-Regenabweisprofil G)

- Kantenprofil mit integriertem Glasfasergewebe
(Verwendung für diese EPD:
Sto-Gewebewinkel Standard 11/13 cm)

- Alkalibeständiges Armierungsgewebe
(Verwendung für diese EPD: Sto-Glasfasergewebe F)

- Schlussbeschichtung (Verwendung für diese EPD: StoLotusan K)

StoVentec R mineralisch:

- StoVentec Trägerplatte/StoVentec Trägerplatte A

- Befestigungsschrauben für StoVentec Trägerplatte
(Verwendung für diese EPD: StoVentec Schraube/
Sto-Schraube)

- Grundbeschichtung
(Verwendung für diese EPD: Sto-Putzgrund)

- Unterputz (Verwendung für diese EPD: StoLevell Evo)

- Komprimiertes Dichtband aus imprägniertem Weichschaum (Verwendung für diese EPD:
StoVentec Dichtband 10/3-7)

- Schutzprofil für Abschlusskanten der Putzträgerplatte (Verwendung für diese EPD:
Sto-Kantenschutzprofil G)

- Abschlussprofil mit Tropfkante
(Verwendung für diese EPD: Sto-Regenabweisprofil G)

- Kantenprofil mit integriertem Glasfasergewebe
(Verwendung für diese EPD:
Sto-Gewebewinkel Standard 11/13 cm)

- Alkalibeständiges Armierungsgewebe
(Verwendung für diese EPD: Sto-Glasfasergewebe)

- Zwischenbeschichtung
(Verwendung: StoPrep Miral)

- Schlussbeschichtung (Verwendung für diese EPD: StoLotusan K)

Für das Inverkehrbringen des Produkts in der EU/EFTA (mit Ausnahme der Schweiz) gilt die Verordnung (EU) Nr. 305/2011 (CPR).

Das Produkt benötigt eine Leistungserklärung unter Berücksichtigung der Europäischen Technischen Zulassung Nr. ETA-17/0406, Datum: 13.6.2017, Titel: StoVentec R, und die CE-Kennzeichnung.

Für die Verarbeitung und Verwendung gelten die jeweiligen nationalen Bestimmungen.

## Technology and included processes
This dataset represents one squaremeter (1 m²) StoVentec R ventilated facade system (13,287 kg/m²), based on organic plasters. The composition of the system is: Carrier Board (StoVentec Carrier Board): 6,000 kg/m2 (1 pc/m2) Fixing screws (Stainless steel screws): 0,049 kg/m2 (12 pc/m2) Basecoat (StoArmat Classic Plus): 4,500 kg/m2 Compressed sealing tape made of impregnated flexible foam (StoVentec Waterproofing Joint 10/3-7): 0,005 kg/m2 Protective profile for the outer edges of the render carrier board (Sto-Edge Protection Profile G): 0,058 kg/m2 Profile with drip edge (Sto-Rain Guard Profile G): 0,063 kg/m2 Edge profile with integrated glass fibre mesh (Sto-Mesh Angle Bead Standard 11/3 cm): 0,040 kg/m2 Alkali-resistant reinforcing mesh (Glass Reinforcement mesh): 0,174 kg/m2 Finish (StoLotusan K): 2,400 kg/m2 For further details, and LCA results for a mineral based ventilated facade system, see the EPD document and it´s public annexe.
Deklarierte Einheit:
Die Deklaration bezieht sich auf 1 m² Fassadensystem StoVentec R (1) mit einer Oberflächenmasse von 13,287 kg/m² und einer Dicke von 16 mm.

Die Deklaration bezieht sich auf 1 m² Fassadensystem StoVentec R (2) (siehe öffentlicher Anhang der EPD) mit einer Oberflächenmasse von 19,504 kg/m² und einer Dicke von 20 mm.

## Technical purpose
Das deklarierte Produkt StoVentec R wird als fugenloses Putzsystem mit vorgehängter hinterlüfteter Fassade (VHF) verwendet. Für die Verarbeitung und Anwendung gelten die jeweiligen nationalen Bestimmungen. In Deutschland ist dies beispielsweise die Allgemeine bauaufsichtliche Zulassung Z-10.3-717 des Deutschen Instituts für Bautechnik (DiBt), Berlin.

## Reference product
- StoVentec R: 1

## Inputs
- Erneuerbare Primärenergie als Energieträger (PERE) [MJ]: A1-A3 34.497, A4 0.0694, A5 7.66, C1 0, C2 0.0347, C4 1.13, D -2.95
- Erneuerbare Primärenergie zur stofflichen Nutzung (PERM) [MJ]: A1-A3 8.173, A4 0, A5 -7.39, C1 0, C2 0, C4 -0.786, D 0
- Total erneuerbare Primärenergie (PERT) [MJ]: A1-A3 42.667, A4 0.0694, A5 0.272, C1 0, C2 0.0347, C4 0.346, D -2.95
- Nicht-erneuerbare Primärenergie als Energieträger (PENRE) [MJ]: A1-A3 270.1, A4 1.24, A5 9.5, C1 0, C2 0.618, C4 24.1, D -13.5
- Nicht-erneuerbare Primärenergie zur stofflichen Nutzung (PENRM) [MJ]: A1-A3 30.19, A4 0, A5 -8.69, C1 0, C2 0, C4 -21.5, D 0
- Total nicht erneuerbare Primärenergie (PENRT) [MJ]: A1-A3 300.8, A4 1.24, A5 0.809, C1 0, C2 0.618, C4 2.64, D -13.5
- Einsatz von Sekundärstoffen (SM) [kg]: A1-A3 5.11, A4 0, A5 0, C1 0, C2 0, C4 0, D 0
- Erneuerbare Sekundärbrennstoffe (RSF) [MJ]: A1-A3 0, A4 0, A5 0, C1 0, C2 0, C4 0, D 0
- Nicht erneuerbare Sekundärbrennstoffe (NRSF) [MJ]: A1-A3 0, A4 0, A5 0, C1 0, C2 0, C4 0, D 0
- Einsatz von Süßwasserressourcen (FW) [m^3]: A1-A3 0.05826, A4 8.04e-5, A5 0.00453, C1 0, C2 4.02e-5, C4 0.000665, D -0.0049

## Outputs
- Gefährlicher Abfall zur Deponie (HWD) [kg]: A1-A3 1.4385e-6, A4 5.75e-8, A5 4.28e-10, C1 0, C2 2.88e-8, C4 4.02e-8, D -1.21e-5
- Entsorgter nicht gefährlicher Abfall (NHWD) [kg]: A1-A3 1.00036, A4 0.000189, A5 0.0115, C1 0, C2 9.46e-5, C4 13.3, D -0.0059
- Entsorgter radioaktiver Abfall (RWD) [kg]: A1-A3 0.0055413, A4 1.53e-6, A5 9.1e-5, C1 0, C2 7.65e-7, C4 3e-5, D -0.000927
- Komponenten für die Wiederverwendung (CRU) [kg]: A1-A3 0, A4 0, A5 0, C1 0, C2 0, C4 0, D 0
- Stoffe zum Recycling (MFR) [kg]: A1-A3 0, A4 0, A5 0, C1 0.0113, C2 0, C4 0, D 0
- Stoffe für die Energierückgewinnung (MER) [kg]: A1-A3 0, A4 0, A5 0, C1 0, C2 0, C4 0, D 0
- Exportierte elektrische Energie (EEE) [MJ]: A1-A3 0, A4 0, A5 3.07, C1 0, C2 0, C4 0, D 0
- Exportierte thermische Energie (EET) [MJ]: A1-A3 0, A4 0, A5 5.49, C1 0, C2 0, C4 0, D 0

## Impact indicators
- Globales Erwärmungspotenzial (GWP) [kg CO_(2)-Äq.]: A1-A3 15.744, A4 0.091, A5 1.86, C1 0, C2 0.0455, C4 0.181, D -0.798
- Abbau Potential der stratosphärischen Ozonschicht (ODP) [kg CFC11-Äq.]: A1-A3 2.41272e-11, A4 1.49e-17, A5 1.04e-15, C1 0, C2 7.43e-18, C4 9.94e-16, D -1.02e-14
- Versauerungspotenzial von Boden und Wasser (AP) [kg SO_(2)-Äq.]: A1-A3 0.03094, A4 7.11e-5, A5 0.000201, C1 0, C2 3.55e-5, C4 0.00115, D -0.00134
- Eutrophierungspotenzial (EP) [kg PO_(4)^(3)-Äq.]: A1-A3 0.004645, A4 1.31e-5, A5 3.9e-5, C1 0, C2 6.54e-6, C4 0.000129, D -0.00014
- Bildungspotential für troposphärisches Ozon (POCP) [kg Ethen-Äq.]: A1-A3 0.00282422, A4 -3.22e-7, A5 1.75e-5, C1 0, C2 -1.61e-7, C4 8.71e-5, D -0.000111
- Potenzial für den abiotischen Abbau nicht fossiler Ressourcen (ADPE) [kg Sb-Äq.]: A1-A3 5.48751e-5, A4 6.66e-9, A5 1.14e-8, C1 0, C2 3.33e-9, C4 1.82e-8, D -3.36e-6
- Potenzial für den abiotischen Abbau fossiler Brennstoffe (ADPF) [MJ]: A1-A3 286.1, A4 1.23, A5 0.58, C1 0, C2 0.616, C4 2.56, D -11.1

## Use advice
Gültigkeitsbereich:
Diese Deklaration bezieht sich auf hinterlüftete Fassadensysteme StoVentec R ohne Unterkonstruktion und Dämmung. Es werden zwei Fassadenvarianten betrachtet:

- StoVentec R (1) auf organischem Unterputz, Deklaration im vorliegenden Dokument.

- StoVentec R (2) auf mineralischem Unterputz, Deklaration im öffentlichen Anhang zu dieser EPD.

Die Produktkomponenten werden von Sto SE & Co. KGaA (Standort in Stühlingen, Deutschland), Sto Scandinavia AB (Standort Linköping, Schweden) und externen Lieferanten hergestellt.
Systemgrenze:
Cradle to gate - mit Optionen.

Beschreibung der Systemgrenzen:

Modul A1 bis A3:

Dieses Modul berücksichtigt die Herstellung der Systemkomponenten (z. B. Trägerplatte, Befestigungen, Putz usw.), ihren Transport zur Baustelle in Schweden sowie die Herstellung/Zusammenstellung der Komponenten des Fassadensystems. Auch die Auswirkungen für die Herstellung des Verpackungsmaterials wurden berücksichtigt.

Modul A4:

Dieses Modul berücksichtigt eine Transportstrecke von 100 km per Lkw zur Baustelle. Die Transportstrecke kann projektspezifisch angepasst werden.

Modul A5:

Verwertung und Entsorgung des Verpackungsmaterials. Gutschriften für die potenzielle Vermeidung von Lasten für die Strom- und Wärmeenergieerzeugung werden im Modul D deklariert und betreffen nur den Anteil der neuen Materialien.

In A5 werden 10 % Überlappung mit Glasfasergewebe berücksichtigt (Herstellung der Überlappung im Rahmen des Moduls A1–A3, „Bausatz-Ansatz“).

Der Stromverbrauch für Bohrarbeiten und den Mörtelauftrag wird berücksichtigt.

Montageverluste wurden nicht berücksichtigt, da solche Verluste in hohem Maße von der jeweiligen Gebäudegeometrie und weiteren standortspezifischen Faktoren abhängig sind. Schätzwerte für Montageverluste können anhand der Ergebnisse aus der Ökobilanz für die Herstellung und Entsorgung beispielsweise mittels Skalierung bestimmt werden.

Modul C1 bis C4:

C1: Manueller Rückbau, keine Umweltlasten.

C2: 50 km Lkw-Transport zur Abfallaufbereitung (je nach Gebäude anpassbar).

C3: Keine zusätzliche Abfallbehandlung, keine Umweltlasten.

C4: Deklariert wird das europäische Szenario für durchschnittliche Emissionen bei der Deponierung.

Modul D:

Gutschriften und Lasten für Metallkomponenten und vermiedene Lasten aus der Verpackungsverwertung.

## Data sources
- GaBi Database (all versions)
- GaBi database SP38 2019
