# Automatische Schiebetüranlage ST FLEX Green

Dataset: ILCD process, EPD, representative dataset
Geography: DE
Reference year: 2016
Valid until: 2021
Classification: OEKOBAU.DAT: Komponenten von Fenstern und Vorhangfassaden / Antriebssysteme / elektrisch
Classification: IBUCategories: 02 Bauprodukte / Türen, Fenster, Beschläge und Zubehör / Automatiktüren und -tore, sowie Karusselltüranlagen
Method details: Automatiktüren und -tore, sowie Karusselltüranlagen.pdf
Owner: DORMA Deutschland GmbH
Compliance: DIN EN 15804; ISO 14025
Review: Accredited third party review by IBU
Amounts: rows without a unit in brackets have none in this file; such an amount is in the reference unit of its flow, which a separate flow dataset defines
copyright: true

## General comment
Die ST FLEX Green steht für eine automatische Schiebetüranlage von DORMA. Mit der Schiebetür ST FLEX Green unterstreicht DORMA seinen Beitrag für mehr Energieeffizienz und damit für mehr Nachhaltigkeit. Die automatische Schiebetür verfügt über ein schmales, thermisch getrenntes Profilsystem auf Basis des FLEX Profils. Das Ergebnis ist eine solide Wärmedämmung trotz unverändert schmaler Profilansicht. Die ST FLEX Green ermöglicht erhebliche Einsparungen von laufenden Energie- und Heizkosten und die Verringerung des C02-Ausstoßes. Um alle Bedingungen abdecken zu können, wird die ST FLEX Green mit verschiedenen ES 200 Antriebsvarianten angeboten.

## Technology and included processes
Die automatische Schiebetüranlage ST FLEX Green ist für Gebäudeabschlüsse im Außenbereich mit Fokus auf Energieeinsparung geeignet. Die vorliegende EPD weist eine zweiflügelige Variante aus, d. h. sie ist mit je zwei Fahrflügeln und zwei Seitenteilen bestückt. Weiterhin besteht die automatische Türanlage aus einem Schiebetürantrieb inkl. Sensorik, einer Steuerung und einem Akkupaket. Das „Green“ steht für ein schmales, thermisch getrenntes Profilsystem auf Basis des DORMA FLEX Profils. Die thermische Trennung im Profil ermöglicht eine erhöhte Wärmedämmung trotz unverändert schmaler Profilansicht. • Wärmedurchgangskoeffizient: UD-Werte von 1,4 bis max. 1,8 (belegt durch Prüfungen des ift Rosenheim) • Entspricht der aktuellen Energieeinsparverordnung EnEV 2009 • Individueller Nachweis des UD-Wertes für jede gelieferte ST FLEX Green-Anlage Die Fahrflügel und Seitenteile der ST FLEX Green werden im DORMA Werk Zusmarshausen hergestellt. Insbesondere elektronische Bauteile werden ebenfalls innerhalb der DORMA-Gruppe gefertigt. Die Antriebseinheit ES 200 Easy wird im Werk Ennepetal, die hierzu benötigten Leiterplatinen im Werk Bonn gefertigt. Das zertifizierte Qualitätsmanagementsystem nach DIN EN ISO 9001 sichert den hohen Qualitätsstandard der DORMA Produkte für alle Standorte ab.
Technische Daten:
Technische Daten der Antriebsysteme bezogen auf die ST FLEX Green Schiebetüranlagen:

Technische Daten der Fahrflügel und Seitenteile - Wärmedurchgangskoeffizienz (U-Wert) nach /DIN EN ISO 10077-1 /-2/:
Mehrscheiben-Isolierglas: 1,0 [W/m²K]
Wärmedurchgangskoeffizienz (U-Wert) für das automatische Schiebetürsystem mit den Abmessungen 6250 x 3305 mm: 1,4 [W/m²K]
Wärmedurchgangskoeffizienz (U-Wert) für das automatische Schiebetürsystem mit den Abmessungen 2100 x 2205 mm: 1,6 [W/m²K]
Deklarierte Einheit:
Die deklarierte Einheit ist ein Stück (1 Stk.) der automatischen Schiebetüranlage ST FLEX Green bestehend aus:
dem gemittelten Durchschnitt der Antriebseinheiten ES 200 Standard, ES 200 2 D, ES 200 EASY und EASYplus,
zwei Fahrflügeln,
zwei Seitenteilen und
den jeweiligen Verpackungsmaterialien.

Die Seitenteile sind nicht Teil der beweglichen Automatiktür, sondern Teil des Gesamtsystems der automatischen Türanlage und wurden in der deklarierten Einheit berücksichtigt.

## Technical purpose
Die automatische Schiebetüranlage ST FLEX Green kommt insbesondere dort zum Einsatz, wo Energieeinsparung während der Nutzungsdauer eine wichtige Bedeutung erhält. Jede Anlage wird für die individuellen Maße der unterschiedlichen Gebäude projektbezogen angefertigt. Die im Rahmen der EPD analysierten Antriebseinheiten ES200 Standard, ES 200 2 D, ES 200 EASY und ES 200 EASYplus sind für folgenden Einsatzzweck ausgelegt:

Details können den jeweiligen Produktkatalogen entnommen werden.

## Reference product
- ST FLEX Green: 1

## Inputs
- Erneuerbare Primärenergie als Energieträger (PERE) [MJ]: A1-A3 1890, A4 3.91, A5 0.271, B3 389, B6 4880, C2 0.302, C3 19.9, D -2020
- Erneuerbare Primärenergie zur stofflichen Nutzung (PERM) [MJ]: A1-A3 100, A4 6.01e-12, A5 1e-11, B3 13.5, B6 1.61e-7, C2 4.56e-13, C3 0.0801, D -0.0452
- Total erneuerbare Primärenergie (PERT) [MJ]: A1-A3 1990, A4 3.91, A5 0.271, B3 403, B6 4880, C2 0.302, C3 19.9, D -2020
- Nicht-erneuerbare Primärenergie als Energieträger (PENRE) [MJ]: A1-A3 13500, A4 68.9, A5 2.16, B3 2090, B6 17400, C2 5.33, C3 353, D -6710
- Nicht-erneuerbare Primärenergie zur stofflichen Nutzung (PENRM) [MJ]: A1-A3 138, A4 0, A5 0, B3 70.3, B6 0, C2 0, C3 0.0225, D -1.18e-5
- Total nicht erneuerbare Primärenergie (PENRT) [MJ]: A1-A3 13600, A4 68.9, A5 2.16, B3 2160, B6 17400, C2 5.33, C3 353, D -6710
- Einsatz von Sekundärstoffen (SM) [kg]: A1-A3 52.7, A4 0, A5 0, B3 0, B6 0, C2 0, C3 0, D 0
- Erneuerbare Sekundärbrennstoffe (RSF) [MJ]: A1-A3 0.0441, A4 0, A5 0, B3 0.00613, B6 0, C2 0, C3 0, D 0.117
- Nicht erneuerbare Sekundärbrennstoffe (NRSF) [MJ]: A1-A3 0.394, A4 0, A5 0, B3 0.0294, B6 0, C2 0, C3 0, D 1.24
- Einsatz von Süßwasserressourcen (FW) [m^3]: A1-A3 4300, A4 0.31, A5 0.196, B3 782, B6 3440, C2 0.0239, C3 22.2, D -5050

## Outputs
- Gefährlicher Abfall zur Deponie (HWD) [kg]: A1-A3 0.0912, A4 0, A5 0, B3 0.0597, B6 0, C2 0, C3 0.0898, D 0
- Entsorgter nicht gefährlicher Abfall (NHWD) [kg]: A1-A3 1700, A4 0.271, A5 0.443, B3 500, B6 4240, C2 0.0207, C3 47.7, D -1030
- Entsorgter radioaktiver Abfall (RWD) [kg]: A1-A3 0.596, A4 9.84e-5, A5 0.000128, B3 0.109, B6 2.63, C2 7.62e-6, C3 0.0115, D -0.323
- Komponenten für die Wiederverwendung (CRU) [kg]: A1-A3 0, A4 0, A5 0, B3 0, B6 0, C2 0, C3 0, D 0
- Stoffe zum Recycling (MFR) [kg]: A1-A3 12.1, A4 0, A5 0, B3 8.86, B6 0, C2 0, C3 274, D 0
- Stoffe für die Energierückgewinnung (MER) [kg]: A1-A3 2.64, A4 0, A5 4.86, B3 9.32, B6 0, C2 0, C3 13.4, D 0
- Exportierte elektrische Energie (EEE) [MJ]: A1-A3 3.34, A4 0, A5 9.29, B3 10, B6 0, C2 0, C3 39.6, D 0
- Exportierte thermische Energie (EET) [MJ]: A1-A3 8.29, A4 0, A5 21.8, B3 25.7, B6 0, C2 0, C3 98.1, D 0

## Impact indicators
- Globales Erwärmungspotenzial (GWP) [kg CO_(2)-Äq.]: A1-A3 955, A4 5.02, A5 7.11, B3 160, B6 1000, C2 0.389, C3 54.4, D -533
- Abbau Potential der stratosphärischen Ozonschicht (ODP) [kg CFC11-Äq.]: A1-A3 5.18e-6, A4 2.27e-11, A5 3.17e-11, B3 6.18e-7, B6 7.1e-7, C2 1.77e-12, C3 3.73e-7, D -1.12e-5
- Versauerungspotenzial von Boden und Wasser (AP) [kg SO_(2)-Äq.]: A1-A3 4.47, A4 0.0315, A5 0.00139, B3 1.18, B6 2.79, C2 0.00242, C3 0.0683, D -2.67
- Eutrophierungspotenzial (EP) [kg PO_(4)^(3)-Äq.]: A1-A3 0.654, A4 0.00792, A5 0.000262, B3 0.0504, B6 0.249, C2 0.000606, C3 0.0102, D -0.22
- Bildungspotential für troposphärisches Ozon (POCP) [kg Ethen-Äq.]: A1-A3 0.356, A4 -0.0132, A5 0.000104, B3 0.0617, B6 0.192, C2 -0.00101, C3 0.00529, D -0.172
- Potenzial für den abiotischen Abbau nicht fossiler Ressourcen (ADPE) [kg Sb-Äq.]: A1-A3 0.0238, A4 3.32e-7, A5 1.26e-7, B3 0.00869, B6 0.00031, C2 2.56e-8, C3 4.04e-5, D -0.027
- Potenzial für den abiotischen Abbau fossiler Brennstoffe (ADPF) [MJ]: A1-A3 11800, A4 68.6, A5 1.83, B3 1740, B6 10800, C2 5.31, C3 321, D -5920

## Use advice
Gültigkeitsbereich:
Die vorliegende EPD bezieht sich auf den gesamten Lebensweg einer ST FLEX Green Schiebetüranlage von DORMA. Die unterschiedlichen technischen Eigenschaften werden in Kapitel 2.3 dargestellt. Produktionsstandort des Produkts ist DORMA Zusmarshausen, Deutschland. Die Stoff- und Energieströme wurden entsprechend berücksichtigt.
Systemgrenze:
Typ der EPD: Wiege bis Werkstor mit Optionen
(Cradle-to-Gate with options).

Module A1-3, A4 und A5

Das Produktstadium beginnt mit der Berücksichtigung der Produktion der notwendigen Rohstoffe und Energien inklusive aller entsprechenden Vorketten sowie der notwendigen Beschaffungstransporte. Weiterhin wurde die gesamte Herstellungsphase an zwei Produktionsstandorten abgebildet, inkl. der Behandlung von Produktionsabfällen bis zum Erreichen des End-of-Waste Status (EoW). Zudem wurden ebenfalls die Distributionstransporte und der Einbau ins Gebäude berücksichtigt.

Modul B3

Das Modul beinhaltet das Auswechseln von Verschleißteilen über die gesamte Nutzungsdauer von 10 Jahren. Hierzu gehören sowohl die Herstellung der Ersatzteile als auch die Entsorgung der Verschleißteile bis zum End-of-Waste Status (EoW).

Modul B6

Das Modul beinhaltet den Energieverbrauch für den Betrieb der deklarierten ES 200 Antriebseinheiten inklusive der Stand-by Zeiten über die gesamte Nutzungsdauer von 10 Jahren.

Module C2 und C3

Die Module beinhalten die Umweltwirkungen für die Behandlung der Abfalfraktionen bis zum Erreichen des End-of-Waste Status (EoW) inklusive der zugehörigen Transporte am Ende des Produktlebenswegs.

Modul D
Ausweis der aus der Abfallbehandlung entstehende Gutschriften, resultierend aus einer energetischen (MVA-Route) oder werkstofflichen Verwertung (Recycling-Route) von Verpackungen (A5), der Ersatzteile (B3) und des Produktes im End-of-Life (C3).

## Data sources
- Automatische Schiebetüranlage ST FLEX Green.pdf
- GaBi Database (all versions)
- GaBi database SP28 2015
