# EGGER Laminatfussboden

Dataset: ILCD process, EPD, average dataset
Geography: DE
Reference year: 2019
Valid until: 2024
Classification: OEKOBAU.DAT: Holz / Holzböden / Laminat
Classification: IBUCategories: 02 Bauprodukte / Bodenbeläge / Bodenbeläge
Method details: Bodenbeläge.pdf
Generated by: Daxner & Merl GmbH
Registration number: EPD-EGG-20180194-IBC1-DE
Owner: Fritz EGGER GmbH & Co. OG
Compliance: DIN EN 15804; ISO 14025
Review: Accredited third party review by Institut Bauen und Umwelt e. V.
Amounts: rows without a unit in brackets have none in this file; such an amount is in the reference unit of its flow, which a separate flow dataset defines
copyright: true
licenseType: Free of charge for all users and uses
accessRestrictions: None

## General comment
Egger Laminatfußböden der Handelsmarken Egger Pro (EPL), Egger Home (EHL) und Egger Basic (EBL) sind Hartbodenelemente mit einer hochabriebfesten Deckschicht, welche mittels Clickverbindung leimlos und schwimmend auf dem Boden verlegt werden. Laminatböden werden in verschiedene Anwendungsklassen eingeteilt – eine Beschreibung der Klassen findet sich in den Anforderungen der /DIN EN 13329/.

## Technology and included processes
Gliederung des Herstellungsprozesses: Herstellung der HDF Rohplatten: 1. Entrindung der Stämme 2. Zerspanung des Holzes zu Spänen 3. Kochen der Späne 4. Zerfaserung im Refiner 5. Beleimung der Fasern mit Harzen 6. Trockung der Fasern auf ca. 9-10% Restfeuchte 7. Streuung der beleimten trockenen Fasern auf ein Formband 8. Verpressen der Fasermatte in einer kontinuierlich arbeitenden Heißpresse 9. Aufteilen und Besäumen des Faserstranges zu Rohplattenformaten 10. Auskühlen der Rohplatten in Sternkühlwendern 11. Abstapelung zu Großstapeln 12. Nach Klimatisierungsphase Schleifen der Ober- und Unterseite. Herstellung der Imprägnate: 1. Benetzung des Papiers mit Imprägnierharz (MF/UF) in der Anlage 2. Trocknung des imprägnierten Papiers in beheizten Trocknern 3. Formatierung des endlosen Papiers mittels Querschneider und Abstapelung auf Paletten. Herstellung der beschichteten Halbformate: 1. Legung der Imprägnate auf die Ober- und Unterseite der HDF-Platte 2. Verpressung der Imprägnate mit der HDF-Platte in der Conti- bzw. Kurztaktpresse, welche mit Pressbändern bzw. -blechen ausgestattet sind 3. Qualitätssortierung und Abstapelung, inkl. Klimatisierung. Herstellung der Laminatfußbodendielen: 1. Aufteilung der beschichteten Halbformate in Rohdielen mittels Vielblattkreissäge 2. Profilierung der Längs- und Querseite der Rohdielenformate 3. Evtl. Kaschierung der Rückseite mit Trittschallmatte / eventuell Fasenlackierung 4. Qualitätskontrolle und Verpackung in Kartons, Abstapelung + Folienummantelung.
Deklarierte Einheit:
Die vorliegende Umweltproduktdeklaration bezieht sich auf eine deklarierte Einheit von 1 m² EGGER Laminatfußboden mit einem durchschnittlichen Flächengewicht von 6,93 kg/m² und einer Auslieferungsfeuchte von etwa 7 %.

## Technical purpose
Laminatböden werden im Innenbereich in Neubauten oder bei Renovierungen auf Estrich oder anderen Unterböden, wie Holz, Fliesen, PVC schwimmend verlegt. Die Verlegung ist gemäß der Verlegeanleitung und den allgemeinen Regeln der Technik durchzuführen.

Download von Verlegeanleitungen, e-Learning Modulen und Verlegevideos unter www.egger.com

## Reference product
- Laminat-Fussboden (6,93 kg/m²): 1

## Inputs
- Erneuerbare Primärenergie als Energieträger (PERE) [MJ]: A1-A3 80.7943, C3 0, D -19.9
- Erneuerbare Primärenergie zur stofflichen Nutzung (PERM) [MJ]: A1-A3 103.206, C3 -103.206, D 0
- Total erneuerbare Primärenergie (PERT) [MJ]: A1-A3 184, C3 0.417, D -19.9
- Nicht-erneuerbare Primärenergie als Energieträger (PENRE) [MJ]: A1-A3 73.65, C3 0, D -85.9
- Nicht-erneuerbare Primärenergie zur stofflichen Nutzung (PENRM) [MJ]: A1-A3 17.75, C3 -17.75, D 0
- Total nicht erneuerbare Primärenergie (PENRT) [MJ]: A1-A3 91.4, C3 1.11, D -85.9
- Einsatz von Sekundärstoffen (SM) [kg]: A1-A3 0.04, C3 0, D 0
- Erneuerbare Sekundärbrennstoffe (RSF) [MJ]: A1-A3 31.45, C3 0, D 101.366
- Nicht erneuerbare Sekundärbrennstoffe (NRSF) [MJ]: A1-A3 0, C3 0, D 17.4137
- Einsatz von Süßwasserressourcen (FW) [m^3]: A1-A3 0.00995, C3 0.000568, D -0.0201

## Outputs
- Gefährlicher Abfall zur Deponie (HWD) [kg]: A1-A3 1.77e-5, C3 5.21e-10, D -3.1e-8
- Entsorgter nicht gefährlicher Abfall (NHWD) [kg]: A1-A3 0.0272, C3 0.000782, D 0.002
- Entsorgter radioaktiver Abfall (RWD) [kg]: A1-A3 0.00105, C3 0.000184, D -0.00874
- Komponenten für die Wiederverwendung (CRU) [kg]: A1-A3 0, C3 0, D 0
- Stoffe zum Recycling (MFR) [kg]: A1-A3 0, C3 0, D 0
- Stoffe für die Energierückgewinnung (MER) [kg]: A1-A3 0, C3 6.93, D 0
- Exportierte elektrische Energie (EEE) [MJ]: A1-A3 0, C3 0, D 0
- Exportierte thermische Energie (EET) [MJ]: A1-A3 0, C3 0, D 0

## Impact indicators
- Globales Erwärmungspotenzial (GWP) [kg CO_(2)-Äq.]: A1-A3 -6.01, C3 10.2, D -4.86
- Abbau Potential der stratosphärischen Ozonschicht (ODP) [kg CFC11-Äq.]: A1-A3 7.73e-12, C3 2.7e-13, D -1.28e-11
- Versauerungspotenzial von Boden und Wasser (AP) [kg SO_(2)-Äq.]: A1-A3 0.00889, C3 0.000158, D -0.000342
- Eutrophierungspotenzial (EP) [kg PO_(4)^(3)-Äq.]: A1-A3 0.00262, C3 1.57e-5, D 2.14e-5
- Bildungspotential für troposphärisches Ozon (POCP) [kg Ethen-Äq.]: A1-A3 0.00141, C3 1.08e-5, D 0.000965
- Potenzial für den abiotischen Abbau nicht fossiler Ressourcen (ADPE) [kg Sb-Äq.]: A1-A3 8.29e-7, C3 3.09e-8, D -1.55e-6
- Potenzial für den abiotischen Abbau fossiler Brennstoffe (ADPF) [MJ]: A1-A3 88.7, C3 0.648, D -63.9

## Use advice
Gültigkeitsbereich:
Dieses Dokument bezieht sich auf den Durchschnitt der von der Egger Holzwerkstoffe Wismar GmbH & Co. KG im Werk Wismar (Deutschland) hergestellten Laminatfußböden.
Systemgrenze:
Die Ökobilanz der durchschnittlichen EGGER Laminatfußböden beinhaltet eine cradle-to-gate (Wiege bis zum Werkstor) Betrachtung der auftretenden Umweltwirkungen mit Optionen. Die folgenden Lebenszyklusphasen werden in der Analyse berücksichtigt:

Modul A1-A3 | Produktstadium

Das Produktstadium beinhaltet die Aufwendungen der Rohstoffversorgung (Rundholz, Herstellung des Leimsystems, Hilfsstoffe etc.) sowie der damit verbundenen Transporte, bezogen auf den Produktionsstandort in Wismar. Innerhalb der Werksgrenzen werden die HDF-Plattenproduktion, die Bereitstellung des eingesetzten Leimsystems sowie der verarbeitenden Tränkharze, die Produktion der Imprägnierung, die Beschichtung sowie die Fußboden-Endfertigung bis zum Lager bzw. Versand betrachtet. Die Bereitstellung thermischer und elektrischer Energie erfolgt am Standort Wismar über das werkseigene Biomassekraftwerk. Darin wird sowohl internes Restholz als auch extern bezogenes Altholz verwertet. Die Systemgrenze für in der Produktion verwendetes Altholz wird nach dem Sortieren und Hacken gesetzt. Dabei wird angenommen, dass das Ende der Abfalleigenschaft erreicht ist.

Hier gilt die nach /EN 15804/ definierte Systemgrenze für Sekundärrohstoffe.

Modul C3 | Abfallbehandlung

Das Modul C3 deklariert die biogenen Kohlendioxid-Emissionen in der energetischen Verwertung am Lebensende des Produktes. Darüber hinaus wird das Hacken nach Ausbau der Produkte betrachtet.

Modul D | Gutschriften und Lasten außerhalb der

Systemgrenzen

In Modul D wird die energetische Verwertung des Produktes am Lebensende inklusive den entsprechenden energetischen Substitutionspotentialen in Form eines europäischen Durchschnittsszenarios beschrieben.

## Data sources
- GaBi Database (all versions)
- GaBi database SP33 2017
