# Durchstanz- und Schubbewehrungssysteme

Dataset: ILCD process, EPD, average dataset
Geography: RER
Reference year: 2021
Valid until: 2026
Classification: OEKOBAU.DAT: Metalle / Stahl und Eisen / Befestigungsmittel
Classification: IBUCategories: 02 Bauprodukte / Metallbauprodukte und Zubehör / Dünnwandige Profile und Profiltafeln aus Metall
Method details: Dünnwandige Profile und Profiltafeln aus Metall.pdf
Generated by: myclimate Deutschland gGmbH
Registration number: EPD-JDL-20200261-IBB1-DE
Owner: Jordahl GmbH
Compliance: DIN EN 15804; ISO 14025
Review: Accredited third party review by Institut Bauen und Umwelt e. V.
Amounts: rows without a unit in brackets have none in this file; such an amount is in the reference unit of its flow, which a separate flow dataset defines
copyright: true
licenseType: Free of charge for all users and uses
accessRestrictions: None

## General comment
Das Produktportfolio der JORDAHL Bewehrungssysteme umfasst Durchstanz- und Schubbewehrungen vom Typ JDA, JDA-FT-KL, JDA-S. Die JORDAHL Durchstanz- und Schubbewehrung ist ein System bestehend aus einer Flachstahlleiste mit mindestens zwei an der Leiste befestigten (verschweißt bzw. geklickt) Doppelkopfankern in gerippter Ausführung (siehe Abb.1).

Abbildung 1: Durchstanz- bzw. Schubbewehrung JDA in gerippter Ausführung

JORDAHL Durchstanz- bzw. Schubbewehrungen werden bemessen nach:

Durchstanzbewehrung: EOTA TR 060 oder EN 1992-1-1 und der Europäischen Technischen Bewertung ETA-13/0136.
Schubbewehrung: Allgemeine bauaufsichtliche Zulassung Z-15.1-268 des Deutschen Instituts für Bautechnik (DIBt)

## Technology and included processes
Die Leisten, Doppelkopfanker sowie die Abstandhalter und Kunststoffverschlüsse (Kunststoff bzw. Faserbeton) der Durchstanz- bzw. Schubbewehrungen werden von qualifizierten Lieferanten produziert und bezogen. Nach der Anlieferung werden JORDAHL Durchstanz- bzw. Schubbewehrungen hergestellt. Die einzelnen Doppelkopfanker werden zu Bewehrungselementen mit jeweils mindestens zwei Ankern, mittels Heftschweißung, an den Stahlleisten befestigt. Für den ausschließlichen Einsatz in Fertigteilwerken werden die Anker mittels Kunststoffpatentverschlüssen an den Stahlleisten befestigt. Anfallende Metallspäne und Filterstaub, werden in Behältern gesammelt und durch ein zertifiziertes Entsorgungsunternehmen gemäß gesetzlicher Vorgabe entsorgt bzw. recycelt. Das Klicksystem bzw. die Abstandhalter aus Kunststoff/ Faserbeton werden vor dem Verpacken im JORDAHL Werk hinzugefügt.
Technische Daten:
Es gelten die folgenden technischen Daten für Durchstanzbewehrung JDA und JDA-FT-KL. Die Prüfnorm ist bemessen nach der Europäisch Technischen Bewertung (ETA) ETA-13/0136.

Die Prüfnorm für die Schubbewehrung JDA-S ist bemessen gemäß der allgemeinen bauaufsichtlichen Zulassung Z-15.1-268.

Alle geometrischen Maße, produktspezifischen Parameter und die statischen Tragfähigkeiten der verschiedenen Durchstanzbewehrungen JDA, JDA-FT-KL und der Schubbewehrung JDA-S sind in den folgenden technischen Spezifikationen angegeben:

JDA und JDA-FT-KL System:

ETA-13/0136

JDA-S System:

Z-15.1-268
Deklarierte Einheit:
Die Deklaration bezieht sich auf die Herstellung von 1 m Durchstanz- bzw. Schubbewehrung JDA mit 5 Doppelkopfanker Ø16 mm und einer Höhe von 295 mm.

## Technical purpose
Die JORDAHL Durchstanz- bzw. Schubbewehrung wird zur Übertragung hoher Querkräfte in Flachdecken mit geringem Bewehrungsaufwand eingesetzt. Somit können Geschosshöhen optimal genutzt werden. Sie ist sowohl in Fundamenten als auch in Ortbeton sowie in Elementdecken (ausgenommen Schubbewehrung für Elementdecken) einsetzbar und kann von oben und unten in die Bewehrung integriert werden. Durch Ihren Einsatz kann der Durchstanzwiderstand und die Tragfähigkeit um bis zu 96 % erhöht werden.

JORDAHL Durchstanz- bzw. Schubbewehrungen werden in diversen Varianten, je nach statischen Erfordernissen eines Projekts, angeboten.

Beispiele sind:

JDA für Flachdecken, Stahlbetonplatten, Fundament-, Bodenplatten
JDA-FT-KL für Elementdecken
JDA-S für hochbelastbare liniengelagerte Auflager (Schubbewehrung)

## Reference product
- Durchstanz- bzw. Schubbewehrung JDA: 1

## Inputs
- Erneuerbare Primärenergie als Energieträger (PERE) [MJ]: A1-A3 1.06582, C2 0.000993638, C3 0, C4 3.49625e-5, D 0.00591105
- Erneuerbare Primärenergie zur stofflichen Nutzung (PERM) [MJ]: A1-A3 0, C2 0, C3 0, C4 0, D 0
- Total erneuerbare Primärenergie (PERT) [MJ]: A1-A3 1.06582, C2 0.000993638, C3 0, C4 3.49625e-5, D 0.00591105
- Nicht-erneuerbare Primärenergie als Energieträger (PENRE) [MJ]: A1-A3 41.5227, C2 2.68326, C3 0, C4 0.0136884, D 3.37735
- Nicht-erneuerbare Primärenergie zur stofflichen Nutzung (PENRM) [MJ]: A1-A3 0, C2 0, C3 0, C4 0, D 0
- Total nicht erneuerbare Primärenergie (PENRT) [MJ]: A1-A3 41.5227, C2 2.68326, C3 0, C4 0.0136884, D 3.37735
- Einsatz von Sekundärstoffen (SM) [kg]: A1-A3 3.8369, C2 0, C3 0, C4 0, D -0.201
- Erneuerbare Sekundärbrennstoffe (RSF) [MJ]: A1-A3 0, C2 0, C3 0, C4 0, D 0
- Nicht erneuerbare Sekundärbrennstoffe (NRSF) [MJ]: A1-A3 0, C2 0, C3 0, C4 0, D 0
- Einsatz von Süßwasserressourcen (FW) [m^3]: A1-A3 2.19276, C2 -0.000557624, C3 0, C4 -1.67789e-5, D -0.00752501

## Outputs
- Gefährlicher Abfall zur Deponie (HWD) [kg]: A1-A3 6.21546e-5, C2 6.70422e-6, C3 0, C4 3.27506e-8, D 3.34004e-5
- Entsorgter nicht gefährlicher Abfall (NHWD) [kg]: A1-A3 0.680983, C2 0.000105192, C3 0, C4 0.191213, D 0.0181112
- Entsorgter radioaktiver Abfall (RWD) [kg]: A1-A3 0.00024205, C2 1.83518e-5, C3 0, C4 9.32013e-8, D 3.52608e-6
- Komponenten für die Wiederverwendung (CRU) [kg]: A1-A3 0, C2 0, C3 0, C4 0, D 0
- Stoffe zum Recycling (MFR) [kg]: A1-A3 0, C2 0, C3 3.6594, C4 0, D 0
- Stoffe für die Energierückgewinnung (MER) [kg]: A1-A3 0, C2 0, C3 0, C4 0, D 0
- Exportierte elektrische Energie (EEE) [MJ]: A1-A3 0, C2 0, C3 0, C4 0, D 0
- Exportierte thermische Energie (EET) [MJ]: A1-A3 0, C2 0, C3 0, C4 0, D 0

## Impact indicators
- Globales Erwärmungspotenzial (GWP) [kg CO_(2)-Äq.]: A1-A3 2.95996, C2 0.18035, C3 0, C4 0.000933066, D 0.306086
- Abbau Potential der stratosphärischen Ozonschicht (ODP) [kg CFC11-Äq.]: A1-A3 3.09502e-7, C2 3.27754e-8, C3 0, C4 1.62773e-10, D 1.60283e-8
- Versauerungspotenzial von Boden und Wasser (AP) [kg SO_(2)-Äq.]: A1-A3 0.0104288, C2 0.000468066, C3 0, C4 5.61196e-6, D 0.00116327
- Eutrophierungspotenzial (EP) [kg PO_(4)^(3)-Äq.]: A1-A3 0.00169278, C2 7.98284e-5, C3 0, C4 1.17332e-6, D 0.000153448
- Bildungspotential für troposphärisches Ozon (POCP) [kg Ethen-Äq.]: A1-A3 0.000897477, C2 1.71748e-5, C3 0, C4 1.95989e-7, D 0.000235522
- Potenzial für den abiotischen Abbau nicht fossiler Ressourcen (ADPE) [kg Sb-Äq.]: A1-A3 6.43078e-6, C2 1.05536e-8, C3 0, C4 2.5576e-10, D 2.99114e-7
- Potenzial für den abiotischen Abbau fossiler Brennstoffe (ADPF) [MJ]: A1-A3 38.0851, C2 2.52713, C3 0, C4 0.0128836, D 3.19787

## Use advice
Gültigkeitsbereich:
Dieses Dokument bezieht sich auf Durchstanz- und Schubbewehrungen JDA der Firma JORDAHL GmbH, hergestellt in Trebbin, Deutschland. Die deklarierte Einheit bezieht sich auf 1 Meter Durchstanz- bzw. Schubbewehrung JDA als spezifisches Produkt.

Die Datenerhebung erfolgte werksspezifisch mit aktuellen Jahresdaten von 2019. Der Deklarationsinhaber ist verantwortlich für die zugrunde liegenden Daten und deren Verifizierung.
Systemgrenze:
Die Ökobilanz betrachtet die Systemgrenzen "von der Wiege bis zum Werkstor - mit Optionen" und folgt dem modularen Aufbau nach EN 15804. Die Ökobilanz berücksichtigt folgende Module:

A1: Rohstoffgewinnung und -verarbeitung, Verarbeitungsprozesse und Zuschlagstoffe, Stahlerzeugung, -guß und -produktion; Aufbereitung von Recyclingmaterialien
A2: Transport zum Hersteller: Transport der Rohstoffe zum Herstellungswerk
A3: Herstellungsprozesse und -aufwendungen: Herstellung der Durchstanz- bzw. Schubbewehrung

C2: Transport zur Abfallbewirtschaftung
C3: Abfallbewirtschaftung zur Wiederverwendung, Rückgewinnung und/ oder zum Recycling;

C4: Beseitigung
D: Wiederverwendungs-, Rückgewinnungs- oder Recyclingpotenzial als Nettoflüsse und Gutschriften bzw. Lasten für Stahl & Baustahl

## Data sources
- ecoinvent database (all versions)
- ecoinvent 3.6 database
