# designed acoustic ceiling 24 mm

Dataset: ILCD process, EPD, specific dataset
Geography: DE
Reference year: 2021
Valid until: 2026
Classification: OEKOBAU.DAT: Kunststoffe / Folien und Vliese / Vliese
Classification: IBUCategories: 02 Bauprodukte / Produkte aus Kunststoff / Tafeln und Platten aus Kunststoff (Innenanwendung)
Method details: Tafeln und Platten aus Kunststoff (Innenanwendung).pdf
Generated by: Fraunhofer-Institut für Bauphysik, Abt. Ganzheitliche Bilanzierung
Registration number: EPD-SPH-20210147-IBA1-DE
Owner: Karl Späh GmbH & Co. KG
Compliance: DIN EN 15804+A2; ISO 14025
Review: Accredited third party review by Institut Bauen und Umwelt e. V.
Amounts: rows without a unit in brackets have none in this file; such an amount is in the reference unit of its flow, which a separate flow dataset defines
copyright: true
licenseType: Free of charge for all users and uses
accessRestrictions: None

## General comment
Das deklarierte Produkt „designed acoustic ceiling 24 mm“ ist eine von der Decke abgehängte Akustiklösung. Das Produkt besteht aus sogenanntem greenPET, welches aus bis zu 100 % recycelten Polyethylenterephthalat(PET)-Flaschen hergestellt wird. Aufgrund der schallabsorbierenden Eigenschaften dieses Materials eignet sich das akustische Deckensegel als nachträgliche Akustikmaßnahme und für die Einhaltung von Schallschutznormen und Arbeitsrichtlinien, wie ASR A3.7:2021-03, Lärm, oder der DIN 18041:2016-03, Hörsamkeit in Räumen - Anforderungen, Empfehlungen und Hinweise für die Planung. Es ist sowohl mit abgeschrägter als auch mit gerader Kantenausführung und in verschiedenen Größen erhältlich. Dank eines höhenverstellbaren Drahtseilsystems, welches an einem rückseitig aufgebrachten Alurahmen befestigt ist, wird das Akustiksegel einfach und schnell montiert. Darüber hinaus sind individuelle Designs bis zur Integration von Leuchtmitteln möglich.

## Technology and included processes
Der Zuschnitt der Rohplatte erfolgt mittels Computer-Aided Design(CAD)-gestütztem Plotter. Anschließend wird der Aluminiumprofilrahmen auf der Rückseite aufgebracht und mittels Kleber und Schrauben befestigt.
Technische Daten:
Die bautechnischen Daten des Produktes sind in der folgenden Tabelle aufgeführt.
Deklarierte Einheit:
Die EPD bezieht sich auf eine deklarierte Einheit von 1 m² „designed acoustic ceiling 24 mm“. Das repräsentative Flächengewicht liegt bei 4,742 kg.

## Technical purpose
Der Einsatz erfolgt als Akustikabsorber in Innenräumen zur Verbesserung bzw. Verringerung der Nachhallzeit. Das Produkt wird als Segel von der Decke abgehängt.

## Reference product
- designed acoustic ceiling 24 mm: 1

## Inputs
- Erneuerbare Primärenergie als Energieträger (PERE) [MJ]: A1-A3 82.5, A4 0.0026, A5 0.457, B1 0, B2 0, C1 0.141, C2 0.00158, C3 0, C4 0.396, D -53
- Erneuerbare Primärenergie zur stofflichen Nutzung (PERM) [MJ]: A1-A3 0.27, A4 0, A5 -0.27, B1 0, B2 0, C1 0, C2 0, C3 0, C4 0, D 0
- Total erneuerbare Primärenergie (PERT) [MJ]: A1-A3 82.8, A4 0.0026, A5 0.187, B1 0, B2 0, C1 0.141, C2 0.00158, C3 0, C4 0.396, D -53
- Nicht-erneuerbare Primärenergie als Energieträger (PENRE) [MJ]: A1-A3 363, A4 0.407, A5 1.508, B1 0, B2 0, C1 0.246, C2 0.247, C3 0, C4 15.9282, D -160
- Nicht-erneuerbare Primärenergie zur stofflichen Nutzung (PENRM) [MJ]: A1-A3 15.2, A4 0, A5 -1.15, B1 0, B2 0, C1 0, C2 0, C3 0, C4 -14, D 0
- Total nicht erneuerbare Primärenergie (PENRT) [MJ]: A1-A3 378, A4 0.407, A5 0.356, B1 0, B2 0, C1 0.246, C2 0.247, C3 0, C4 1.91, D -160
- Einsatz von Sekundärstoffen (SM) [kg]: A1-A3 2.64, A4 0, A5 0, B1 0, B2 0, C1 0, C2 0, C3 0, C4 0, D 0
- Erneuerbare Sekundärbrennstoffe (RSF) [MJ]: A1-A3 0, A4 0, A5 0, B1 0, B2 0, C1 0, C2 0, C3 0, C4 0, D 0
- Nicht erneuerbare Sekundärbrennstoffe (NRSF) [MJ]: A1-A3 0, A4 0, A5 0, B1 0, B2 0, C1 0, C2 0, C3 0, C4 0, D 0
- Einsatz von Süßwasserressourcen (FW) [m^3]: A1-A3 0.197, A4 2.45e-6, A5 0.00025, B1 0, B2 0, C1 7.65e-5, C2 1.49e-6, C3 0, C4 0.0125, D -0.104

## Outputs
- Gefährlicher Abfall zur Deponie (HWD) [kg]: A1-A3 5.17e-7, A4 8.65e-11, A5 3.6e-10, B1 0, B2 0, C1 0, C2 0, C3 0, C4 0, D 0
- Entsorgter nicht gefährlicher Abfall (NHWD) [kg]: A1-A3 3.63, A4 5.74e-5, A5 0.00906, B1 0, B2 0, C1 0, C2 0, C3 0, C4 0, D 0
- Entsorgter radioaktiver Abfall (RWD) [kg]: A1-A3 0.0169, A4 4.72e-7, A5 2.71e-5, B1 0, B2 0, C1 0, C2 0, C3 0, C4 0, D 0
- Komponenten für die Wiederverwendung (CRU) [kg]: A1-A3 0, A4 0, A5 0, B1 0, B2 0, C1 0, C2 0, C3 0, C4 0, D 0
- Stoffe zum Recycling (MFR) [kg]: A1-A3 0.0638, A4 0, A5 0, B1 0, B2 0, C1 0, C2 0, C3 0, C4 1.56, D 0
- Stoffe für die Energierückgewinnung (MER) [kg]: A1-A3 0.0208, A4 0, A5 0.156, B1 0, B2 0, C1 0, C2 0, C3 0, C4 0.0625, D 0
- Exportierte elektrische Energie (EEE) [MJ]: A1-A3 0.0801, A4 0, A5 0.0554, B1 0, B2 0, C1 0, C2 0, C3 0, C4 2.41, D 0
- Exportierte thermische Energie (EET) [MJ]: A1-A3 0, A4 0, A5 0, B1 0, B2 0, C1 0, C2 0, C3 0, C4 0, D 0

## Impact indicators
- Globales Erwärmungspotenzial total (GWP-total) [kg CO_(2)-Äq.]: A1-A3 28, A4 0.0303, A5 0.14, B1 0, B2 0, C1 0.0199, C2 0.0184, C3 0, C4 7.32, D -12.1
- Globales Erwärmungspotenzial fossil (GWP-fossil) [kg CO_(2)-Äq.]: A1-A3 28, A4 0.0289, A5 0.111, B1 0, B2 0, C1 0.0197, C2 0.0176, C3 0, C4 7.32, D -12.1
- Globales Erwärmungspotenzial biogen (GWP-biogenic) [kg CO_(2)-Äq.]: A1-A3 0.00174, A4 0.00135, A5 0.0296, B1 0, B2 0, C1 0.000129, C2 0.000819, C3 0, C4 0.00036, D -0.000491
- Globales Erwärmungspotenzial luluc (GWP-luluc) [kg CO_(2)-Äq.]: A1-A3 0.0133, A4 1.7e-6, A5 6.73e-5, B1 0, B2 0, C1 5e-5, C2 1.03e-6, C3 0, C4 0.000164, D -0.00475
- Abbau Potential der stratosphärischen Ozonschicht (ODP) [kg CFC11-Äq.]: A1-A3 4.33e-11, A4 9.68e-18, A5 7.99e-16, B1 0, B2 0, C1 6.05e-16, C2 5.87e-18, C3 0, C4 1.68e-15, D -4.53e-14
- Versauerungspotenzial von Boden und Wasser (AP) [mol H^(+)-Äq.]: A1-A3 0.116, A4 8.38e-5, A5 6.82e-5, B1 0, B2 0, C1 3e-5, C2 5.39e-5, C3 0, C4 0.00217, D -0.045
- Eutrophierungspotenzial Süßwasser (EP-freshwater) [kg PO_(4)-Äq.]: A1-A3 3.77e-5, A4 7.07e-9, A5 1.09e-7, B1 0, B2 0, C1 8.16e-8, C2 4.29e-9, C3 0, C4 2.94e-7, D -6.78e-6
- Eutrophierungspotenzial Salzwasser (EP-marine) [kg N-Äq.]: A1-A3 0.0249, A4 3.91e-5, A5 2.16e-5, B1 0, B2 0, C1 9.2e-6, C2 2.53e-5, C3 0, C4 0.000668, D -0.00768
- Eutrophierungspotenzial Land (EP-terrestrial) [mol N-Äq.]: A1-A3 0.271, A4 0.000429, A5 0.000271, B1 0, B2 0, C1 9.61e-5, C2 0.000278, C3 0, C4 0.0103, D -0.0836
- Bildungspotential für troposphärisches Ozon (POCP) [kg NMVOC-Äq.]: A1-A3 0.0753, A4 7.65e-5, A5 5.52e-5, B1 0, B2 0, C1 2.31e-5, C2 4.92e-5, C3 0, C4 0.00175, D -0.023
- Potenzial für den abiotischen Abbau nicht fossiler Ressourcen (ADPE) [kg Sb-Äq.]: A1-A3 5.71e-5, A4 1.19e-9, A5 9.89e-9, B1 0, B2 0, C1 7.42e-9, C2 7.22e-10, C3 0, C4 2.38e-8, D -1.72e-6
- Potenzial für den abiotischen Abbau fossiler Brennstoffe (ADPF) [MJ]: A1-A3 377, A4 0.407, A5 0.356, B1 0, B2 0, C1 0.246, C2 0.247, C3 0, C4 1.91, D -159
- Wassernutzung (WDP) [m^(3) Welt-Äq. entzogen]: A1-A3 4.09, A4 3.48e-5, A5 0.0128, B1 0, B2 0, C1 0.000436, C2 2.11e-5, C3 0, C4 0.745, D -0.687
- Auftreten von Krankheiten aufgrund von Feinstaubemissionen (PM) [Krankheitsfälle]: A1-A3 1.47e-6, A4 4.68e-10, A5 5.55e-10, B1 0, B2 0, C1 2.47e-10, C2 2.95e-10, C3 0, C4 1.2e-8, D -4.39e-7
- Wirkung durch Exposition des Menschen mit U235 (IR) [kBq U235-Äq.]: A1-A3 3.25, A4 4.35e-5, A5 0.00244, B1 0, B2 0, C1 0.00185, C2 2.64e-5, C3 0, C4 0.00515, D -2.63
- Toxizitätsvergleichseinheit für Ökosysteme (ETP-fw) [CTUe]: A1-A3 134, A4 0.328, A5 0.138, B1 0, B2 0, C1 0.0951, C2 0.199, C3 0, C4 0.738, D -58.5
- Toxizitätsvergleichseinheit für Menschen (krebserregend) (HTP-c) [CTUh]: A1-A3 2.69e-8, A4 6.35e-12, A5 5.92e-12, B1 0, B2 0, C1 3.42e-12, C2 3.85e-12, C3 0, C4 7.57e-11, D -4.87e-9
- Toxizitätsvergleichseinheit für Menschen (nicht krebserregend) (HTP-nc) [CTUh]: A1-A3 5.15e-7, A4 3.23e-10, A5 3.18e-10, B1 0, B2 0, C1 1.31e-10, C2 1.97e-10, C3 0, C4 4.79e-9, D -1.16e-7
- Bodenqualitätsindex (SQP) [SQP]: A1-A3 35.5, A4 0.00268, A5 0.169, B1 0, B2 0, C1 0.125, C2 0.00163, C3 0, C4 0.529, D -11.4

## Use advice
Gültigkeitsbereich:
Die vorliegende Umwelt-Produktdeklaration bezieht sich auf eine deklarierte Einheit von 1 m² designed acoustic ceiling 24 mm, produziert am Standort Scheer, Deutschland. Es handelt sich um Akustikfilz aus recycelten PET-Flaschen.
Systemgrenze:
Für die EPD wurde eine cradle-to-grave-Betrachtung gewählt (Wiege bis Bahre). Dabei werden folgende Lebenszyklusmodule betrachtet.

Modul A1–A3

Das Lebenszyklusmodul A1 umfasst alle relevanten Prozesse, die zur Bereitstellung der Rohstoffe und Vorprodukte notwendig sind. Neben den Metallerzeugnissen, die später als Befestigungsmaterialien dienen, umfasst dies auch die Herstellung der PET-Vliesstoffplatte sowie die Beschaffung des Klebstoffes.

Das Lebenszyklusmodul A2 bildet alle relevanten Transportprozesse der Rohstoffe und Vorprodukte zum Produktionsstandort ab.

Das Lebenszyklusmodul A3 beschreibt die Herstellung des deklarierten Produktes am Produktionsstandort. Die PET-Vliesstoffplatte wird im Werk auf die entsprechende Größe zugeschnitten, die Befestigungsmaterialien werden mittels Klebstoff angebracht. Die Bereitstellung von elektrischer Energie erfolgt zum Teil durch Stromeigenproduktion am Standort mittels eigener Photovoltaikanlage, ein Teil wird als Strom aus Wasserkraft zugekauft. Darüber hinaus betrachtet das Modul A3 die Bereitstellung der Verpackungsmaterialen.

Modul A4–A5

Das Lebenszyklusmodul A4 beschreibt den Transport des Produktes zur Baustelle bzw. zum Gebäude. In den Transportprozessen werden Leerfahrten mitberücksichtigt.

Das Lebenszyklusmodul A5 beschreibt die Montage bzw. den Einbau des Produktes in das Gebäude. Hierfür muss lediglich das Befestigungsmaterial mittels Akkuschrauber und Bohrer angebracht werden. Für das Aufladen und Betreiben des Akkuschraubers und Bohrers wurde eine geringe Menge elektrischer Energie abgeschätzt. In Modul A5 fallen zudem Verpackungsabfälle zur Entsorgung an. Alle Verpackungskomponenten werden getrennt, transportiert und einer geeigneten Abfallverbrennung zugeführt.

Modul B1–B5

Während der Nutzung des Produktes fallen keine relevanten Energie- oder Massenflüsse an. Die Reinigung wird händisch mit einem nebelfeuchten Tuch vorgenommen. Inspektion und Wartung sind nicht notwendig, ebenfalls muss bei sachgemäßem Umgang keine Reparatur sowie kein Austausch oder Ersatz vorgenommen werden. Ebenfalls ist keine Verbesserung oder Modernisierung vorgesehen.

Modul C1–C4

Das Lebenszyklusmodul C1 umfasst den Rückbau des Produktes. Analog zum Einbau, kann das Produkt mittels Akkuschrauber von der Gebäudesubstanz demontiert werden. Hierfür muss lediglich das Befestigungsmaterial mittels Akkuschrauber entfernt werden. Für das Aufladen und Betreiben des Akkuschraubers wurde eine geringe Menge elektrischer Energie abgeschätzt. Beim Rückbau kann das Produkt bereits in seine einzelnen Komponenten zerlegt und somit sortenrein getrennt werden.

Das Lebenszyklusmodul C2 bildet den Transport zur Abfallbehandlung (Modul C3) ab. An dieser Stelle werden die verschiedenen Metallfraktionen sortiert.

Das Lebenszyklusmodul C3 erfordert keine umweltrelevanten Energie- und Massenflüsse.

Das Lebenszyklusmodul C4 umfasst die Beseitigung der einzelnen Komponenten. Metallschrott kann dabei wieder recycelt werden. Der PET-Vliesstoff wird mit den Klebstoffresten am Lebensende der Abfallverbrennung zugeführt.

Modul D Das Lebenszyklusmodul D umfasst Wiederverwendungs-, Rückgewinnungs- und/oder Recyclingpotenziale. Diese werden als Nettoflüsse und Vorteile angegeben. Die Recyclingpotenziale des eingesetzten Primärmaterials aus Edelstahl, Stahl sowie Aluminium werden in diesem Modul angerechnet. Darüber hinaus wird eine Stromgutschrift generiert, welche aus dem Verbrennen des primären PET-Anteils resultiert. Eine Gutschrift für thermische Energie wird nicht gegeben.

## Data sources
- GaBi Database (all versions)
- GaBi database SP40 2020
