# Estrichelemente

Dataset: ILCD process, EPD, average dataset
Geography: DE
Reference year: 2016
Valid until: 2021
Classification: OEKOBAU.DAT: Mineralische Baustoffe / Mörtel und Beton / Estrich trocken
Classification: IBUCategories: 02 Bauprodukte / Gipsprodukte / Gipsplatten
Method details: Gipsplatten.pdf
Owner: Fermacell
Compliance: DIN EN 15804; ISO 14025
Review: Accredited third party review by IBU
Amounts: rows without a unit in brackets have none in this file; such an amount is in the reference unit of its flow, which a separate flow dataset defines
copyright: true

## General comment
FERMACELL Estrich-Elemente bestehen aus miteinander verklebten FERMACELL Gipsfaser-Platten; spezielle Bauplatten aus Gips und Zellulosefasern.

Für das Inverkehrbringen des Produkts in der EU/EFTA (mit Ausnahme der Schweiz) gilt die Verordnung (EU) Nr. 305/2011 (CPR). Das Produkt benötigt eine Leistungserklärung unter Berücksichtigung der Europäischen Technischen Zulassung /ETA-03/006/ und die CE-Kennzeichnung.

## Technology and included processes
Gipsaufbereitung: Hauptrohstoff der Gipsfaser-Platte ist Gips. Gips enthält etwa 21% Kristallwasser. In der Aufbereitungsanlage wird dieser Stoff zunächst in einer Mahltrocknungsanlage aufgelockert, zerkleinert und entlang der Calcinierstrecke auf ca. 170°C erwärmt. Dabei entweicht ein Teil des Kristallwassers und es bildet sich ein Mehrphasengips, In einem anschließenden Zyklon wird die Luft vom Materialstrom getrennt und in einem Filter gereinigt. Der Materialstrom wird über eine Ageing-Strecke geführt und auf unter 80°C gekühlt. Gipsfaserplatten: Die beiden natürlichen Rohstoffe Gips und Papierfasern werden gemischt und nach Zugabe von Wasser – ohne weitere Bindemittel – unter hohem Druck zu stabilen Platten gepresst, getrocknet, beidseitig, kalibriert und oberflächenhydrophobiert sowie anschließend auf die benötigten Formate zugeschnitten. 2 Gipsfaserplatten werden anschließend versetzt zueinander zu einem Estrichelement verklebt.
Technische Daten:
Leistungswerte des Produkts entsprechend der Leistungserklärung in Bezug auf dessen Wesentliche Merkmale gemäß /ETA-03/006/.
Deklarierte Einheit:
Die Kern-EPD bezieht sich auf die Herstellung von 1 m2 FERMACELL Estrich-Element.

## Technical purpose
FERMACELL Estrich-Elemente eignen sich zur rationellen Erstellung von Fußbodenaufbauten in Trockenbauweise.

Für die Verwendung gelten die jeweiligen nationalen Bestimmungen.

## Reference product
- 1 m2 fermacell Estrichelement: 1

## Inputs
- Erneuerbare Primärenergie als Energieträger (PERE) [MJ]: A1-A3 7.82
- Erneuerbare Primärenergie zur stofflichen Nutzung (PERM) [MJ]: A1-A3 0.0372
- Total erneuerbare Primärenergie (PERT) [MJ]: A1-A3 7.85
- Nicht-erneuerbare Primärenergie als Energieträger (PENRE) [MJ]: A1-A3 38.7
- Nicht-erneuerbare Primärenergie zur stofflichen Nutzung (PENRM) [MJ]: A1-A3 0.00549
- Total nicht erneuerbare Primärenergie (PENRT) [MJ]: A1-A3 38.7
- Einsatz von Sekundärstoffen (SM) [kg]: A1-A3 7.03
- Erneuerbare Sekundärbrennstoffe (RSF) [MJ]: A1-A3 0
- Nicht erneuerbare Sekundärbrennstoffe (NRSF) [MJ]: A1-A3 0
- Einsatz von Süßwasserressourcen (FW) [m^3]: A1-A3 0.0132

## Outputs
- Gefährlicher Abfall zur Deponie (HWD) [kg]: A1-A3 3.47e-7
- Entsorgter nicht gefährlicher Abfall (NHWD) [kg]: A1-A3 0.0534
- Entsorgter radioaktiver Abfall (RWD) [kg]: A1-A3 0.000897
- Komponenten für die Wiederverwendung (CRU) [kg]: A1-A3 0
- Stoffe zum Recycling (MFR) [kg]: A1-A3 0
- Stoffe für die Energierückgewinnung (MER) [kg]: A1-A3 0
- Exportierte elektrische Energie (EEE) [MJ]: A1-A3 0
- Exportierte thermische Energie (EET) [MJ]: A1-A3 0

## Impact indicators
- Globales Erwärmungspotenzial (GWP) [kg CO_(2)-Äq.]: A1-A3 2.5
- Abbau Potential der stratosphärischen Ozonschicht (ODP) [kg CFC11-Äq.]: A1-A3 4.8e-11
- Versauerungspotenzial von Boden und Wasser (AP) [kg SO_(2)-Äq.]: A1-A3 0.00396
- Eutrophierungspotenzial (EP) [kg PO_(4)^(3)-Äq.]: A1-A3 0.000695
- Bildungspotential für troposphärisches Ozon (POCP) [kg Ethen-Äq.]: A1-A3 0.000138
- Potenzial für den abiotischen Abbau nicht fossiler Ressourcen (ADPE) [kg Sb-Äq.]: A1-A3 0.000169
- Potenzial für den abiotischen Abbau fossiler Brennstoffe (ADPF) [MJ]: A1-A3 36.4

## Use advice
Gültigkeitsbereich:
Diese Umwelt-Produktdeklaration bezieht sich auf beschichtete Estrich-Elemente, welche aus 2 miteinander versetzt verklebten Fermacell Gipsfaser-Platten bestehen.
Als Datenbasis wurden spezifische Daten aus 3 Fermacell-Werken (Münchehof, Sieglingen, Wijchen)
gemittelt. Die Ökobilanz umfasst die Roh-
stoff- und Energiegewinnung, Rohstofftransporte und die eigentliche Herstellungsphase der beschich-
teten Estrich-Elemente. Betrachtet wird 1 m² eines durchschnittlichen Estrich-Elements (beschichtet) mit
einer durchschnittlichen Dichte von 1,18 t/m³ Da die Estrich-Elemente mit einer Kaschierung versehen werden können, liefert der Anhang zu dieser EPD die ökobilanziellen Kennzahlen zur spezifischen Berechnung kaschierter Produktvarianten
Systemgrenze:
Die gewählten Systemgrenzen umfassen die Herstellung des Produktes einschließlich

der Rohstoffgewinnung bis zum fertig verpackten Produkt am Werkstor (Cradle-to-gate).

Der Betrachtungsrahmen umfasst im Einzelnen:

· Rohstoffbereitstellung

· Energiebereitstellung

· Transporte und Verpackungen der Rohstoffe und Vorprodukte

· Herstellung (Energie, Abfall, Emissionen)

Die Nutzung wird wegen der vielseitigen Anwendungsmöglichkeiten und Konstruktionen nicht in die Berechnung einbezogen. Die Entsorgung des untersuchten Produktes ist aufgrund der langen Lebensdauer nicht hinreichend quantifizierbar und wird deshalb nicht in die Bilanzierung einbezogen.

Auf der Inputseite werden alle Stoffströme, die in das System eingehen und größer als 1 % ihrer gesamten Masse sind oder mehr als 1 % zum Primärenergie-verbrauch beitragen, berücksichtigt. Auf der Output-seite werden alle Stoffströme erfasst, die das System verlassen und deren Umweltauswirkungen größer als 1 % der gesamten Auswirkungen einer berücksichtigten Wirkkategorie sind.

## Data sources
- Estrichelemente.pdf
- GaBi Database (all versions)
- GaBi database SP26 2014
