# PVC-Dachbahnen; PVC

Dataset: ILCD process, EPD, generic dataset
Geography: DE
Reference year: 2021
Valid until: 2022
Classification: oekobau.dat: Kunststoffe / Dachbahnen / PVC-Dachbahnen
Owner: Sphera Solutions GmbH
Compliance: EN 15804+A2
Review: Dependent internal review by Sphera Solutions GmbH; Independent external review by GaBi user forum
Amounts: rows without a unit in brackets have none in this file; such an amount is in the reference unit of its flow, which a separate flow dataset defines
copyright: true
licenseType: Free of charge for all users and uses
accessRestrictions: The license conditions as stated on https://www.oekobaudat.de/ apply.
accessRestrictions: Es gelten die Lizenzbedingungen wie sie auf https://www.oekobaudat.de/ genannt sind.

## General comment
Dieser Datensatz wurde nach dem European Standard EN 15804+A2 für Nachhaltiges Bauen modelliert. Ergebnisse werden in Modulen abgebildet, die den strukturierten Ausdruck von Ergebnissen über den gesamten Lebenszyklus zulassen.

## Geography
Der Datensatz bildet die länderspezifische Situation in Deutschland ab. Dabei werden Haupttechnologien, spezifische regionale Charakteristiken und ggf. Importstatistiken berücksichtigt.

## Time period
Jährlicher Durchschnitt

## Technology and included processes
Die Ökobilanz von PVC-Dachbahnen umfasst die Herstellung und Entsorgung. Transporte bis zur Einbaustelle/zum Stellort werden nicht berücksichtigt und müssen entsprechend der Systemgrenzen einbezogen werden. Herstellung von PVC: PVC wird durch Polymerisation von Vinylchlorid-Monomer zu Polyvinylchlorid-PVC erzeugt. Es kann durch Masse-, Emulsions- und Suspensionspolymerisation hergestellt werden. In dieser Bilanz wird die gegenwärtig dominierende Suspensions­polymerisation berücksichtigt. Im Allgemeinen wird die Polymerisation durch freie Radikale initiiert und verläuft bei Temperaturen von 40 bis 70 °C. Heutzutage wird die Suspensions­polymerisation bevorzugt, welche in einer wässrigen Lösung stattfindet. Nach der Polymerisation werden Monomere - soweit wirtschaftlich möglich - ausgestoßen, PVC wird durch Zentrifugation weiterverarbeitet und in einem Luftstrom von 80 °C getrocknet.

In Modul C1 wird ein manueller Rückbau (lastenfrei) angenommen. Sammelverluste werden vernachlässigt.
Der Transport in Modul C2 zur Verwertungsanlage erfolgt mit einem LKW (50km).
In Modul C3 wird die Zerkleinerung und thermische Behandlung (Verbrennung) des Materials berücksichtigt. Bei der Berechnung der Verbrennungsemissionen und Gutschriften wird der spezifische Heizwert des jeweiligen Materials sowie die Materialzusammensetzung berücksichtigt.
In Modul D erfolgen Gutschriften für die Substitution von Strom (deutscher Strommix) und thermischer Energie (aus Erdgas).

## Technical purpose
Dieses Produkt kann im Baubereich verwendet werden.

## Safety margin
20 %. Produktsystem bis auf wenige Prozesse/Flüsse abgebildet. Technologische, zeitliche und geographische Repräsentativität teilweise gegeben.

## Reference product
- PVC-Dachbahnen: 1

## Inputs
- Erneuerbare Primärenergie als Energieträger (PERE) [MJ]: A1-A3 17.4475, C2 0.00327925, C3 3.22019, D -4.12474
- Erneuerbare Primärenergie zur stofflichen Nutzung (PERM) [MJ]: A1-A3 0, C2 0, C3 0, D 0
- Total erneuerbare Primärenergie (PERT) [MJ]: A1-A3 17.4475, C2 0.00327925, C3 3.22019, D -4.12474
- Nicht-erneuerbare Primärenergie als Energieträger (PENRE) [MJ]: A1-A3 97.6243, C2 0.0565015, C3 46.4216, D -12.4178
- Nicht-erneuerbare Primärenergie zur stofflichen Nutzung (PENRM) [MJ]: A1-A3 30, C2 0, C3 -30, D 0
- Total nicht-erneuerbare Primärenergie (PENRT) [MJ]: A1-A3 127.624, C2 0.0565015, C3 16.4216, D -12.4178
- Einsatz von Sekundärstoffen (SM) [kg]: A1-A3 0, C2 0, C3 0, D 0
- Erneuerbare Sekundärbrennstoffe (SF) [MJ]: A1-A3 0, C2 0, C3 0, D 0
- Nicht erneuerbare Sekundärbrennstoffe (NRSF) [MJ]: A1-A3 0, C2 0, C3 0, D 0
- Nettoeinsatz von Süßwasserressourcen (FW) [m3]: A1-A3 0.0715318, C2 2.91443e-6, C3 0.0100101, D -0.00153493

## Outputs
- Gefährlicher Abfall zur Deponie (HWD) [kg]: A1-A3 8.3213e-7, C2 2.36158e-12, C3 2.22527e-9, D -4.2972e-9
- Entsorgter nicht gefährlicher Abfall (NHWD) [kg]: A1-A3 0.3138, C2 9.12064e-6, C3 3.23131, D -0.0065028
- Entsorgter radioaktiver Abfall (RWD) [kg]: A1-A3 0.00271495, C2 5.42206e-8, C3 0.000387575, D -0.000443617
- Komponenten für die Wiederverwendung (CRU) [kg]: A1-A3 0, C2 0, C3 0, D 0
- Stoffe zum Recycling (MFR) [kg]: A1-A3 0, C2 0, C3 0, D 0
- Stoffe für die Energierückgewinnung (MER) [kg]: A1-A3 0, C2 0, C3 1.5, D 0
- Exportierte elektrische Energie (EEE) [MJ]: A1-A3 0, C2 0, C3 3.30388, D 0
- Exportierte thermische Energie (EET) [MJ]: A1-A3 0, C2 0, C3 7.80614, D 0

## Impact indicators
- Globales Erwärmungspotenzial - total (GWP-total) [kg CO2 eq.]: A1-A3 6.19979, C2 0.00429174, C3 5.08594, D -0.797532
- Globales Erwärmungspotenzial - fossil (GWP-fossil) [kg CO2 eq.]: A1-A3 6.16288, C2 0.0042626, C3 5.08279, D -0.787984
- Globales Erwärmungspotenzial - biogen (GWP-biogenic) [kg CO2 eq.]: A1-A3 0.0273831, C2 1.76574e-6, C3 0.00151811, D -0.00840756
- Globales Erwärmungspotenzial - luluc (GWP-luluc) [kg CO2 eq.]: A1-A3 0.00953389, C2 2.73756e-5, C3 0.00163196, D -0.00113988
- Abbaupotenzial der stratosphärischen Ozonschicht (ODP) [kg CFC-11 eq.]: A1-A3 1.02997e-10, C2 1.09069e-18, C3 1.29832e-14, D -1.80057e-14
- Versauerungspotenzial, kumulierte Überschreitung (AP) [Mole of H+ eq.]: A1-A3 0.0170934, C2 1.20854e-5, C3 0.00144991, D -0.000803571
- Eutrophierungspotenzial - Süßwasser (EP-freshwater) [kg P eq.]: A1-A3 4.66983e-5, C2 8.76653e-9, C3 1.87382e-6, D -1.89675e-6
- Eutrophierungspotenzial - Salzwasser (EP-marine) [kg N eq.]: A1-A3 0.00429288, C2 5.56751e-6, C3 0.000472109, D -0.000296256
- Eutrophierungspotenzial - Land (EP-terrestrial) [Mole of N eq.]: A1-A3 0.047019, C2 6.22903e-5, C3 0.00627101, D -0.00315759
- Bildungspotenzial für troposphärisches Ozon (POCP) [kg NMVOC eq.]: A1-A3 0.0163317, C2 1.08568e-5, C3 0.00139977, D -0.000776753
- Potenzial für die Verknappung abiotischer Ressourcen nicht fossile Ressourcen (ADPE) [kg Sb eq.]: A1-A3 7.66257e-6, C2 3.70787e-10, C3 1.73886e-7, D -2.44226e-7
- Potenzial für die Verknappung abiotischer Ressourcen fossile Brennstoffe (ADPF) [MJ]: A1-A3 133.591, C2 0.0564992, C3 10.4195, D -12.4161
- Wasser-Entzugspotenzial (Benutzer) (WDP) [m³ world equiv.]: A1-A3 1.58767, C2 1.65702e-5, C3 0.36303, D -0.00932129

## Use advice
Der Datensatz repräsentiert ein Cradle to Gate Inventar. Er kann verwendet werden, um die Lieferkette des jeweiligen Produktes in einer repräsentativen Weise zu charakterisieren. Die Kombination mit einzelnen Einheitenprozessen und diesem Produkt ermöglicht die Erstellung von anwenderspezifischen (Produkt-) LCAs.

## Data sources
- Homepage Bärlocher, 2006
- Plastics Europe Association of Plastics Manufacturers, 2006
- ULLMANN'S Encyclopedia of Industrial Chemistry
- Documentation of data quality management
- GaBi Database Edition 2021, CUP2021.01
- GaBi database (all versions)
