# Kalkfarbe

Dataset: ILCD process, EPD, generic dataset
Geography: DE
Reference year: 2021
Valid until: 2022
Classification: oekobau.dat: Beschichtungen / Innenbeschichtungen / Innenfarben
Owner: Sphera Solutions GmbH
Compliance: EN 15804+A2
Review: Dependent internal review by Sphera Solutions GmbH; Independent external review by GaBi user forum
Amounts: rows without a unit in brackets have none in this file; such an amount is in the reference unit of its flow, which a separate flow dataset defines
copyright: true
licenseType: Free of charge for all users and uses
accessRestrictions: The license conditions as stated on https://www.oekobaudat.de/ apply.
accessRestrictions: Es gelten die Lizenzbedingungen wie sie auf https://www.oekobaudat.de/ genannt sind.

## General comment
Dieser Datensatz wurde nach dem European Standard EN 15804+A2 für Nachhaltiges Bauen modelliert. Ergebnisse werden in Modulen abgebildet, die den strukturierten Ausdruck von Ergebnissen über den gesamten Lebenszyklus zulassen.

## Geography
Der Datensatz bildet die länderspezifische Situation in Deutschland ab. Dabei werden Haupttechnologien, spezifische regionale Charakteristiken und ggf. Importstatistiken berücksichtigt.

## Time period
Jährlicher Durchschnitt

## Technology and included processes
Es wurde eine Kalkfarbe bestehend aus gelöschtem Kalk (Calzium Hydroxid), Wasser, sowie geringe Mengen Wasserglas und Titandioxid bilanziert. Die Ökobilanz wird durch die Vorkette des gelöschten Kalks dominiert.

In der Entsorgungsphase wird ein manueller Rückbau (lastenfrei) in Modul C1 angenommen. Der Transport in Modul C2 zur Deponie erfolgt mit einem LKW (50km). In C3 wird, sofern relevant, eine Verpackung mit PE-Folie berücksichtigt (z.B. bei Mineralfaserprodukten, 0,0125 kg Folie je kg entsorgtes Material). In Modul C4 werden dem Produkt entsprechende, durchschnittliche Deponieemissionen (Bezugsraum Deutschland) ausgewiesen. Die Nutzung von Deponiegas wird nicht berücksichtigt.

## Technical purpose
Kalkfarbe wird ausschließlich im Innenbereich eingesetzt. Sie ist feuchteunempfindlich und wirkt Schimmelbildung entgegen.

## Safety margin
20 %. Produktsystem bis auf wenige Prozesse/Flüsse abgebildet. Technologische, zeitliche und geographische Repräsentativität teilweise gegeben.

## Reference product
- Kalkfarbe: 1

## Inputs
- Erneuerbare Primärenergie als Energieträger (PERE) [MJ]: A1-A3 0.884015, C2 0.00273112, C4 0.0325289
- Erneuerbare Primärenergie zur stofflichen Nutzung (PERM) [MJ]: A1-A3 0, C2 0, C4 0
- Total erneuerbare Primärenergie (PERT) [MJ]: A1-A3 0.884015, C2 0.00273112, C4 0.0325289
- Nicht-erneuerbare Primärenergie als Energieträger (PENRE) [MJ]: A1-A3 5.0894, C2 0.0470572, C4 0.240862
- Nicht-erneuerbare Primärenergie zur stofflichen Nutzung (PENRM) [MJ]: A1-A3 2.17, C2 0, C4 -2.17
- Total nicht-erneuerbare Primärenergie (PENRT) [MJ]: A1-A3 7.2594, C2 0.0470572, C4 -1.92914
- Einsatz von Sekundärstoffen (SM) [kg]: A1-A3 0, C2 0, C4 0
- Erneuerbare Sekundärbrennstoffe (SF) [MJ]: A1-A3 0, C2 0, C4 0
- Nicht erneuerbare Sekundärbrennstoffe (NRSF) [MJ]: A1-A3 0, C2 0, C4 0
- Nettoeinsatz von Süßwasserressourcen (FW) [m3]: A1-A3 0.00219375, C2 2.42728e-6, C4 5.93297e-5

## Outputs
- Gefährlicher Abfall zur Deponie (HWD) [kg]: A1-A3 1.20788e-9, C2 1.96684e-12, C4 2.56252e-11
- Entsorgter nicht gefährlicher Abfall (NHWD) [kg]: A1-A3 0.0362468, C2 7.59611e-6, C4 1.20118
- Entsorgter radioaktiver Abfall (RWD) [kg]: A1-A3 0.00010593, C2 4.51576e-8, C4 2.48649e-6
- Komponenten für die Wiederverwendung (CRU) [kg]: A1-A3 0, C2 0, C4 0
- Stoffe zum Recycling (MFR) [kg]: A1-A3 0, C2 0, C4 0
- Stoffe für die Energierückgewinnung (MER) [kg]: A1-A3 0, C2 0, C4 0
- Exportierte elektrische Energie (EEE) [MJ]: A1-A3 0, C2 0, C4 0
- Exportierte thermische Energie (EET) [MJ]: A1-A3 0, C2 0, C4 0

## Impact indicators
- Globales Erwärmungspotenzial - total (GWP-total) [kg CO2 eq.]: A1-A3 0.932106, C2 0.00358134, C4 0.017773
- Globales Erwärmungspotenzial - fossil (GWP-fossil) [kg CO2 eq.]: A1-A3 0.927656, C2 0.00355707, C4 0.0181588
- Globales Erwärmungspotenzial - biogen (GWP-biogenic) [kg CO2 eq.]: A1-A3 0.00411323, C2 1.47059e-6, C4 -0.000439177
- Globales Erwärmungspotenzial - luluc (GWP-luluc) [kg CO2 eq.]: A1-A3 0.000336817, C2 2.27997e-5, C4 5.33877e-5
- Abbaupotenzial der stratosphärischen Ozonschicht (ODP) [kg CFC-11 eq.]: A1-A3 3.57091e-15, C2 9.08378e-19, C4 7.12511e-17
- Versauerungspotenzial, kumulierte Überschreitung (AP) [Mole of H+ eq.]: A1-A3 0.000836399, C2 1.11536e-5, C4 0.000129255
- Eutrophierungspotenzial - Süßwasser (EP-freshwater) [kg P eq.]: A1-A3 6.49749e-7, C2 7.30119e-9, C4 3.05624e-8
- Eutrophierungspotenzial - Salzwasser (EP-marine) [kg N eq.]: A1-A3 0.000240259, C2 5.20684e-6, C4 3.35553e-5
- Eutrophierungspotenzial - Land (EP-terrestrial) [Mole of N eq.]: A1-A3 0.00259704, C2 5.81387e-5, C4 0.000368662
- Bildungspotenzial für troposphärisches Ozon (POCP) [kg NMVOC eq.]: A1-A3 0.000692216, C2 1.00411e-5, C4 0.000101676
- Potenzial für die Verknappung abiotischer Ressourcen nicht fossile Ressourcen (ADPE) [kg Sb eq.]: A1-A3 5.3865e-7, C2 3.08809e-10, C4 1.72118e-9
- Potenzial für die Verknappung abiotischer Ressourcen fossile Brennstoffe (ADPF) [MJ]: A1-A3 7.69242, C2 0.0470553, C4 0.240735
- Wasser-Entzugspotenzial (Benutzer) (WDP) [m³ world equiv.]: A1-A3 0.0208415, C2 1.38005e-5, C4 0.00194337

## Use advice
Dieser Datensatz bezieht sich auf die Herstellung von 1 kg Kalkfarbe (fertig gemischt). Verbrauch: 0,15 - 0,25 kg/m² (je Anstrich). Dichte zwischen 1700 und 1900 kg/m³.

Der Datensatz repräsentiert ein Cradle to Gate Inventar. Er kann verwendet werden, um die Lieferkette des jeweiligen Produktes in einer repräsentativen Weise zu charakterisieren. Die Kombination mit einzelnen Einheitenprozessen und diesem Produkt ermöglicht die Erstellung von anwenderspezifischen (Produkt-) LCAs

## Data sources
- GaBi databases
- Documentation of data quality management
- GaBi Database Edition 2021, CUP2021.01
- GaBi database (all versions)
