# EGGER DHF

Dataset: ILCD process, EPD, specific dataset
Geography: DE
Reference year: 2021
Valid until: 2026
Classification: OEKOBAU.DAT: Holz / Holzwerkstoffe / Holzfaserplatten
Classification: IBUCategories: 02 Bauprodukte / Holzwerkstoffe / Holzwerkstoffe
Method details: Holzwerkstoffe.pdf
Generated by: Daxner & Merl GmbH
Registration number: EPD-EGG-20200247-IBD1-DE
Owner: Fritz EGGER GmbH & Co. OG
Compliance: DIN EN 15804+A2; ISO 14025
Review: Accredited third party review by Institut Bauen und Umwelt e. V.
Amounts: rows without a unit in brackets have none in this file; such an amount is in the reference unit of its flow, which a separate flow dataset defines
copyright: false
licenseType: Free of charge for all users and uses
accessRestrictions: None

## General comment
EGGER DHF-Platten sind kunstharzgebundene mitteldichte Holzfaserplatten gemäß EN 622-5 (Plattentyp MDF.RWH), die im Trockenverfahren hergestellt werden. Sie basieren hauptsächlich auf Fasern aus Nadelholz. Die Holzwerkstoffplatten sind im Kantenbereich mit Nut- und Feder-Profil versehen. Die Durchschnittsdaten spiegeln die für die DHF-Platten spezifische Produktionssituation für eine Dichte von 615 kg/m³ wider.

## Technology and included processes
Sägewerksrestholz bzw. entrindete Holzstämme werden auf eine definierte Größe zerkleinert und anschließend in einem Kocher bei hohem Druck gekocht und über Mahlscheiben zu Holzfasern zerrieben. Diese Holzfasern werden beleimt und in einer kontinuierlich arbeitenden Streustation zu einem Endlos-Faserkuchen gestreut. Dieser Kuchen wird ebenso endlos durch eine kontinuierliche Heißpresse gefördert und dabei immer weiter auf die gewünschte Enddicke verdichtet. Nach der Presse wird der endlose Plattenstrang auf das erforderliche Rohplattenmaß zugeschnitten und in großen Kühlsternwendern auf Raumtemperatur gekühlt. Die Platten werden anschließend in der Endfertigung auf das Plattenendmaß zugeschnitten und mit Nut- und Feder-Profil versehen, verpackt und für den Versand gelagert. Die Produktion umfasst die folgenden Prozessschritte: 1. Entrindung der Stämme 2. Zerspanung des Holzes zu Spänen und Hackschnitzel 3. Kochen der Späne und Hackschnitzel 4. Zerfaserung im Refiner 5. Trocknung der Fasern auf ca. 2-3 % Restfeuchte 6. Beleimung der Fasern mit Harzen 7. Streuung der beleimten Fasern auf ein Formband 8. Verpressen der Fasermatte in einer kontinuierlich arbeitenden Heißpresse 9. Aufteilen und Besäumen des Faserstranges zu Rohplattenformaten 10. Auskühlen der Rohplatten in Kühlsternwender 11. Abstapelung zu Großstapeln 12. Endfertigung / Nut-und Feder-Anlage Alle während der Produktion anfallenden Reste (Besäum- und Fräsreste) werden ausnahmslos einer thermischen Verwertung zugeführt.
Technische Daten:
Für EGGER DHF-Platten mit CE-Kennzeichnung nach EN 13986:2004+A1:2015 bzw. EN 14964:2006 liegt eine Leistungserklärung (DoP) mit den maßgebenden Daten vor unter: www.egger.com.
Deklarierte Einheit:
Die vorliegende Umwelt-Produktdeklaration bezieht sich auf eine deklarierte Einheit von 1 m³ EGGER DHF-Platte mit einer durchschnittlichen Rohdichte von 615 kg/m³ und einer Auslieferungsfeuchte von 7,5 %.

## Technical purpose
EGGER DHF-Platten werden vorwiegend als diffusionsoffene, wärmedämmende und zum Teil mittragende Beplankung in Dach und Wand eingesetzt. Sie erfüllen die Anforderungen als Unterdeckung des Typs UDP-A gemäß Richtlinie des Zentralverbandes des Deutschen Dachdeckerhandwerks (ZVDH).

DHF-Platten können als mittragende Außenbeplankung von Wänden und Dächern in den Nutzungsklassen 1 und 2 nach EN 1995-1-1 unter Berücksichtigung der DIN 68800-2 eingesetzt werden.

Zusätzlich zu den zuvor genannten Anwendungsbestimmungen sind die jeweiligen nationalen Vorschriften zu beachten.

## Reference product
- DHF-Platte: 1

## Inputs
- Erneuerbare Primärenergie als Energieträger (PERE) [MJ]: A1-A3 31916.6, C1 0, C2 1.47154, C3 10130.7, C4 0, D -1767.64
- Erneuerbare Primärenergie zur stofflichen Nutzung (PERM) [MJ]: A1-A3 10090.5, C1 0, C2 0, C3 -10090.5, C4 0, D 0
- Total erneuerbare Primärenergie (PERT) [MJ]: A1-A3 42007.1, C1 0, C2 1.47154, C3 40.1968, C4 0, D -1767.64
- Nicht-erneuerbare Primärenergie als Energieträger (PENRE) [MJ]: A1-A3 5253.45, C1 0, C2 25.5521, C3 494.04, C4 0, D -7020.95
- Nicht-erneuerbare Primärenergie zur stofflichen Nutzung (PENRM) [MJ]: A1-A3 403.267, C1 0, C2 0, C3 -403.267, C4 0, D 0
- Total nicht erneuerbare Primärenergie (PENRT) [MJ]: A1-A3 5656.72, C1 0, C2 25.5521, C3 90.7727, C4 0, D -7020.95
- Einsatz von Sekundärstoffen (SM) [kg]: A1-A3 0.253809, C1 0, C2 0, C3 0, C4 0, D 0
- Erneuerbare Sekundärbrennstoffe (RSF) [MJ]: A1-A3 3388.04, C1 0, C2 0, C3 0, C4 0, D 7695.03
- Nicht erneuerbare Sekundärbrennstoffe (NRSF) [MJ]: A1-A3 0, C1 0, C2 0, C3 0, C4 0, D 307.532
- Einsatz von Süßwasserressourcen (FW) [m^3]: A1-A3 1.17181, C1 0, C2 0.00171484, C3 0.0464778, C4 0, D -1.42959

## Outputs
- Gefährlicher Abfall zur Deponie (HWD) [kg]: A1-A3 1.78903e-5, C1 0, C2 1.18157e-6, C3 3.75519e-8, C4 0, D -2.37614e-6
- Entsorgter nicht gefährlicher Abfall (NHWD) [kg]: A1-A3 10.0514, C1 0, C2 0.00404981, C3 0.0643558, C4 0, D 0.256678
- Entsorgter radioaktiver Abfall (RWD) [kg]: A1-A3 0.160544, C1 0, C2 4.70949e-5, C3 0.0137636, C4 0, D -0.604347
- Komponenten für die Wiederverwendung (CRU) [kg]: A1-A3 0, C1 0, C2 0, C3 0, C4 0, D 0
- Stoffe zum Recycling (MFR) [kg]: A1-A3 0, C1 0, C2 0, C3 0, C4 0, D 0
- Stoffe für die Energierückgewinnung (MER) [kg]: A1-A3 0, C1 0, C2 0, C3 640.744, C4 0, D 0
- Exportierte elektrische Energie (EEE) [MJ]: A1-A3 0, C1 0, C2 0, C3 0, C4 0, D 0
- Exportierte thermische Energie (EET) [MJ]: A1-A3 0, C1 0, C2 0, C3 0, C4 0, D 0

## Impact indicators
- Globales Erwärmungspotenzial total (GWP-total) [kg CO_(2)-Äq.]: A1-A3 -583.691, C1 0, C2 1.93069, C3 998.338, C4 0, D -351.893
- Globales Erwärmungspotenzial fossil (GWP-fossil) [kg CO_(2)-Äq.]: A1-A3 398.328, C1 0, C2 1.91846, C3 5.16013, C4 0, D -350.537
- Globales Erwärmungspotenzial biogen (GWP-biogenic) [kg CO_(2)-Äq.]: A1-A3 -982.563, C1 0, C2 -0.00320218, C3 993.171, C4 0, D -1.02406
- Globales Erwärmungspotenzial luluc (GWP-luluc) [kg CO_(2)-Äq.]: A1-A3 0.54343, C1 0, C2 0.0154399, C3 0.00747616, C4 0, D -0.331881
- Abbau Potential der stratosphärischen Ozonschicht (ODP) [kg CFC11-Äq.]: A1-A3 1.6013e-11, C1 0, C2 3.50086e-16, C3 1.13479e-13, C4 0, D -4.97884e-12
- Versauerungspotenzial von Boden und Wasser (AP) [mol H^(+)-Äq.]: A1-A3 0.873188, C1 0, C2 0.00648291, C3 0.0113928, C4 0, D 0.273432
- Eutrophierungspotenzial Süßwasser (EP-freshwater) [kg PO_(4)-Äq.]: A1-A3 0.00115696, C1 0, C2 5.80995e-6, C3 1.37827e-5, C4 0, D -0.000609804
- Eutrophierungspotenzial Salzwasser (EP-marine) [kg N-Äq.]: A1-A3 0.342499, C1 0, C2 0.00292466, C3 0.00253031, C4 0, D 0.0693454
- Eutrophierungspotenzial Land (EP-terrestrial) [mol N-Äq.]: A1-A3 3.68729, C1 0, C2 0.0326703, C3 0.0265841, C4 0, D 0.824154
- Bildungspotential für troposphärisches Ozon (POCP) [kg NMVOC-Äq.]: A1-A3 0.988203, C1 0, C2 0.00574604, C3 0.00693432, C4 0, D 0.292901
- Potenzial für den abiotischen Abbau nicht fossiler Ressourcen (ADPE) [kg Sb-Äq.]: A1-A3 0.000270614, C1 0, C2 1.54242e-7, C3 1.4933e-6, C4 0, D -7.4858e-5
- Potenzial für den abiotischen Abbau fossiler Brennstoffe (ADPF) [MJ]: A1-A3 5655.27, C1 0, C2 25.4501, C3 90.7543, C4 0, D -7020.12
- Wassernutzung (WDP) [m^(3) Welt-Äq. entzogen]: A1-A3 2.78568, C1 0, C2 0.0185999, C3 1.12445, C4 0, D -22.9757
- Auftreten von Krankheiten aufgrund von Feinstaubemissionen (PM) [Krankheitsfälle]: A1-A3 0.00200452, C1 0, C2 3.66302e-8, C3 9.55523e-8, C4 0, D -1.47889e-6
- Wirkung durch Exposition des Menschen mit U235 (IR) [kBq U235-Äq.]: A1-A3 14.5678, C1 0, C2 0.00694767, C3 2.25814, C4 0, D -99.1487
- Toxizitätsvergleichseinheit für Ökosysteme (ETP-fw) [CTUe]: A1-A3 2904.21, C1 0, C2 19.0416, C3 38.8398, C4 0, D -1719.45
- Toxizitätsvergleichseinheit für Menschen (krebserregend) (HTP-c) [CTUh]: A1-A3 4.48308e-7, C1 0, C2 3.93563e-10, C3 1.07251e-9, C4 0, D -6.80029e-9
- Toxizitätsvergleichseinheit für Menschen (nicht krebserregend) (HTP-nc) [CTUh]: A1-A3 3.81575e-6, C1 0, C2 2.26773e-8, C3 3.95156e-8, C4 0, D 1.98759e-6
- Bodenqualitätsindex (SQP) [SQP]: A1-A3 80368.4, C1 0, C2 8.93326, C3 28.8839, C4 0, D -1291.07

## Use advice
Gültigkeitsbereich:
Dieses Dokument bezieht sich auf DHF-Platten, welche in folgendem Werk hergestellt werden:

Egger Holzwerkstoffe Wismar GmbH & Co. KG

Am Haffeld 1, 23970 Wismar, Deutschland
Systemgrenze:
Die Ökobilanz der EGGER DHF beinhaltet eine cradle-to-gate Betrachtung (Wiege bis zum Werkstor) der auftretenden Umweltwirkungen mit den Modulen C1-C4 und Modul D (A1-A3, +C, +D). Die folgenden Lebenszyklusphasen werden in der Analyse berücksichtigt:

Modul A1-A3 | Produktionsstadium

Das Produktionsstadium beinhaltet die Aufwendungen der Rohstoffversorgung (Rundholz, Herstellung des Leimsystems, der Emulsion und des Trennmittels etc.) sowie der damit verbundenen Transporte bezogen auf den Produktionsstandort in Wismar. Innerhalb der Werksgrenzen werden die DHF-Plattenproduktion, die Endfertigung und das Ausgangslager inklusive der Verpackung des Produkts berücksichtigt. Der Großteil der eingesetzten elektrischen Energie wird vom deutschen Stromnetz bezogen. Im eigenen Biomasse-Kraftwerk wird sowohl internes Restholz als auch extern bezogenes Altholz verwertet. Die Systemgrenze für in der Produktion verwendetes Altholz wird nach dem Sortieren und Hacken gesetzt. Dabei wird angenommen, dass das Ende der Abfalleigenschaft erreicht ist. Hier gilt die nach EN 15804 definierte Systemgrenze für Sekundärrohstoffe.

Modul C1 | Rückbau / Abriss
Für die DHF-Platten wurde ein manueller Ausbau angenommen. Die damit verbundenen Aufwände sind vernachlässigbar, wodurch keine Umweltwirkungen aus dem Rückbau der Produkte deklariert werden.

Modul C2 | Transport zur Abfallbehandlung
Modul C2 beinhaltet den Transport zur Abfallbehandlung. Dazu wird der Transport via LKW über 50 km Transportdistanz als repräsentatives Szenario angesetzt.

Modul C3 | Abfallbehandlung

Das Holzprodukt und mit ihm die materialinhärenten Eigenschaften verlassen das Produktsystem als Sekundärbrennstoff in Modul C3. Darüber hinaus wird das Hacken nach Ausbau des Produktes betrachtet.

Modul C4 | Beseitigung
Das angesetzte Szenario deklariert die energetische Verwertung der Holzprodukte, wodurch keine Umweltauswirkungen aus der Abfallbehandlung der Produkte in C4 zu erwarten sind.

Modul D | Gutschriften und Lasten außerhalb der Systemgrenzen

In Modul D wird die energetische Verwertung des Produktes am Lebensende inklusive den entsprechenden energetischen Substitutionspotenzialen in Form eines europäischen Durchschnittsszenarios beschrieben.

## Data sources
- GaBi Database (all versions)
- GaBi database SP40 2020
