# Photovoltaiksystem 1000 kWh/m2*a

Dataset: ILCD process, EPD, generic dataset
Geography: DE
Reference year: 2021
Valid until: 2022
Classification: oekobau.dat: Sonstige / Energieträger - Bereitstellung frei Verbraucher / Strom
Owner: Sphera Solutions GmbH
Compliance: EN 15804+A2
Review: Dependent internal review by Sphera Solutions GmbH; Independent external review by GaBi user forum
Amounts: rows without a unit in brackets have none in this file; such an amount is in the reference unit of its flow, which a separate flow dataset defines
copyright: true
licenseType: Free of charge for all users and uses
accessRestrictions: The license conditions as stated on https://www.oekobaudat.de/ apply.
accessRestrictions: Es gelten die Lizenzbedingungen wie sie auf https://www.oekobaudat.de/ genannt sind.

## General comment
Dieser Datensatz wurde nach dem European Standard EN 15804+A2 für Nachhaltiges Bauen modelliert. Ergebnisse werden in Modulen abgebildet, die den strukturierten Ausdruck von Ergebnissen über den gesamten Lebenszyklus zulassen.

## Geography
Der Datensatz bildet die länderspezifische Situation in Deutschland ab. Dabei werden Haupttechnologien, spezifische regionale Charakteristiken und ggf. Importstatistiken berücksichtigt.

## Time period
Jährlicher Durchschnitt

## Technology and included processes
Dieser Datensatz repräsentiert den Lebenszyklus einer installierten Photovoltaikanlage (PV Modul, Verkabelung, Befestigungsmittel und Wechselrichter) bezogen auf 1m² Fläche. Die Anteile der verschiedenen PV Technologien sind wie folgt: monokristalline Siliciumzellen 47.7 %, polykristalline Siliciumzellen 38.3%, Cadmium-Tellurid (CdTe) 6.4 %, amorphes Silicium 5.1 %, Ribbon-Silicium 1.5 % und Kupfer-Indium-Gallium-Diselenid 1.0 %. Dabei sind für die jeweiligen PV Technologien folgende Modulwirkungsgrade angenommen worden: monokristalline Siliciumzellen 14.0 %, polykristalline Siliciumzellen 13.2%, Cadmium-Tellurid (CdTe) 9.0%, amorphes Silicium 5.5 %, Ribbon-Sillicium 11.2 %, Kupfer-Indium-Gallium-Diselenid 11.0 %. Der gewichtete durchschnittliche Wirkungsgrad beträgt somit ca. 13.3%. Die Leistung der Anlage beträgt im gewichteten Durchschnitt 165 kWp. Der Systemwirkungsgrad der Anlage ist zu 75% angenommen worden. Für die Lebensdauer der Photovoltaikanlage wurden 20 Jahre angesetzt. Für Den Wechselrichter wurde als worst-case Abschätzung nur eine Lebenszeit von 10 Jahren angesetzt. Bei der Produktion und dem End of Life dieses Datensatzes sind entsprechend 2 Wechselrichter eingerechnet worden. Die Verschlechterung des Modul Wirkungsgrades (Degradation) der PV Module wurde vernachlässigt. Der Datensatz beinhaltet die Aufwendungen für die Produktion sowie eine Abschätzung der Lasten und Gutschriften am Lebensende (End of Life) basierend auf der Aufteilung nach den folgenden Materialien und deren weiterführende Behandlung: - Aluminium, Stahl, Kupfer (Stoffliches Recycling) - Plastik und Leiterplatte (Thermische Verwertung in MVA) - Glas, PV-Zelle (Deponierung) Die Solarstrahlungsenergie wurde zu 1000 kWh/m²*a angenommen, was einem ungünstigen Standort in Deutschland entspricht (für eher günstige Standorte sollte der Datensatz mit 1200 kWh/m²*a verwendet werden). Damit ergeben sich für 1m² Fläche Photovoltaikanlage über die Lebenszeit von 20 Jahren eine produzierte Strommenge von 7249 MJ. Die ersparten Aufwendungen durch Substitution werden nach Abzug der Netzverluste von 5% im Modul D deklariert (die regenerativ produzierte Strommenge substituiert Strom aus konventioneller Produktion). Somit setzt sich Modul D aus dem End of Life der Materialien und der Substitution der konventionellen Stromerzeugung zusammen, , wobei die ersparten Aufwendungen durch die Substition des konventionellen Strom den überwiegenden Hauptanteil der resultierenden Gutschriften ausmachen, während der Anteil aus dem End of Life der Materlien im Vergleich dazu sehr gering ist.

Hintergrundsystem:
Strom: Die Stromerzeugung wird entsprechend der länderspezifischen Randbedingungen modelliert. Die landesspezifische Analyse beinhaltet:
1.: Spezifische Kraftwerke der verschiedenen fossilen Energieträger und der Einsatz erneuerbarer Energien sind entsprechend der länderspezifischen Energieträgermixe modelliert. Die Analyse bezieht Stromimporte aus den Nachbarländern, Transmissions-und Verteilungsverluste und den Eigenverbrauch im Kraftwerk und bei der Verteilung bzw. Speicherung, z. B. durch Pumpspeicherwerke, ein.
2.: Die landes-/regionalspezifischen Technologiestandards sowie die Erzeugung in Elektrizitätskraftwerken und/oder in speziellen Kraftwerken mit Kraft-Wärme-Kopplung (KWK) sind berücksichtigt.
3.: Die länderspezifische Energieträgerbereitstellung (mit Anteil der Importe und/oder Eigenversorgung) einschließlich der Energieträger-Eigenschaften (z. B. Elementar- und Energiegehalte) werden berücksichtigt.
4.: Die Förderung, Produktion, Verarbeitung und Transportprozesse werden entsprechend der Situation im jeweiligen Stromerzeugerland modelliert. Die unterschiedlichen Produktions- und Verarbeitungsverfahren (Emissionen und Wirkungsgrade) in den verschiedenen Energieerzeugerländern werden einbezogen, z. B. Rohöl-Veredelungsverfahren oder Abfackel-Raten an den Ölplattformen.
Thermische Energie, Prozessdampf: Die Erzeugung von Dampf und thermischer Energie in Heizkraftwerken wird entsprechend der landesspezifischen Situation (Emissionsgrenzwerte, Energieträgerbasis) modelliert.
Der Wirkungsgrad für die thermische Energieerzeugung beträgt per Definition 100% des Energieträgereinsatzes. Für Prozessdampf liegt der Wirkungsgrad im Bereich von 85-95%. Die zur Heizenergie-Erzeugung verwendeten Energieträger werden entsprechend der nationalen Situation modelliert (siehe Kapitel Strom oben).
Transporte: Alle relevanten und bekannten Transportprozesse in Form von See- und Binnenschiffsverkehr sowie Bahn-, Lkw- und der Leitungstransport sind enthalten.
Energieträger: Die Energieträger werden entsprechend der spezifischen Versorgungslage modelliert (siehe Kapitel Strom oben).
Raffinerieprodukte: Diesel, Benzin, technische Gase, Heizöl, Schmierstoffe und Rückstände, wie Bitumen, werden mit einem parametrierten länderspezifische Raffineriemodell modelliert. Das Raffinerie-Modell bezieht die länderspezifischen Veredelungsverfahren (z. B. Emissionspegel, interner Energieverbrauch etc.) und das länderspezifische Produktspektrum ein, das sich je nach Land stark unterscheiden kann. Die Rohöl-Förderung wird gemäß der länderspezifischen Situation mit den jeweiligen Energieträger-Eigenschaften modelliert.

## Technical purpose
Dieses Produkt kann im Baubereich verwendet werden.

## Safety margin
10 %. Produktsystem weitgehend vollständig abgebildet. Gute technologische, zeitliche und geographische Repräsentativität.

## Reference product
- Photovoltaiksystem 1000 kWh/m2*a: 1

## Inputs
- Erneuerbare Primärenergie als Energieträger (PERE) [MJ]: A1-A3 1046.31, B6 79200, C3 0, C4 23.3978, D -9898.69
- Erneuerbare Primärenergie zur stofflichen Nutzung (PERM) [MJ]: A1-A3 0, B6 0, C3 0, C4 0, D 0
- Total erneuerbare Primärenergie (PERT) [MJ]: A1-A3 1046.31, B6 79200, C3 0, C4 23.3978, D -9898.69
- Nicht-erneuerbare Primärenergie als Energieträger (PENRE) [MJ]: A1-A3 3884.82, B6 0, C3 0, C4 71.9942, D -11477.4
- Nicht-erneuerbare Primärenergie zur stofflichen Nutzung (PENRM) [MJ]: A1-A3 0, B6 0, C3 0, C4 0, D 0
- Total nicht-erneuerbare Primärenergie (PENRT) [MJ]: A1-A3 3884.82, B6 0, C3 0, C4 71.9942, D -11477.4
- Einsatz von Sekundärstoffen (SM) [kg]: A1-A3 0, B6 0, C3 0, C4 0, D 0
- Erneuerbare Sekundärbrennstoffe (SF) [MJ]: A1-A3 0, B6 0, C3 0, C4 0, D 0
- Nicht erneuerbare Sekundärbrennstoffe (NRSF) [MJ]: A1-A3 0, B6 0, C3 0, C4 0, D 0
- Nettoeinsatz von Süßwasserressourcen (FW) [m3]: A1-A3 2.1369, B6 0, C3 0, C4 0.0320918, D -3.82737

## Outputs
- Gefährlicher Abfall zur Deponie (HWD) [kg]: A1-A3 3.51257e-5, B6 0, C3 0, C4 1.71582e-8, D -5.03069e-6
- Entsorgter nicht gefährlicher Abfall (NHWD) [kg]: A1-A3 22.7757, B6 0, C3 0, C4 15.9068, D -8.02228
- Entsorgter radioaktiver Abfall (RWD) [kg]: A1-A3 0.190648, B6 0, C3 0, C4 0.00260371, D -1.06943
- Komponenten für die Wiederverwendung (CRU) [kg]: A1-A3 0, B6 0, C3 0, C4 0, D 0
- Stoffe zum Recycling (MFR) [kg]: A1-A3 0, B6 0, C3 14.3, C4 0, D 0
- Stoffe für die Energierückgewinnung (MER) [kg]: A1-A3 0, B6 0, C3 0, C4 0, D 0
- Exportierte elektrische Energie (EEE) [MJ]: A1-A3 0, B6 7248.74, C3 0, C4 9.44102, D 0
- Exportierte thermische Energie (EET) [MJ]: A1-A3 0, B6 0, C3 0, C4 21.6922, D 0

## Impact indicators
- Globales Erwärmungspotenzial - total (GWP-total) [kg CO2 eq.]: A1-A3 302.303, B6 0, C3 0, C4 12.2062, D -876.973
- Globales Erwärmungspotenzial - fossil (GWP-fossil) [kg CO2 eq.]: A1-A3 301.871, B6 0, C3 0, C4 12.1722, D -859.903
- Globales Erwärmungspotenzial - biogen (GWP-biogenic) [kg CO2 eq.]: A1-A3 0.168417, B6 0, C3 0, C4 0.0255153, D -14.3419
- Globales Erwärmungspotenzial - luluc (GWP-luluc) [kg CO2 eq.]: A1-A3 0.263564, B6 0, C3 0, C4 0.00846052, D -2.72757
- Abbaupotenzial der stratosphärischen Ozonschicht (ODP) [kg CFC-11 eq.]: A1-A3 1.64703e-9, B6 0, C3 0, C4 9.87229e-14, D -4.30536e-11
- Versauerungspotenzial, kumulierte Überschreitung (AP) [Mole of H+ eq.]: A1-A3 1.25434, B6 0, C3 0, C4 0.0367571, D -1.4846
- Eutrophierungspotenzial - Süßwasser (EP-freshwater) [kg P eq.]: A1-A3 0.000489936, B6 0, C3 0, C4 1.32016e-5, D -0.00445725
- Eutrophierungspotenzial - Salzwasser (EP-marine) [kg N eq.]: A1-A3 0.219283, B6 0, C3 0, C4 0.0146664, D -0.427625
- Eutrophierungspotenzial - Land (EP-terrestrial) [Mole of N eq.]: A1-A3 2.38223, B6 0, C3 0, C4 0.162194, D -4.44026
- Bildungspotenzial für troposphärisches Ozon (POCP) [kg NMVOC eq.]: A1-A3 0.830984, B6 0, C3 0, C4 0.0390452, D -1.06489
- Potenzial für die Verknappung abiotischer Ressourcen nicht fossile Ressourcen (ADPE) [kg Sb eq.]: A1-A3 0.0124503, B6 0, C3 0, C4 1.32995e-6, D -0.00713957
- Potenzial für die Verknappung abiotischer Ressourcen fossile Brennstoffe (ADPF) [MJ]: A1-A3 3880.56, B6 0, C3 0, C4 71.9058, D -11472.4
- Wasser-Entzugspotenzial (Benutzer) (WDP) [m³ world equiv.]: A1-A3 63.1698, B6 0, C3 0, C4 0.898642, D -27.5049

## Use advice
Der Datensatz repräsentiert ein Cradle to Gate Inventar. Er kann verwendet werden, um die Lieferkette des jeweiligen Produktes in einer repräsentativen Weise zu charakterisieren. Die Kombination mit einzelnen Einheitenprozessen und diesem Produkt ermöglicht die Erstellung von anwenderspezifischen (Produkt-) LCAs.

## Data sources
- Documentation of data quality management
- GaBi Database Edition 2021, CUP2021.01
- GaBi database (all versions)
