# Warmumgeformte Stahlpressteile ("phs-ultraform")

Dataset: ILCD process, EPD, average dataset
Geography: GLO
Reference year: 2021
Valid until: 2026
Classification: OEKOBAU.DAT: Metalle / Stahl und Eisen / Stahlbleche
Classification: IBUCategories: 02 Bauprodukte / Metallbauprodukte und Zubehör / Dünnwandige Profile und Profiltafeln aus Metall
Method details: Dünnwandige Profile und Profiltafeln aus Metall.pdf
Generated by: Daxner & Merl GmbH
Registration number: EPD-VOE-20210174-IBB1-DE
Owner: voestalpine AG
Compliance: DIN EN 15804+A2; ISO 14025
Review: Accredited third party review by Institut Bauen und Umwelt e. V.
Amounts: rows without a unit in brackets have none in this file; such an amount is in the reference unit of its flow, which a separate flow dataset defines
copyright: true
licenseType: Free of charge for all users and uses
accessRestrictions: None

## General comment
phs-Bauteile (= press hardened steel, pressgehärtete Stähle) umfassen eine Produktgruppe, die sich durch äußerst hohe Festigkeit am Fertigbauteil bei sehr guten Umformmöglichkeiten in der Produktherstellung auszeichnen. In der vorliegenden Durchschnittsbetrachtung werden verschiedene Verarbeitungsvarianten von unterschiedlichen Herstellungsstandorten der voestalpine Metal Forming Division zusammengefasst.

„phs-ultraform“ ist eine registrierte Marke der voestalpine Stahl GmbH.

phs-ultraform (EUIPO Registrierungsnummern 013290044 und 005772165): Kaltumgeformte Bauteile werden erwärmt und dann in heißem Zustand final umgeformt und somit „pressgehärtet“.

voestalpine Werksmarken

/phs-ultraform 2000

/phs-ultraform 1500

/phs-ultraform 490

## Technology and included processes
Das Ausgangsmaterial für die Herstellung des feuerverzinkten Bandes ist Rohstahl, der über die Primärroute (Hochofen, LD- Stahlwerk) hergestellt wird. Der flüssige Rohstahl wird mittels Stranggussverfahren zu Brammen gegossen. Die gegossenen Brammen werden über Stoß- bzw. Hubbalkenöfen erneut auf 1100-1250 °C erwärmt und in mehreren Walzschritten zu Bändern mit einer Dicke von 1,2-4 mm gewalzt. Auf dem Warmband bildet sich eine Walzzunderschicht aus, die vor der Weiterverarbeitung im Kaltwalzwerk entfernt wird (Entzundern). Dieser Produktionsschritt verläuft zuerst durch eine mechanische Lockerung der Zunderschicht (Streckrichtanlage). In weiterer Folge wird das Stahlband mittels Salz- und Schwefelsäure gebeizt. „phs“ (=press hardening steel) umfasst das Umformen von verzinktem Flachstahl in heißem Zustand. Damit wird dem Ziel von hohen Umformgraden bei gleichzeitig höchsten Festigkeiten Rechnung getragen. Das indirekte Verfahren, „phs-ultraform“: Ausgehend von einem Stahlband oder einer lasergeschweißten Stahlplatine erfolgt die Kaltumformung der Teile in einer hydraulischen oder mechanischen Presse (hohe Maßgenauigkeit). Danach werden die umgeformten Teile auf etwa 900 °C erhitzt und unmittelbar danach in heißem Zustand nochmals gepresst. Durch die gekühlten Werkzeuge erfolgt eine Aufhärtung des Bauteils, die Zinkschicht wird aufgrund der geringeren Umformgrade nicht beschädigt. Das Bauteil wird danach gereinigt.
Technische Daten:
Maßgebend sind die in der Leistungserklärung aufgeführten Daten.

Bautechnische Daten:

Blechdicken: von 0,7 bis 3,0 mm

Bauteilmasse: von 2 bis 20 kg

Bauteilabmessungen:

Die Bauteildimension ist in einem CAD-Modell definiert. Die Abmessungen von typischen phs-Bauteilen von Automotive-Anwendungen reichen von

Breite: von 70 bis 2000 mm

Höhe: von 20 bis 400 mm

Länge: von 200 bis 3500 mm

Produktnormen:

Leistungswerte des Produkts entsprechend der Leistungserklärung in Bezug auf dessen wesentliche Merkmale gemäß

DIN EN 10143:2006, Kontinuierlich schmelztauchveredeltes Band und Blech aus Stahl; Grenzabmaße und Formtoleranzen.

DIN EN 10346:2015, Kontinuierlich schmelztauchveredelte Flacherzeugnisse aus Stahl zum Kaltumformen - Technische Lieferbedingungen.

DIN EN 10338:2015, Warmgewalzte und kaltgewalzte Flacherzeugnisse ohne Überzug aus Mehrphasenstählen zum Kaltumformen - Technische Lieferbedingungen.

SEW 022, 2010, Kontinuierlich schmelztauchveredelte Flacherzeugnisse aus Stahl - Zink-Magnesium Überzüge - Technische Lieferbedingungen.

VDA Werkstoffblatt 239-100, 2016, Flacherzeugnisse aus Stahl zur Kaltumformung.

Die voestalpine Gruppe hält zahlreiche Patente im Zusammenhang mit phs-ultraform. Dies umfasst beispielsweise:

spezielle phs-ultraform gefertigte Bauteile (z. B. TPP)
Oberflächenkonditionierung wie Reinigungsverfahren oder Vorbehandlung
Prozessführung bei der Erwärmung als auch Abkühlung (Vorkühlung) der Bauteile im Presshärteverfahren
Warmumformwerkzeuge inkl. der Gestaltung von z. B. Kühlkanälen
Deklarierte Einheit:
Die vorliegende Umwelt-Produktdeklaration für voestalpine phs-Bauteile bezieht sich auf eine deklarierte Einheit von 1 t pressgehärtete Stahlbauteile.

## Technical purpose
phs-Bauteile finden zurzeit vor allem in der Automotive-Industrie Anwendung. Eine Anwendung für andere Branchen mit hohen Anforderungen an Umformgrade, geringes Gewicht und hohe Festigkeit ist möglich. Die vorliegende Analyse erfolgte ausschließlich für phs-Bauteile im automotiven Sektor.

phs-Bauteile werden im überwiegenden Maße für Strukturteile des Chassis verwendet:

Längsträger vorne und hinten
Stoßfängerträger
Schweller
Querträger
A-Säule
B-Säule
Dachrahmen

In der Regel bestehen Bauteilgruppen (z. B. Längsträger) aus mehreren Einzelbauteilen, die durch entsprechende Fügetechnologie (Schweißen, Kleben, Nieten) miteinander verbunden werden. So können auf die Belastungssituation im Fertigbauteil optimierte Anwendungen realisiert werden.

Mit sogenannten „Tailored Property Parts“ (TPP) werden die Bauteileigenschaften „maßgeschneidert“. Durch Zusammenfügen von Flachstahl verschiedener Dicke und Stahlgüte („Laser Welded Blanks“), abschnittsweises Härten und Verstärken von Bauteilsegmenten werden sehr spezifische Anforderungen in Hinblick auf Crashverhalten, Verformbarkeit, Insassenschutz und Energieaufnahme realisiert.

Einsatz von pressgehärteten (phs) und TPP-Teilen

Verschiedene Varianten von „Tailored Property Parts“

## Reference product
- phs-Bauteile: 1000

## Inputs
- Erneuerbare Primärenergie als Energieträger (PERE) [MJ]: A1-A3 4336.64, C1 0, C2 2.29163, C3 0, C4 2.56803, D 1851.85
- Erneuerbare Primärenergie zur stofflichen Nutzung (PERM) [MJ]: A1-A3 0, C1 0, C2 0, C3 0, C4 0, D 0
- Total erneuerbare Primärenergie (PERT) [MJ]: A1-A3 4336.64, C1 0, C2 2.29163, C3 0, C4 2.56803, D 1851.85
- Nicht-erneuerbare Primärenergie als Energieträger (PENRE) [MJ]: A1-A3 48958.2, C1 0, C2 39.97, C3 0, C4 35.5601, D -20141.2
- Nicht-erneuerbare Primärenergie zur stofflichen Nutzung (PENRM) [MJ]: A1-A3 0, C1 0, C2 0, C3 0, C4 0, D 0
- Total nicht erneuerbare Primärenergie (PENRT) [MJ]: A1-A3 48958.2, C1 0, C2 39.97, C3 0, C4 35.5601, D -20141.2
- Einsatz von Sekundärstoffen (SM) [kg]: A1-A3 221.512, C1 0, C2 0, C3 0, C4 0, D 1364.39
- Erneuerbare Sekundärbrennstoffe (RSF) [MJ]: A1-A3 0, C1 0, C2 0, C3 0, C4 0, D 0
- Nicht erneuerbare Sekundärbrennstoffe (NRSF) [MJ]: A1-A3 0, C1 0, C2 0, C3 0, C4 0, D 0
- Einsatz von Süßwasserressourcen (FW) [m^3]: A1-A3 11.4968, C1 0, C2 0.00262466, C3 0, C4 0.000367451, D -10.1947

## Outputs
- Gefährlicher Abfall zur Deponie (HWD) [kg]: A1-A3 1.22578e-5, C1 0, C2 2.1061e-9, C3 0, C4 6.30055e-9, D 5.61631e-6
- Entsorgter nicht gefährlicher Abfall (NHWD) [kg]: A1-A3 51.6285, C1 0, C2 0.00627081, C3 0, C4 50.0682, D 242.107
- Entsorgter radioaktiver Abfall (RWD) [kg]: A1-A3 0.714947, C1 0, C2 7.25026e-5, C3 0, C4 0.000405317, D 0.000729027
- Komponenten für die Wiederverwendung (CRU) [kg]: A1-A3 0, C1 0, C2 0, C3 0, C4 0, D 0
- Stoffe zum Recycling (MFR) [kg]: A1-A3 633, C1 0, C2 0, C3 950, C4 0, D 0
- Stoffe für die Energierückgewinnung (MER) [kg]: A1-A3 0, C1 0, C2 0, C3 0, C4 0, D 0
- Exportierte elektrische Energie (EEE) [MJ]: A1-A3 0, C1 0, C2 0, C3 0, C4 0, D 0
- Exportierte thermische Energie (EET) [MJ]: A1-A3 0, C1 0, C2 0, C3 0, C4 0, D 0

## Impact indicators
- Globales Erwärmungspotenzial total (GWP-total) [kg CO_(2)-Äq.]: A1-A3 4889.42, C1 0, C2 3.02407, C3 0, C4 2.41918, D -2314.48
- Globales Erwärmungspotenzial fossil (GWP-fossil) [kg CO_(2)-Äq.]: A1-A3 4874.85, C1 0, C2 3.00319, C3 0, C4 2.44175, D -2313.32
- Globales Erwärmungspotenzial biogen (GWP-biogenic) [kg CO_(2)-Äq.]: A1-A3 12.0944, C1 0, C2 -0.00356122, C3 0, C4 -0.0250097, D -1.4986
- Globales Erwärmungspotenzial luluc (GWP-luluc) [kg CO_(2)-Äq.]: A1-A3 2.47422, C1 0, C2 0.0244391, C3 0, C4 0.00244365, D 0.334787
- Abbau Potential der stratosphärischen Ozonschicht (ODP) [kg CFC11-Äq.]: A1-A3 8.01668e-11, C1 0, C2 5.90297e-16, C3 0, C4 5.76801e-15, D -3.85713e-12
- Versauerungspotenzial von Boden und Wasser (AP) [mol H^(+)-Äq.]: A1-A3 13.6488, C1 0, C2 0.00991632, C3 0, C4 0.00777562, D -4.15265
- Eutrophierungspotenzial Süßwasser (EP-freshwater) [kg PO_(4)-Äq.]: A1-A3 0.006263, C1 0, C2 8.88276e-6, C3 0, C4 1.85847e-6, D -0.000473035
- Eutrophierungspotenzial Salzwasser (EP-marine) [kg N-Äq.]: A1-A3 3.23124, C1 0, C2 0.00455498, C3 0, C4 0.00193046, D -0.61888
- Eutrophierungspotenzial Land (EP-terrestrial) [mol N-Äq.]: A1-A3 35.1374, C1 0, C2 0.0508449, C3 0, C4 0.0211802, D -6.03351
- Bildungspotential für troposphärisches Ozon (POCP) [kg NMVOC-Äq.]: A1-A3 10.137, C1 0, C2 0.00894108, C3 0, C4 0.00608284, D -3.16845
- Potenzial für den abiotischen Abbau nicht fossiler Ressourcen (ADPE) [kg Sb-Äq.]: A1-A3 0.106797, C1 0, C2 2.65014e-7, C3 0, C4 1.68496e-7, D -0.00503343
- Potenzial für den abiotischen Abbau fossiler Brennstoffe (ADPF) [MJ]: A1-A3 48745, C1 0, C2 39.8249, C3 0, C4 35.5529, D -20135.1
- Wassernutzung (WDP) [m^(3) Welt-Äq. entzogen]: A1-A3 226.718, C1 0, C2 0.0277457, C3 0, C4 -0.028939, D -453.949
- Auftreten von Krankheiten aufgrund von Feinstaubemissionen (PM) [Krankheitsfälle]
- Wirkung durch Exposition des Menschen mit U235 (IR) [kBq U235-Äq.]
- Toxizitätsvergleichseinheit für Ökosysteme (ETP-fw) [CTUe]
- Toxizitätsvergleichseinheit für Menschen (krebserregend) (HTP-c) [CTUh]
- Toxizitätsvergleichseinheit für Menschen (nicht krebserregend) (HTP-nc) [CTUh]
- Bodenqualitätsindex (SQP) [SQP]

## Use advice
Gültigkeitsbereich:
Die vorliegende Umwelt-Produktdeklaration gilt für voestalpine phs-ultraform-Bauteile und bezieht sich auf die durchschnittliche Jahresproduktion der betrachteten Standorte bezogen auf 1 t durchschnittliches phs-Bauteil.

Die betrachteten Standorte sind:

voestalpine Automotive Components Schmölln GmbH (DE),
voestalpine Automotive Components Schwäbisch Gmünd GmbH & Co. KG (DE)
voestalpine Automotive Components Cartersville Inc. (USA)
voestalpine Automotive Components Shenyang Co., Ltd. (CN)
Systemgrenze:
Die Ökobilanz der durchschnittlichen phs-Bauteile beinhaltet eine cradle-to-gate-Betrachtung (Wiege bis zum Werkstor) der auftretenden Umweltwirkungen mit den Modulen C1-C4 und Modul D (A1-A3 + C + D). Die folgenden Lebenszyklusphasen werden in der Analyse berücksichtigt:

Modul A1-A3 | Produktionsstadium

Das Produktionsstadium beinhaltet die Aufwendungen des Herstellungsprozesses der phs-Bauteile an den Standorten Schwäbisch-Gmünd, Schmölln, Shenyang und Cartersville. Dabei wird der indirekte Presshärteprozess zur Produktion von hoch korrosionsbeständigen Leichtbauteilen im jeweiligen Werk abgebildet. Das Vormaterial wird vom integrierten Stahlwerk der voestalpine Standort Linz und der voestalpine Automotive Components Linz angeliefert. Die Bereitstellung der elektrischen Energie erfolgt jeweils vom nationalen Stromnetz. Für die thermische Energie wird Erdgas als Energieträger eingesetzt. Der Ladungsträger variiert gemäß Kundenanforderung und ist nicht in der Deklaration enthalten.

Modul C1 | Ausbau

phs-Bauteile werden im Automotiv-Bereich eingesetzt. Die Verwertung der phs-Bauteile erfolgt beim Entsorger.

Modul C2 | Transport zur Abfallbehandlung

Modul C2 beinhaltet den Transport zur Abfallbehandlung. Dazu wird der Transport via LKW über 50 km Transportdistanz als repräsentatives Szenario angesetzt.

Modul C3 | Abfallbehandlung

Das Fahrzeug wird beim Entsorger in die Grundkomponenten zerlegt und anschließend geschreddert. Nach der Zerkleinerung und Sortierung erreicht der Schrott das Ende der Abfalleigenschaft in C3 und erreicht das Modul D zum Recycling. Aufwendungen für die Zerkleinerung und Sortierung des Stahlschrottes sind aufgrund der Geringfügigkeit der zu erwartenden Umweltwirkung nicht enthalten. Modul C4 | Entsorgung

Das Modul C4 deklariert die durch die Deponierung

(5 % des Produktes) entstehenden Umweltwirkungen.
Modul D | Potenziale und Lasten außerhalb der Systemgrenzen

Im Modul D werden die Substitutionspotenziale von Primärstahl durch ein Recyclingszenario (95 % des

Produktes) dargestellt.

## Data sources
- GaBi Database (all versions)
- GaBi Database Edition 2021, CUP 2021.01
