# Gas Blockheizkraftwerk (500 kW); 1 piece

Dataset: ILCD process, EPD, generic dataset
Geography: DE
Reference year: 2021
Valid until: 2022
Classification: oekobau.dat: Gebäudetechnik / Heizung / Wärmeerzeuger
Owner: Sphera Solutions GmbH
Compliance: EN 15804+A2
Review: Dependent internal review by Sphera Solutions GmbH; Independent external review by GaBi user forum
Amounts: rows without a unit in brackets have none in this file; such an amount is in the reference unit of its flow, which a separate flow dataset defines
copyright: true
licenseType: Free of charge for all users and uses
accessRestrictions: The license conditions as stated on https://www.oekobaudat.de/ apply.
accessRestrictions: Es gelten die Lizenzbedingungen wie sie auf https://www.oekobaudat.de/ genannt sind.

## General comment
Dieser Datensatz wurde nach dem European Standard EN 15804+A2 für Nachhaltiges Bauen modelliert. Ergebnisse werden in Modulen abgebildet, die den strukturierten Ausdruck von Ergebnissen über den gesamten Lebenszyklus zulassen.

## Geography
Der Datensatz bildet die länderspezifische Situation in Deutschland ab. Dabei werden Haupttechnologien, spezifische regionale Charakteristiken und ggf. Importstatistiken berücksichtigt.

## Time period
Jährlicher Durchschnitt

## Technology and included processes
Der Datensatz beinhaltet ausschließlich die Herstellung und Entsorgung des Blockheizkraftwerks, nicht dessen Betrieb. Hauptrohstoffe der Anlage sind Stahl (ca. 47 M.%), Edelstahl (ca. 19 M.%), Aluminium (ca. 17 M.%) und Kupfer (ca. 5 M.%).
Für diese Metalle (Stahl, Edelstahl, Aluminium und Kupfer) wurden im Sinne eines koservativen Ansatzes die Primärvorketten verwendet (z.B. im Falle von Stahl die Hochofenroute). Die Ökobilanz wird von der Stahlherstellung dominiert. Edelstahl, Aluminium und Kupfer liefern ebenfalls relevante Beiträge.

Beschreibung EoL Prozesse:
In Modul C1 wird ein maschineller Rückbau angenommen. Sammelverluste werden vernachlässigt.
Der Transport in Modul C2 zur Verwertungsanlage erfolgt mit einem LKW (50km).

Behandlung Metallkomponenten:
Es wird angenommen, dass alle Metalle das Ende der Abfalleigenschaft direkt nach dem Ausbau erreichen. Das heißt die Lasten für die Aufbereitung und die Gutschriften für die Substitution von Primärmaterial werden in Modul D ausgewiesen.
In Modul D sind die Lasten für die Sortierung, Umschmelzen, Schlackebehandlung, Deponierung von Reststoffen, Behandlung von Filterstäuben und Krätzebehandlung enthalten. Die Gutschriften werden für die Nettoschrottmenge (zurückgebaute Menge abzüglich ggfs. enthaltenes Sekundärmaterial, abzüglich Aufbereitungsverluste) für den durchschnittlich vorhandenen Materialmix (aus verschiedenen Legierungen) vergeben.

Kunststoffkomponten:
In Modul C3 wird die Zerkleinerung und thermische Behandlung (Verbrennung) des Materials berücksichtigt. Bei der Berechnung der Verbrennungsemissionen und Gutschriften wird der spezifische Heizwert des jeweiligen Materials sowie die Materialzusammensetzung berücksichtigt.
In Modul D erfolgen Gutschriften für die Substitution von Strom (deutscher Strommix) und thermischer Energie (aus Erdgas).

## Technical purpose
Blockheizkraftwerke werden für die Erzeugung von elektrischer und thermischer Energie verwendet.

## Safety margin
20 %. Produktsystem bis auf wenige Prozesse/Flüsse abgebildet. Technologische, zeitliche und geographische Repräsentativität teilweise gegeben.

## Reference product
- Gas Blockheizkraftwerk (500 kW): 1

## Inputs
- Erneuerbare Primärenergie als Energieträger (PERE) [MJ]: A1-A3 112254, C1 0.918882, C2 16.4268, C3 62.9541, D -55220.3
- Erneuerbare Primärenergie zur stofflichen Nutzung (PERM) [MJ]: A1-A3 0, C1 0, C2 0, C3 0, D 0
- Total erneuerbare Primärenergie (PERT) [MJ]: A1-A3 112254, C1 0.918882, C2 16.4268, C3 62.9541, D -55220.3
- Nicht-erneuerbare Primärenergie als Energieträger (PENRE) [MJ]: A1-A3 511538, C1 15.8324, C2 283.035, C3 285.434, D -250714
- Nicht-erneuerbare Primärenergie zur stofflichen Nutzung (PENRM) [MJ]: A1-A3 0, C1 0, C2 0, C3 0, D 0
- Total nicht-erneuerbare Primärenergie (PENRT) [MJ]: A1-A3 511538, C1 15.8324, C2 283.035, C3 285.434, D -250714
- Einsatz von Sekundärstoffen (SM) [kg]: A1-A3 1098.95, C1 0, C2 0, C3 0, D 0
- Erneuerbare Sekundärbrennstoffe (SF) [MJ]: A1-A3 0, C1 0, C2 0, C3 0, D 0
- Nicht erneuerbare Sekundärbrennstoffe (NRSF) [MJ]: A1-A3 0, C1 0, C2 0, C3 0, D 0
- Nettoeinsatz von Süßwasserressourcen (FW) [m3]: A1-A3 288.954, C1 0.000816657, C2 0.0145994, C3 3.75915, D -201.591

## Outputs
- Gefährlicher Abfall zur Deponie (HWD) [kg]: A1-A3 5.28318e-5, C1 6.61742e-10, C2 1.18299e-8, C3 6.0076e-8, D 2.38574e-6
- Entsorgter nicht gefährlicher Abfall (NHWD) [kg]: A1-A3 5673.52, C1 0.00255571, C2 0.0456883, C3 7.06853, D -3090.3
- Entsorgter radioaktiver Abfall (RWD) [kg]: A1-A3 18.2092, C1 1.51932e-5, C2 0.000271609, C3 0.00772949, D -8.8824
- Komponenten für die Wiederverwendung (CRU) [kg]: A1-A3 0, C1 0, C2 0, C3 0, D 0
- Stoffe zum Recycling (MFR) [kg]: A1-A3 0, C1 7050, C2 0, C3 0, D 0
- Stoffe für die Energierückgewinnung (MER) [kg]: A1-A3 0, C1 0, C2 0, C3 464, D 0
- Exportierte elektrische Energie (EEE) [MJ]: A1-A3 0, C1 0, C2 0, C3 2646.47, D 0
- Exportierte thermische Energie (EET) [MJ]: A1-A3 0, C1 0, C2 0, C3 6095.22, D 0

## Impact indicators
- Globales Erwärmungspotenzial - total (GWP-total) [kg CO2 eq.]: A1-A3 41496.6, C1 1.18447, C2 21.4988, C3 1749.11, D -22135
- Globales Erwärmungspotenzial - fossil (GWP-fossil) [kg CO2 eq.]: A1-A3 41444.2, C1 1.17655, C2 21.3528, C3 1748.99, D -22139.8
- Globales Erwärmungspotenzial - biogen (GWP-biogenic) [kg CO2 eq.]: A1-A3 11.6565, C1 0.000254943, C2 0.00884516, C3 0.0937526, D 27.1935
- Globales Erwärmungspotenzial - luluc (GWP-luluc) [kg CO2 eq.]: A1-A3 40.7775, C1 0.00767095, C2 0.137133, C3 0.0209545, D -22.3547
- Abbaupotenzial der stratosphärischen Ozonschicht (ODP) [kg CFC-11 eq.]: A1-A3 1.73773e-10, C1 3.05623e-16, C2 5.46362e-15, C3 2.58596e-13, D 2.81756e-9
- Versauerungspotenzial, kumulierte Überschreitung (AP) [Mole of H+ eq.]: A1-A3 184.438, C1 0.0158408, C2 0.06054, C3 0.269902, D -96.9987
- Eutrophierungspotenzial - Süßwasser (EP-freshwater) [kg P eq.]: A1-A3 0.0387401, C1 2.45648e-6, C2 4.39145e-5, C3 3.52857e-5, D -0.0132429
- Eutrophierungspotenzial - Salzwasser (EP-marine) [kg N eq.]: A1-A3 26.3696, C1 0.00720656, C2 0.0278895, C3 0.0434473, D -13.6757
- Eutrophierungspotenzial - Land (EP-terrestrial) [Mole of N eq.]: A1-A3 285.361, C1 0.079237, C2 0.312033, C3 1.2566, D -147.755
- Bildungspotenzial für troposphärisches Ozon (POCP) [kg NMVOC eq.]: A1-A3 82.3812, C1 0.0215828, C2 0.0543852, C3 0.117744, D -42.5282
- Potenzial für die Verknappung abiotischer Ressourcen nicht fossile Ressourcen (ADPE) [kg Sb eq.]: A1-A3 2.04348, C1 1.03899e-7, C2 1.85739e-6, C3 3.67716e-6, D -1.15733
- Potenzial für die Verknappung abiotischer Ressourcen fossile Brennstoffe (ADPF) [MJ]: A1-A3 510536, C1 15.8317, C2 283.023, C3 285.333, D -250067
- Wasser-Entzugspotenzial (Benutzer) (WDP) [m³ world equiv.]: A1-A3 5498.52, C1 0.00464315, C2 0.0830056, C3 160.2, D -3940.27

## Use advice
Dieser Datensatz bezieht sich auf die Herstellung eines Blockheizkraftwerks mit einer elektrischen Leistung von 500 kW. Das Gesamtgewicht der Anlage beträgt 7.500 kg. Der Datensatz kann näherungsweise für die Abschätzung anderer Anlagengewichte zwischen 5.000 und 10.000 kg verwendet werden.

## Data sources
- VDI 2067
- HUTTER 2001
- MEEUP 2005
- BUDERUS 2008
- BRÖNTJE 2006
- EVA 2003
- Documentation of data quality management
- GaBi Database Edition 2021, CUP2021.01
- GaBi database (all versions)
