# Gussasphaltestrich

Dataset: ILCD process, EPD, generic dataset
Geography: DE
Reference year: 2018
Valid until: 2022
Classification: oekobau.dat: Mineralische Baustoffe / Asphalt / Gussassphalt
Owner: thinkstep
Compliance: DIN EN 15804
Review: Dependent internal review by thinkstep, IABP-GaBi, IBP-GaBi; Independent external review by GaBi user forum, GaBi bug forum, GaBi user community
Amounts: rows without a unit in brackets have none in this file; such an amount is in the reference unit of its flow, which a separate flow dataset defines
copyright: true

## General comment
Dieser Datensatz wurde nach dem European Standard EN 15804 für Nachhaltiges Bauen modelliert. Ergebnisse werden in Modulen abgebildet, die den strukturierten Ausdruck von Ergebnissen über den gesamten Lebenszyklus zulassen.

## Geography
Der Datensatz bildet die länderspezifische Situation in Deutschland ab. Dabei werden Haupttechnologien, spezifische regionale Charakteristiken und ggf. Importstatistiken berücksichtigt.

## Time period
Jährlicher Durchschnitt

## Technology and included processes
Für die Herstellung von Gussasphaltestrich wird Gestein (Splitt, Sand, Gesteinsmehl) mit Bitumen vermischt und auf 220 - 250 °C erhitzt. Der Bitumeneinsatz, die Gesteinsmehle und die thermische Energie haben einen in etwa gleich hohen, relevanten Einfluss auf die Ökobilanz (bezogen auf GWP). Die thermische Energie für das Aufrechterhalten der Temperatur während der Lieferung auf die Baustelle wurde vernachlässigt.

Hintergrundsystem:
Strom: Die Stromerzeugung wird entsprechend der länderspezifischen Randbedingungen modelliert. Die landesspezifische Analyse beinhaltet:
1.: Spezifische Kraftwerke der verschiedenen fossilen Energieträger und der Einsatz erneuerbarer Energien sind entsprechend der länderspezifischen Energieträgermixe modelliert. Die Analyse bezieht Stromimporte aus den Nachbarländern, Transmissions-und Verteilungsverluste und den Eigenverbrauch im Kraftwerk und bei der Verteilung bzw. Speicherung, z. B. durch Pumpspeicherwerke, ein.
2.: Die landes-/regionalspezifischen Technologiestandards sowie die Erzeugung in Elektrizitätskraftwerken und/oder in speziellen Kraftwerken mit Kraft-Wärme-Kopplung (KWK) sind berücksichtigt.
3.: Die länderspezifische Energieträgerbereitstellung (mit Anteil der Importe und/oder Eigenversorgung) einschließlich der Energieträger-Eigenschaften (z. B. Elementar- und Energiegehalte) werden berücksichtigt.
4.: Die Förderung, Produktion, Verarbeitung und Transportprozesse werden entsprechend der Situation im jeweiligen Stromerzeugerland modelliert. Die unterschiedlichen Produktions- und Verarbeitungsverfahren (Emissionen und Wirkungsgrade) in den verschiedenen Energieerzeugerländern werden einbezogen, z. B. Rohöl-Veredelungsverfahren oder Abfackel-Raten an den Ölplattformen.
Thermische Energie, Prozessdampf: Die Erzeugung von Dampf und thermischer Energie in Heizkraftwerken wird entsprechend der landesspezifischen Situation (Emissionsgrenzwerte, Energieträgerbasis) modelliert.
Der Wirkungsgrad für die thermische Energieerzeugung beträgt per Definition 100% des Energieträgereinsatzes. Für Prozessdampf liegt der Wirkungsgrad im Bereich von 85-95%. Die zur Heizenergie-Erzeugung verwendeten Energieträger werden entsprechend der nationalen Situation modelliert (siehe Kapitel Strom oben).
Transporte: Alle relevanten und bekannten Transportprozesse in Form von See- und Binnenschiffsverkehr sowie Bahn-, Lkw- und der Leitungstransport sind enthalten.
Energieträger: Die Energieträger werden entsprechend der spezifischen Versorgungslage modelliert (siehe Kapitel Strom oben).
Raffinerieprodukte: Diesel, Benzin, technische Gase, Heizöl, Schmierstoffe und Rückstände, wie Bitumen, werden mit einem parametrierten länderspezifische Raffineriemodell modelliert. Das Raffinerie-Modell bezieht die länderspezifischen Veredelungsverfahren (z. B. Emissionspegel, interner Energieverbrauch etc.) und das länderspezifische Produktspektrum ein, das sich je nach Land stark unterscheiden kann. Die Rohöl-Förderung wird gemäß der länderspezifischen Situation mit den jeweiligen Energieträger-Eigenschaften modelliert.

## Technical purpose
Gussasphaltestrich wird als Ausgleichs- und Tragschicht im Bodenaufbau verwendet. Eigenschaften: schnelle Belegreife (nach wenigen Stunden), hohen innere Dämpfung (Schallschutz), Wasserdicht (gegen aufsteigende Feuchte). Gussasphalt ist theoretisch stofflich wiederverwendbar (Recycling).

## Safety margin
20 %. Produktsystem bis auf wenige Prozesse/Flüsse abgebildet. Technologische, zeitliche und geographische Repräsentativität teilweise gegeben.

## Reference product
- Gussasphaltestrich: 1

## Inputs
- Erneuerbare Primärenergie als Energieträger (PERE) [MJ]: A1-A3 0.0924054, C2 0.00272242, C3 0, C4 0.0875008
- Erneuerbare Primärenergie zur stofflichen Nutzung (PERM) [MJ]: A1-A3 0, C2 0, C3 0, C4 0
- Total erneuerbare Primärenergie (PERT) [MJ]: A1-A3 0.0924054, C2 0.00272242, C3 0, C4 0.0875008
- Nicht-erneuerbare Primärenergie als Energieträger (PENRE) [MJ]: A1-A3 1.74045, C2 0.0467641, C3 4.644, C4 1.24515
- Nicht-erneuerbare Primärenergie zur stofflichen Nutzung (PENRM) [MJ]: A1-A3 4.644, C2 0, C3 -4.644, C4 0
- Total nicht erneuerbare Primärenergie (PENRT) [MJ]: A1-A3 6.38445, C2 0.0467641, C3 0, C4 1.24515
- Einsatz von Sekundärstoffen (SM) [kg]: A1-A3 0, C2 0, C3 0, C4 0
- Erneuerbare Sekundärbrennstoffe (RSF) [MJ]: A1-A3 0, C2 0, C3 0, C4 0
- Nicht erneuerbare Sekundärbrennstoffe (NRSF) [MJ]: A1-A3 0, C2 0, C3 0, C4 0
- Einsatz von Süßwasserressourcen (FW) [m3]: A1-A3 0.000401098, C2 2.43815e-6, C3 0, C4 1.5282e-5

## Outputs
- Gefährlicher Abfall zur Deponie (HWD) [kg]: A1-A3 2.47432e-9, C2 1.74752e-9, C3 0, C4 4.54465e-9
- Entsorgter nicht gefährlicher Abfall (NHWD) [kg]: A1-A3 0.00854585, C2 8.20791e-6, C3 0, C4 1.1952
- Entsorgter radioaktiver Abfall (RWD) [kg]: A1-A3 1.42591e-5, C2 4.92329e-8, C3 0, C4 1.50224e-5
- Komponenten für die Wiederverwendung (CRU) [kg]: A1-A3 0, C2 0, C3 0, C4 0
- Stoffe zum Recycling (MFR) [kg]: A1-A3 0, C2 0, C3 0, C4 0
- Stoffe für die Energierückgewinnung (MER) [kg]: A1-A3 0, C2 0, C3 0, C4 0
- Exportierte elektrische Energie (EEE) [MJ]: A1-A3 0, C2 0, C3 0, C4 0
- Exportierte thermische Energie (EET) [MJ]: A1-A3 0, C2 0, C3 0, C4 0

## Impact indicators
- Globales Erwärmungspotenzial (GWP) [kg CO2 Äquiv.]: A1-A3 0.11688, C2 0.00348574, C3 0, C4 0.0793276
- Abbaupotenzial der stratosphärischen Ozonschicht (ODP) [kg R11 Äquiv.]: A1-A3 4.90115e-16, C2 1.15166e-18, C3 0, C4 2.62353e-16
- Versauerungspotential (AP) [kg SO2 Äquiv.]: A1-A3 0.000193409, C2 7.75654e-6, C3 0, C4 0.000213627
- Eutrophierungspotential (EP) [kg Phosphat Äquiv.]: A1-A3 2.55876e-5, C2 1.86229e-6, C3 0, C4 0.000228984
- Bildungspotenzial für troposphärisches Ozon (POCP) [kg Ethen Äquiv.]: A1-A3 2.0941e-5, C2 -2.42006e-6, C3 0, C4 2.4775e-5
- Potenzial für den abiotischen Abbau nicht fossiler Ressourcen (ADPE) [kg Sb Äquiv.]: A1-A3 2.10807e-8, C2 2.92786e-10, C3 0, C4 5.95583e-9
- Potenzial für den abiotischen Abbau fossiler Brennstoffe (ADPF) [MJ]: A1-A3 6.34842, C2 0.0466382, C3 0, C4 1.20692

## Use advice
Dieser Datensatz bezieht sich auf die Herstellung von 1 kg Gussasphaltestrich. Die Rohdichte beträgt 2400 kg/m³. Wärmeleitfähigkeit 0,9 W/mK, die Druckfestigkeit ist abhängig vom spezifischen Aufbau. Der Datensatz kann näherungsweise für die Abschätzung von Rohdichten von 2200 - 2600 kg verwendet werden. Kaltbitumen lässt sich mit diesem Datensatz nicht abschätzen.

Der Datensatz repräsentiert ein Cradle to Gate Inventar. Er kann verwendet werden, um die Lieferkette des jeweiligen Produktes in einer repräsentativen Weise zu charakterisieren. Die Kombination mit einzelnen Einheitenprozessen und diesem Produkt ermöglicht die Erstellung von anwenderspezifischen (Produkt-) LCAs

## Data sources
- GaBi databases
- GaBi Database Edition 2020, SP40
- GaBi database (all versions)
