# Steinwolle Heizungsrohrschale; Rock wool

Dataset: ILCD process, EPD, generic dataset
Geography: DE
Reference year: 2018
Valid until: 2022
Classification: oekobau.dat: Gebäudetechnik / Heizung / Wärmeverteilung und Abgabe
Owner: thinkstep
Compliance: DIN EN 15804
Review: Dependent internal review by thinkstep, IABP-GaBi, IBP-GaBi; Independent external review by GaBi user forum, GaBi bug forum, GaBi user community
Amounts: rows without a unit in brackets have none in this file; such an amount is in the reference unit of its flow, which a separate flow dataset defines
copyright: true

## General comment
Dieser Datensatz wurde nach dem European Standard EN 15804 für Nachhaltiges Bauen modelliert. Ergebnisse werden in Modulen abgebildet, die den strukturierten Ausdruck von Ergebnissen über den gesamten Lebenszyklus zulassen.

## Geography
Der Datensatz bildet die länderspezifische Situation in Deutschland ab. Dabei werden Haupttechnologien, spezifische regionale Charakteristiken und ggf. Importstatistiken berücksichtigt.

## Time period
Jährlicher Durchschnitt

## Technology and included processes
Steinwolle wird aus Sedimenten oder Magmatitgesteinen (v. a. Basalte) sowie anderen Sekundärstoffen hergestellt. Das Material wird in Kupolschmelzöfen bei Temperaturen zwischen 1.400 und 1.500 ° C aufgeschmolzen und anschließend zerkleinert. Danach werden die Fasern mit Harnstoff-Formaldehydharz imprägniert und zu Platten oder Vliesmatten gepresst. Das Harz härtet danach in einem kontinuierlich betriebenen Tunnelofen aus. Zur Dämmplatte: Sie besteht aus einer Basisschicht und einer Deckschicht. Die durchschnittliche Dichte liegt zwischen 140 kg/m3 (Gesamtdicke = 180 mm) und 162 kg/m3 (Dicke = 60 mm). Die Dämmplatte wird zur Isolierung von Warmdachsystemen verwendet. Die Datensätze werden je m3 Produkt für die unterschiedlichen Dicken erstellt. Dämmfilz: Er weist eine durchschnittliche Dichte von 28 kg/m3 auf. Dämmfilz wird für die Zwischen-Sparren-Dämmung in Dachschrägen verwendet. Die Datensätze werden pro kg erzeugt und können für verschiedene Dicken verwendet werden. Heizung-/Rohrummantelung: Sie besteht aus konzentrisch gerollter Steinwolle zur Isolation von Heizungs- und Warmwasserleitungen. Die Heizrohrummantelung ist mit einer Aluminium-Verbundfolie beschichtet. Die Datensätze sind auf 1 m Rohrummantelung skaliert. Der Referenzfluss ist jedoch massebezogen. Steinwolle-Drahtmatte: Sie besteht aus einer elastischen Steinwolle-Matte, die einseitig mit einem Drahtnetz verstärkt ist und dient zur Dämmung von Rohrleitungen und Kesseln. Die Datensätze werden pro m2 Produkt für die verschiedenen Dicken ausgewiesen.

Hintergrundsystem:
Strom: Die Stromerzeugung wird entsprechend der länderspezifischen Randbedingungen modelliert. Die landesspezifische Analyse beinhaltet:
1.: Spezifische Kraftwerke der verschiedenen fossilen Energieträger und der Einsatz erneuerbarer Energien sind entsprechend der länderspezifischen Energieträgermixe modelliert. Die Analyse bezieht Stromimporte aus den Nachbarländern, Transmissions-und Verteilungsverluste und den Eigenverbrauch im Kraftwerk und bei der Verteilung bzw. Speicherung, z. B. durch Pumpspeicherwerke, ein.
2.: Die landes-/regionalspezifischen Technologiestandards sowie die Erzeugung in Elektrizitätskraftwerken und/oder in speziellen Kraftwerken mit Kraft-Wärme-Kopplung (KWK) sind berücksichtigt.
3.: Die länderspezifische Energieträgerbereitstellung (mit Anteil der Importe und/oder Eigenversorgung) einschließlich der Energieträger-Eigenschaften (z. B. Elementar- und Energiegehalte) werden berücksichtigt.
4.: Die Förderung, Produktion, Verarbeitung und Transportprozesse werden entsprechend der Situation im jeweiligen Stromerzeugerland modelliert. Die unterschiedlichen Produktions- und Verarbeitungsverfahren (Emissionen und Wirkungsgrade) in den verschiedenen Energieerzeugerländern werden einbezogen, z. B. Rohöl-Veredelungsverfahren oder Abfackel-Raten an den Ölplattformen.
Thermische Energie, Prozessdampf: Die Erzeugung von Dampf und thermischer Energie in Heizkraftwerken wird entsprechend der landesspezifischen Situation (Emissionsgrenzwerte, Energieträgerbasis) modelliert.
Der Wirkungsgrad für die thermische Energieerzeugung beträgt per Definition 100% des Energieträgereinsatzes. Für Prozessdampf liegt der Wirkungsgrad im Bereich von 85-95%. Die zur Heizenergie-Erzeugung verwendeten Energieträger werden entsprechend der nationalen Situation modelliert (siehe Kapitel Strom oben).
Transporte: Alle relevanten und bekannten Transportprozesse in Form von See- und Binnenschiffsverkehr sowie Bahn-, Lkw- und der Leitungstransport sind enthalten.
Energieträger: Die Energieträger werden entsprechend der spezifischen Versorgungslage modelliert (siehe Kapitel Strom oben).
Raffinerieprodukte: Diesel, Benzin, technische Gase, Heizöl, Schmierstoffe und Rückstände, wie Bitumen, werden mit einem parametrierten länderspezifische Raffineriemodell modelliert. Das Raffinerie-Modell bezieht die länderspezifischen Veredelungsverfahren (z. B. Emissionspegel, interner Energieverbrauch etc.) und das länderspezifische Produktspektrum ein, das sich je nach Land stark unterscheiden kann. Die Rohöl-Förderung wird gemäß der länderspezifischen Situation mit den jeweiligen Energieträger-Eigenschaften modelliert.

## Technical purpose
Dieses Produkt kann im Baubereich verwendet werden.

## Safety margin
20 %. Produktsystem bis auf wenige Prozesse/Flüsse abgebildet. Technologische, zeitliche und geographische Repräsentativität teilweise gegeben.

## Reference product
- Steinwolle Heizungsrohrschale m3: 1

## Inputs
- Erneuerbare Primärenergie als Energieträger (PERE) [MJ]: A1-A3 632.974, C2 0.00521269, C3 0.0313608
- Erneuerbare Primärenergie zur stofflichen Nutzung (PERM) [MJ]: A1-A3 0, C2 0, C3 0
- Total erneuerbare Primärenergie (PERT) [MJ]: A1-A3 632.974, C2 0.00521269, C3 0.0313608
- Nicht-erneuerbare Primärenergie als Energieträger (PENRE) [MJ]: A1-A3 3885.15, C2 0.0895404, C3 0.238938
- Nicht-erneuerbare Primärenergie zur stofflichen Nutzung (PENRM) [MJ]: A1-A3 0, C2 0, C3 0
- Total nicht erneuerbare Primärenergie (PENRT) [MJ]: A1-A3 3885.15, C2 0.0895404, C3 0.238938
- Einsatz von Sekundärstoffen (SM) [kg]: A1-A3 0, C2 0, C3 0
- Erneuerbare Sekundärbrennstoffe (RSF) [MJ]: A1-A3 0, C2 0, C3 0
- Nicht erneuerbare Sekundärbrennstoffe (NRSF) [MJ]: A1-A3 0, C2 0, C3 0
- Einsatz von Süßwasserressourcen (FW) [m3]: A1-A3 1.12852, C2 4.6684e-6, C3 6.01178e-5

## Outputs
- Gefährlicher Abfall zur Deponie (HWD) [kg]: A1-A3 5.85944e-6, C2 3.34603e-9, C3 3.64176e-9
- Entsorgter nicht gefährlicher Abfall (NHWD) [kg]: A1-A3 181.773, C2 1.57159e-5, C3 1.20119
- Entsorgter radioaktiver Abfall (RWD) [kg]: A1-A3 0.0881997, C2 9.42676e-8, C3 2.67912e-6
- Komponenten für die Wiederverwendung (CRU) [kg]: A1-A3 0, C2 0, C3 0
- Stoffe zum Recycling (MFR) [kg]: A1-A3 0, C2 0, C3 0
- Stoffe für die Energierückgewinnung (MER) [kg]: A1-A3 0, C2 0, C3 0
- Exportierte elektrische Energie (EEE) [MJ]: A1-A3 0, C2 0, C3 0
- Exportierte thermische Energie (EET) [MJ]: A1-A3 0, C2 0, C3 0

## Impact indicators
- Globales Erwärmungspotenzial (GWP) [kg CO2 Äquiv.]: A1-A3 317.952, C2 0.00656887, C3 0.0163697
- Abbaupotenzial der stratosphärischen Ozonschicht (ODP) [kg R11 Äquiv.]: A1-A3 2.37688e-12, C2 2.20512e-18, C3 9.09391e-17
- Versauerungspotential (AP) [kg SO2 Äquiv.]: A1-A3 1.47659, C2 3.75381e-5, C3 0.000103991
- Eutrophierungspotential (EP) [kg Phosphat Äquiv.]: A1-A3 0.158389, C2 9.53188e-6, C3 1.17002e-5
- Bildungspotenzial für troposphärisches Ozon (POCP) [kg Ethen Äquiv.]: A1-A3 0.0947017, C2 -1.4438e-5, C3 7.88519e-6
- Potenzial für den abiotischen Abbau nicht fossiler Ressourcen (ADPE) [kg Sb Äquiv.]: A1-A3 3.70206e-5, C2 5.60606e-10, C3 1.65926e-9
- Potenzial für den abiotischen Abbau fossiler Brennstoffe (ADPF) [MJ]: A1-A3 3662.21, C2 0.0892995, C3 0.232173

## Use advice
Der Datensatz repräsentiert ein Cradle to Gate Inventar. Er kann verwendet werden, um die Lieferkette des jeweiligen Produktes in einer repräsentativen Weise zu charakterisieren. Die Kombination mit einzelnen Einheitenprozessen und diesem Produkt ermöglicht die Erstellung von anwenderspezifischen (Produkt-) LCAs.

## Data sources
- GaBi Database Edition 2020, SP40
- GaBi database (all versions)
