# Strom aus Biomasse (1 kWh)

Dataset: ILCD process, EPD, generic dataset
Geography: DE
Reference year: 2021
Valid until: 2022
Classification: oekobau.dat: Sonstige / Energieträger - Bereitstellung frei Verbraucher / Strom
Owner: Sphera Solutions GmbH
Compliance: EN 15804+A2
Review: Dependent internal review by Sphera Solutions GmbH; Independent external review by GaBi user forum
Amounts: rows without a unit in brackets have none in this file; such an amount is in the reference unit of its flow, which a separate flow dataset defines
copyright: true
licenseType: Free of charge for all users and uses
accessRestrictions: The license conditions as stated on https://www.oekobaudat.de/ apply.
accessRestrictions: Es gelten die Lizenzbedingungen wie sie auf https://www.oekobaudat.de/ genannt sind.

## General comment
Dieser Datensatz wurde nach dem European Standard EN 15804+A2 für Nachhaltiges Bauen modelliert. Ergebnisse werden in Modulen abgebildet, die den strukturierten Ausdruck von Ergebnissen über den gesamten Lebenszyklus zulassen.

## Geography
Der Datensatz bildet die länderspezifische Situation in Deutschland ab. Dabei werden Haupttechnologien, spezifische regionale Charakteristiken und ggf. Importstatistiken berücksichtigt.

## Time period
Jährlicher Durchschnitt

## Technology and included processes
Der Strom wird entweder in Biomasse- (Feststoff-) Kraftwerken und / oder Kraft-Wärme-Kopplungskraftwerken (KWK) erzeugt. Berücksichtigt werden auch die nationalen und regionalen spezifischen Technologiestandards der Kraftwerke in Bezug auf Effizienz, Brenntechnologie, Rauchgasentschwefelung, NOx-Entfernung und Entstaubung.

Die Versorgung mit Biomasse (fest) berücksichtigt die gesamte Lieferkette des Energieträgers von der Produktion, Verarbeitung und dem Transport der Brennstoffe zu den Kraftwerken. Die Lieferkette wird in einem spezifischen nationalen / regionalen Verbrauchsmix aus Biomasse (fest) (d. H. Inländische Produktion und Importe) modelliert und berücksichtigt die nationalen / regionalen durchschnittlichen Eigenschaften von Biomasse (fest) (z. B. Elementzusammensetzung und Energiegehalt).

Der Datensatz beinhaltet den Eigenverbrauch von Energieerzeugern (Eigenverbrauch von Kraftwerken). Nicht enthalten sind importierter Strom aus Nachbarländern, Übertragungs- und Verteilungsverluste.

## Technical purpose
Elektrische Energie wird für den Betrieb verschiedener technischer Anlagen und Installationen im Gebäudekontext benötigt.

## Safety margin
0 %.

## Reference product
- Strom aus Biomasse (1 kWh): 3.6

## Inputs
- Erneuerbare Primärenergie als Energieträger (PERE) [MJ]: B6 11.0314
- Erneuerbare Primärenergie zur stofflichen Nutzung (PERM) [MJ]: B6 0
- Total erneuerbare Primärenergie (PERT) [MJ]: B6 11.0314
- Nicht-erneuerbare Primärenergie als Energieträger (PENRE) [MJ]: B6 0.420723
- Nicht-erneuerbare Primärenergie zur stofflichen Nutzung (PENRM) [MJ]: B6 0
- Total nicht-erneuerbare Primärenergie (PENRT) [MJ]: B6 0.420723
- Einsatz von Sekundärstoffen (SM) [kg]: B6 0
- Erneuerbare Sekundärbrennstoffe (SF) [MJ]: B6 0
- Nicht erneuerbare Sekundärbrennstoffe (NRSF) [MJ]: B6 0
- Nettoeinsatz von Süßwasserressourcen (FW) [m3]: B6 0.0037058

## Outputs
- Gefährlicher Abfall zur Deponie (HWD) [kg]: B6 4.11755e-8
- Entsorgter nicht gefährlicher Abfall (NHWD) [kg]: B6 0.00556249
- Entsorgter radioaktiver Abfall (RWD) [kg]: B6 8.31789e-6
- Komponenten für die Wiederverwendung (CRU) [kg]: B6 0
- Stoffe zum Recycling (MFR) [kg]: B6 0
- Stoffe für die Energierückgewinnung (MER) [kg]: B6 0
- Exportierte elektrische Energie (EEE) [MJ]: B6 0
- Exportierte thermische Energie (EET) [MJ]: B6 0

## Impact indicators
- Globales Erwärmungspotenzial - total (GWP-total) [kg CO2 eq.]: B6 0.0466244
- Globales Erwärmungspotenzial - fossil (GWP-fossil) [kg CO2 eq.]: B6 0.0413171
- Globales Erwärmungspotenzial - biogen (GWP-biogenic) [kg CO2 eq.]: B6 0.004012
- Globales Erwärmungspotenzial - luluc (GWP-luluc) [kg CO2 eq.]: B6 0.00129524
- Abbaupotenzial der stratosphärischen Ozonschicht (ODP) [kg CFC-11 eq.]: B6 9.76157e-17
- Versauerungspotenzial, kumulierte Überschreitung (AP) [Mole of H+ eq.]: B6 0.00145724
- Eutrophierungspotenzial - Süßwasser (EP-freshwater) [kg P eq.]: B6 1.11191e-5
- Eutrophierungspotenzial - Salzwasser (EP-marine) [kg N eq.]: B6 0.000540185
- Eutrophierungspotenzial - Land (EP-terrestrial) [Mole of N eq.]: B6 0.00453901
- Bildungspotenzial für troposphärisches Ozon (POCP) [kg NMVOC eq.]: B6 0.00118095
- Potenzial für die Verknappung abiotischer Ressourcen nicht fossile Ressourcen (ADPE) [kg Sb eq.]: B6 6.01723e-8
- Potenzial für die Verknappung abiotischer Ressourcen fossile Brennstoffe (ADPF) [MJ]: B6 0.418437
- Wasser-Entzugspotenzial (Benutzer) (WDP) [m³ world equiv.]: B6 0.0677131

## Use advice
Dieser Datensatz bezieht sich auf die Produktion von 1 kWh (3,6 MJ) elektrischer Energie aus Biomasse. Der Datensatz kann verwendet werden, um die potentiellen Umweltwirkungen durch Stromverbräuche aus Biomasse Anlagen während der Gebäudenutzungsphase zu bilanzieren.

## Data sources
- Documentation of data quality management
- GaBi Database Edition 2021, CUP2021.01
- GaBi database (all versions)
