# Baustähle: Offene Walzprofile und Grobbleche

Dataset: ILCD process, EPD, average dataset
Geography: EU-27
Reference year: 2018
Valid until: 2023
Classification: OEKOBAU.DAT: Metalle / Stahl und Eisen / Stahlprofile
Classification: IBUCategories: 02 Bauprodukte / Metallbauprodukte und Zubehör / Baustähle
Method details: Baustähle.pdf
Registration number: EPD-BFS-20180116-IBG2-DE
Owner: bauforumstahl e.V.
Compliance: DIN EN 15804; ISO 14025
Review: Accredited third party review by Institut Bauen und Umwelt e. V.
Amounts: rows without a unit in brackets have none in this file; such an amount is in the reference unit of its flow, which a separate flow dataset defines
copyright: true

## General comment
Diese EPD bezieht sich auf 1 t Baustahl (Offene Walzprofile und Grobbleche). Sie behandelt Baustähle der Sorten S235 bis S960, die als Stahlbauprofile, Stabstähle und Grobbleche ausgewalzt werden.

## Technology and included processes
Für den Produktionsweg „Hochofen mit Konverter“ wird Eisenerz (typische Mischung basierend auf Eisenoxid Fe2O3) mit Koksgrus, Kreislaufstoffen und anderen Zusätzen vermischt und gesintert. Das dient als Vorbereitung für die Beschickung mit Koks, dem Reduktionsmittel, im Hochofen. Auch Pellets und/oder Stückerz können verwendet werden. Das flüssige Eisen, das im Hochofen produziert wird, wird in den Konverter weitergeleitet. In diesem Behälter wird das Eisen zu Stahl konvertiert, indem der Kohlenstoffgehalt des Eisens verringert wird. Dies geschieht, indem Sauerstoff in die Schmelze eingeblasen wird. Die Reaktion ist exotherm. Um die Temperatur kontrollieren zu können, wird der Schmelze (bis zu 35 %) Schrott hinzugefügt. Für den Produktionsweg „Elektrolichtbogenofen“ wird Schrott in einem Elektrolichtbogenofen geschmolzen, um flüssigen Stahl zu erhalten. Veredelung (Reduzierung des Schwefels, des Phosphors und anderer Begleitelemente), Legierung (beispielsweise ungefähr 1 % Mn, 0,2 % Si) und eventuell Mikrolegierung (beispielsweise 0,01 % V) werden angewandt, um dem Stahl seine geforderten Eigenschaften zu geben. Am Ende der Stahlherstellung wird der flüssige Stahl mit einer Stranggießanlage in ein halbfertiges Produkt umgewandelt oder in Sonderfällen in Kokillen zu Blöcken abgegossen. Das Halbprodukt (Gussblock, Trägerrohling, Rohblock, Walzblock) wird heiß zum endgültigen Produktmaß ausgewalzt (Grobblech, Flachstahl, H-Profil, I-Profil, U-Profil, L-Profil und andere Stabstähle). Gütesicherung: /ISO 9001/ Überwachung gemäß den Produktnormen, z. B. /EN 10025, Teil 1/
Technische Daten:
Diese EPD gilt für Bleche und Profile unterschiedlicher Stahlsorten und Lieferformen. Spezifische Angaben zu Maßtoleranzen, bautechnischen Daten sowie mechanischen und chemischen Eigenschaften können der einschlägigen Literatur und/oder den Normen entnommen werden.
Deklarierte Einheit:
Die Umweltproduktdeklaration bezieht sich auf 1 Tonne Baustahl: Offene Walzprofile und Grobbleche. Die Ökobilanz wurde auf Basis eines, nach Produktionsvolumen gewichteten Durchschnitts aller Standorte berechnet.

## Technical purpose
Baustahl wird für geschraubte, geschweißte und andersartig verbundene Gebäudekonstruktionen, Brücken und andere Bauwerke oder in Stahl-Verbundkonstruktionen verwendet. Beispiele hierfür sind:

Eingeschossige Gebäude (Industrie- und Lagerhallen)
Mehrgeschossige Gebäude (Büros, Wohnhäuser, Geschäfte, Parkhäuser, Hochhäuser usw.)
Brücken (Eisenbahnbrücken, Straßenbrücken, Fußgängerbrücken)
Andere Bauwerke (Kraftwerke, Stadien, Tagungszentren, Flughäfen, Bahnhöfe usw.)

## Reference product
- 1 Tonne Baustahl: 1000

## Inputs
- Erneuerbare Primärenergie als Energieträger (PERE) [MJ]: A1-A3 1516, C3 10.92, D 19.75
- Erneuerbare Primärenergie zur stofflichen Nutzung (PERM) [MJ]: A1-A3 0, C3 0, D 0
- Total erneuerbare Primärenergie (PERT) [MJ]: A1-A3 1516, C3 10.92, D 19.75
- Nicht-erneuerbare Primärenergie als Energieträger (PENRE) [MJ]: A1-A3 11470, C3 32.19, D -3973
- Nicht-erneuerbare Primärenergie zur stofflichen Nutzung (PENRM) [MJ]: A1-A3 0, C3 0, D 0
- Total nicht erneuerbare Primärenergie (PENRT) [MJ]: A1-A3 11470, C3 32.19, D -3973
- Einsatz von Sekundärstoffen (SM) [kg]: A1-A3 786, C3 0, D 0
- Erneuerbare Sekundärbrennstoffe (RSF) [MJ]: A1-A3 0, C3 0, D 0
- Nicht erneuerbare Sekundärbrennstoffe (NRSF) [MJ]: A1-A3 0, C3 0, D 0
- Einsatz von Süßwasserressourcen (FW) [m^3]: A1-A3 4.186, C3 0.0149, D -0.07153

## Outputs
- Gefährlicher Abfall zur Deponie (HWD) [kg]: A1-A3 1.058e-5, C3 1.812e-7, D -0.0001907
- Entsorgter nicht gefährlicher Abfall (NHWD) [kg]: A1-A3 8.106, C3 10.04, D 30.25
- Entsorgter radioaktiver Abfall (RWD) [kg]: A1-A3 0.5013, C3 0.004671, D -0.05505
- Komponenten für die Wiederverwendung (CRU) [kg]: A1-A3 0, C3 110, D 0
- Stoffe zum Recycling (MFR) [kg]: A1-A3 0, C3 880, D 0
- Stoffe für die Energierückgewinnung (MER) [kg]: A1-A3 0, C3 0, D 0
- Exportierte elektrische Energie (EEE) [MJ]: A1-A3 0, C3 0, D 0
- Exportierte thermische Energie (EET) [MJ]: A1-A3 0, C3 0, D 0

## Impact indicators
- Globales Erwärmungspotenzial (GWP) [kg CO_(2)-Äq.]: A1-A3 1125, C3 1.844, D -413.4
- Abbau Potential der stratosphärischen Ozonschicht (ODP) [kg CFC11-Äq.]: A1-A3 1.958e-9, C3 6.854e-12, D 1.617e-6
- Versauerungspotenzial von Boden und Wasser (AP) [kg SO_(2)-Äq.]: A1-A3 2.164, C3 0.005837, D -0.8072
- Eutrophierungspotenzial (EP) [kg PO_(4)^(3)-Äq.]: A1-A3 0.219, C3 0.0006692, D -0.0666
- Bildungspotential für troposphärisches Ozon (POCP) [kg Ethen-Äq.]: A1-A3 0.4018, C3 0.0004008, D -0.1781
- Potenzial für den abiotischen Abbau nicht fossiler Ressourcen (ADPE) [kg Sb-Äq.]: A1-A3 0.0004922, C3 8.915e-7, D -0.0008922
- Potenzial für den abiotischen Abbau fossiler Brennstoffe (ADPF) [MJ]: A1-A3 10200, C3 20.42, D -3936

## Use advice
Gültigkeitsbereich:
Diese Umweltdeklaration behandelt Baustähle, die als Stahlbauprofile, Stabstähle und Grobbleche ausgewalzt und die für geschraubte, geschweißte oder andersartig verbundene Gebäudekonstruktionen, Brücken oder andere Bauwerke verwendet werden.

Diese Umweltproduktdeklaration ist gültig für folgende Produkte:

Grobbleche hergestellt von:

- Dillinger mit den Werken Dillingen (Deutschland) und Dünkirchen (Frankreich)

Walzprofile hergestellt von:

- ArcelorMittal mit den Werken Differdange (Luxemburg), Dabrowa (Polen), Esch-Belval (Luxemburg), Bergara (Spanien), Hunedoara (Rumänien), Olaberria (Spanien), Warszawa (Polen) und Rodange (Luxemburg)

- Peiner Träger (Deutschland)

- Stahlwerk Thüringen (Deutschland)

In dieser EPD stammen 26% aus der Primärroute (Hochofen mit Konverter) und 74% aus der Sekundärroute (Elektrolichtbogenofen), gemessen an der jährlichen Gesamtproduktion an offenen Walzprofilen und Grobblechen der beteiligten Unternehmen. Die verwendeten Daten decken mehr als 95% der jährlichen Produktion an offenen Walzprofilen und Grobblechen der BauforumStahl Mitglieder ab.
Systemgrenze:
Typ der EPD: Cradle to gate mit Optionen.

Die folgenden Prozesse werden im betrachtet:

Produktionsstadium Module A1-A3
Die Bereitstellung von Rohmaterialen, Hilfsstoffen und Energie
Transport von Rohmaterialien und Hilfsstoffen
Herstellprozess im Werk inklusive energetischen Aufwendungen, Herstellung von Hilfsstoffen, Entsorgung von anfallenden Reststoffen und der Berücksichtigung von auftretenden Werksemissionen.
Für Stahlschrott wird angenommen, dass der “end-of-waste” Status nach dem Sortieren und Schreddern beim Abriss oder in den Abfallbehandlungsanlagen erreicht ist.

Modul C3 berücksichtigt das Schreddern und Sortieren nach der Nutzungsphase. Des Weiteren wird dem Modul C3 der nicht erfasste Schrottanteil zugerechnet, der aufgrund von Sortierverlusten entsteht. Dieser wird deponiert. Ein konservativer Anteil von 1 % wird angenommen.

In Modul D werden Wiederverwendung und Recycling von Baustahl im End-of-Life betrachtet.

## Data sources
- Baustähle: Offene Walzprofile und Grobbleche.pdf
- GaBi Database (all versions)
- GaBi database SP35 2018
