# Fassadenklinker

Dataset: ILCD process, EPD, generic dataset
Geography: DE
Reference year: 2021
Valid until: 2022
Classification: oekobau.dat: Mineralische Baustoffe / Steine und Elemente / Ziegel
Owner: Sphera Solutions GmbH
Compliance: EN 15804+A2
Review: Dependent internal review by Sphera Solutions GmbH; Independent external review by GaBi user forum
Amounts: rows without a unit in brackets have none in this file; such an amount is in the reference unit of its flow, which a separate flow dataset defines
copyright: true
licenseType: Free of charge for all users and uses
accessRestrictions: The license conditions as stated on https://www.oekobaudat.de/ apply.
accessRestrictions: Es gelten die Lizenzbedingungen wie sie auf https://www.oekobaudat.de/ genannt sind.

## General comment
Dieser Datensatz wurde nach dem European Standard EN 15804+A2 für Nachhaltiges Bauen modelliert. Ergebnisse werden in Modulen abgebildet, die den strukturierten Ausdruck von Ergebnissen über den gesamten Lebenszyklus zulassen.

## Geography
Der Datensatz bildet die länderspezifische Situation in Deutschland ab. Dabei werden Haupttechnologien, spezifische regionale Charakteristiken und ggf. Importstatistiken berücksichtigt.

## Time period
Jährlicher Durchschnitt

## Technology and included processes
Zur Herstellung von Fassadenklinkern werden die Rohstoffe Lehm, Sand und Wasser gemischt und in Form gebracht. Anschließend erfolgt das Brennen bei sehr hohen Temperaturen (ca. 1100 - 1300 °C) wodurch ein Sintervorgang stattfindet. Der Einsatz von thermischer Energie (hier aus Erdgas) dominiert dabei die Ökobilanz.

In der Entsorgungsphase wird in Modul C1 ein maschineller Rückbau (Bagger) bilanziert. Der Transport in Modul C2 zur Aufbereitungsanlage erfolgt mit einem LKW (50km). In Modul C3 wird das Material aufbereitet, eventuelle Bewehrung wird einer Senke (keine Lasten, keine Gutschriften) zugeführt. Es wurde ein Aufbereitungsverlust von 25% angenommen. Dieser Verlust wird einer Inertstoffdeponie innerhalb von Modul C3 zugeführt (durchschnittliche Deponieemissionen). In Modul D erfolgt eine Gutschrift für die Netto-Materialmenge (ohne Bewehrungsanteil und abzüglich Aufbereitungsverluste) für die Substitution von natürlichem Kies als Verfüllmaterial (z.B. im Straßen- oder Deponiebau).

## Technical purpose
Fassadenklinker werden unter Verwendung von Normalmauermörtel i.d.R. als äusserste Schicht im Wandaufbau eingesetzt. Eine Innenanwendung ist auch möglich und bei starken Beanspruchungen (z.B. Schulen) auch empfehlenswert. Klinker zeichnen sich durch eine sehr geringe Wasseraufnahme, eine hohe Beständigkeit gegenüber natürlichen Umwelteinflüssen (auch Frost) sowie eine lange Haltbarkeit aus.

## Safety margin
10 %. Produktsystem weitgehend vollständig abgebildet. Gute technologische, zeitliche und geographische Repräsentativität.

## Reference product
- Fassadenklinker: 1

## Inputs
- Erneuerbare Primärenergie als Energieträger (PERE) [MJ]: A1-A3 581.644, C1 0.458399, C2 4.00797, C3 24.2498, D -11.2997
- Erneuerbare Primärenergie zur stofflichen Nutzung (PERM) [MJ]: A1-A3 0, C1 0, C2 0, C3 0, D 0
- Total erneuerbare Primärenergie (PERT) [MJ]: A1-A3 581.644, C1 0.458399, C2 4.00797, C3 24.2498, D -11.2997
- Nicht-erneuerbare Primärenergie als Energieträger (PENRE) [MJ]: A1-A3 8913.21, C1 7.89823, C2 69.0574, C3 217.854, D -41.4978
- Nicht-erneuerbare Primärenergie zur stofflichen Nutzung (PENRM) [MJ]: A1-A3 0, C1 0, C2 0, C3 0, D 0
- Total nicht-erneuerbare Primärenergie (PENRT) [MJ]: A1-A3 8913.21, C1 7.89823, C2 69.0574, C3 217.854, D -41.4978
- Einsatz von Sekundärstoffen (SM) [kg]: A1-A3 0, C1 0, C2 0, C3 0, D 0
- Erneuerbare Sekundärbrennstoffe (SF) [MJ]: A1-A3 0, C1 0, C2 0, C3 0, D 0
- Nicht erneuerbare Sekundärbrennstoffe (NRSF) [MJ]: A1-A3 0, C1 0, C2 0, C3 0, D 0
- Nettoeinsatz von Süßwasserressourcen (FW) [m3]: A1-A3 0.523604, C1 0.000407402, C2 0.00356208, C3 0.0551013, D -0.0068499

## Outputs
- Gefährlicher Abfall zur Deponie (HWD) [kg]: A1-A3 2.27586e-6, C1 3.30121e-10, C2 2.88638e-9, C3 1.78267e-8, D -6.68594e-9
- Entsorgter nicht gefährlicher Abfall (NHWD) [kg]: A1-A3 4.44668, C1 0.00127496, C2 0.0111474, C3 534.057, D -27.5571
- Entsorgter radioaktiver Abfall (RWD) [kg]: A1-A3 0.0691748, C1 7.57939e-6, C2 6.62696e-5, C3 0.00192097, D -0.00122385
- Komponenten für die Wiederverwendung (CRU) [kg]: A1-A3 0, C1 0, C2 0, C3 0, D 0
- Stoffe zum Recycling (MFR) [kg]: A1-A3 0, C1 0, C2 0, C3 1455, D 0
- Stoffe für die Energierückgewinnung (MER) [kg]: A1-A3 0, C1 0, C2 0, C3 0, D 0
- Exportierte elektrische Energie (EEE) [MJ]: A1-A3 0, C1 0, C2 0, C3 0, D 0
- Exportierte thermische Energie (EET) [MJ]: A1-A3 0, C1 0, C2 0, C3 0, D 0

## Impact indicators
- Globales Erwärmungspotenzial - total (GWP-total) [kg CO2 eq.]: A1-A3 558.362, C1 0.590905, C2 5.24566, C3 13.8015, D -3.16164
- Globales Erwärmungspotenzial - fossil (GWP-fossil) [kg CO2 eq.]: A1-A3 555.917, C1 0.586939, C2 5.20984, C3 13.9449, D -3.1447
- Globales Erwärmungspotenzial - biogen (GWP-biogenic) [kg CO2 eq.]: A1-A3 2.07934, C1 0.000138744, C2 0.00235432, C3 -0.199295, D -0.00257079
- Globales Erwärmungspotenzial - luluc (GWP-luluc) [kg CO2 eq.]: A1-A3 0.365371, C1 0.00382678, C2 0.033459, C3 0.0558961, D -0.0143659
- Abbaupotenzial der stratosphärischen Ozonschicht (ODP) [kg CFC-11 eq.]: A1-A3 2.29177e-12, C1 1.52465e-16, C2 1.33306e-15, C3 5.78605e-14, D -4.06042e-14
- Versauerungspotenzial, kumulierte Überschreitung (AP) [Mole of H+ eq.]: A1-A3 0.59947, C1 0.00790245, C2 0.0147711, C3 0.112186, D -0.0104152
- Eutrophierungspotenzial - Süßwasser (EP-freshwater) [kg P eq.]: A1-A3 0.000387535, C1 1.22546e-6, C2 1.07146e-5, C3 2.69591e-5, D -8.75029e-6
- Eutrophierungspotenzial - Salzwasser (EP-marine) [kg N eq.]: A1-A3 0.249769, C1 0.00359511, C2 0.00680473, C3 0.0419878, D -0.00405073
- Eutrophierungspotenzial - Land (EP-terrestrial) [Mole of N eq.]: A1-A3 2.73799, C1 0.0395287, C2 0.0761326, C3 0.461389, D -0.0445935
- Bildungspotenzial für troposphärisches Ozon (POCP) [kg NMVOC eq.]: A1-A3 0.86537, C1 0.0107669, C2 0.0132694, C3 0.123886, D -0.00958088
- Potenzial für die Verknappung abiotischer Ressourcen nicht fossile Ressourcen (ADPE) [kg Sb eq.]: A1-A3 6.22415e-5, C1 5.18315e-8, C2 4.53184e-7, C3 7.23599e-6, D -6.42252e-7
- Potenzial für die Verknappung abiotischer Ressourcen fossile Brennstoffe (ADPF) [MJ]: A1-A3 8912.78, C1 7.8979, C2 69.0545, C3 217.791, D -41.4895
- Wasser-Entzugspotenzial (Benutzer) (WDP) [m³ world equiv.]: A1-A3 11.4339, C1 0.00231631, C2 0.0202524, C3 1.85012, D -0.0766559

## Use advice
Dieser Datensatz bezieht sich auf die Herstellung von 1 m³ Fassadenklinker (Vollklinker, Hochlochklinker). Die Rohdichte beträgt 2000 kg/m³. Die Wärmeleitfähigkeit beträgt 0,9 - 1,0 W/mK. Der Datensatz kann näherungsweise für die Abschätzung von Fassadenklinkern mit einer Dichte von 1900 - 2100 kg/m³ verwendet werden.

Der Datensatz repräsentiert ein Cradle to Gate Inventar. Er kann verwendet werden, um die Lieferkette des jeweiligen Produktes in einer repräsentativen Weise zu charakterisieren. Die Kombination mit einzelnen Einheitenprozessen und diesem Produkt ermöglicht die Erstellung von anwenderspezifischen (Produkt-) LCAs

## Data sources
- GaBi databases
- Documentation of data quality management
- GaBi Database Edition 2021, CUP2021.01
- GaBi database (all versions)
