# Sikaplan U

Dataset: ILCD process, EPD, specific dataset
Geography: DE
Reference year: 2017
Valid until: 2022
Classification: OEKOBAU.DAT: Kunststoffe / Dachbahnen / PVC-Dachbahnen
Classification: IBUCategories: 02 Bauprodukte / Abdichtungen / Dach- und Dichtungsbahnsysteme aus Kunststoffen und Elastomeren
Method details: Dach- und Dichtungsbahnsysteme aus Kunststoffen und Elastomeren.pdf
Generated by: Sika Services AG
Registration number: EPD-SIK-20170120-IBA1-DE
Owner: Sika Deutschland GmbH
Compliance: DIN EN 15804; ISO 14025
Review: Accredited third party review by Institut Bauen und Umwelt e. V.
Amounts: rows without a unit in brackets have none in this file; such an amount is in the reference unit of its flow, which a separate flow dataset defines
copyright: true
licenseType: Free of charge for all users and uses
accessRestrictions: None

## General comment
Sikaplan U ist eine mehrschichtige Kunststoffabdich-tungsbahn, basierend auf Polyvinylchlorid (PVC) mit einer Glasvlieseinlage und Polyestergelege (DE/E1 PVC-P-NB-V-PG-GV-1,5).
Die Sikaplan U Kunststoffabdichtungsbahnen sind
in den Dicken 1,5 mm (U-15), 1,8 mm (U-18) und
2,0 mm (U-20) erhältlich.
Bei der Berechnung der Ökobilanz erfolgte keine Durchschnittsbildung über verschiedene Dicken der
Kunststoffabdichtungsbahn Sikaplan U. Alle angege-benen Werte beziehen sich auf Sikaplan U-15; eine Formel zur eigenständigen Berechnung weiterer Dicken findet sich in Kapitel 5.

## Technology and included processes
Der Herstellungsprozess der Sikaplan U Kunststoff-abdichtungsbahn verläuft in folgenden Schritten: Dosierung der einzelnen Rohstoffe und Plastifizierung der Mischung in einem Extruder Auswalzen der Mischung zu Kunststoff-bahnen im Kalander-Verfahren Kühlen und Aufrollen der Membranen Zusammenfügen von zwei Kunststoffbahnen (Ober- und Unterseite) und mittigem Poly-estergelege / Glasvlies-Kombination auf einer Laminieranlage durch Erhitzen Zuschneiden und Aufwickeln der Kunststoff-abdichtungsbahn auf Rollenkerne aus Altpapierkartonage Palettierung und Verpacken der Rollen mit einer PE-Stretch-Folie Produktionsabfälle wie beispielsweise Abschnitte wer-den dem Herstellungsprozess sofort wieder zugeführt und auf diese Weise recycelt. Sika verfügt über ein zertifiziertes Qualitätsmanage-mentsystem nach /ISO 9001/.
Technische Daten:
Leistungswerte des Produkts entsprechend der Leis-tungserklärung in Bezug auf dessen wesentliche Merkmale gemäß /EN 13956:2012/ Abdichtungsbahnen.
Deklarierte Einheit:
Diese Deklaration bezieht sich auf 1 m² Sikaplan U Kunststoffabdichtungsbahn mit der Dicke 1,5 mm. Für andere Dicken wird eine Formel zur eigenständigen Berechnung der Werte angegeben.

## Technical purpose
Sikaplan U Kunststoffabdichtungsbahnen dienen
hauptsächlich der Abdichtung von Flachdächern. Die
Dachbahnen werden entweder lose verlegt mit mecha-nischer Befestigung für das Dach ohne Auflast bis zu einer Dachneigung von < 20° oder lose verlegt für das extensiv begrünte und bekieste Dach unter Auflast. Die Auflast wird unmittelbar nach der Verlegung aufge-bracht. Anschlussbereiche werden mit Sikaplan U, Detailausbildungen mit Formteilen oder Sikaplan S ausgeführt.

## Scenarios
- S1: 100% recycling
- S2: 100 % thermische Verwertung

## Reference product
- 1 m² Dachbahn: 1

## Inputs
- Erneuerbare Primärenergie als Energieträger (PERE) [MJ]: A1-A3 11.6, A4 0, A5 0.928, C1 0, C2 (S1) 0, C2 (S2) 0, C3 (S1) 0, C3 (S2) 0, C4 (S1) 0, C4 (S2) 1.69, D (S1) 0, D (S2) 0
- Erneuerbare Primärenergie zur stofflichen Nutzung (PERM) [MJ]: A1-A3 1.92, A4 0, A5 0.153, C1 0, C2 (S1) 0, C2 (S2) 0, C3 (S1) 0, C3 (S2) 0, C4 (S1) 0, C4 (S2) 0, D (S1) 0, D (S2) 0
- Total erneuerbare Primärenergie (PERT) [MJ]: A1-A3 13.5, A4 0.0416, A5 1.16, C1 0, C2 (S1) 0.02, C2 (S2) 0.004, C3 (S1) 0.628, C3 (S2) 0, C4 (S1) 0.00852, C4 (S2) 1.69, D (S1) -9.42, D (S2) -3.37
- Nicht-erneuerbare Primärenergie als Energieträger (PENRE) [MJ]: A1-A3 92.1, A4 0, A5 7.37, C1 0, C2 (S1) 0, C2 (S2) 0, C3 (S1) 0, C3 (S2) 0, C4 (S1) 0, C4 (S2) 9.99, D (S1) 0, D (S2) 0
- Nicht-erneuerbare Primärenergie zur stofflichen Nutzung (PENRM) [MJ]: A1-A3 45.1, A4 0, A5 3.49, C1 0, C2 (S1) 0, C2 (S2) 0, C3 (S1) -46.1, C3 (S2) 0, C4 (S1) 0, C4 (S2) -46.1, D (S1) 0, D (S2) 0
- Total nicht erneuerbare Primärenergie (PENRT) [MJ]: A1-A3 137, A4 0.63, A5 11.4, C1 0, C2 (S1) 0.399, C2 (S2) 0.0798, C3 (S1) 1.46, C3 (S2) 0, C4 (S1) 0.0607, C4 (S2) 9.99, D (S1) -107, D (S2) -24
- Einsatz von Sekundärstoffen (SM) [kg]: A1-A3 0, A4 0, A5 0, C1 0, C2 (S1) 0, C2 (S2) 0, C3 (S1) 0, C3 (S2) 0, C4 (S1) 0, C4 (S2) 0, D (S1) 2.05, D (S2) 0
- Erneuerbare Sekundärbrennstoffe (RSF) [MJ]: A1-A3 0, A4 0, A5 0, C1 0, C2 (S1) 0, C2 (S2) 0, C3 (S1) 0, C3 (S2) 0, C4 (S1) 0, C4 (S2) 0, D (S1) 0, D (S2) 0
- Nicht erneuerbare Sekundärbrennstoffe (NRSF) [MJ]: A1-A3 0, A4 0, A5 0, C1 0, C2 (S1) 0, C2 (S2) 0, C3 (S1) 0, C3 (S2) 0, C4 (S1) 0, C4 (S2) 0, D (S1) 0, D (S2) 0
- Einsatz von Süßwasserressourcen (FW) [m^3]: A1-A3 0.0269, A4 4.84e-5, A5 0.00275, C1 0, C2 (S1) 3.71e-5, C2 (S2) 7.42e-6, C3 (S1) 0.000427, C3 (S2) 0, C4 (S1) 0.000382, C4 (S2) 0.0108, D (S1) -0.0186, D (S2) -0.0034

## Outputs
- Gefährlicher Abfall zur Deponie (HWD) [kg]: A1-A3 8.08e-6, A4 3.97e-8, A5 6.52e-7, C1 0, C2 (S1) 2.1e-8, C2 (S2) 4.19e-9, C3 (S1) 9.57e-10, C3 (S2) 0, C4 (S1) 2.71e-10, C4 (S2) 6.25e-8, D (S1) -2.2e-6, D (S2) -4.57e-9
- Entsorgter nicht gefährlicher Abfall (NHWD) [kg]: A1-A3 0.33, A4 4.59e-5, A5 0.0901, C1 0, C2 (S1) 3.05e-5, C2 (S2) 6.1e-6, C3 (S1) 0.00138, C3 (S2) 0, C4 (S1) 0.0168, C4 (S2) 3.24, D (S1) -0.0425, D (S2) -0.00929
- Entsorgter radioaktiver Abfall (RWD) [kg]: A1-A3 0.00291, A4 7.23e-7, A5 0.000264, C1 0, C2 (S1) 5.44e-7, C2 (S2) 1.09e-7, C3 (S1) 0.000134, C3 (S2) 0, C4 (S1) 3.04e-6, C4 (S2) 0.000372, D (S1) -0.0031, D (S2) -0.0013
- Komponenten für die Wiederverwendung (CRU) [kg]: A1-A3 0, A4 0, A5 0, C1 0, C2 (S1) 0, C2 (S2) 0, C3 (S1) 0, C3 (S2) 0, C4 (S1) 0, C4 (S2) 0, D (S1) 0, D (S2) 0
- Stoffe zum Recycling (MFR) [kg]: A1-A3 0, A4 0, A5 0, C1 0, C2 (S1) 0, C2 (S2) 0, C3 (S1) 1.94, C3 (S2) 0, C4 (S1) 0, C4 (S2) 0, D (S1) 0, D (S2) 0
- Stoffe für die Energierückgewinnung (MER) [kg]: A1-A3 0, A4 0, A5 0, C1 0, C2 (S1) 0, C2 (S2) 0, C3 (S1) 0, C3 (S2) 0, C4 (S1) 0, C4 (S2) 0, D (S1) 0, D (S2) 0
- Exportierte elektrische Energie (EEE) [MJ]: A1-A3 0, A4 0, A5 0.183, C1 0, C2 (S1) 0, C2 (S2) 0, C3 (S1) 0, C3 (S2) 0, C4 (S1) 0.123, C4 (S2) 4.63, D (S1) 0, D (S2) 0
- Exportierte thermische Energie (EET) [MJ]: A1-A3 0, A4 0, A5 0.516, C1 0, C2 (S1) 0, C2 (S2) 0, C3 (S1) 0, C3 (S2) 0, C4 (S1) 0.304, C4 (S2) 10.9, D (S1) 0, D (S2) 0

## Impact indicators
- Globales Erwärmungspotenzial (GWP) [kg CO_(2)-Äq.]: A1-A3 5.4, A4 0.0463, A5 0.659, C1 0, C2 (S1) 0.0288, C2 (S2) 0.00575, C3 (S1) 0.115, C3 (S2) 0, C4 (S1) 0.129, C4 (S2) 5.23, D (S1) -4.19, D (S2) -1.32
- Abbau Potential der stratosphärischen Ozonschicht (ODP) [kg CFC11-Äq.]: A1-A3 5.12e-9, A4 5.87e-15, A5 4.1e-10, C1 0, C2 (S1) 9.66e-15, C2 (S2) 1.93e-15, C3 (S1) 4.33e-13, C3 (S2) 0, C4 (S1) 4.04e-14, C4 (S2) 2.19e-12, D (S1) -2.28e-9, D (S2) -1.91e-9
- Versauerungspotenzial von Boden und Wasser (AP) [kg SO_(2)-Äq.]: A1-A3 0.014, A4 0.000102, A5 0.0013, C1 0, C2 (S1) 6.44e-5, C2 (S2) 1.29e-5, C3 (S1) 0.000171, C3 (S2) 0, C4 (S1) 5.26e-5, C4 (S2) 0.00698, D (S1) -0.00671, D (S2) -0.0028
- Eutrophierungspotenzial (EP) [kg PO_(4)^(3)-Äq.]: A1-A3 0.00239, A4 2.38e-5, A5 0.000204, C1 0, C2 (S1) 1.53e-5, C2 (S2) 3.06e-6, C3 (S1) 2.73e-5, C3 (S2) 0, C4 (S1) 9.67e-6, C4 (S2) 0.00024, D (S1) -0.00182, D (S2) -0.00108
- Bildungspotential für troposphärisches Ozon (POCP) [kg Ethen-Äq.]: A1-A3 0.00271, A4 -3.25e-5, A5 0.000219, C1 0, C2 (S1) -2.03e-5, C2 (S2) -4.06e-6, C3 (S1) 1.18e-5, C3 (S2) 0, C4 (S1) 3.14e-6, C4 (S2) 0.000133, D (S1) -0.00158, D (S2) -0.000191
- Potenzial für den abiotischen Abbau nicht fossiler Ressourcen (ADPE) [kg Sb-Äq.]: A1-A3 2.48e-5, A4 4.81e-9, A5 2.03e-6, C1 0, C2 (S1) 2.32e-9, C2 (S2) 4.63e-10, C3 (S1) 5.79e-8, C3 (S2) 0, C4 (S1) 5.74e-9, C4 (S2) 2.3e-6, D (S1) -1.76e-5, D (S2) -1.79e-7
- Potenzial für den abiotischen Abbau fossiler Brennstoffe (ADPF) [MJ]: A1-A3 130, A4 0.628, A5 10.7, C1 0, C2 (S1) 0.398, C2 (S2) 0.0795, C3 (S1) 1.12, C3 (S2) 0, C4 (S1) 0.053, C4 (S2) 9.05, D (S1) -99, D (S2) -20.8

## Use advice
Gültigkeitsbereich:
Dieses Dokument bezieht sich auf die von der Sika Trocal GmbH in D-53840 Troisdorf hergestellten Sikaplan U Kunststoffabdichtungsbahnen. Die Öko-bilanzdaten wurden auf Basis der Produktionsdaten aus den Jahren 2016 und 2017 von der Sika Services AG berechnet.
Systemgrenze:
Typ der EPD: Wiege bis Werkstor - mit Optionen

Die Systemgrenze der EPD folgt dem modularen Auf-bau gemäß /EN 15804/. In der Ökobilanz werden die folgenden Module berücksichtigt:
A1-A3: Herstellung der Vorprodukte, Verpa-ckung sowie Hilfsstoffe, Transport zum Werk, Produktion inkl. Energiebereitstellung und Abfallbehandlung
A4: Transport zur Baustelle
A5: Einbau ins Gebäude (Schweißenergie, Entsorgung von Verpackung und Verschnitt der Dachbahn)
C1: Rückbau und Abriss
C2: Transport zur Abfallbewirtschaftung
C3: Abfallbewirtschaftung zur Wiederverwen-dung, Rückgewinnung und/oder zum Recyc-ling
C4: Beseitigung (Abfallverbrennungsprozess)
D: Wiederverwendungs-, Rückgewinnungs- und/oder Recyclingspotentiale als Nettoflüsse und Gutschriften (Vorteile)

## Data sources
- GaBi Database (all versions)
- GaBi database SP29 2016
