# Schienensysteme

Dataset: ILCD process, EPD, average dataset
Geography: DE
Reference year: 2021
Valid until: 2026
Classification: OEKOBAU.DAT: Metalle / Edelstahl / Befestigungsmittel
Classification: IBUCategories: 02 Bauprodukte / Metallbauprodukte und Zubehör / Dünnwandige Profile und Profiltafeln aus Metall
Method details: Dünnwandige Profile und Profiltafeln aus Metall.pdf
Generated by: myclimate Deutschland gGmbH
Registration number: EPD-JDL-20200260-IBB1-DE
Owner: Jordahl GmbH
Compliance: DIN EN 15804; ISO 14025
Review: Accredited third party review by Institut Bauen und Umwelt e. V.
Amounts: rows without a unit in brackets have none in this file; such an amount is in the reference unit of its flow, which a separate flow dataset defines
copyright: true
licenseType: Free of charge for all users and uses
accessRestrictions: None

## General comment
Das Produktportfolio der JORDAHL Schienensysteme umfasst einzubetonierende Ankerschienen vom Typ JTA, JXA und JZA, sowie verschweiß-, bzw. verschraubbare Montageschienen vom Typ JM, JML, und JXM, in warmgewalzter sowie kaltgeformter Ausführung, inklusive den dazugehörigen Hammerkopf-, Hakenkopf-, und Zahnschrauben.

Die JORDAHL Montage- bzw. Ankerschienen bestehen aus einer C-förmigen Schiene aus Stahl bzw./ oder nichtrostendem Stahl und passenden Spezialschrauben. Die JORDAHL Ankerschienen bestehen zusätzlich aus mindestens zwei, auf dem Profilrücken, unlösbar befestigten Ankern. Diese Anker sind als Rundanker bzw. I-Anker ausgeführt.

Ankerschienen werden oberflächenbündig einbetoniert. Montageschienen werden direkt auf dem Untergrund verschweißt oder verschraubt. In den Schienen werden JORDAHL Spezialschrauben mit entsprechenden Sechskantmuttern und Unterlegscheiben befestigt.

Die Montageschiene als deklariertes Produkt ist verfügbar in walzblankem und verzinktem Stahl sowie Edelstahl.

Das deklarierte Produkt Ankerschiene ist verfügbar in verzinktem Stahl oder Edelstahl. Dabei unterscheidet man zwischen Montage-, bzw. Ankerschienen mit glatten Schienenlippen (JM, JML, JTA) und gezahnten Schienenlippen (JXM, JXA, JXA-PC, JZA). Sie übertragen hohe Lasten aus Zug- und Querzug- bzw. Längszugrichtung.

Für die Anwendung und Nutzung gelten die jeweiligen nationalen Vorschriften.

JORDAHL Montage- bzw. Ankerschienen (ausgenommen Profil 41/27) werden bemessen nach:

EOTA TR 047 bzw.
EOTA TR 050 oder
EN 1992-4 und
Europäischen Technischen Bewertung ETA 15/0386 oder
Europäisch Technische Bewertung ETA 09/0338 oder

ICC-ES ESR 2854 oder
chinesische bauaufsichtliche Zulassung CABR-01-(2019)-003-02 oder
Allgemeine bauaufsichtliche Zulassungen Z-21.4-741 und Z-21.4-1690 des Deutschen Instituts für Bautechnik (DIBt)

## Technology and included processes
Die C-Profile werden von qualifizierten Lieferanten als walzblanker Stahl oder Edelstahl bezogen. Nach der Anlieferung, werden JORDAHL Montage-, bzw. Ankerschienen aus kaltgeformten oder warmgewalzten Schienenprofilen weiterverarbeitet bzw. hergestellt. Durch Stanzen oder Nieten werden Anker auf den Schienenrücken angebracht oder die Schienenrücken werden gelocht. Anschließend werden die Schienen verzinkt. Der angefallene Metall-Verschnitt und Filterstaub wird in Behältern gelagert, durch einen Schrotthändler abgeholt und gemäß Vorschrift dem Recycling zugeführt. Die PE- bzw. PS-Füllung wird vor dem Verpacken im JORDAHL Werk eingebracht.
Technische Daten:
Es gelten die folgenden technischen Daten für JORDAHL Montage-, Ankerschienen. Die Prüfnorm ist bemessen für die JTA nach der Europäisch Technischen Bewertung (ETA) ETA 09/0338, 18.Juni 2018, JORDAHL-Ankerschiene JTA.

Die Prüfnorm für die JM Montageschiene ist bemessen gemäß der Europäisch Technischen Bewertung (ETA) ETA 15/0386, 13.Januar 2017, JORDAHL Montageschienen JM.

Die Prüfnorm für die JXA ist bemessen gemäß der allgemein bauaufsichtlichen Zulassung Z-21.4-1690 und für die JZA gemäß der allgemein bauaufsichtlichen Zulassung Z-21.4-741.

Alle geometrischen Maße, produktspezifischen Parameter und die statischen Tragfähigkeiten der verschiedenen Montage- bzw. Ankerschienen JTA, JXA und JZA sind in den folgenden technischen Spezifikationen angegeben:

JM, JTA-System:

ETA 15/0386

ETA 09/0338
CABR-01-(2019)-003-02
ICC-ES ESR 2854
JXA- und JZA-System:

Z-21.4-741
Z-21.4-1690
Deklarierte Einheit:
Die Deklaration bezieht sich auf die Herstellung von

1 m Schienensystem mit einem durchschnittlichen Gewicht von 2,668 kg/m.

## Technical purpose
JORDAHL Montage-, bzw. Ankerschienen gewährleisten eine Übertragung hoher Lasten an Stahlkonstruktionen oder in bewehrte und unbewehrte Betonbauteile.

Montageschienen können direkt an Bauteile geschweißt oder geschraubt werden. Ankerschienen werden vor dem Betonguss im Bauteil positioniert und an der Schalung, der Bewehrung oder mithilfe einer geeigneten Hilfskonstruktion befestigt. JORDAHL Schienensysteme dienen der Fixierung von Anbauten an diversen Bauteilen. Darüber hinaus ist die JORDAHL Montage- bzw. Ankerschiene ein Produkt das wiederkehrende Anwendungen mittels JORDAHL Spezialschrauben ermöglicht.

JORDAHL Schienenprofile sind dafür in verschiedenen Querschnittstypen erhältlich und unterscheiden sich in ihren Abmessungen und Anwendungsgebieten.

Beispiele sind:

JTA W für Glasfassaden, Aufzugsführungs-schienen und -türen, Signal- und Lüftungsanlagen in Tunneln, schwere Stahlbaukonstruktionen und Verbindungen mit Lastwechseln (Wind, Verkehr, Vibration)
JTA K für Fertigteilverbindungen, Geländer, Beleuchtungsanlagen, Gebäudeausstattung und Stadionsitze
JM W für mittelschwere bis schwere Konstruktionen z.B Tragrahmen oder hochbelastete Schraubverbindungen mit hohen Anzugsdrehmomenten. Nachträglicher Einbau möglich
JM K zur Befestigung von Ver-, Entsorgungsleitungen, Elektrokabeln, Kabelbahnen oder Klimakanälen
JML K direkt anschraubbar, zur Befestigung von Rohren, Elektrokabeln sowie untergeordnete Befestigungen
JXA W für dynamische Lastverbindung in Tunneln, Kranbahnanlagenverankerungen, Fassadenverbindungen und hochbeanspruchte Fertigteilverbindungen
JXA-PC zur Überbrückung hoher zu erwartender Rissbreiten für sicherheits-relevante Bereiche wie Kraftwerke
JZA zur Übertragung von Kräften in Schienenlängsrichtung insbesondere bei Kabeltragsystemen und anderen TGA-Befestigungen
JXM W gewährleistet Planungsfreiheit durch nachträglichen Einbau. Zur Kraftübertragung in Schienenlängsrichtung

## Reference product
- Montage- bzw. Ankerschiene: 1

## Inputs
- Erneuerbare Primärenergie als Energieträger (PERE) [MJ]: A1-A3 1.50539, C2 6.28806e-5, C3 0, C4 2.4216e-5, D -0.124184
- Erneuerbare Primärenergie zur stofflichen Nutzung (PERM) [MJ]: A1-A3 0, C2 0, C3 0, C4 0, D 0
- Total erneuerbare Primärenergie (PERT) [MJ]: A1-A3 1.50539, C2 6.28806e-5, C3 0, C4 2.4216e-5, D -0.124184
- Nicht-erneuerbare Primärenergie als Energieträger (PENRE) [MJ]: A1-A3 44.0277, C2 0.169806, C3 0, C4 0.00948095, D -0.923927
- Nicht-erneuerbare Primärenergie zur stofflichen Nutzung (PENRM) [MJ]: A1-A3 0, C2 0, C3 0, C4 0, D 0
- Total nicht erneuerbare Primärenergie (PENRT) [MJ]: A1-A3 44.0277, C2 0.169806, C3 0, C4 0.00948095, D -0.923927
- Einsatz von Sekundärstoffen (SM) [kg]: A1-A3 2.7401, C2 0, C3 0, C4 0, D -0.2055
- Erneuerbare Sekundärbrennstoffe (RSF) [MJ]: A1-A3 0, C2 0, C3 0, C4 0, D 0
- Nicht erneuerbare Sekundärbrennstoffe (NRSF) [MJ]: A1-A3 0, C2 0, C3 0, C4 0, D 0
- Einsatz von Süßwasserressourcen (FW) [m^3]: A1-A3 1.86577, C2 -3.52883e-5, C3 0, C4 -1.16215e-5, D -0.0360447

## Outputs
- Gefährlicher Abfall zur Deponie (HWD) [kg]: A1-A3 0.00172021, C2 4.24265e-7, C3 0, C4 2.26839e-8, D 2.10249e-5
- Entsorgter nicht gefährlicher Abfall (NHWD) [kg]: A1-A3 1.19639, C2 6.65687e-6, C3 0, C4 0.132439, D -0.456834
- Entsorgter radioaktiver Abfall (RWD) [kg]: A1-A3 0.00023905, C2 1.16136e-6, C3 0, C4 6.45537e-8, D -4.27052e-6
- Komponenten für die Wiederverwendung (CRU) [kg]: A1-A3 0, C2 0, C3 0, C4 0, D 0
- Stoffe zum Recycling (MFR) [kg]: A1-A3 0, C2 0, C3 2.5346, C4 0, D 0
- Stoffe für die Energierückgewinnung (MER) [kg]: A1-A3 0, C2 0, C3 0, C4 0, D 0
- Exportierte elektrische Energie (EEE) [MJ]: A1-A3 0, C2 0, C3 0, C4 0, D 0
- Exportierte thermische Energie (EET) [MJ]: A1-A3 0, C2 0, C3 0, C4 0, D 0

## Impact indicators
- Globales Erwärmungspotenzial (GWP) [kg CO_(2)-Äq.]: A1-A3 3.28013, C2 0.0114132, C3 0, C4 0.000646267, D -0.0922774
- Abbau Potential der stratosphärischen Ozonschicht (ODP) [kg CFC11-Äq.]: A1-A3 3.38817e-7, C2 2.07414e-9, C3 0, C4 1.12741e-10, D -1.48368e-9
- Versauerungspotenzial von Boden und Wasser (AP) [kg SO_(2)-Äq.]: A1-A3 0.0155621, C2 2.96207e-5, C3 0, C4 3.88699e-6, D -0.000949126
- Eutrophierungspotenzial (EP) [kg PO_(4)^(3)-Äq.]: A1-A3 0.00205674, C2 5.0518e-6, C3 0, C4 8.12674e-7, D -5.26567e-5
- Bildungspotential für troposphärisches Ozon (POCP) [kg Ethen-Äq.]: A1-A3 0.000912992, C2 1.08688e-6, C3 0, C4 1.35747e-7, D 8.58147e-5
- Potenzial für den abiotischen Abbau nicht fossiler Ressourcen (ADPE) [kg Sb-Äq.]: A1-A3 0.013172, C2 6.67868e-10, C3 0, C4 1.77146e-10, D -1.2875e-5
- Potenzial für den abiotischen Abbau fossiler Brennstoffe (ADPF) [MJ]: A1-A3 40.4812, C2 0.159925, C3 0, C4 0.00892352, D -0.824499

## Use advice
Gültigkeitsbereich:
Dieses Dokument bezieht sich auf Montage-, bzw. Ankerschienen der Firma Jordahl GmbH, hergestellt in Trebbin, Deutschland. Die deklarierte Einheit bezieht sich auf 1 Meter Ankerschiene. Das Produkt wird aus Edelstahl oder Stahl produziert und wird als Durchschnittsprodukt deklariert. Die Datenerhebung erfolgte werksspezifisch mit aktuellen Jahresdaten von 2019. Der Deklarationsinhaber ist verantwortlich für die zugrundeliegenden Daten und deren Verifizierung.
Systemgrenze:
Die Ökobilanz betrachtet die Systemgrenzen "von der Wiege bis zum Werkstor - mit Optionen" und folgt dem modularen Aufbau nach EN 15804. Die Ökobilanz berücksichtigt folgende Module:

A1: Rohstoffgewinnung und -verarbeitung, Verarbeitungsprozesse, Stahlerzeugung, -guss und -produktion; Aufbereitung von Recyclingmaterialien

A2: Transport zum Hersteller: Transport der Rohstoffe zum Herstellungswerk

A3: Herstellungsprozesse und -aufwendungen: Herstellung der Schienensysteme
C2: Transport zur Abfallbewirtschaftung
C3: Abfallbewirtschaftung zur Wiederverwendung, Rückgewinnung und/oder zum Recycling
C4: Beseitigung

D: Wiederverwendungs-, Rückgewinnungs- oder Recyclingpotenzial als Nettoflüsse und Gutschriften bzw. Lasten für Stahl/ Edelstahl

## Data sources
- ecoinvent database (all versions)
- ecoinvent 3.6 database
