# EVA-Dachbahnen; EVA

Dataset: ILCD process, EPD, generic dataset
Geography: DE
Reference year: 2021
Valid until: 2022
Classification: oekobau.dat: Kunststoffe / Dachbahnen / EVA-Dachbahnen (Etylen-Vinylacetat)
Owner: Sphera Solutions GmbH
Compliance: EN 15804+A2
Review: Dependent internal review by Sphera Solutions GmbH; Independent external review by GaBi user forum
Amounts: rows without a unit in brackets have none in this file; such an amount is in the reference unit of its flow, which a separate flow dataset defines
copyright: true
licenseType: Free of charge for all users and uses
accessRestrictions: The license conditions as stated on https://www.oekobaudat.de/ apply.
accessRestrictions: Es gelten die Lizenzbedingungen wie sie auf https://www.oekobaudat.de/ genannt sind.

## General comment
Dieser Datensatz wurde nach dem European Standard EN 15804+A2 für Nachhaltiges Bauen modelliert. Ergebnisse werden in Modulen abgebildet, die den strukturierten Ausdruck von Ergebnissen über den gesamten Lebenszyklus zulassen.

## Geography
Der Datensatz bildet die länderspezifische Situation in Deutschland ab. Dabei werden Haupttechnologien, spezifische regionale Charakteristiken und ggf. Importstatistiken berücksichtigt.

## Time period
Jährlicher Durchschnitt

## Technology and included processes
Die Lebenszyklusanalyse der EVA-Dachplane (Ethylen-Vinylacetat-Copolymer) umfasst die Lebenszyklusphasen Herstellung und Entsorgung. Transporte von der Fabrik bis zum Montageort werden nicht berücksichtigt und sollten in einem Systemansatz bei Bedarf integriert werden. EVA-Herstellung: EVA wird durch die Copolymerisation von Ethylen und Vinylacetat hergestellt. Die Reaktion findet in der Lösung statt, der Katalysator und der Initiator werden verwendet. Die Reaktionstemperatur liegt zwischen 40 und 80 °C und sollte wegen der stark exothermen Reaktion nicht zu hoch sein.

In Modul C1 wird ein manueller Rückbau (lastenfrei) angenommen. Sammelverluste werden vernachlässigt.
Der Transport in Modul C2 zur Verwertungsanlage erfolgt mit einem LKW (50km).
In Modul C3 wird die Zerkleinerung und thermische Behandlung (Verbrennung) des Materials berücksichtigt. Bei der Berechnung der Verbrennungsemissionen und Gutschriften wird der spezifische Heizwert des jeweiligen Materials sowie die Materialzusammensetzung berücksichtigt.
In Modul D erfolgen Gutschriften für die Substitution von Strom (deutscher Strommix) und thermischer Energie (aus Erdgas).

## Technical purpose
Dieses Produkt kann im Baubereich verwendet werden.

## Safety margin
20 %. Produktsystem bis auf wenige Prozesse/Flüsse abgebildet. Technologische, zeitliche und geographische Repräsentativität teilweise gegeben.

## Reference product
- EVA-Dachbahnen: 1

## Inputs
- Erneuerbare Primärenergie als Energieträger (PERE) [MJ]: A1-A3 21.0258, C2 0.00437233, C3 0.285305, D -15.0582
- Erneuerbare Primärenergie zur stofflichen Nutzung (PERM) [MJ]: A1-A3 0, C2 0, C3 0, D 0
- Total erneuerbare Primärenergie (PERT) [MJ]: A1-A3 21.0258, C2 0.00437233, C3 0.285305, D -15.0582
- Nicht-erneuerbare Primärenergie als Energieträger (PENRE) [MJ]: A1-A3 72.4181, C2 0.0753354, C3 111.699, D -44.6228
- Nicht-erneuerbare Primärenergie zur stofflichen Nutzung (PENRM) [MJ]: A1-A3 92, C2 0, C3 -92, D 0
- Total nicht-erneuerbare Primärenergie (PENRT) [MJ]: A1-A3 164.418, C2 0.0753354, C3 19.6985, D -44.6228
- Einsatz von Sekundärstoffen (SM) [kg]: A1-A3 0, C2 0, C3 0, D 0
- Erneuerbare Sekundärbrennstoffe (SF) [MJ]: A1-A3 0, C2 0, C3 0, D 0
- Nicht erneuerbare Sekundärbrennstoffe (NRSF) [MJ]: A1-A3 0, C2 0, C3 0, D 0
- Nettoeinsatz von Süßwasserressourcen (FW) [m3]: A1-A3 0.0483289, C2 3.88591e-6, C3 0.0171337, D -0.00560185

## Outputs
- Gefährlicher Abfall zur Deponie (HWD) [kg]: A1-A3 3.11339e-8, C2 3.14877e-12, C3 2.72914e-10, D -1.54861e-8
- Entsorgter nicht gefährlicher Abfall (NHWD) [kg]: A1-A3 0.0929098, C2 1.21608e-5, C3 0.0322169, D -0.0235169
- Entsorgter radioaktiver Abfall (RWD) [kg]: A1-A3 0.00251289, C2 7.22941e-8, C3 3.50296e-5, D -0.00161952
- Komponenten für die Wiederverwendung (CRU) [kg]: A1-A3 0, C2 0, C3 0, D 0
- Stoffe zum Recycling (MFR) [kg]: A1-A3 0, C2 0, C3 0, D 0
- Stoffe für die Energierückgewinnung (MER) [kg]: A1-A3 0, C2 0, C3 2, D 0
- Exportierte elektrische Energie (EEE) [MJ]: A1-A3 0, C2 0, C3 12.0628, D 0
- Exportierte thermische Energie (EET) [MJ]: A1-A3 0, C2 0, C3 27.7824, D 0

## Impact indicators
- Globales Erwärmungspotenzial - total (GWP-total) [kg CO2 eq.]: A1-A3 5.90861, C2 0.00572232, C3 7.97235, D -2.87095
- Globales Erwärmungspotenzial - fossil (GWP-fossil) [kg CO2 eq.]: A1-A3 5.82307, C2 0.00568347, C3 7.97183, D -2.83626
- Globales Erwärmungspotenzial - biogen (GWP-biogenic) [kg CO2 eq.]: A1-A3 0.0789904, C2 2.35432e-6, C3 0.000425287, D -0.0305262
- Globales Erwärmungspotenzial - luluc (GWP-luluc) [kg CO2 eq.]: A1-A3 0.00654863, C2 3.65008e-5, C3 9.50051e-5, D -0.00415992
- Abbaupotenzial der stratosphärischen Ozonschicht (ODP) [kg CFC-11 eq.]: A1-A3 8.77468e-14, C2 1.45425e-18, C3 1.1719e-15, D -6.57372e-14
- Versauerungspotenzial, kumulierte Überschreitung (AP) [Mole of H+ eq.]: A1-A3 0.00801449, C2 1.61139e-5, C3 0.00122994, D -0.00290833
- Eutrophierungspotenzial - Süßwasser (EP-freshwater) [kg P eq.]: A1-A3 1.48277e-5, C2 1.16887e-8, C3 1.60002e-7, D -6.92113e-6
- Eutrophierungspotenzial - Salzwasser (EP-marine) [kg N eq.]: A1-A3 0.00248627, C2 7.42335e-6, C3 0.000197944, D -0.00106996
- Eutrophierungspotenzial - Land (EP-terrestrial) [Mole of N eq.]: A1-A3 0.0260414, C2 8.30537e-5, C3 0.00572672, D -0.0113995
- Bildungspotenzial für troposphärisches Ozon (POCP) [kg NMVOC eq.]: A1-A3 0.00924747, C2 1.44757e-5, C3 0.000536457, D -0.00280261
- Potenzial für die Verknappung abiotischer Ressourcen nicht fossile Ressourcen (ADPE) [kg Sb eq.]: A1-A3 1.57985e-6, C2 4.94382e-10, C3 1.66792e-8, D -8.88485e-7
- Potenzial für die Verknappung abiotischer Ressourcen fossile Brennstoffe (ADPF) [MJ]: A1-A3 182.806, C2 0.0753322, C3 1.29805, D -44.6165
- Wasser-Entzugspotenzial (Benutzer) (WDP) [m³ world equiv.]: A1-A3 0.0678653, C2 2.20936e-5, C3 0.730198, D -0.0340092

## Use advice
Der Datensatz repräsentiert ein Cradle to Gate Inventar. Er kann verwendet werden, um die Lieferkette des jeweiligen Produktes in einer repräsentativen Weise zu charakterisieren. Die Kombination mit einzelnen Einheitenprozessen und diesem Produkt ermöglicht die Erstellung von anwenderspezifischen (Produkt-) LCAs.

## Data sources
- IBU-Declaration Deutsche Bauchemie e.V.; Sealants based on silicone (EPD-DBC-2014-BDSB-IBM1-DE),2014
- Documentation of data quality management
- GaBi Database Edition 2021, CUP2021.01
- GaBi database (all versions)
