# Nutzung - Fahrstuhl geringe Auslastung (100.000 Fahrten/a); 100000 rides/a

Dataset: ILCD process, EPD, generic dataset
Geography: DE
Reference year: 2018
Valid until: 2022
Classification: oekobau.dat: Gebäudetechnik / Nutzung / Nutzung Beförderungstechnik
Owner: thinkstep
Compliance: DIN EN 15804
Review: Dependent internal review by thinkstep, IABP-GaBi, IBP-GaBi; Independent external review by GaBi user forum, GaBi bug forum, GaBi user community
Amounts: rows without a unit in brackets have none in this file; such an amount is in the reference unit of its flow, which a separate flow dataset defines
copyright: true

## General comment
Dieser Datensatz wurde nach dem European Standard EN 15804 für Nachhaltiges Bauen modelliert. Ergebnisse werden in Modulen abgebildet, die den strukturierten Ausdruck von Ergebnissen über den gesamten Lebenszyklus zulassen.

## Geography
Der Datensatz bildet die länderspezifische Situation in Deutschland ab. Dabei werden Haupttechnologien, spezifische regionale Charakteristiken und ggf. Importstatistiken berücksichtigt.

## Time period
Jährlicher Durchschnitt

## Technology and included processes
Der Stromverbrauch eines Aufzugs lässt sich in einen Stand-by-Verbrauch und den eigentlichen Verbrauch für die Fahrten des Aufzugs unterteilen. Der durchschnittliche Stromverbrauch pro Fahrt beträgt 0,013 kWh. Der Stand-by-Verbrauch beträgt ca. 600 kWh/a, wenn Kabinenbeleuchtung und Tür-Zuhaltung nicht permanent eingeschaltet sind. Dies wurde für den modellierten Datensatz angenommen, da das den Stand der Technik für neue Anlagen darstellt. Im Schnitt wird davon ausgegangen, dass ein Fahrstuhl mit einer Nutzlast von 1000 kg etwa 200.000 Fahrten in einem Bürogebäude durchführt. Bei 220 Arbeitstagen ergäben sich somit etwa 900 Fahrten pro Tag. Dieser Datensatz ist auf 100.000 Fahrten/a skaliert und somit mit einer geringen Auslastung modelliert

Hintergrundsystem:
Strom: Die Stromerzeugung wird entsprechend der länderspezifischen Randbedingungen modelliert. Die landesspezifische Analyse beinhaltet:
1.: Spezifische Kraftwerke der verschiedenen fossilen Energieträger und der Einsatz erneuerbarer Energien sind entsprechend der länderspezifischen Energieträgermixe modelliert. Die Analyse bezieht Stromimporte aus den Nachbarländern, Transmissions-und Verteilungsverluste und den Eigenverbrauch im Kraftwerk und bei der Verteilung bzw. Speicherung, z. B. durch Pumpspeicherwerke, ein.
2.: Die landes-/regionalspezifischen Technologiestandards sowie die Erzeugung in Elektrizitätskraftwerken und/oder in speziellen Kraftwerken mit Kraft-Wärme-Kopplung (KWK) sind berücksichtigt.
3.: Die länderspezifische Energieträgerbereitstellung (mit Anteil der Importe und/oder Eigenversorgung) einschließlich der Energieträger-Eigenschaften (z. B. Elementar- und Energiegehalte) werden berücksichtigt.
4.: Die Förderung, Produktion, Verarbeitung und Transportprozesse werden entsprechend der Situation im jeweiligen Stromerzeugerland modelliert. Die unterschiedlichen Produktions- und Verarbeitungsverfahren (Emissionen und Wirkungsgrade) in den verschiedenen Energieerzeugerländern werden einbezogen, z. B. Rohöl-Veredelungsverfahren oder Abfackel-Raten an den Ölplattformen.
Thermische Energie, Prozessdampf: Die Erzeugung von Dampf und thermischer Energie in Heizkraftwerken wird entsprechend der landesspezifischen Situation (Emissionsgrenzwerte, Energieträgerbasis) modelliert.
Der Wirkungsgrad für die thermische Energieerzeugung beträgt per Definition 100% des Energieträgereinsatzes. Für Prozessdampf liegt der Wirkungsgrad im Bereich von 85-95%. Die zur Heizenergie-Erzeugung verwendeten Energieträger werden entsprechend der nationalen Situation modelliert (siehe Kapitel Strom oben).
Transporte: Alle relevanten und bekannten Transportprozesse in Form von See- und Binnenschiffsverkehr sowie Bahn-, Lkw- und der Leitungstransport sind enthalten.
Energieträger: Die Energieträger werden entsprechend der spezifischen Versorgungslage modelliert (siehe Kapitel Strom oben).
Raffinerieprodukte: Diesel, Benzin, technische Gase, Heizöl, Schmierstoffe und Rückstände, wie Bitumen, werden mit einem parametrierten länderspezifische Raffineriemodell modelliert. Das Raffinerie-Modell bezieht die länderspezifischen Veredelungsverfahren (z. B. Emissionspegel, interner Energieverbrauch etc.) und das länderspezifische Produktspektrum ein, das sich je nach Land stark unterscheiden kann. Die Rohöl-Förderung wird gemäß der länderspezifischen Situation mit den jeweiligen Energieträger-Eigenschaften modelliert.

## Technical purpose
Dieses Produkt kann im Baubereich verwendet werden.

## Safety margin
0 %.

## Reference product
- Fahrstuhlnutzung: 8765.78

## Inputs
- Erneuerbare Primärenergie als Energieträger (PERE) [MJ]: B6 8527.4
- Erneuerbare Primärenergie zur stofflichen Nutzung (PERM) [MJ]: B6 0
- Total erneuerbare Primärenergie (PERT) [MJ]: B6 8527.4
- Nicht-erneuerbare Primärenergie als Energieträger (PENRE) [MJ]: B6 12733.9
- Nicht-erneuerbare Primärenergie zur stofflichen Nutzung (PENRM) [MJ]: B6 0
- Total nicht erneuerbare Primärenergie (PENRT) [MJ]: B6 12733.9
- Einsatz von Sekundärstoffen (SM) [kg]: B6 0
- Erneuerbare Sekundärbrennstoffe (RSF) [MJ]: B6 0
- Nicht erneuerbare Sekundärbrennstoffe (NRSF) [MJ]: B6 0
- Einsatz von Süßwasserressourcen (FW) [m3]: B6 3.94289

## Outputs
- Gefährlicher Abfall zur Deponie (HWD) [kg]: B6 8.73293e-6
- Entsorgter nicht gefährlicher Abfall (NHWD) [kg]: B6 9.91363
- Entsorgter radioaktiver Abfall (RWD) [kg]: B6 1.03175
- Komponenten für die Wiederverwendung (CRU) [kg]: B6 0
- Stoffe zum Recycling (MFR) [kg]: B6 0
- Stoffe für die Energierückgewinnung (MER) [kg]: B6 0
- Exportierte elektrische Energie (EEE) [MJ]: B6 0
- Exportierte thermische Energie (EET) [MJ]: B6 0

## Impact indicators
- Globales Erwärmungspotenzial (GWP) [kg CO2 Äquiv.]: B6 1010.86
- Abbaupotenzial der stratosphärischen Ozonschicht (ODP) [kg R11 Äquiv.]: B6 4.72725e-11
- Versauerungspotential (AP) [kg SO2 Äquiv.]: B6 1.19268
- Eutrophierungspotential (EP) [kg Phosphat Äquiv.]: B6 0.236917
- Bildungspotenzial für troposphärisches Ozon (POCP) [kg Ethen Äquiv.]: B6 0.0988553
- Potenzial für den abiotischen Abbau nicht fossiler Ressourcen (ADPE) [kg Sb Äquiv.]: B6 0.000447289
- Potenzial für den abiotischen Abbau fossiler Brennstoffe (ADPF) [MJ]: B6 10129.4

## Use advice
Der Datensatz repräsentiert ein Cradle to Gate Inventar. Er kann verwendet werden, um die Lieferkette des jeweiligen Produktes in einer repräsentativen Weise zu charakterisieren. Die Kombination mit einzelnen Einheitenprozessen und diesem Produkt ermöglicht die Erstellung von anwenderspezifischen (Produkt-) LCAs.

## Data sources
- GaBi Database Edition 2020, SP40
- GaBi database (all versions)
