# Fundermax m.look-Schichtstoffplatten

Dataset: ILCD process, EPD, average dataset
Geography: AT
Reference year: 2021
Valid until: 2026
Classification: OEKOBAU.DAT: Komposite / Systembauteile / Innenwände
Classification: IBUCategories: 02 Bauprodukte / Fassaden / Schichtpressstoffe
Method details: Schichtpressstoffe.pdf
Generated by: Daxner & Merl GmbH
Registration number: EPD-FMX-20210204-IBC1-DE
Owner: Fundermax GmbH
Compliance: DIN EN 15804+A2; ISO 14025
Review: Accredited third party review by Institut Bauen und Umwelt e. V.
Amounts: rows without a unit in brackets have none in this file; such an amount is in the reference unit of its flow, which a separate flow dataset defines
copyright: true
licenseType: Free of charge for all users and uses
accessRestrictions: None

## General comment
Fundermax m.look-Schichtstoffplatten sind dekorative Hochdruck-Schichtpressstoffplatten in Anlehnung an EN 438-4 und EN 438-6 für die Verwendung als Wand- und Deckenbekleidung sowie als Möbelplatte in der Innen- und Außenanwendung.

m.look-Schichtstoffplatten bestehen aus einem hochbelastbaren glasvliesarmierten, überwiegend mineralischen nicht brennbaren Kern mit einer hochwitterungsbeständigen dekorativen Oberfläche. Die dekorative Oberflache zeichnet sich vor allem durch hohe Kratzfestigkeit, Lichtechtheit, Schlagfestigkeit, Antigraffiti-Eigenschaften, leichte Reinigbarkeit und Hagelfestigkeit aus.

Eigenschaften geprüft nach EN 438-2.

Fundermax m.look-Schichtstoffplatten können auf Unterkonstruktionen aus Metall und Holz geklebt, geschraubt oder genietet werden. Darüber hinaus ist eine Vielzahl weiterer Befestigungs- und Verbindungsmittel anwendbar.

## Technology and included processes
m.look Schichtstoffplatten werden durch Verpressen von mit mineralischen Füllstoff enthaltenden härtbaren Harzen imprägnierten Glasvliesbahnen unter gleichzeitiger Anwendung von Wärme (Temperatur ≥ 120 °C) und einem hohen Druck (≥ 5 MPa) hergestellt, wobei ein homogener, nicht poröser Werkstoff mit erhöhter Dichte (≥ 1,35 g/cm³) und der geforderten Oberflächenbeschaffenheit entsteht.
Deklarierte Einheit:
Die vorliegende Umwelt-Produktdeklaration bezieht sich auf eine deklarierte Einheit von 1 m² m.look-Schichtstoffplatte mit einer durchschnittlichen Dicke von 7,24 mm und einem durchschnittlichen Flächengewicht von 13 kg/m². Die Verpackung ist in der Ökobilanz ebenfalls berücksichtigt.

## Technical purpose
Fundermax m.look-Schichtstoffplatten können sowohl im privaten als auch öffentlichen Bereich eingesetzt werden. Sie sind besonders geeignet für den Wohnbereich, Krankenhäuser, öffentliche Gebäude, Bahnhöfe und Flughäfen, für den öffentlichen Verkehr, Hotels, Schulen, Geschäftsräume, Sportstätten und industrielle Anwendungen. Die speziellen Eigenschaften erlauben den Einsatz von Fundermax m.look-Schichtstoffplatten im Innenbereich als Wandverkleidung, Geländerfüllungen, Möbel, Tische, Säulenverkleidungen, Laboreinrichtungen, Kabinen, Decken, Fensterbänke, Arbeitsplatten, Geschäftspulte, Waschtische usw.

## Reference product
- m.look Fassadenplatte: 1

## Inputs
- Erneuerbare Primärenergie als Energieträger (PERE) [MJ]: A1-A3 56.0682, C1 0, C2 3.00774, C3 0, C4 0.351171, D 0
- Erneuerbare Primärenergie zur stofflichen Nutzung (PERM) [MJ]: A1-A3 2.97767, C1 0, C2 -2.97767, C3 0, C4 0, D 0
- Total erneuerbare Primärenergie (PERT) [MJ]: A1-A3 59.0459, C1 0, C2 0.0300684, C3 0, C4 0.351171, D 0
- Nicht-erneuerbare Primärenergie als Energieträger (PENRE) [MJ]: A1-A3 327.38, C1 0, C2 95.4319, C3 0, C4 2.60921, D 0
- Nicht-erneuerbare Primärenergie zur stofflichen Nutzung (PENRM) [MJ]: A1-A3 94.9075, C1 0, C2 -94.9075, C3 0, C4 0, D 0
- Total nicht erneuerbare Primärenergie (PENRT) [MJ]: A1-A3 422.287, C1 0, C2 0.524446, C3 0, C4 2.60921, D 0
- Einsatz von Sekundärstoffen (SM) [kg]: A1-A3 0.0868114, C1 0, C2 0, C3 0, C4 0, D 0
- Erneuerbare Sekundärbrennstoffe (RSF) [MJ]: A1-A3 0, C1 0, C2 0, C3 0, C4 0, D 0
- Nicht erneuerbare Sekundärbrennstoffe (NRSF) [MJ]: A1-A3 0, C1 0, C2 0, C3 0, C4 0, D 0
- Einsatz von Süßwasserressourcen (FW) [m^3]: A1-A3 0.14157, C1 0, C2 3.44381e-5, C3 0, C4 0.000643542, D 0

## Outputs
- Gefährlicher Abfall zur Deponie (HWD) [kg]: A1-A3 5.52929e-6, C1 0, C2 2.76342e-11, C3 0, C4 2.76969e-10, D 0
- Entsorgter nicht gefährlicher Abfall (NHWD) [kg]: A1-A3 7.70681, C1 0, C2 8.22793e-5, C3 0, C4 13.0128, D 0
- Entsorgter radioaktiver Abfall (RWD) [kg]: A1-A3 0.00673186, C1 0, C2 9.51306e-7, C3 0, C4 2.73362e-5, D 0
- Komponenten für die Wiederverwendung (CRU) [kg]: A1-A3 0, C1 0, C2 0, C3 0, C4 0, D 0
- Stoffe zum Recycling (MFR) [kg]: A1-A3 0, C1 0, C2 0, C3 0, C4 0, D 0
- Stoffe für die Energierückgewinnung (MER) [kg]: A1-A3 0, C1 0, C2 0, C3 0, C4 0, D 0
- Exportierte elektrische Energie (EEE) [MJ]: A1-A3 0, C1 0, C2 0, C3 0, C4 0, D 0
- Exportierte thermische Energie (EET) [MJ]: A1-A3 0, C1 0, C2 0, C3 0, C4 0, D 0

## Impact indicators
- Globales Erwärmungspotenzial total (GWP-total) [kg CO_(2)-Äq.]: A1-A3 25.4434, C1 0, C2 0.0395643, C3 0, C4 0.421538, D 0
- Globales Erwärmungspotenzial fossil (GWP-fossil) [kg CO_(2)-Äq.]: A1-A3 25.8464, C1 0, C2 0.0392903, C3 0, C4 0.196573, D 0
- Globales Erwärmungspotenzial biogen (GWP-biogenic) [kg CO_(2)-Äq.]: A1-A3 -0.420648, C1 0, C2 -4.67267e-5, C3 0, C4 0.224388, D 0
- Globales Erwärmungspotenzial luluc (GWP-luluc) [kg CO_(2)-Äq.]: A1-A3 0.0176406, C1 0, C2 0.000320666, C3 0, C4 0.000577616, D 0
- Abbau Potential der stratosphärischen Ozonschicht (ODP) [kg CFC11-Äq.]: A1-A3 8.7522e-13, C1 0, C2 7.74529e-18, C3 0, C4 7.63483e-16, D 0
- Versauerungspotenzial von Boden und Wasser (AP) [mol H^(+)-Äq.]: A1-A3 0.0779154, C1 0, C2 7.74432e-5, C3 0, C4 0.00140026, D 0
- Eutrophierungspotenzial Süßwasser (EP-freshwater) [kg PO_(4)-Äq.]: A1-A3 9.15957e-5, C1 0, C2 1.16551e-7, C3 0, C4 3.2998e-7, D 0
- Eutrophierungspotenzial Salzwasser (EP-marine) [kg N-Äq.]: A1-A3 0.0213329, C1 0, C2 3.21022e-5, C3 0, C4 0.000363461, D 0
- Eutrophierungspotenzial Land (EP-terrestrial) [mol N-Äq.]: A1-A3 0.154088, C1 0, C2 0.000363939, C3 0, C4 0.00399327, D 0
- Bildungspotential für troposphärisches Ozon (POCP) [kg NMVOC-Äq.]: A1-A3 0.0419097, C1 0, C2 6.91648e-5, C3 0, C4 0.00110139, D 0
- Potenzial für den abiotischen Abbau nicht fossiler Ressourcen (ADPE) [kg Sb-Äq.]: A1-A3 1.11385e-5, C1 0, C2 3.47724e-9, C3 0, C4 1.85477e-8, D 0
- Potenzial für den abiotischen Abbau fossiler Brennstoffe (ADPF) [MJ]: A1-A3 422.222, C1 0, C2 0.522543, C3 0, C4 2.60784, D 0
- Wassernutzung (WDP) [m^(3) Welt-Äq. entzogen]: A1-A3 1.50413, C1 0, C2 0.000364052, C3 0, C4 0.0210964, D 0
- Auftreten von Krankheiten aufgrund von Feinstaubemissionen (PM) [Krankheitsfälle]
- Wirkung durch Exposition des Menschen mit U235 (IR) [kBq U235-Äq.]
- Toxizitätsvergleichseinheit für Ökosysteme (ETP-fw) [CTUe]
- Toxizitätsvergleichseinheit für Menschen (krebserregend) (HTP-c) [CTUh]
- Toxizitätsvergleichseinheit für Menschen (nicht krebserregend) (HTP-nc) [CTUh]
- Bodenqualitätsindex (SQP) [SQP]

## Use advice
Gültigkeitsbereich:
Die vorliegende Umwelt-Produktdeklaration bezieht sich auf eine deklarierte Einheit von 1 m² durchschnittlicher m.look-Schichtstoffplatten (13 kg/m²) produziert am Standort in Wiener Neudorf (Österreich) unter den Markennamen m.look, m.look NCore sowie NCore.
Systemgrenze:
Die Ökobilanz der m.look-Schichtstoffplatte beinhaltet eine cradle-to-gate-Betrachtung (Wiege bis zum Werkstor) der auftretenden Umweltwirkungen mit den Modulen C1-C4 und Modul D (A1-A3,+C,+D). Die folgenden Lebenszyklusphasen werden in der Analyse berücksichtigt:

Modul A1-A3 | Produktionsstadium

Das Produktionsstadium beinhaltet die Aufwendungen der Rohstoffversorgung (mineralischer Füllstoff, Melaminharz, Glasvlies, Eisenoxid etc.) sowie der damit verbundenen Transporte bezogen auf den Produktionsstandort in Wiener Neudorf. Innerhalb der Werksgrenzen werden die Prozessschritte zur Produktion der m.look-Produkte (Imprägnierung, Lackierung, Trocknung, Schneiden, Pressen, Besäumung) inklusive der Verpackung der Schichtstoffplatten betrachtet. Der Herstellprozess wird dazu basierend auf den Primärdaten des betrachteten Standortes abgebildet. Die Bereitstellung elektrischer Energie erfolgt am Standort Wiener Neudorf über Strom vom österreichischen Netz. Thermische Energie wird einerseits über die thermische Nachverbrennungsanlage am Standort und durch Erdgas bereitgestellt.

Modul C1 | Rückbau / Abriss

Für die Schichtstoffplatten wurde ein manueller Ausbau angenommen. Die damit verbundenen Aufwände sind vernachlässigbar, wodurch keine Umweltwirkungen aus dem Rückbau der Produkte deklariert werden.

Modul C2 | Transport zur Abfallbehandlung

Modul C2 beinhaltet den Transport zur Abfallbehandlung. Dazu wird der Transport via LKW über 50 km Transportdistanz als repräsentatives Szenario angesetzt.

Modul C3 | Abfallbehandlung

Das angesetzte Szenario deklariert die Deponierung der Schichtstoffplatten. Entsprechende Umweltwirkungen werden im Modul C4 berücksichtigt, wodurch keine Umweltauswirkungen aus der Abfallbehandlung der Produkte in C3 zu erwarten sind.

Modul C4 | Beseitigung

Das Modul C4 beinhaltet die durch die Deponierung der Schichtstoffplatten entstehenden Umweltwirkungen. Der biogene Kohlenstoff im Dekorpapier der Produkte wird als Emissionen von biogenem CO2 aus der Technosphäre in die natürliche Umwelt behandelt.

Modul D | Gutschriften und Lasten außerhalb der Systemgrenze

Das deklarierte Szenario geht von einer Deponierung des Produktes aus, daher entstehen keine Nutzen und Lasten außerhalb der Systemgrenze.

## Data sources
- GaBi Database (all versions)
- GaBi Database Edition 2021, CUP 2021.01
