# Fernwärme Mix Deutschland

Dataset: ILCD process, EPD, generic dataset
Geography: DE
Reference year: 2021
Valid until: 2022
Classification: oekobau.dat: Sonstige / Energieträger - Bereitstellung frei Verbraucher / Fernwärme
Owner: Sphera Solutions GmbH
Compliance: EN 15804+A2
Review: Dependent internal review by Sphera Solutions GmbH; Independent external review by GaBi user forum
Amounts: rows without a unit in brackets have none in this file; such an amount is in the reference unit of its flow, which a separate flow dataset defines
copyright: true
licenseType: Free of charge for all users and uses
accessRestrictions: The license conditions as stated on https://www.oekobaudat.de/ apply.
accessRestrictions: Es gelten die Lizenzbedingungen wie sie auf https://www.oekobaudat.de/ genannt sind.

## General comment
Dieser Datensatz wurde nach dem European Standard EN 15804+A2 für Nachhaltiges Bauen modelliert. Ergebnisse werden in Modulen abgebildet, die den strukturierten Ausdruck von Ergebnissen über den gesamten Lebenszyklus zulassen.

## Geography
Der Datensatz bildet die länderspezifische Situation in Deutschland ab. Dabei werden Haupttechnologien, spezifische regionale Charakteristiken und ggf. Importstatistiken berücksichtigt.

## Time period
Jährlicher Durchschnitt

## Technology and included processes
Der Datensatz beschreibt die Bereitstellung von Fernwärme. Der Fernwärme Mix basiert auf folgenden Einstellungen: Das Verhältnis von Strom zu Wärme ist 40/60, die Effizienz der KWK beträgt 68%. Es wird ein Energieträger Mix von 35% Braunkohle und 65% Erdgas angenommen.

Hintergrundsystem:

Strom: Die Stromerzeugung wird entsprechend der länderspezifischen Randbedingungen modelliert. Die landesspezifische Analyse beinhaltet:
1.: Spezifische Kraftwerke der verschiedenen fossilen Energieträger und der Einsatz erneuerbarer Energien sind entsprechend der länderspezifischen Energieträgermixe modelliert. Die Analyse bezieht Stromimporte aus den Nachbarländern, Transmissions-und Verteilungsverluste und den Eigenverbrauch im Kraftwerk und bei der Verteilung bzw. Speicherung, z. B. durch Pumpspeicherwerke, ein.
2.: Die landes-/regionalspezifischen Technologiestandards sowie die Erzeugung in Elektrizitätskraftwerken und/oder in speziellen Kraftwerken mit Kraft-Wärme-Kopplung (KWK) sind berücksichtigt.
3.: Die länderspezifische Energieträgerbereitstellung (mit Anteil der Importe und/oder Eigenversorgung) einschließlich der Energieträger-Eigenschaften (z. B. Elementar- und Energiegehalte) werden berücksichtigt.
4.: Die Förderung, Produktion, Verarbeitung und Transportprozesse werden entsprechend der Situation im jeweiligen Stromerzeugerland modelliert. Die unterschiedlichen Produktions- und Verarbeitungsverfahren (Emissionen und Wirkungsgrade) in den verschiedenen Energieerzeugerländern werden einbezogen, z. B. Rohöl-Veredelungsverfahren oder Abfackel-Raten an den Ölplattformen.
Thermische Energie, Prozessdampf: Die Erzeugung von Dampf und thermischer Energie in Heizkraftwerken wird entsprechend der landesspezifischen Situation (Emissionsgrenzwerte, Energieträgerbasis) modelliert.
Der Wirkungsgrad für die thermische Energieerzeugung beträgt per Definition 100% des Energieträgereinsatzes. Für Prozessdampf liegt der Wirkungsgrad im Bereich von 85-95%. Die zur Heizenergie-Erzeugung verwendeten Energieträger werden entsprechend der nationalen Situation modelliert (siehe Kapitel Strom oben).
Transporte: Alle relevanten und bekannten Transportprozesse in Form von See- und Binnenschiffsverkehr sowie Bahn-, Lkw- und der Leitungstransport sind enthalten.
Energieträger: Die Energieträger werden entsprechend der spezifischen Versorgungslage modelliert (siehe Kapitel Strom oben).
Raffinerieprodukte: Diesel, Benzin, technische Gase, Heizöl, Schmierstoffe und Rückstände, wie Bitumen, werden mit einem parametrierten länderspezifische Raffineriemodell modelliert. Das Raffinerie-Modell bezieht die länderspezifischen Veredelungsverfahren (z. B. Emissionspegel, interner Energieverbrauch etc.) und das länderspezifische Produktspektrum ein, das sich je nach Land stark unterscheiden kann. Die Rohöl-Förderung wird gemäß der länderspezifischen Situation mit den jeweiligen Energieträger-Eigenschaften modelliert.
"

## Technical purpose
Thermische Energie aus Fernwärme für Gebäudebeheizung.

## Safety margin
0 %.

## Reference product
- Fernwärme Mix Deutschland: 3.6

## Inputs
- Erneuerbare Primärenergie als Energieträger (PERE) [MJ]: B6 0.484421
- Erneuerbare Primärenergie zur stofflichen Nutzung (PERM) [MJ]: B6 0
- Total erneuerbare Primärenergie (PERT) [MJ]: B6 0.484421
- Nicht-erneuerbare Primärenergie als Energieträger (PENRE) [MJ]: B6 3.15469
- Nicht-erneuerbare Primärenergie zur stofflichen Nutzung (PENRM) [MJ]: B6 0
- Total nicht-erneuerbare Primärenergie (PENRT) [MJ]: B6 3.15469
- Einsatz von Sekundärstoffen (SM) [kg]: B6 0
- Erneuerbare Sekundärbrennstoffe (SF) [MJ]: B6 0
- Nicht erneuerbare Sekundärbrennstoffe (NRSF) [MJ]: B6 0
- Nettoeinsatz von Süßwasserressourcen (FW) [m3]: B6 0.000623985

## Outputs
- Gefährlicher Abfall zur Deponie (HWD) [kg]: B6 1.82954e-9
- Entsorgter nicht gefährlicher Abfall (NHWD) [kg]: B6 0.00657776
- Entsorgter radioaktiver Abfall (RWD) [kg]: B6 4.20929e-6
- Komponenten für die Wiederverwendung (CRU) [kg]: B6 0
- Stoffe zum Recycling (MFR) [kg]: B6 0
- Stoffe für die Energierückgewinnung (MER) [kg]: B6 0
- Exportierte elektrische Energie (EEE) [MJ]: B6 0
- Exportierte thermische Energie (EET) [MJ]: B6 0

## Impact indicators
- Globales Erwärmungspotenzial - total (GWP-total) [kg CO2 eq.]: B6 0.273124
- Globales Erwärmungspotenzial - fossil (GWP-fossil) [kg CO2 eq.]: B6 0.271222
- Globales Erwärmungspotenzial - biogen (GWP-biogenic) [kg CO2 eq.]: B6 0.00161365
- Globales Erwärmungspotenzial - luluc (GWP-luluc) [kg CO2 eq.]: B6 0.000287688
- Abbaupotenzial der stratosphärischen Ozonschicht (ODP) [kg CFC-11 eq.]: B6 8.62361e-17
- Versauerungspotenzial, kumulierte Überschreitung (AP) [Mole of H+ eq.]: B6 0.000325503
- Eutrophierungspotenzial - Süßwasser (EP-freshwater) [kg P eq.]: B6 6.40657e-7
- Eutrophierungspotenzial - Salzwasser (EP-marine) [kg N eq.]: B6 0.000118726
- Eutrophierungspotenzial - Land (EP-terrestrial) [Mole of N eq.]: B6 0.00128703
- Bildungspotenzial für troposphärisches Ozon (POCP) [kg NMVOC eq.]: B6 0.000310481
- Potenzial für die Verknappung abiotischer Ressourcen nicht fossile Ressourcen (ADPE) [kg Sb eq.]: B6 1.68721e-8
- Potenzial für die Verknappung abiotischer Ressourcen fossile Brennstoffe (ADPF) [MJ]: B6 3.15423
- Wasser-Entzugspotenzial (Benutzer) (WDP) [m³ world equiv.]: B6 0.0178271

## Data sources
- GaBi database (all versions)
- Documentation of data quality management
- GaBi Database Edition 2021, CUP2021.01
