# Flüssiggas

Dataset: ILCD process, EPD, generic dataset
Geography: DE
Reference year: 2021
Valid until: 2022
Classification: oekobau.dat: Sonstige / Energieträger - Bereitstellung frei Verbraucher / Flüssiggas
Owner: Sphera Solutions GmbH
Compliance: EN 15804+A2
Review: Dependent internal review by Sphera Solutions GmbH; Independent external review by GaBi user forum
Amounts: rows without a unit in brackets have none in this file; such an amount is in the reference unit of its flow, which a separate flow dataset defines
copyright: true
licenseType: Free of charge for all users and uses
accessRestrictions: The license conditions as stated on https://www.oekobaudat.de/ apply.
accessRestrictions: Es gelten die Lizenzbedingungen wie sie auf https://www.oekobaudat.de/ genannt sind.

## General comment
Dieser Datensatz wurde nach dem European Standard EN 15804+A2 für Nachhaltiges Bauen modelliert. Ergebnisse werden in Modulen abgebildet, die den strukturierten Ausdruck von Ergebnissen über den gesamten Lebenszyklus zulassen.

## Geography
Der Datensatz bildet die länderspezifische Situation in Deutschland ab. Dabei werden Haupttechnologien, spezifische regionale Charakteristiken und ggf. Importstatistiken berücksichtigt.

## Time period
Jährlicher Durchschnitt

## Technology and included processes
Erdölraffinerien sind komplexe Anlagen. Die Kombination und Abfolge von Prozessen und Verfahren ist in der Regel sehr spezifisch auf die Eigenschaften des Rohöls und der gewünschten Produkte abgestimmt. Weitere Einflussfaktoren sind die Ansprüche des Marktes an die Art der Produkte, die verfügbare Rohölqualität sowie behördliche Anforderungen an die Raffinerieabläufe.
Das einfache Verfahren der fraktionierten Destillation (hydro-skimming) kann nur mit wenigen Rohölqualitäten durchgeführt werden und erzeugt einige qualitativ sehr hochwertige Produkte. Komplexe Raffinerien mit vielen Umwandlungsstufen können dagegen eine Vielzahl von Ölsorten verarbeiten.
Die Erdölraffinierung beginnt mit dem Erhalt des Rohöls. Nach dem Entsalzen wird das Rohöl in die Destillationssäulen der atmosphärischen Destillation eingespeist, die die Fraktionen des Rohöls nach Dichte, Siedepunkt und Kondensationsflächen trennen.
Die leichten Bestandteile (Gase) sammeln sich im oberen Bereich der Destillationssäule an und werden in der Flüssiggasanlage eingesetzt, um Methan und Ethan zu erzeugen, die als Raffineriebrennstoff und LPG (Propan und Butan) marktfähige Produkte darstellen.
Diese Gas-Abtrennung wird in fast jeder Raffinerie durchgeführt. Die separierten Gase können aber auch in einem Dampf-Reformierungsverfahren genutzt werden, um Wasserstoff herzustellen. Dieses wird u. a. für die Entschwefelung, das Hydrocrack-Verfahren und in geringerem Maße für die Isomerisierung benötigt.
Das so genannte Straight-run-Naphtha, das ebenfalls bei der atmosphärischen Destillation aus dem oberen Bereich der Destillationssäule abgetrennt wird, kann in drei verschiedenen Prozessen weiterverarbeitet werden.
Die leichte Naphtha-Fraktion wird in die chemische Entschwefelung geleitet. Anschließend wird ein geringer Teil des entschwefelten Naphthas direkt dem Benzinbestand beigemischt. Der Großteil wird in der Isomerisationseinheit verwendet, in der die aliphatischen Paraffine in Iso-Paraffine mit hoher Octanzahl umgewandelt werden. Oft ist ein De-Isopentanisierer (Destillation) nachgeschaltet, um den Anteil an beständigen iso-Komponenten zu erhöhen. Diese Iso-Paraffine sind sehr wertvolle Bestandteile bei der Herstellung von Benzin mit hoher Oktanzahl.
Die schweren Naphtha-Fraktionen werden nach Entschwefelung dem katalytischen Reformer zugeführt, der ebenfalls der Umwandlung von aliphatischen in Iso-Paraffine dient. Darüber hinaus können in diesem Prozess Cyclo-Paraffinen zu Aromaten überführt werden, was mit einer Verringerung des Heizwerts einhergeht. Das Besondere an diesem Verfahren ist die gleichzeitige Herstellung von Wasserstoff. Neben dem Dampfreformierungsverfahren eines der wenigen Verfahren, die das ermöglichen.
Die Outputs der Isomerisierung (oft verbunden mit De-Isopentanisierung) und katalytische Reformierung dienen zur Beimischung in Benzin, daraus resultierend entstehen je nach Beimischung Premium oder Normalbenzin.
Petroleum wird direkt aus der Destillation bei Atmosphärendruck gewonnen und getrennt vom Rest der Mitteldestillat-Fraktion behandelt. Der größte Teil der Mitteldestillate wird dem Hydrofiner zur Entschwefelung zugeführt. Das entschwefelte Produkt wird zum Mitteldestillat-Mischer geleitet. Der Rückstand aus der atmosphärischen Destillation gelangt in die Vakuumdestillation. Diese erzeugt in leichtem Vakuum Gasöl, Wachs-Destillat genannt, und Vakuumrückstände.
Ein Teil der Rückstände aus der atmosphärischen Destillation wird in die Visbreaker-Anlage (mildes thermisches Cracken) geleitet. Kleine Mengen werden direkt in den Heizölmischer und in den Asphalt-Blasprozess eingespeist. Das Leichtgasöl, als ein Produkt der Vakuumdestillation, gelangt in den Hydrofiner, wird dort entschwefelt und dann im Mitteldestillat-Mischer verwendet. Ein Teil des Vakuumdestillats, das aus dem mittleren Bereich der Vakuumdestillation gewonnen wurde, wird zur Basisölherstellung für Schmiermittel und Wachse verwendet. Der überwiegende Teil des Vakuumdestillats wird nach Entschwefelung entweder in einen katalytischen Cracker oder einen Hydrocracker geführt. Dort erfolgt die Aufspaltung in kürzere Ketten.
Crack-Produkte sind Gase, Benzin, Mitteldestillate und schwere Kreislaufgasöle (Komponenten des Schweröls). Die Gase aus dem katalytischen Crack-Prozess werden in einer Alkylierungs- und Polymerisationsstufe weiter aufbereitet, um zusätzliche wertvolle Benzinkomponenten herzustellen. Diese Prozesse dienen dazu, kleine Erdöl-Moleküle zu größeren zu kombinieren. Aus dem katalytischen Crack-Prozess entstandenes Butylen wird weiter verwendet, um Methyl-Tert-Butylether (MTBE) herzustellen. Es steigert die Leistung von Verbrennungsmotoren (Oktan-Booster).
Optional kann zugekauftes Bioethanol zu diesem Zweck verwendet. Das Naphtha aus dem katalytischen Crack-Prozess muss bedingt durch hohe Schwefelgehalte in einem speziellen Prozess entschwefelt werden. Vakuumrückstände werden in die Verkokung geleitet, in der Gase, Benzin, Mitteldestillate und Heizöl entstehen. Ein weiteres Produkt ist Petrolkoks, der dann gereinigt wird. Der Vakuumrückstand und einige Rückstände aus der atmosphärischen Destillation dienen als Input für das Visbreaking-Verfahren, aus dem ebenfalls Gase , Naphtha, Mitteldestillate und Heizöl hervorgehen. Der extrahierte Schwefelwasserstoff der Entschwefelungsprozesse wird über das sogenannte Claus-Verfahren recycelt. Produkt ist elementarer Schwefel.
Die Energieerzeugung (Wärme, Dampf und Elektrizität) erfordert eine große Menge an Brennstoffen. Als Energieträger kommen in Raffinerien Raffineriegas, Heizöl (Rückstandsöl), Petrolkoks und manchmal auch Mitteldestillate und LPG zum Einsatz. Darüber hinaus wird Erdgas und Strom eingesetzt.
Alle wichtigen Stoff- und Energieströme (Input-Output) sowie Systemgrenzen sind in der folgenden Abbildung des Raffinerie-Modells dargestellt. Weiterhin wird ein vereinfachtes Flussdiagramm gezeigt. Die Anordnung der Verfahren variiert je nach Art der Raffinerie und nur in wenigen Raffinerien werden alle aufgeführten Verfahren verwenden.
Der Datensatz beschreibt eine nach Massen gewichtete durchschnittliche Raffinerie mit jeweilige landes-/regionsspezifischer Einstellung. Der Datensatz beinhaltet die gesamte Vorkette von der Erdölförderung über Produktion, den Transport zur Raffinerie sowie den Raffineriebetrieb. Wenn im Prozessnamen angegeben, enthalten die Brennstoffe teilweise Bio-Komponenten. Die Vorkette dieser Bio-Komponenten in Form von Bioethanol und Biodiesel ist entsprechend der landes-/regionalspezifischen Situation berücksichtigt.

Hintergrundsystem:
Strom: Die Stromerzeugung wird entsprechend der länderspezifischen Randbedingungen modelliert. Die landesspezifische Analyse beinhaltet:
1.: Spezifische Kraftwerke der verschiedenen fossilen Energieträger und der Einsatz erneuerbarer Energien sind entsprechend der länderspezifischen Energieträgermixe modelliert. Die Analyse bezieht Stromimporte aus den Nachbarländern, Transmissions-und Verteilungsverluste und den Eigenverbrauch im Kraftwerk und bei der Verteilung bzw. Speicherung, z. B. durch Pumpspeicherwerke, ein.
2.: Die landes-/regionalspezifischen Technologiestandards sowie die Erzeugung in Elektrizitätskraftwerken und/oder in speziellen Kraftwerken mit Kraft-Wärme-Kopplung (KWK) sind berücksichtigt.
3.: Die länderspezifische Energieträgerbereitstellung (mit Anteil der Importe und/oder Eigenversorgung) einschließlich der Energieträger-Eigenschaften (z. B. Elementar- und Energiegehalte) werden berücksichtigt.
4.: Die Förderung, Produktion, Verarbeitung und Transportprozesse werden entsprechend der Situation im jeweiligen Stromerzeugerland modelliert. Die unterschiedlichen Produktions- und Verarbeitungsverfahren (Emissionen und Wirkungsgrade) in den verschiedenen Energieerzeugerländern werden einbezogen, z. B. Rohöl-Veredelungsverfahren oder Abfackel-Raten an den Ölplattformen.
Thermische Energie, Prozessdampf: Die Erzeugung von Dampf und thermischer Energie in Heizkraftwerken wird entsprechend der landesspezifischen Situation (Emissionsgrenzwerte, Energieträgerbasis) modelliert.
Der Wirkungsgrad für die thermische Energieerzeugung beträgt per Definition 100% des Energieträgereinsatzes. Für Prozessdampf liegt der Wirkungsgrad im Bereich von 85-95%. Die zur Heizenergie-Erzeugung verwendeten Energieträger werden entsprechend der nationalen Situation modelliert (siehe Kapitel Strom oben).
Transporte: Alle relevanten und bekannten Transportprozesse in Form von See- und Binnenschiffsverkehr sowie Bahn-, Lkw- und der Leitungstransport sind enthalten.
Energieträger: Die Energieträger werden entsprechend der spezifischen Versorgungslage modelliert (siehe Kapitel Strom oben).
Raffinerieprodukte: Diesel, Benzin, technische Gase, Heizöl, Schmierstoffe und Rückstände, wie Bitumen, werden mit einem parametrierten länderspezifische Raffineriemodell modelliert. Das Raffinerie-Modell bezieht die länderspezifischen Veredelungsverfahren (z. B. Emissionspegel, interner Energieverbrauch etc.) und das länderspezifische Produktspektrum ein, das sich je nach Land stark unterscheiden kann. Die Rohöl-Förderung wird gemäß der länderspezifischen Situation mit den jeweiligen Energieträger-Eigenschaften modelliert.

## Technical purpose
Dieses Produkt kann im Baubereich verwendet werden.

## Safety margin
0 %.

## Reference product
- Flüssiggas: 1

## Inputs
- Erneuerbare Primärenergie als Energieträger (PERE) [MJ]: B6 0.304007
- Erneuerbare Primärenergie zur stofflichen Nutzung (PERM) [MJ]: B6 0
- Total erneuerbare Primärenergie (PERT) [MJ]: B6 0.304007
- Nicht-erneuerbare Primärenergie als Energieträger (PENRE) [MJ]: B6 53.576
- Nicht-erneuerbare Primärenergie zur stofflichen Nutzung (PENRM) [MJ]: B6 0
- Total nicht-erneuerbare Primärenergie (PENRT) [MJ]: B6 53.576
- Einsatz von Sekundärstoffen (SM) [kg]: B6 0
- Erneuerbare Sekundärbrennstoffe (SF) [MJ]: B6 0
- Nicht erneuerbare Sekundärbrennstoffe (NRSF) [MJ]: B6 0
- Nettoeinsatz von Süßwasserressourcen (FW) [m3]: B6 0.000316832

## Outputs
- Gefährlicher Abfall zur Deponie (HWD) [kg]: B6 7.62231e-10
- Entsorgter nicht gefährlicher Abfall (NHWD) [kg]: B6 0.00678825
- Entsorgter radioaktiver Abfall (RWD) [kg]: B6 4.93079e-5
- Komponenten für die Wiederverwendung (CRU) [kg]: B6 0
- Stoffe zum Recycling (MFR) [kg]: B6 0
- Stoffe für die Energierückgewinnung (MER) [kg]: B6 0
- Exportierte elektrische Energie (EEE) [MJ]: B6 0
- Exportierte thermische Energie (EET) [MJ]: B6 0

## Impact indicators
- Globales Erwärmungspotenzial - total (GWP-total) [kg CO2 eq.]: B6 0.828353
- Globales Erwärmungspotenzial - fossil (GWP-fossil) [kg CO2 eq.]: B6 0.820797
- Globales Erwärmungspotenzial - biogen (GWP-biogenic) [kg CO2 eq.]: B6 0.00739941
- Globales Erwärmungspotenzial - luluc (GWP-luluc) [kg CO2 eq.]: B6 0.000156727
- Abbaupotenzial der stratosphärischen Ozonschicht (ODP) [kg CFC-11 eq.]: B6 1.12614e-15
- Versauerungspotenzial, kumulierte Überschreitung (AP) [Mole of H+ eq.]: B6 0.00212647
- Eutrophierungspotenzial - Süßwasser (EP-freshwater) [kg P eq.]: B6 1.73011e-6
- Eutrophierungspotenzial - Salzwasser (EP-marine) [kg N eq.]: B6 0.000339074
- Eutrophierungspotenzial - Land (EP-terrestrial) [Mole of N eq.]: B6 0.00374374
- Bildungspotenzial für troposphärisches Ozon (POCP) [kg NMVOC eq.]: B6 0.00159642
- Potenzial für die Verknappung abiotischer Ressourcen nicht fossile Ressourcen (ADPE) [kg Sb eq.]: B6 1.51904e-7
- Potenzial für die Verknappung abiotischer Ressourcen fossile Brennstoffe (ADPF) [MJ]: B6 53.5753
- Wasser-Entzugspotenzial (Benutzer) (WDP) [m³ world equiv.]: B6 0.00606308

## Use advice
Der Datensatz repräsentiert ein Cradle to Gate Inventar. Er kann verwendet werden, um die Lieferkette des jeweiligen Produktes in einer repräsentativen Weise zu charakterisieren. Die Kombination mit einzelnen Einheitenprozessen und diesem Produkt ermöglicht die Erstellung von anwenderspezifischen (Produkt-) LCAs.

## Data sources
- Documentation of data quality management
- GaBi Database Edition 2021, CUP2021.01
- GaBi database (all versions)
