# Regenabflussrohr SML; SML pipe

Dataset: ILCD process, EPD, generic dataset
Geography: DE
Reference year: 2018
Valid until: 2022
Classification: oekobau.dat: Metalle / Stahl und Eisen / Guss- und Schmiedeteile aus Stahl und Eisen
Owner: thinkstep
Compliance: DIN EN 15804
Review: Dependent internal review by thinkstep, IABP-GaBi, IBP-GaBi; Independent external review by GaBi user forum, GaBi bug forum, GaBi user community
Amounts: rows without a unit in brackets have none in this file; such an amount is in the reference unit of its flow, which a separate flow dataset defines
copyright: true

## General comment
Dieser Datensatz wurde nach dem European Standard EN 15804 für Nachhaltiges Bauen modelliert. Ergebnisse werden in Modulen abgebildet, die den strukturierten Ausdruck von Ergebnissen über den gesamten Lebenszyklus zulassen.

## Geography
Der Datensatz bildet die länderspezifische Situation in Deutschland ab. Dabei werden Haupttechnologien, spezifische regionale Charakteristiken und ggf. Importstatistiken berücksichtigt.

## Time period
Jährlicher Durchschnitt

## Technology and included processes
SML-Rohre sind Graugussrohre, die durch Schleuderverfahren gewonnen werden. Sie werden in Nenndurchmessern von DN 80 bis DN 2000 und in Nennweiten von 6 bis 8 m hergestellt. In einem Verfahren, das als De Lavaud bekannt ist, werden die Rohre in Kokillen hergestellt, die mit Wasser von außen gekühlt werden. Der Raum zwischen dem Kernsand und der Kokille wird mit 1400 °C heißem Eisen gefüllt, und die Maschine beginnt sich zu bewegen. Das Zusammenwirken von Seitwärts- und Kreisbewegungen und der Zentrifugalkraft auf das flüssige Eisen gestattet es dem Rohr, sich an der Kokillenwand zu formen. Das Eisen kühlt ab, verfestigt sich und schrumpft. Die Rohre werden folglich wärmebehandelt/thermisch behandelt. Sie werden mit Epoxidharz auf der Innenseite und Acrylfarbe auf der Außenseite beschichtet. Die wichtigsten Zugaben während der Produktion von SML-Rohren sind folglich Grauguss (aus Sekundärmetallen hergestellt), thermische Energie und Strom.

Es wurde davon ausgegangen, dass große Geräte wie Heizkessel, Klima- und Lüftungsanlagen oder Fahrstühle zu 95% einem Recycling zugeführt werden. Für Rohre oder Kabel, die oft unterputzt sind wurde eine Recyclingrate von 90% angenommen. Die Recyclingquoten beziehen sich ausschließlich auf Metalle und Kunststoffe. Für mineralische Materialien wie Mineralwolle, Beton oder Keramik wurde eine Ablagerung auf einer Inertstoffdeponie angenommen. Es wurde angenommen das der Anteil an Metallen und Kunststoffen, der nicht einem Recycling zugeführt wird (5-10%) ebenfalls auf einer Inertstoffdeponie entsorgt wird (z.B. Kabelreste oder Rohrstücke im Bauschutt). Für die Kunststoffe wird davon ausgegangen, dass aufgrund der oft langen Lebensdauer und den verbundenen Verunreinigung nicht von einer stofflichen Verwertung ausgegangen werden kann und daher die Kunststoffe einer energetischen Verwertung in Müllverbrennungsanlagen (MVA) zugeführt werden. Für die Müllverbrennung wurde ein MVA-Modell mit durchschnittlichen europäischen Emissionswerten und Energieproduktion verwendet. In Abhängigkeit des zu verbrennenden Kunststoffes wurden unterschiedliche Prozesse mit den entsprechenden Elementarzusammensetzungen verwendet. Die Datensätze wurden in Zusammenarbeit mit der Confederation of European Waste-to-Energy Plants (CEWEP) erstellt und sind auf der Homepage der European Platform on LCA [EC 2008] verfügbar. Der aus der Kunststoffverbrennung erzeugte Strom sowie die erzeugte thermische Energie wurden mit dem europäischen Strom-bzw. Wärmemix gutgeschrieben. Die Gutschriften für das Recycling von Metallen oder der energetischen Verwertung von Kunststoffen, sowie die mit der Verwertung verbundenen Emissionen und Ressourcenverbräuche (Energie für Einschmelzen, Verbrennungsemissionen, Deponie) sind in den Datensätzen enthalten. Bei Materialen aus Eisen (Stahlbleche, Rohre, Grauguss) werden bei der Herstellung der Materialien bereits unterschiedliche Mengen an Stahlschrott eingesetzt. Diese Mengen wurden der recycelten Stahlmenge vor Zuführung in die Einschmelzung abgezogen, um keine Überwertung der Gutschriften zu erzeugen. Die Gutschrift wurde dann entsprechend mit primärem Stahl durchgeführt. Gutschriften für das Recycling von seltenen Erden oder Quecksilberemissionen aus Leuchtstofflampen konnten wegen fehlenden Daten nicht berücksichtigt werden. Es wurde davon ausgegangen, dass große Geräte wie Heizkessel, Klima- und Lüftungsanlagen oder Fahrstühle zu 95% einem Recycling zugeführt werden. Für Rohre oder Kabel, die oft unterputzt sind wurde eine Recyclingrate von 90% angenommen. Die Recyclingquoten beziehen sich ausschließlich auf Metalle und Kunststoffe. Für mineralische Materialien wie Mineralwolle, Beton oder Keramik wurde eine Ablagerung auf einer Inertstoffdeponie angenommen. Es wurde angenommen das der Anteil an Metallen und Kunststoffen, der nicht einem Recycling zugeführt wird (5-10%) ebenfalls auf einer Inertstoffdeponie entsorgt wird (z. B. Kabelreste oder Rohrstücke im Bauschutt). Für die Kunststoffe wird davon ausgegangen, dass aufgrund der oft langen Lebensdauer und den verbundenen Verunreinigung nicht von einer stofflichen Verwertung ausgegangen werden kann und daher die Kunststoffe einer energetischen Verwertung in Müllverbrennungsanlagen (MVA) zugeführt werden. Für die Müllverbrennung wurde ein MVA-Modell mit durchschnittlichen europäischen Emissionswerten und Energieproduktion verwendet. In Abhängigkeit des zu verbrennenden Kunststoffes wurden unterschiedliche Prozesse mit den entsprechenden Elementarzusammensetzungen verwendet. Die Datensätze wurden in Zusammenarbeit mit der Confederation of European Waste-to-Energy Plants (CEWEP) erstellt und sind auf der Homepage der European Platform on LCA [EC 2008] verfügbar. Der aus der Kunststoffverbrennung erzeugte Strom sowie die erzeugte thermische Energie wurden mit dem europäischen Strom-bzw. Wärmemix gutgeschrieben. Die Gutschriften für das Recycling von Metallen oder der energetischen Verwertung von Kunststoffen, sowie die mit der Verwertung verbundenen Emissionen und Ressourcenverbräuche (Energie für Einschmelzen, Verbrennungsemissionen, Deponie) sind in den Datensätzen enthalten. Bei Materialen aus Eisen (Stahlbleche, Rohre, Grauguss) werden bei der Herstellung der Materialien bereits unterschiedliche Mengen an Stahlschrott eingesetzt. Diese Mengen wurden der recycelten Stahlmenge vor Zuführung in die Einschmelzung abgezogen, um keine Überwertung der Gutschriften zu erzeugen. Die Gutschrift wurde dann entsprechend mit primärem Stahl durchgeführt. Gutschriften für das Recycling von seltenen Erden oder Quecksilberemissionen aus Leuchtstofflampen konnten wegen fehlenden Daten nicht berücksichtigt werden.

Hintergrundsystem:
Strom: Die Stromerzeugung wird entsprechend der länderspezifischen Randbedingungen modelliert. Die landesspezifische Analyse beinhaltet:
1.: Spezifische Kraftwerke der verschiedenen fossilen Energieträger und der Einsatz erneuerbarer Energien sind entsprechend der länderspezifischen Energieträgermixe modelliert. Die Analyse bezieht Stromimporte aus den Nachbarländern, Transmissions-und Verteilungsverluste und den Eigenverbrauch im Kraftwerk und bei der Verteilung bzw. Speicherung, z. B. durch Pumpspeicherwerke, ein.
2.: Die landes-/regionalspezifischen Technologiestandards sowie die Erzeugung in Elektrizitätskraftwerken und/oder in speziellen Kraftwerken mit Kraft-Wärme-Kopplung (KWK) sind berücksichtigt.
3.: Die länderspezifische Energieträgerbereitstellung (mit Anteil der Importe und/oder Eigenversorgung) einschließlich der Energieträger-Eigenschaften (z. B. Elementar- und Energiegehalte) werden berücksichtigt.
4.: Die Förderung, Produktion, Verarbeitung und Transportprozesse werden entsprechend der Situation im jeweiligen Stromerzeugerland modelliert. Die unterschiedlichen Produktions- und Verarbeitungsverfahren (Emissionen und Wirkungsgrade) in den verschiedenen Energieerzeugerländern werden einbezogen, z. B. Rohöl-Veredelungsverfahren oder Abfackel-Raten an den Ölplattformen.
Thermische Energie, Prozessdampf: Die Erzeugung von Dampf und thermischer Energie in Heizkraftwerken wird entsprechend der landesspezifischen Situation (Emissionsgrenzwerte, Energieträgerbasis) modelliert.
Der Wirkungsgrad für die thermische Energieerzeugung beträgt per Definition 100% des Energieträgereinsatzes. Für Prozessdampf liegt der Wirkungsgrad im Bereich von 85-95%. Die zur Heizenergie-Erzeugung verwendeten Energieträger werden entsprechend der nationalen Situation modelliert (siehe Kapitel Strom oben).
Transporte: Alle relevanten und bekannten Transportprozesse in Form von See- und Binnenschiffsverkehr sowie Bahn-, Lkw- und der Leitungstransport sind enthalten.
Energieträger: Die Energieträger werden entsprechend der spezifischen Versorgungslage modelliert (siehe Kapitel Strom oben).
Raffinerieprodukte: Diesel, Benzin, technische Gase, Heizöl, Schmierstoffe und Rückstände, wie Bitumen, werden mit einem parametrierten länderspezifische Raffineriemodell modelliert. Das Raffinerie-Modell bezieht die länderspezifischen Veredelungsverfahren (z. B. Emissionspegel, interner Energieverbrauch etc.) und das länderspezifische Produktspektrum ein, das sich je nach Land stark unterscheiden kann. Die Rohöl-Förderung wird gemäß der länderspezifischen Situation mit den jeweiligen Energieträger-Eigenschaften modelliert.

## Technical purpose
Dieses Produkt kann im Baubereich verwendet werden.

## Safety margin
20 %. Produktsystem bis auf wenige Prozesse/Flüsse abgebildet. Technologische, zeitliche und geographische Repräsentativität teilweise gegeben.

## Reference product
- Grauguß Bauteil (GG): 1

## Inputs
- Erneuerbare Primärenergie als Energieträger (PERE) [MJ]: A1-A3 3.12523, C1 0.000566453, C2 0.0021792, D -0.0822294
- Erneuerbare Primärenergie zur stofflichen Nutzung (PERM) [MJ]: A1-A3 0, C1 0, C2 0, D 0
- Total erneuerbare Primärenergie (PERT) [MJ]: A1-A3 3.12523, C1 0.000566453, C2 0.0021792, D -0.0822294
- Nicht-erneuerbare Primärenergie als Energieträger (PENRE) [MJ]: A1-A3 9.43733, C1 0.0097302, C2 0.037433, D 0.720662
- Nicht-erneuerbare Primärenergie zur stofflichen Nutzung (PENRM) [MJ]: A1-A3 0, C1 0, C2 0, D 0
- Total nicht erneuerbare Primärenergie (PENRT) [MJ]: A1-A3 9.43733, C1 0.0097302, C2 0.037433, D 0.720662
- Einsatz von Sekundärstoffen (SM) [kg]: A1-A3 1.3914, C1 0, C2 0, D 0
- Erneuerbare Sekundärbrennstoffe (RSF) [MJ]: A1-A3 0, C1 0, C2 0, D 0
- Nicht erneuerbare Sekundärbrennstoffe (NRSF) [MJ]: A1-A3 0, C1 0, C2 0, D 0
- Einsatz von Süßwasserressourcen (FW) [m3]: A1-A3 0.00239401, C1 5.07306e-7, C2 1.95166e-6, D 6.49193e-5

## Outputs
- Gefährlicher Abfall zur Deponie (HWD) [kg]: A1-A3 1.012e-8, C1 3.63607e-10, C2 1.39883e-9, D 6.10369e-10
- Entsorgter nicht gefährlicher Abfall (NHWD) [kg]: A1-A3 0.00435062, C1 1.70782e-6, C2 6.57015e-6, D 0.00137247
- Entsorgter radioaktiver Abfall (RWD) [kg]: A1-A3 0.000432402, C1 1.02439e-8, C2 3.94093e-8, D -1.30763e-5
- Komponenten für die Wiederverwendung (CRU) [kg]: A1-A3 0, C1 0, C2 0, D 0
- Stoffe zum Recycling (MFR) [kg]: A1-A3 0, C1 1.2, C2 0, D 0
- Stoffe für die Energierückgewinnung (MER) [kg]: A1-A3 0, C1 0, C2 0, D 0
- Exportierte elektrische Energie (EEE) [MJ]: A1-A3 0, C1 0, C2 0, D 0
- Exportierte thermische Energie (EET) [MJ]: A1-A3 0, C1 0, C2 0, D 0

## Impact indicators
- Globales Erwärmungspotenzial (GWP) [kg CO2 Äquiv.]: A1-A3 0.722883, C1 0.000718871, C2 0.00278506, D 0.0952958
- Abbaupotenzial der stratosphärischen Ozonschicht (ODP) [kg R11 Äquiv.]: A1-A3 1.66881e-14, C1 2.39627e-19, C2 9.21867e-19, D -5.85378e-16
- Versauerungspotential (AP) [kg SO2 Äquiv.]: A1-A3 0.00133302, C1 2.50738e-6, C2 5.62553e-6, D 0.000219816
- Eutrophierungspotential (EP) [kg Phosphat Äquiv.]: A1-A3 0.000177211, C1 5.91605e-7, C2 1.33734e-6, D 1.82596e-5
- Bildungspotenzial für troposphärisches Ozon (POCP) [kg Ethen Äquiv.]: A1-A3 0.000633672, C1 2.47755e-7, C2 -1.6854e-6, D 2.87083e-5
- Potenzial für den abiotischen Abbau nicht fossiler Ressourcen (ADPE) [kg Sb Äquiv.]: A1-A3 1.93577e-7, C1 6.09201e-11, C2 2.34365e-10, D -2.26818e-9
- Potenzial für den abiotischen Abbau fossiler Brennstoffe (ADPF) [MJ]: A1-A3 8.34518, C1 0.00970402, C2 0.0373323, D 0.753785

## Use advice
Der Datensatz repräsentiert ein Cradle to Gate Inventar. Er kann verwendet werden, um die Lieferkette des jeweiligen Produktes in einer repräsentativen Weise zu charakterisieren. Die Kombination mit einzelnen Einheitenprozessen und diesem Produkt ermöglicht die Erstellung von anwenderspezifischen (Produkt-) LCAs.

## Data sources
- GaBi Database Edition 2020, SP40
- GaBi database (all versions)
