# TPO/FPO Dach-und Dichtungsbahn

Dataset: ILCD process, EPD, specific dataset
Geography: DE
Reference year: 2016
Valid until: 2022
Classification: OEKOBAU.DAT: Kunststoffe / Dachbahnen / Elastomer-Dachbahnen
Classification: IBUCategories: 02 Bauprodukte / Abdichtungen / Dach- und Dichtungsbahnsysteme aus Kunststoffen und Elastomeren
Method details: Dach- und Dichtungsbahnsysteme aus Kunststoffen und Elastomeren.pdf
Generated by: Sphera Solutions GmbH
Registration number: EPD-KBC-20160014-IBC1-DE
Owner: KÖSTER BAUCHEMIE AG
Compliance: DIN EN 15804; ISO 14025
Review: Accredited third party review by Institut Bauen und Umwelt e. V.
Amounts: rows without a unit in brackets have none in this file; such an amount is in the reference unit of its flow, which a separate flow dataset defines
copyright: true
licenseType: Free of charge for all users and uses
accessRestrictions: None

## General comment
KÖSTER TPO 1.6 / 1.8 / 2.0 / 2.0 F ist eine mit Heißluft verschweißbare Kunststoff Dach- und Dichtungsbahn aus flexiblen bzw. thermoplastischen Polyolefinen (FPO / TPO) und einer mittigen Glasvlieseinlage und ggfs. unterseitigem Polyestervlies.

Die mittige Glasvliesarmierung dient als zusätzlicher Festigkeitsträger und verbessert damit die mechanischen Eigenschaften der Dach- und Dichtungsbahn. Die Polyestervlieskaschierung dient dazu, dass die Bahn auf anderen Werkstoffen verklebt oder auf rauen Oberflächen verlegt werden kann.

eff. Dicke Gesamtdicke
KÖSTER TPO 1.6 1,6 mm 1,6 mm
mit mittiger Glasvlieseinlage

KÖSTER TPO 1.8 1,8 mm 1,8 mm
mit mittiger Glasvlieseinlage

KÖSTER TPO 2.0 2,0 mm 2,0 mm
mit mittiger Glasvlieseinlage

KÖSTER TPO 2.0 F 2,0 mm 2,8 mm
mit mittiger Glasvlieseinlage und unterseitigem Polyestervlies

## Technology and included processes
Zusammensetzung: TPO / FPO (85 - 99 %): ist ein thermoplastisches Polyolefin und besteht aus einer Mischung aus Ethylen-Copolymeren sowie Farbpigmenten und Stabilisatoren. Glasvlies (1-5 %): Auf Grund ihrer Beschaffenheit fallen die Glasfasern nicht unter die Definition für künstlich hergestellte ungerichtete glasartige (Silikat-) Fasern (sie sind weder als gefährlich eingestuft noch müssen sie gekennzeichnet werden). Polyestervlies (ca. 10 %): Nur bei KÖSTER TPO 2.0 F. Herstellung: Die Produktion der KÖSTER TPO / FPO Dach- und Dichtungsbahnen ist nach /DIN EN ISO 9001/ zertifiziert. Die Herstellung der Bahnen erfolgt auf einer Zwei-Düsen Extrusionsanlage. Der Rohstoff wird in einem Extruder auf die entsprechende Temperatur erwärmt und unter Druck dem Prozess zugefügt. Durch Massentemperatur- und Druckmessung lassen sich die beiden niedrigviskosen Schmelzeströme überwachen. Die mittige Glasvlieseinlage dient als zusätzlicher Festigkeitsträger und verbessert damit die mechanischen Eigenschaften der Dach- und Dichtungsbahn. Durch die Regulierung der austretenden Schmelzeströme am Ende der Extrusionsdüsen wird die gewünschte Dicke der Dach- und Dichtungsbahnen erzielt. Die Bahnen werden nach dem Verlassen des Glättwerkes und vor dem Aufwickeln auf unter 30 °C abgekühlt. Die Kühlung erfolgt durch die wassergekühlten Walzen. Das aufgeheizte Wasser wird über einen Wärmetauscher gekühlt in den Wasserkreislauf zurückgeführt und wiederverwendet.
Technische Daten:
Bezeichnung nach /DIN SPEC 20000-201/:

KÖSTER TPO 1.6/1.8/2.0: DE/E1-FPO-BV-E-GV-1,6 / 1,8 / 2,0
KÖSTER TPO 2.0 F: DE/E1-FPO-BV-E-GV-K-PV-2,0
Bezeichnung nach /DIN V 20000-202/:
KÖSTER TPO 1.6/1.8 /2.0: BA-FPO-BV-E-GV-1,6 / 1,8 / 2,0
Deklarierte Einheit:
Die deklarierte Einheit ist 1 m² produzierte Dachbahn.
Es sind nicht selbstklebende Dachbahnen. Die Nähte werden durch thermisches Verschweißen zusammengefügt. Die Flächengewichte sind auf zwei Stellen hinter dem Komma gerundet angegeben.

## Technical purpose
KÖSTER TPO und KÖSTER TPO F-Dach- und Dichtungsbahnen dienen zur Abdichtung von unbelüfteten und belüfteten Flachdächern, geneigten Dächern, Gründächern, Terrassen, Balkonen, Dachgärten und Tiefgaragen bei direkter Bewitterung und unter Auflast.
Sie können außerdem zur Abdichtung von Feuchträumen, Sprinklerbehältern und Teichen verwendet werden.
KÖSTER TPO-Dach- und Dichtungsbahnen können lose (unter Auflast) oder mechanisch befestigt verlegt werden.
KÖSTER TPO F-Dach- und Dichtungsbahnen können lose (unter Auflast), mechanisch befestigt und vollflächig oder streifenweise verklebt verlegt werden.

## Scenarios
- S0: Szenario 0
- S1: 100% recycling
- S2: 100% thermische Verwertung

## Reference product
- 1 m2 Dachbahn TPO 2.0 F: 1

## Inputs
- Erneuerbare Primärenergie als Energieträger (PERE) [MJ]: A1-A3 7.44
- Erneuerbare Primärenergie zur stofflichen Nutzung (PERM) [MJ]: A1-A3 0
- Total erneuerbare Primärenergie (PERT) [MJ]: A1-A3 7.44, A4 0.0577, A5 0.4, C2 (S1) 0.0279, C2 (S2) 0.00543, C3 0.494, C4 0.153, D (S1) -2.83, D (S2) -1.51
- Nicht-erneuerbare Primärenergie als Energieträger (PENRE) [MJ]: A1-A3 119
- Nicht-erneuerbare Primärenergie zur stofflichen Nutzung (PENRM) [MJ]: A1-A3 74.6
- Total nicht erneuerbare Primärenergie (PENRT) [MJ]: A1-A3 194, A4 0.756, A5 11.4, C2 (S1) 0.366, C2 (S2) 0.0712, C3 1.79, C4 1.32, D (S1) -168, D (S2) -12.3
- Einsatz von Sekundärstoffen (SM) [kg]: A1-A3 0, A4 0, A5 0, C2 (S1) 0, C2 (S2) 0, C3 0, C4 0, D (S1) 0, D (S2) 0
- Erneuerbare Sekundärbrennstoffe (RSF) [MJ]: A1-A3 0, A4 0, A5 0, C2 (S1) 0, C2 (S2) 0, C3 0, C4 0, D (S1) 0, D (S2) 0
- Nicht erneuerbare Sekundärbrennstoffe (NRSF) [MJ]: A1-A3 0, A4 0, A5 0, C2 (S1) 0, C2 (S2) 0, C3 0, C4 0, D (S1) 0, D (S2) 0
- Einsatz von Süßwasserressourcen (FW) [m^3]

## Outputs
- Gefährlicher Abfall zur Deponie (HWD) [kg]
- Entsorgter nicht gefährlicher Abfall (NHWD) [kg]
- Entsorgter radioaktiver Abfall (RWD) [kg]
- Komponenten für die Wiederverwendung (CRU) [kg]: A1-A3 0, A4 0, A5 0, C2 (S1) 0, C2 (S2) 0, C3 0, C4 0, D (S1) 0, D (S2) 0
- Stoffe zum Recycling (MFR) [kg]: A1-A3 0, A4 0, A5 0, C2 (S1) 0, C2 (S2) 0, C3 2.215, C4 0, D (S1) 0, D (S2) 0
- Stoffe für die Energierückgewinnung (MER) [kg]: A1-A3 0, A4 0, A5 0, C2 (S1) 0, C2 (S2) 0, C3 0, C4 2.215, D (S1) 0, D (S2) 0
- Exportierte elektrische Energie (EEE) [MJ]: A1-A3 0, A4 0, A5 0.29, C2 (S1) 0, C2 (S2) 0, C3 0, C4 2.06, D (S1) 0, D (S2) 0
- Exportierte thermische Energie (EET) [MJ]: A1-A3 0, A4 0, A5 0.751, C2 (S1) 0, C2 (S2) 0, C3 0, C4 5.63, D (S1) 0, D (S2) 0

## Impact indicators
- Globales Erwärmungspotenzial (GWP) [kg CO_(2)-Äq.]: A1-A3 7.01, A4 0.0553, A5 0.633, C2 (S1) 0.0267, C2 (S2) 0.0052, C3 0.131, C4 1.9, D (S1) -4.79, D (S2) -0.822
- Abbau Potential der stratosphärischen Ozonschicht (ODP) [kg CFC11-Äq.]: A1-A3 3.28e-7, A4 6.81e-14, A5 2.18e-8, C2 (S1) 3.3e-14, C2 (S2) 6.41e-15, C3 1.31e-11, C4 4.03e-12, D (S1) -2.74e-7, D (S2) -4.01e-11
- Versauerungspotenzial von Boden und Wasser (AP) [kg SO_(2)-Äq.]: A1-A3 0.0283, A4 0.000245, A5 0.00181, C2 (S1) 0.000118, C2 (S2) 2.3e-5, C3 0.000215, C4 0.000961, D (S1) -0.0105, D (S2) -0.000966
- Eutrophierungspotenzial (EP) [kg PO_(4)^(3)-Äq.]: A1-A3 0.00152, A4 6.68e-5, A5 0.000102, C2 (S1) 3.23e-5, C2 (S2) 6.29e-6, C3 2.81e-5, C4 0.00019, D (S1) -0.000918, D (S2) -0.000133
- Bildungspotential für troposphärisches Ozon (POCP) [kg Ethen-Äq.]: A1-A3 0.00227, A4 -8.44e-5, A5 0.000122, C2 (S1) -4.08e-5, C2 (S2) -7.94e-6, C3 1.62e-5, C4 6.01e-5, D (S1) -0.00134, D (S2) -0.000102
- Potenzial für den abiotischen Abbau nicht fossiler Ressourcen (ADPE) [kg Sb-Äq.]: A1-A3 5.7e-6, A4 2.85e-9, A5 4.21e-7, C2 (S1) 1.38e-9, C2 (S2) 2.69e-10, C3 3.2e-8, C4 1.96e-7, D (S1) -6.33e-7, D (S2) -1.17e-7
- Potenzial für den abiotischen Abbau fossiler Brennstoffe (ADPF) [MJ]: A1-A3 174, A4 0.753, A5 10.1, C2 (S1) 0.364, C2 (S2) 0.0709, C3 1.32, C4 1.17, D (S1) -154, D (S2) -10.9

## Use advice
Gültigkeitsbereich:
Diese EPD ist gültig für 1 m² der folgenden Dachbahnen unterschiedlicher Dicken: KÖSTER TPO 1.6 / 1.8 / 2.0 / 2.0 F, wobei in Kapitel 5 nur die Werte von KÖSTER TPO 2.0 F deklariert sind. Für die weiteren Varianten sind Umrechnungsfaktoren in Kapitel 3.10 angegeben.
Die Ökobilanz beruht auf den Daten der KÖSTER Bauchemie AG aus dem Produktionsjahr 2014, hergestellt im Werk Aurich in Deutschland.
Systemgrenze:
Typ der EPD: Wiege bis Werkstor - mit Optionen. Die Ökobilanz berücksichtigt die Rohstoff- und Energiegewinnung, Rohstofftransporte und die eigentliche Produktherstellung (Module A1-A3), den Transport zur Baustelle (Modul A4), die Verlegung unter Berücksichtigung von Verschnitt und Verpackungsabfällen (ohne optionale Dachbahnenbefestiger und Kleber) (Modul A5), sowie den Transport nach dem Rückbau (Modul C2), das Recycling (Modul C3 & D/1) oder die thermische Verwertung (Modul C4 und D/2), mit den jeweils daraus resultierenden Gutschriften und Lasten außerhalb der Systemmgrenze.

Für das End-of-Life (Module C2, C3, C4 und D) gibt es zwei Szenarien: das erste geht von einem 100 %igen stofflichen Recycling aus. Das zweite Szenario basiert auf einer 100 %igen thermischen Verwertung. Aus den Ergebnissen dieser beiden 100 % Szenarien können dann individuelle Szenarien für Kombinationen aus thermischer Verwertung und stofflichem Recycling berechnet werden.

## Data sources
- GaBi Database (all versions)
- GaBi database SP28 2015
