# Recycling Transportbeton C20/25; C20/25

Dataset: ILCD process, EPD, generic dataset
Geography: DE
Reference year: 2021
Valid until: 2022
Classification: oekobau.dat: Mineralische Baustoffe / Mörtel und Beton / Beton
Owner: Sphera Solutions GmbH
Compliance: EN 15804+A2
Review: Dependent internal review by Sphera Solutions GmbH; Independent external review by GaBi user forum
Amounts: rows without a unit in brackets have none in this file; such an amount is in the reference unit of its flow, which a separate flow dataset defines
copyright: true
licenseType: Free of charge for all users and uses
accessRestrictions: The license conditions as stated on https://www.oekobaudat.de/ apply.
accessRestrictions: Es gelten die Lizenzbedingungen wie sie auf https://www.oekobaudat.de/ genannt sind.

## General comment
Dieser Datensatz wurde nach dem European Standard EN 15804+A2 für Nachhaltiges Bauen modelliert. Ergebnisse werden in Modulen abgebildet, die den strukturierten Ausdruck von Ergebnissen über den gesamten Lebenszyklus zulassen.

## Geography
Der Datensatz bildet die länderspezifische Situation in Deutschland ab. Dabei werden Haupttechnologien, spezifische regionale Charakteristiken und ggf. Importstatistiken berücksichtigt.

## Time period
Jährlicher Durchschnitt

## Technology and included processes
Module A1-A3: Recycling Transportbeton der Festigkeitsklasse C20/25 besteht aus einem Mix aus rezyklierten Gesteinskörnungen (ca. 80 M.%, ökobilanziell lastenfrei), Zement (ca. 11 M.%), Wasser (ca. 5,5 M.%) und Flugasche (ca. 3,5 M.%).
Die Zementherstellung dominiert die Ökobilanz von Recyclingbeton (z.B. Beitrag zum Treibhauspotential ca. 88%).

Modul A4: ein LKW-Transport (Betonmischer) zur Baustelle mit einer Beladung von 26 Tonnen und einer durchschnittlichen Entfernung von 10 Kilometern wurde berücksichtigt. Die Transportentfernung kann auf Gebäudeebene, falls erforderlich, angepasst werden.

In der Entsorgungsphase wird in Modul C1 ein maschineller Rückbau (Bagger) bilanziert. Der Transport in Modul C2 zur Aufbereitungsanlage erfolgt mit einem LKW (50km). In Modul C3 wird das Material aufbereitet, eventuelle Bewehrung wird einer Senke (keine Lasten, keine Gutschriften) zugeführt. Es wurde ein Aufbereitungsverlust von 25% angenommen. Dieser Verlust wird einer Inertstoffdeponie innerhalb von Modul C3 zugeführt (durchschnittliche Deponieemissionen). In Modul D erfolgt eine Gutschrift für die Netto-Materialmenge (ohne Bewehrungsanteil und abzüglich Aufbereitungsverluste) für die Substitution von natürlichem Kies als Verfüllmaterial (z.B. im Straßen- oder Deponiebau).

## Technical purpose
Beton wird für verschiedene tragende und nicht tragende Anwendungen im Baubereich sowohl im Innen- als auch im Aussenbereich verwendet.

## Safety margin
10 %. Produktsystem weitgehend vollständig abgebildet. Gute technologische, zeitliche und geographische Repräsentativität.

## Reference product
- Recycling Transportbeton C20/25: 1

## Inputs
- Erneuerbare Primärenergie als Energieträger (PERE) [MJ]: A1-A3 219.944, A4 1.36295, C1 0.540911, C2 4.7294, C3 77.7618, D -0.533346
- Erneuerbare Primärenergie zur stofflichen Nutzung (PERM) [MJ]: A1-A3 0, A4 0, C1 0, C2 0, C3 0, D 0
- Total erneuerbare Primärenergie (PERT) [MJ]: A1-A3 219.944, A4 1.36295, C1 0.540911, C2 4.7294, C3 77.7618, D -0.533346
- Nicht-erneuerbare Primärenergie als Energieträger (PENRE) [MJ]: A1-A3 774.324, A4 22.8203, C1 9.31992, C2 81.4878, C3 620.981, D -1.95869
- Nicht-erneuerbare Primärenergie zur stofflichen Nutzung (PENRM) [MJ]: A1-A3 0, A4 0, C1 0, C2 0, C3 0, D 0
- Total nicht-erneuerbare Primärenergie (PENRT) [MJ]: A1-A3 774.324, A4 22.8203, C1 9.31992, C2 81.4878, C3 620.981, D -1.95869
- Einsatz von Sekundärstoffen (SM) [kg]: A1-A3 1865.81, A4 0, C1 0, C2 0, C3 0, D 0
- Erneuerbare Sekundärbrennstoffe (SF) [MJ]: A1-A3 29.9734, A4 0, C1 0, C2 0, C3 0, D 0
- Nicht erneuerbare Sekundärbrennstoffe (NRSF) [MJ]: A1-A3 550.838, A4 0, C1 0, C2 0, C3 0, D 0
- Nettoeinsatz von Süßwasserressourcen (FW) [m3]: A1-A3 0.394417, A4 0.00119373, C1 0.000480735, C2 0.00420326, C3 0.154659, D -0.000323315

## Outputs
- Gefährlicher Abfall zur Deponie (HWD) [kg]: A1-A3 1.20152e-7, A4 9.6358e-10, C1 3.89542e-10, C2 3.40592e-9, C3 5.9752e-8, D -3.15577e-10
- Entsorgter nicht gefährlicher Abfall (NHWD) [kg]: A1-A3 0.948959, A4 0.00385371, C1 0.00150445, C2 0.013154, C3 2445.02, D -1.3007
- Entsorgter radioaktiver Abfall (RWD) [kg]: A1-A3 0.0232231, A4 2.79306e-5, C1 8.94368e-6, C2 7.81981e-5, C3 0.00602351, D -5.77659e-5
- Komponenten für die Wiederverwendung (CRU) [kg]: A1-A3 0, A4 0, C1 0, C2 0, C3 0, D 0
- Stoffe zum Recycling (MFR) [kg]: A1-A3 0, A4 0, C1 0, C2 0, C3 68.676, D 0
- Stoffe für die Energierückgewinnung (MER) [kg]: A1-A3 0, A4 0, C1 0, C2 0, C3 0, D 0
- Exportierte elektrische Energie (EEE) [MJ]: A1-A3 0, A4 0, C1 0, C2 0, C3 0, D 0
- Exportierte thermische Energie (EET) [MJ]: A1-A3 0, A4 0, C1 0, C2 0, C3 0, D 0

## Impact indicators
- Globales Erwärmungspotenzial - total (GWP-total) [kg CO2 eq.]: A1-A3 230.01, A4 1.72609, C1 0.697268, C2 6.18988, C3 43.0781, D -0.149229
- Globales Erwärmungspotenzial - fossil (GWP-fossil) [kg CO2 eq.]: A1-A3 229.511, A4 1.70036, C1 0.692589, C2 6.14762, C3 43.8905, D -0.14843
- Globales Erwärmungspotenzial - biogen (GWP-biogenic) [kg CO2 eq.]: A1-A3 0.366729, A4 0.0147063, C1 0.000163718, C2 0.00277809, C3 -0.959031, D -0.000121341
- Globales Erwärmungspotenzial - luluc (GWP-luluc) [kg CO2 eq.]: A1-A3 0.132674, A4 0.0110267, C1 0.0045156, C2 0.0394817, C3 0.146619, D -0.000678073
- Abbaupotenzial der stratosphärischen Ozonschicht (ODP) [kg CFC-11 eq.]: A1-A3 9.24806e-13, A4 6.10946e-16, C1 1.79909e-16, C2 1.57301e-15, C3 1.75927e-13, D -1.91652e-15
- Versauerungspotenzial, kumulierte Überschreitung (AP) [Mole of H+ eq.]: A1-A3 0.239578, A4 0.00168824, C1 0.00932489, C2 0.0174299, C3 0.327666, D -0.0004916
- Eutrophierungspotenzial - Süßwasser (EP-freshwater) [kg P eq.]: A1-A3 0.000120223, A4 3.56782e-6, C1 1.44604e-6, C2 1.26433e-5, C3 7.79876e-5, D -4.13014e-7
- Eutrophierungspotenzial - Salzwasser (EP-marine) [kg N eq.]: A1-A3 0.0844645, A4 0.000560008, C1 0.00424223, C2 0.00802959, C3 0.100243, D -0.000191195
- Eutrophierungspotenzial - Land (EP-terrestrial) [Mole of N eq.]: A1-A3 0.92307, A4 0.00665412, C1 0.0466438, C2 0.0898365, C3 1.10144, D -0.00210481
- Bildungspotenzial für troposphärisches Ozon (POCP) [kg NMVOC eq.]: A1-A3 0.249514, A4 0.00149027, C1 0.012705, C2 0.0156579, C3 0.299805, D -0.000452217
- Potenzial für die Verknappung abiotischer Ressourcen nicht fossile Ressourcen (ADPE) [kg Sb eq.]: A1-A3 1.22817e-5, A4 1.58186e-7, C1 6.11612e-8, C2 5.34757e-7, C3 1.1139e-5, D -3.03143e-8
- Potenzial für die Verknappung abiotischer Ressourcen fossile Brennstoffe (ADPF) [MJ]: A1-A3 774.123, A4 22.8091, C1 9.31953, C2 81.4844, C3 620.714, D -1.9583
- Wasser-Entzugspotenzial (Benutzer) (WDP) [m³ world equiv.]: A1-A3 12.1099, A4 0.00672509, C1 0.00273325, C2 0.0238979, C3 5.11932, D -0.00361816

## Use advice
Dieser Datensatz bezieht sich auf die Herstellung von 1 m³ Recycling Transportbeton der Qualität C20/25. Die Rohdichte beträgt 2360 kg/m³. Der Datensatz kann näherungsweise für die Abschätzung von Rohdichten von 2200 - 2500 kg verwendet werden.
Sämtliche mineralische Zuschlagsstoffe in diesem Datensatz wurden zu 100% mit lastenfreiem Sekundärmaterial bilanziert. Dies stellt den einzigen Unterschied dieses Datensatzes zum generischen Datensatz "Transportbeton C20/25" dar. Andere Sekundärmaterialanteile für Transportbeton können daher durch anteiliges Mischen der beiden Datensätze abgeschätzt werden.

## Data sources
- Ökologische Bilanzierung von Baustoffen und Gebäuden, 2000
- Documentation of data quality management
- GaBi Database Edition 2021, CUP2021.01
- GaBi database (all versions)
