# Cosmofin/Monarplan

Dataset: ILCD process, EPD, average dataset
Geography: RER
Reference year: 2020
Valid until: 2025
Classification: OEKOBAU.DAT: Kunststoffe / Dachbahnen / PVC-Dachbahnen
Classification: IBUCategories: 02 Bauprodukte / Abdichtungen / Dach- und Dichtungsbahnsysteme aus Kunststoffen und Elastomeren
Method details: Dach- und Dichtungsbahnsysteme aus Kunststoffen und Elastomeren.pdf
Generated by: BMI Technical Services GmbH
Registration number: EPD-BMI-20200173-IBB1-DE
Owner: BMI Technical Services GmbH
Compliance: DIN EN 15804+A2; ISO 14025
Review: Accredited third party review by Institut Bauen und Umwelt e. V.
Amounts: rows without a unit in brackets have none in this file; such an amount is in the reference unit of its flow, which a separate flow dataset defines
copyright: true
licenseType: Free of charge for all users and uses
accessRestrictions: None

## General comment
Cosmofin FG, FG R, GG plus und Monarplan FM sind monomer weichgestellte, nicht bitumenverträgliche PVC-P-Kunststoffdachbahnen mit mittiger Einlage und/oder Verstärkung. Die Nahtverschweißung erfolgt mit Heißluft oder Quellschweißmittel.

## Technology and included processes
Die Grundstoffe der Rezepturen werden in einem Mischer zusammengeführt und gemischt und anschließend in einem Extruder homogenisiert und plastifiziert. Durch Breitschlitzdüsen werden im Extrusionsverfahren die verschiedenen Schichten gefertigt und im Walzenspalt mit einer Einlage und/oder Verstärkung in einem Arbeitsgang verbunden. Über eine spezielle Kühlstrecke, auf dem Weg zur Konfektionierung werden die fertigen Bahnen mit einem eindeutigen Bahnenaufdruck inkl. Chargennummmer zur Rückverfolgbarkeit versehen. Die Bahnen werden auf die entsprechenden Breiten und Längen zugeschnitten. Die Produktion ist nach DIN EN ISO 9001 zertifiziert.
Technische Daten:
Daten aus den Leistungserklärungen von Cosmofin FG, FG R, GG plus und Monarplan FM:
Deklarierte Einheit:
Die deklarierte Einheit ist 1 m² produzierte Dachbahn Cosmofin/Monarplan. Es wird die Dicke von 1,5 mm mit einem Flächengewicht von 1,9 kg/m² deklariert.

## Technical purpose
Cosmofin/Monarplan sind einlagige Kunststoff Dach- und Dichtungsbahnen, die als Dachabdichtungen für exponierte und abgedeckte Flachdächer verwendet werden. Die Verlegung wird freiliegend, mechanisch befestigt oder mit Auflast (Kies, Platten, Parkdeck und Begrünung) durchgeführt.

## Reference product
- Cosmofin/ Monarplan Dicke: 1,5 mm; Flächengewicht: 1,9 kg/m²: 1

## Inputs
- Erneuerbare Primärenergie als Energieträger (PERE) [MJ]: A1-A3 12.185, C1 0, C2 0.00349, C3 1.89, C4 0, D -4.35
- Erneuerbare Primärenergie zur stofflichen Nutzung (PERM) [MJ]: A1-A3 0.71, C1 0, C2 0, C3 0, C4 0, D 0
- Total erneuerbare Primärenergie (PERT) [MJ]: A1-A3 12.895, C1 0, C2 0.00349, C3 1.89, C4 0, D -4.35
- Nicht-erneuerbare Primärenergie als Energieträger (PENRE) [MJ]: A1-A3 90.1, C1 0, C2 0.06, C3 45.2, C4 0, D -20
- Nicht-erneuerbare Primärenergie zur stofflichen Nutzung (PENRM) [MJ]: A1-A3 36.24, C1 0, C2 0, C3 -36.1, C4 0, D 0
- Total nicht erneuerbare Primärenergie (PENRT) [MJ]: A1-A3 126.34, C1 0, C2 0.06, C3 9.1, C4 0, D -20
- Einsatz von Sekundärstoffen (SM) [kg]: A1-A3 0, C1 0, C2 0, C3 0, C4 0, D 0
- Erneuerbare Sekundärbrennstoffe (RSF) [MJ]: A1-A3 0, C1 0, C2 0, C3 0, C4 0, D 0
- Nicht erneuerbare Sekundärbrennstoffe (NRSF) [MJ]: A1-A3 0, C1 0, C2 0, C3 0, C4 0, D 0
- Einsatz von Süßwasserressourcen (FW) [m^3]: A1-A3 0.0365971, C1 0, C2 3.13e-6, C3 0.01, C4 0, D -0.00503

## Outputs
- Gefährlicher Abfall zur Deponie (HWD) [kg]: A1-A3 1.1505e-6, C1 0, C2 2.24e-9, C3 4.11e-8, C4 0, D -7.97e-9
- Entsorgter nicht gefährlicher Abfall (NHWD) [kg]: A1-A3 0.265626, C1 0, C2 1.05e-5, C3 3.02, C4 0, D -0.00922
- Entsorgter radioaktiver Abfall (RWD) [kg]: A1-A3 0.00258136, C1 0, C2 6.31e-8, C3 0.000288, C4 0, D -0.00148
- Komponenten für die Wiederverwendung (CRU) [kg]: A1-A3 0, C1 0, C2 0, C3 0, C4 0, D 0
- Stoffe zum Recycling (MFR) [kg]: A1-A3 0, C1 0, C2 0, C3 0, C4 0, D 0
- Stoffe für die Energierückgewinnung (MER) [kg]: A1-A3 0, C1 0, C2 0, C3 0, C4 0, D 0
- Exportierte elektrische Energie (EEE) [MJ]: A1-A3 0, C1 0, C2 0, C3 4.97, C4 0, D 0
- Exportierte thermische Energie (EET) [MJ]: A1-A3 0, C1 0, C2 0, C3 9.05, C4 0, D 0

## Impact indicators
- Globales Erwärmungspotenzial total (GWP-total) [kg CO_(2)-Äq.]: A1-A3 5.1184, C1 0, C2 0.00453, C3 4.93, C4 0, D -1.18
- Globales Erwärmungspotenzial fossil (GWP-fossil) [kg CO_(2)-Äq.]: A1-A3 5.313, C1 0, C2 0.00451, C3 4.93, C4 0, D -1.18
- Globales Erwärmungspotenzial biogen (GWP-biogenic) [kg CO_(2)-Äq.]: A1-A3 -0.198661, C1 0, C2 1.82e-6, C3 -0.00215, C4 0, D -0.00276
- Globales Erwärmungspotenzial luluc (GWP-luluc) [kg CO_(2)-Äq.]: A1-A3 0.010911, C1 0, C2 1.89e-5, C3 0.001, C4 0, D -0.000822
- Abbau Potential der stratosphärischen Ozonschicht (ODP) [kg CFC11-Äq.]: A1-A3 1.30274e-10, C1 0, C2 1.11e-18, C3 7.5e-15, C4 0, D -1.22e-14
- Versauerungspotenzial von Boden und Wasser (AP) [mol H^(+)-Äq.]: A1-A3 0.0113726, C1 0, C2 3.79e-6, C3 0.00146, C4 0, D -0.00165
- Eutrophierungspotenzial Süßwasser (EP-freshwater) [kg PO_(4)-Äq.]: A1-A3 5.4711e-5, C1 0, C2 9.83e-9, C3 1.26e-6, C4 0, D -1.51e-6
- Eutrophierungspotenzial Salzwasser (EP-marine) [kg N-Äq.]: A1-A3 0.0029357, C1 0, C2 1.1e-6, C3 0.000484, C4 0, D -0.000426
- Eutrophierungspotenzial Land (EP-terrestrial) [mol N-Äq.]: A1-A3 0.031983, C1 0, C2 1.35e-5, C3 0.00592, C4 0, D -0.00457
- Bildungspotential für troposphärisches Ozon (POCP) [kg NMVOC-Äq.]: A1-A3 0.0107136, C1 0, C2 3.05e-6, C3 0.00137, C4 0, D -0.00123
- Potenzial für den abiotischen Abbau nicht fossiler Ressourcen (ADPE) [kg Sb-Äq.]: A1-A3 124.33, C1 0, C2 0.06, C3 9.1, C4 0, D -20
- Potenzial für den abiotischen Abbau fossiler Brennstoffe (ADPF) [MJ]: A1-A3 0.000443055, C1 0, C2 3.75e-10, C3 1.08e-7, C4 0, D -1.93e-7
- Wassernutzung (WDP) [m^(3) Welt-Äq. entzogen]: A1-A3 0.401118, C1 0, C2 1.94e-5, C3 0.381, C4 0, D -0.122
- Auftreten von Krankheiten aufgrund von Feinstaubemissionen (PM) [Krankheitsfälle]: A1-A3 1.33425e-7, C1 0, C2 4.28e-11, C3 3.52e-8, C4 0, D -1.4e-8
- Wirkung durch Exposition des Menschen mit U235 (IR) [kBq U235-Äq.]: A1-A3 0.209531, C1 0, C2 6.09e-6, C3 0.0293, C4 0, D -0.243
- Toxizitätsvergleichseinheit für Ökosysteme (ETP-fw) [CTUe]: A1-A3 69.95, C1 0, C2 0.0499, C3 7.54, C4 0, D -4.3
- Toxizitätsvergleichseinheit für Menschen (krebserregend) (HTP-c) [CTUh]: A1-A3 5.2314e-9, C1 0, C2 1.19e-12, C3 2.98e-10, C4 0, D -1.87e-10
- Toxizitätsvergleichseinheit für Menschen (nicht krebserregend) (HTP-nc) [CTUh]: A1-A3 4.7008e-7, C1 0, C2 5.29e-11, C3 3.17e-8, C4 0, D -6.94e-9
- Bodenqualitätsindex (SQP) [SQP]: A1-A3 40.903, C1 0, C2 0.0188, C3 2.06, C4 0, D -3.12

## Use advice
Gültigkeitsbereich:
Diese Deklaration gilt für Cosmofin und Monarplan Dach- und Dichtungsbahnen, die am Standort Sturovo in der Slowakei hergestellt werden. Es werden die Ökobilanzergebnisse von Cosmofin/Monarplan in der Stärke von 1,5 mm und einem Flächengewicht von 1,9 kg/m² deklariert.

Die Ökobilanz beruht auf durchschnittlichen Produktionsdaten des Geschäftsjahres 2019. Diese wurden von der BMI GmbH zur Verfügung gestellt.
Systemgrenze:
Typ der EPD: Wiege bis Werkstor mit Optionen.

Folgende Module werden in der Ökobilanz berücksichtigt:

Produktstadium (A1-A3): Das Produktstadium der BMI Dachbahnen umfasst:
A1 Rohstoffbereitstellung und –verarbeitung und Verarbeitungsprozesse von als Input dienenden Sekundärstoffen, (z.B. Recyclingprozesse),
A2 LKW-Transporte der Rohstoffe zum Werk (Štúrovo in der Slowakei),
A3 Dachbahnherstellung im Werk, (inkl. Energiebereitstellung, Wasserbereitstellung, Bereitstellung von Hilfsstoffen, Entsorgung der Produktionsabfälle, Herstellung der Verpackungsmaterialien). Entsorgungsstadium (C1-C4): Das Entsorgungsstadium BMI Dachbahnen umfasst:

EoL-Szenario: 100% Thermische Verwertung der Dachbahnen in einer MVA mit einem R1-Wert > 0,6 mit Rückgewinnungspotentialen in D aus Energiesubstitution
C1 manuell selektiver Ausbau (lastenfrei),
C2 LKW-Transport (50 km) zur thermischen Verwertung (MVA).
C3 Abfallbehandlung der Dachbahnen: 100% Thermische Verwertung in einer MVA,
C4 keine weiteren Aufwände durch Deponierung/ EntsorgungPotentiale und Lasten außerhalb der Systemgrenzen (D) der BMI Dachbahnen:

Modul D umfasst Rückgewinnungspotentiale aus der thermischen Verwertung der Dachbahnen in einer MVA durch Energiesubstitution.

## Data sources
- GaBi Database (all versions)
- GaBi database SP40 2020
