# Automatische Schiebetüranlage ST FLEX

Dataset: ILCD process, EPD, representative dataset
Geography: DE
Reference year: 2016
Valid until: 2021
Classification: OEKOBAU.DAT: Komponenten von Fenstern und Vorhangfassaden / Antriebssysteme / elektrisch
Classification: IBUCategories: 02 Bauprodukte / Türen, Fenster, Beschläge und Zubehör / Automatiktüren und -tore, sowie Karusselltüranlagen
Method details: Automatiktüren und -tore, sowie Karusselltüranlagen.pdf
Owner: DORMA Deutschland GmbH
Compliance: DIN EN 15804; ISO 14025
Review: Accredited third party review by IBU
Amounts: rows without a unit in brackets have none in this file; such an amount is in the reference unit of its flow, which a separate flow dataset defines
copyright: true

## General comment
Die ST FLEX steht für eine automatische Schiebetüranlage mit schmalen Profilen von DORMA. Die automatische Schiebetüranlage besteht aus einem Schiebetürantrieb inklusive Sensorik und Steuerungseinheit. Diese sind ein- und beidseitig öffnend sowie mit und ohne Seitenteile konfigurierbar. Die Schiebetür ST FLEX ist durch die geringen Profilansichtsbreiten universell einsetzbar. Zudem schafft das Profilsystem FLEX eine transparente Optik durch geringe Ansichtsbreiten. Die hohe Anzahl der verschiedenen Bauarten ermöglicht eine individuelle Lösung anspruchsvoller Objektanforderungen.

## Technology and included processes
Die automatische Schiebetüranlage besteht aus einem Schiebetürantrieb inklusive Sensorik und Steuerungseinheit. Diese sind ein- und beidseitig öffnend sowie mit und ohne Seitenteile konfigurierbar. Die Schiebetür ST FLEX ist durch die geringen Profilansichtsbreiten universell einsetzbar. Die Fahrflügel und Seitenteile der ST FLEX werden im DORMA Werk Zusmarshausen hergestellt. Auch die elektronischen Bauteile werden innerhalb der DORMA Gruppe gefertigt. Die Antriebskomponenten und Leiterplatinen werden im Werk Ennepetal produziert.
Technische Daten:
Technische Daten der Antriebsysteme bezogen auf die ST FLEX Produktfamilie Schiebetüranlage:
Deklarierte Einheit:
Die deklarierte Einheit ist ein Stück (1 Stk.) der automatischen Schiebetüranlage ST FLEX bestehend aus:
dem gemittelten Durchschnitt der Antriebseinheiten ES 200 Standard, ES 200 2D, ES 200 EASY und ES 200 EASYplus
zwei Fahrflügeln,
zwei Seitenteilen und
den jeweiligen Verpackungsmaterialien.

Die Seitenteile sind nicht Teil der beweglichen Automatiktür, sondern Teil des Gesamtsystems der automatischen Türanlage und wurden in der deklarierten Einheit berücksichtigt.

Die deklarierte Einheit umfasst folgende Daten:

## Technical purpose
Jede Anlage wird für die individuellen Maße der unterschiedlichen Gebäude projektbezogen angefertigt. Die im Rahmen der EPD analysierten Antriebseinheiten ES200 Standard, ES 200 2D, ES 200 EASY und ES 200 EASYplus sind für folgenden Einsatzzweck ausgelegt:

Details können in den jeweiligen Produktkatalogen bezogen werden.

## Reference product
- ST FLEX: 1

## Inputs
- Erneuerbare Primärenergie als Energieträger (PERE) [MJ]: A1-A3 2150, A4 3.99, A5 0.213, B3 378, B6 3850, C2 0.332, C3 17.4, D -2400
- Erneuerbare Primärenergie zur stofflichen Nutzung (PERM) [MJ]: A1-A3 92.7, A4 3.84e-12, A5 7.01e-12, B3 13.6, B6 1.08e-7, C2 3.14e-13, C3 0.0801, D -0.0452
- Total erneuerbare Primärenergie (PERT) [MJ]: A1-A3 2240, A4 3.99, A5 0.213, B3 392, B6 3850, C2 0.332, C3 17.4, D -2400
- Nicht-erneuerbare Primärenergie als Energieträger (PENRE) [MJ]: A1-A3 12700, A4 71.1, A5 2.23, B3 2130, B6 18300, C2 5.94, C3 405, D -7830
- Nicht-erneuerbare Primärenergie zur stofflichen Nutzung (PENRM) [MJ]: A1-A3 117, A4 0, A5 0, B3 70.3, B6 0, C2 0, C3 0.0225, D -1.18e-5
- Total nicht erneuerbare Primärenergie (PENRT) [MJ]: A1-A3 12900, A4 71.1, A5 2.23, B3 2200, B6 18300, C2 5.94, C3 405, D -7830
- Einsatz von Sekundärstoffen (SM) [kg]: A1-A3 56, A4 0, A5 0, B3 0, B6 0, C2 0, C3 0, D 0
- Erneuerbare Sekundärbrennstoffe (RSF) [MJ]: A1-A3 0.226, A4 0.000474, A5 7.98e-5, B3 0.0431, B6 0.242, C2 3.94e-5, C3 0.00568, D -0.12
- Nicht erneuerbare Sekundärbrennstoffe (NRSF) [MJ]: A1-A3 1.8, A4 0.00496, A5 0.000371, B3 0.329, B6 2.52, C2 0.000413, C3 0.0444, D -0.902
- Einsatz von Süßwasserressourcen (FW) [m^3]: A1-A3 4790, A4 0.319, A5 0.198, B3 790, B6 3480, C2 0.0266, C3 23.9, D -6030

## Outputs
- Gefährlicher Abfall zur Deponie (HWD) [kg]: A1-A3 0.31, A4 0, A5 0, B3 0.0603, B6 0, C2 0, C3 0.0903, D 0
- Entsorgter nicht gefährlicher Abfall (NHWD) [kg]: A1-A3 1770, A4 0.271, A5 0.445, B3 505, B6 4250, C2 0.0224, C3 39.6, D -1170
- Entsorgter radioaktiver Abfall (RWD) [kg]: A1-A3 0.671, A4 9.71e-5, A5 0.000135, B3 0.112, B6 2.74, C2 8.12e-6, C3 0.0131, D -0.383
- Komponenten für die Wiederverwendung (CRU) [kg]: A1-A3 0, A4 0, A5 0, B3 0, B6 0, C2 0, C3 0, D 0
- Stoffe zum Recycling (MFR) [kg]: A1-A3 7.13, A4 0, A5 0, B3 8.86, B6 0, C2 0, C3 287, D 0
- Stoffe für die Energierückgewinnung (MER) [kg]: A1-A3 0.148, A4 0, A5 4.86, B3 9.32, B6 0, C2 0, C3 9.56, D 0
- Exportierte elektrische Energie (EEE) [MJ]: A1-A3 1.59, A4 0, A5 9.29, B3 10, B6 0, C2 0, C3 30, D 0
- Exportierte thermische Energie (EET) [MJ]: A1-A3 4.02, A4 0, A5 21.8, B3 25.7, B6 0, C2 0, C3 74.7, D 0

## Impact indicators
- Globales Erwärmungspotenzial (GWP) [kg CO_(2)-Äq.]: A1-A3 931, A4 5.17, A5 7.18, B3 163, B6 1030, C2 0.432, C3 49.3, D -620
- Abbau Potential der stratosphärischen Ozonschicht (ODP) [kg CFC11-Äq.]: A1-A3 4.86e-6, A4 2.09e-11, A5 3.45e-11, B3 6.25e-7, B6 7.65e-7, C2 1.77e-12, C3 4.31e-7, D -1.34e-5
- Versauerungspotenzial von Boden und Wasser (AP) [kg SO_(2)-Äq.]: A1-A3 5.76, A4 0.0331, A5 0.00152, B3 1.25, B6 5.17, C2 0.00273, C3 0.0592, D -3.22
- Eutrophierungspotenzial (EP) [kg PO_(4)^(3)-Äq.]: A1-A3 0.626, A4 0.00849, A5 0.000268, B3 0.0537, B6 0.281, C2 0.000701, C3 0.00835, D -0.249
- Bildungspotential für troposphärisches Ozon (POCP) [kg Ethen-Äq.]: A1-A3 -0.0285, A4 -0.0137, A5 0.00011, B3 0.0649, B6 0.301, C2 -0.00113, C3 0.00535, D -0.205
- Potenzial für den abiotischen Abbau nicht fossiler Ressourcen (ADPE) [kg Sb-Äq.]: A1-A3 0.0266, A4 2.02e-7, A5 1.21e-7, B3 0.00878, B6 0.000163, C2 1.68e-8, C3 3.94e-5, D -0.0281
- Potenzial für den abiotischen Abbau fossiler Brennstoffe (ADPF) [MJ]: A1-A3 10800, A4 70.9, A5 1.89, B3 1770, B6 11400, C2 5.92, C3 369, D -6890

## Use advice
Gültigkeitsbereich:
Die vorliegende EPD bezieht sich auf den gesamten Lebensweg einer ST FLEX Schiebetüranlage von DORMA. Die unterschiedlichen technischen Eigenschaften werden in Kapitel 2.3 dargestellt. Produktionsstandort des Produkts ist DORMA Zusmarshausen, Deutschland. Die Stoff- und Energieströme wurden entsprechend berücksichtigt.
Systemgrenze:
Typ der EPD: Wiege bis Werkstor mit Optionen
(cradle to gate with options).

Module A1-3, A4 und A5

Das Produktstadium beginnt mit der Berücksichtigung der Produktion der notwendigen Rohstoffe und Enerigen inklusive aller entsprechenden Vorketten sowie der notwendigen Beschaffungstransporte. Weiterhin wurde die gesamte Herstellungsphase an zwei Produktionsstandorten abgebildet, inkl. der Behandlung von Produktionsabfällen bis zum Erreichen des End-of-Waste Status (EoW). Zudem wurden ebenfalls die Distributionstransporte und der Einbau ins Gebäude berücksichtigt.

Modul B3

Das Modul beinhaltet das Auswechseln von Verschleißteilen über die gesamte Nutzungsdauer von 10 Jahren. Hierzu gehören sowohl die Herstellung der Ersatzteile als auch die Entsorgung der Verschleissteile bis zum End-of-Waste Status (EoW).

Modul B6

Das Modul beinhaltet den Energieverbrauch für den Betrieb der deklarierten ES 200 Antriebseinheiten inklusive der Standby-Zeiten über die gesamte Nutzungsdauer von 10 Jahren.

Module C2-3

Die Module beinhalten die Umweltwirkungen für die Behandlung der Abfallfraktionen bis zum Erreichen des End-of-Waste Status (EoW) inklusive der zugehörigen Transporte am Ende des Produktlebenswegs.

Modul D Ausweis der aus der Abfallbehandlung resultierenden Gutschriften, resultierend aus einer energetischen (MVA-Route) oder werkstofflichen Verwertung (Recycling-Route) von Verpackungen (A5), der Ersatzteile (B3) und des Produktes im End of Life (C3).

## Data sources
- Automatische Schiebetüranlage ST FLEX.pdf
- GaBi Database (all versions)
- GaBi database SP28 2015
