# Kies 2/32 (getrocknet); dried

Dataset: ILCD process, EPD, generic dataset
Geography: DE
Reference year: 2021
Valid until: 2022
Classification: oekobau.dat: Mineralische Baustoffe / Zuschläge / Sand und Kies
Owner: Sphera Solutions GmbH
Compliance: EN 15804+A2
Review: Dependent internal review by Sphera Solutions GmbH; Independent external review by GaBi user forum
Amounts: rows without a unit in brackets have none in this file; such an amount is in the reference unit of its flow, which a separate flow dataset defines
copyright: true
licenseType: Free of charge for all users and uses
accessRestrictions: The license conditions as stated on https://www.oekobaudat.de/ apply.
accessRestrictions: Es gelten die Lizenzbedingungen wie sie auf https://www.oekobaudat.de/ genannt sind.

## General comment
Dieser Datensatz wurde nach dem European Standard EN 15804+A2 für Nachhaltiges Bauen modelliert. Ergebnisse werden in Modulen abgebildet, die den strukturierten Ausdruck von Ergebnissen über den gesamten Lebenszyklus zulassen.

## Geography
Der Datensatz bildet die länderspezifische Situation in Deutschland ab. Dabei werden Haupttechnologien, spezifische regionale Charakteristiken und ggf. Importstatistiken berücksichtigt.

## Time period
Jährlicher Durchschnitt

## Technology and included processes
Die Aufbereitung der Rohstoffe beginnt mit dem Waschen der Gesteinskörner, die aus dem Tagebau gewonnen wurden. Durch die Zugabe von sauberem Wasser wird das Rohmaterial in verschiedenen Waschstufen von abschlämmbaren Substanzen (Lehm und Ton) und von Fremdstoffen (Holz, Kaolin, Kohle, Metalle etc.) befreit. Anschließend erfolgt eine Sortierung mit Hilfe von Vibrationssieben und/oder einer vorgeschalteten Sortiermaschine. Sand und Kies mit einem SiO2-Gehalt größer als 96 % sind bekannt als Quarzsand oder Quarzkies. Es folgt die Trocknung. Anschließend wird die Körnung mit Hilfe von Sieben klassifiziert nach Korngruppen. In einem Heiß-Gas-Generator wird Luft mit einem Öl- oder Gasbrenner auf 450 °C erhitzt. Mit der Heißluft erfolgt die Trocknung der Körnung im Trockenofen, bis der Wassergehalt kleiner als 0,2 %. Die Lebenszyklusanalyse von Kies umfasst den Prozess der Rohkies-Gewinnung und die Aufbereitung im Kieswerk sowie eine anschließende Trocknung. Die Systemgrenze bildet das fertige Produkt Kies 2/32 (getrocknet) am Werkstor. Transporte vom Werk zur Baustelle sind nicht berücksichtigt und müssen bei Systembetrachtungen eingerechnet werden.

In der Entsorgungsphase wird in Modul C1 ein maschineller Rückbau (Bagger) bilanziert. Der Transport in Modul C2 zur Aufbereitungsanlage erfolgt mit einem LKW (50km). In Modul C3 wird das Material aufbereitet, eventuelle Bewehrung wird einer Senke (keine Lasten, keine Gutschriften) zugeführt. Es wurde ein Aufbereitungsverlust von 25% angenommen. Dieser Verlust wird einer Inertstoffdeponie innerhalb von Modul C3 zugeführt (durchschnittliche Deponieemissionen). In Modul D erfolgt eine Gutschrift für die Netto-Materialmenge (ohne Bewehrungsanteil und abzüglich Aufbereitungsverluste) für die Substitution von natürlichem Kies als Verfüllmaterial (z.B. im Straßen- oder Deponiebau).

## Technical purpose
Dieses Produkt kann im Baubereich verwendet werden.

## Safety margin
20 %. Produktsystem bis auf wenige Prozesse/Flüsse abgebildet. Technologische, zeitliche und geographische Repräsentativität teilweise gegeben.

## Reference product
- Kies 2/32 (getrocknet): 1

## Inputs
- Erneuerbare Primärenergie als Energieträger (PERE) [MJ]: A1-A3 0.0136044, C1 0.000250036, C2 0.00218616, C3 0.0132272, D -0.00517903
- Erneuerbare Primärenergie zur stofflichen Nutzung (PERM) [MJ]: A1-A3 0, C1 0, C2 0, C3 0, D 0
- Total erneuerbare Primärenergie (PERT) [MJ]: A1-A3 0.0136044, C1 0.000250036, C2 0.00218616, C3 0.0132272, D -0.00517903
- Nicht-erneuerbare Primärenergie als Energieträger (PENRE) [MJ]: A1-A3 0.584832, C1 0.00430813, C2 0.0376677, C3 0.11883, D -0.0190198
- Nicht-erneuerbare Primärenergie zur stofflichen Nutzung (PENRM) [MJ]: A1-A3 0, C1 0, C2 0, C3 0, D 0
- Total nicht-erneuerbare Primärenergie (PENRT) [MJ]: A1-A3 0.584832, C1 0.00430813, C2 0.0376677, C3 0.11883, D -0.0190198
- Einsatz von Sekundärstoffen (SM) [kg]: A1-A3 0, C1 0, C2 0, C3 0, D 0
- Erneuerbare Sekundärbrennstoffe (SF) [MJ]: A1-A3 0, C1 0, C2 0, C3 0, D 0
- Nicht erneuerbare Sekundärbrennstoffe (NRSF) [MJ]: A1-A3 0, C1 0, C2 0, C3 0, D 0
- Nettoeinsatz von Süßwasserressourcen (FW) [m3]: A1-A3 6.93265e-5, C1 2.2222e-7, C2 1.94295e-6, C3 3.00552e-5, D -3.13954e-6

## Outputs
- Gefährlicher Abfall zur Deponie (HWD) [kg]: A1-A3 1.62437e-10, C1 1.80066e-13, C2 1.57439e-12, C3 9.72366e-12, D -3.06439e-12
- Entsorgter nicht gefährlicher Abfall (NHWD) [kg]: A1-A3 0.0251932, C1 6.9543e-7, C2 6.08042e-6, C3 0.291304, D -0.0126304
- Entsorgter radioaktiver Abfall (RWD) [kg]: A1-A3 1.33942e-6, C1 4.13421e-9, C2 3.61471e-8, C3 1.0478e-6, D -5.60933e-7
- Komponenten für die Wiederverwendung (CRU) [kg]: A1-A3 0, C1 0, C2 0, C3 0, D 0
- Stoffe zum Recycling (MFR) [kg]: A1-A3 0, C1 0, C2 0, C3 0.7275, D 0
- Stoffe für die Energierückgewinnung (MER) [kg]: A1-A3 0, C1 0, C2 0, C3 0, D 0
- Exportierte elektrische Energie (EEE) [MJ]: A1-A3 0, C1 0, C2 0, C3 0, D 0
- Exportierte thermische Energie (EET) [MJ]: A1-A3 0, C1 0, C2 0, C3 0, D 0

## Impact indicators
- Globales Erwärmungspotenzial - total (GWP-total) [kg CO2 eq.]: A1-A3 0.0340342, C1 0.000322305, C2 0.00286116, C3 0.00753714, D -0.00144919
- Globales Erwärmungspotenzial - fossil (GWP-fossil) [kg CO2 eq.]: A1-A3 0.0339242, C1 0.000320149, C2 0.00284173, C3 0.00760629, D -0.00144132
- Globales Erwärmungspotenzial - biogen (GWP-biogenic) [kg CO2 eq.]: A1-A3 9.52766e-5, C1 6.93722e-8, C2 1.17716e-6, C3 -9.96475e-5, D -1.28539e-6
- Globales Erwärmungspotenzial - luluc (GWP-luluc) [kg CO2 eq.]: A1-A3 1.47738e-5, C1 2.08733e-6, C2 1.82504e-5, C3 3.04888e-5, D -6.58439e-6
- Abbaupotenzial der stratosphärischen Ozonschicht (ODP) [kg CFC-11 eq.]: A1-A3 5.04058e-17, C1 8.31628e-20, C2 7.27125e-19, C3 3.15603e-17, D -1.86103e-17
- Versauerungspotenzial, kumulierte Überschreitung (AP) [Mole of H+ eq.]: A1-A3 2.89823e-5, C1 4.31043e-6, C2 8.05696e-6, C3 6.11923e-5, D -4.77365e-6
- Eutrophierungspotenzial - Süßwasser (EP-freshwater) [kg P eq.]: A1-A3 1.37181e-8, C1 6.6843e-10, C2 5.84435e-9, C3 1.4705e-8, D -4.01055e-9
- Eutrophierungspotenzial - Salzwasser (EP-marine) [kg N eq.]: A1-A3 1.2625e-5, C1 1.96097e-6, C2 3.71167e-6, C3 2.29024e-5, D -1.85659e-6
- Eutrophierungspotenzial - Land (EP-terrestrial) [Mole of N eq.]: A1-A3 0.00013923, C1 2.15611e-5, C2 4.15269e-5, C3 0.000251667, D -2.04387e-5
- Bildungspotenzial für troposphärisches Ozon (POCP) [kg NMVOC eq.]: A1-A3 3.42085e-5, C1 5.87288e-6, C2 7.23785e-6, C3 6.75744e-5, D -4.39124e-6
- Potenzial für die Verknappung abiotischer Ressourcen nicht fossile Ressourcen (ADPE) [kg Sb eq.]: A1-A3 3.15772e-9, C1 2.82717e-11, C2 2.47191e-10, C3 3.94691e-9, D -2.94365e-10
- Potenzial für die Verknappung abiotischer Ressourcen fossile Brennstoffe (ADPF) [MJ]: A1-A3 0.584817, C1 0.00430795, C2 0.0376661, C3 0.118795, D -0.019016
- Wasser-Entzugspotenzial (Benutzer) (WDP) [m³ world equiv.]: A1-A3 0.000172398, C1 1.26344e-6, C2 1.10468e-5, C3 0.00100916, D -3.5134e-5

## Use advice
Der Datensatz repräsentiert ein Cradle to Gate Inventar. Er kann verwendet werden, um die Lieferkette des jeweiligen Produktes in einer repräsentativen Weise zu charakterisieren. Die Kombination mit einzelnen Einheitenprozessen und diesem Produkt ermöglicht die Erstellung von anwenderspezifischen (Produkt-) LCAs.

## Data sources
- Waschen und Entwässern. Immer wichtiger bei der Aufbereitung von Kies, Sand und Naturstein, 2000
- Ökologische Bilanzierung von Baustoffen und Gebäuden, 2000
- Baustoff-Ökobilanz. Wirkungsabschätzung und Auswertung in der Steine-Erden-Industrie, 1999
- Documentation of data quality management
- GaBi Database Edition 2021, CUP2021.01
- GaBi database (all versions)
