# Furniersperrholz (Durchschnitt DE)

Dataset: ILCD process, EPD, representative dataset
Geography: DE
Reference year: 2021
Valid until: 2026
Classification: OEKOBAU.DAT: Holz / Holzwerkstoffe / Sperrholz
Method details: EN 15804; ILCD format
Generated by: Thünen-Institut für Holzforschung
Owner: Thünen-Institut für Holzforschung
Compliance: EN 15804+A2; EN 16485
Review: Independent external review by Dr. Frank Werner - Umwelt & Entwicklung
Amounts: rows without a unit in brackets have none in this file; such an amount is in the reference unit of its flow, which a separate flow dataset defines
copyright: true

## General comment
Weitere Informationen zur deklarierten Einheit (Zusammensetzung) und die auf Herstellerangaben beruhende Sachbilanz (In- und Output der Stoff- und Energieströme) stehen als Excel-Datei unter dem Unterpunkt Hintergrund-Bericht zum Download bereit.
Der Datensatz wurde 2021 als Aktualisierung mit gleichbleibendem Vordergrundsystem erstellt. Alle Hintergrunddaten entstammen der GaBi Professional Datenbank in der Content Version 2021.1. Die Modellierung und Berechnung der Ökobilanz basiert auf den europäischen Normen EN 15804:2012+A2:2019 und EN 16485:2014. Bei Rückfragen wenden Sie sich bitte an holzundklima@thuenen.de.

## Geography
Für Furniersperrholz übertreffen die Produktionsangaben (20.000 m³/a) der Werke (Datenerhebung von 2009 bis 2011), die an der Ökobilanzstudie teilgenommen haben, die Angaben des Statistischen Bundesamtes für das Jahr 2009 (14.961 m³/a).

## Time period
Der Datensatz basiert auf Produktionsdaten aus den Jahren 2009 bis 2011 (Vordergrundsystem).
Eine Aktualisierung des Hintergrundsystems erfolgte 2021.

## Technology and included processes
Furniersperrhölzer sind plattenförmige Holzwerkstoffe auf Basis von Furnieren aus Laub- und/oder Nadelholz. Die Furniere sind im 90° Winkel zueinander angeordnet (gesperrt) und mittels duroplastischer Bindemittel miteinander verklebt. Rundholz wird nach der Lagerung (Bewässerung) in Dämpfgruben plastifiziert und in schälfähige Abschnitte gekappt. Die Abschnitte werden zu einem endlosen Furnierband geschält und Fehlerstellen werden ausgekappt. Das Furnierband wird getrocknet und die Furnierabschnitte werden gefügt (zu größeren Elementen zusammengesetzt). Zur Herstellung der Platten werden die gefügten Furnierabschnitte mit Klebstoff beschichtet, senkrecht zueinander zusammengelegt (jede Lage senkrecht zu der darunter liegenden) und miteinander verpresst. Nachdem der Klebstoff vollständig ausgehärtet ist, werden die Platten formatiert, geschliffen, eventuell ausgebessert und verpackt.
Die Holzfeuchte des Produktes liegt bei 8%

## Technical purpose
Wegen seiner guten Maß- und Formbeständigkeit wird dieser Furniersperrholz insbesondere im Möbel- und Innenausbau für Rückwände, Verkleidungen, Füllungen, Möbelkorpusse und Arbeitsplatten verwendet. Auch im Kfz-Bau sowie als Verpackungsmaterial kommt dieser Werkstoff zum Einsatz.

## Scenarios
- energetisch (Modul D): therm.Verwertung
- stofflich (Modul D): stoffl. Verwertung
- Entsorgung Verpackung (Modul A5): Das Modul A5 enthält ausschließlich die Entsorgung der Verpackungsmaterialien

## Reference product
- Funiersperrholz: 1

## Inputs
- Erneuerbare Primärenergie als Energieträger (PERE) / Uso de energía primaria renovable excluyendo los recursos de energía primaria renovable utilizada como materia prima (PERE) [MJ]: A1 131.141, A2 10.1127, A3 19275.9, A1-A3 19417.1, A5 (Entsorgung Verpackung) 0.315859, C2 0.644031, C3 100.439, D (energetisch) 9587.3, D (stofflich) -51.7712
- Erneuerbare Primärenergie zur stofflichen Nutzung (PERM) / Uso de energía primaria renovable utilizada como materia prima (PERM) [MJ]: A1 13104.3, A2 0, A3 50.4605, A1-A3 13154.7, A5 (Entsorgung Verpackung) -50.4605, C2 0, C3 -13104.3, D (energetisch) 0, D (stofflich) 0
- Total erneuerbare Primärenergie (PERT) / Uso total de la energía primaria renovable (energía primaria y recursos de energía primaria renovable utilizada como materia prima) (PERT) [MJ]: A1 13235.4, A2 10.1127, A3 19326.4, A1-A3 32571.9, A5 (Entsorgung Verpackung) -50.1446, C2 0.644031, C3 -13003.8, D (energetisch) 9587.3, D (stofflich) -51.7712
- Nicht-erneuerbare Primärenergie als Energieträger (PENRE) / Uso de energía primaria no renovable, excluyendo los recursos de energía primaria no renovable utilizada como materia prima (PENRE) [MJ]: A1 1865.54, A2 174.449, A3 2938.26, A1-A3 4978.25, A5 (Entsorgung Verpackung) 1.6675, C2 11.5557, C3 153.986, D (energetisch) -6094.15, D (stofflich) -246.671
- Nicht-erneuerbare Primärenergie zur stofflichen Nutzung (PENRM) / Uso de la energía primaria no renovable utilizada como materia prima (PENRM) [MJ]: A1 895.253, A2 0, A3 64.332, A1-A3 959.585, A5 (Entsorgung Verpackung) -64.332, C2 0, C3 -895.253, D (energetisch) 0, D (stofflich) 0
- Total nicht erneuerbare Primärenergie (PENRT) / Uso total de la energía primaria no renovable (energía primaria y recursos de energía primaria renovable utilizada como materia prima) (PENRT) [MJ]: A1 2760.79, A2 174.449, A3 3002.6, A1-A3 5937.84, A5 (Entsorgung Verpackung) -62.6645, C2 11.5557, C3 -741.267, D (energetisch) -6094.15, D (stofflich) -246.671
- Einsatz von Sekundärstoffen (SM) / Uso de materiales secundarios (SM) [kg]: A1 0, A2 0, A3 0, A1-A3 0, A5 (Entsorgung Verpackung) 0, C2 0, C3 0, D (energetisch) 0, D (stofflich) 823.903
- Erneuerbare Sekundärbrennstoffe (RSF) / Uso de combustibles secundarios renovables (RSF) [MJ]: A1 0, A2 0, A3 0, A1-A3 0, A5 (Entsorgung Verpackung) 0, C2 0, C3 0, D (energetisch) 0, D (stofflich) 0
- Nicht erneuerbare Sekundärbrennstoffe (NRSF) / Uso de combustibles secundarios no renovables (NRSF) [MJ]: A1 0, A2 0, A3 0, A1-A3 0, A5 (Entsorgung Verpackung) 0, C2 0, C3 0, D (energetisch) 0, D (stofflich) 0
- Einsatz von Süßwasserressourcen (FW) / Uso neto de recursos de agua dulce (FW) [m3]: A1 0.553901, A2 0.00906176, A3 0.760949, A1-A3 1.32391, A5 (Entsorgung Verpackung) 0.0179665, C2 0.000737195, C3 0.0472656, D (energetisch) 1.65114, D (stofflich) -0.0283236

## Outputs
- Gefährlicher Abfall zur Deponie (HWD) / Residuos peligrosos eliminados (HWD) [kg]: A1 2.0204e-6, A2 7.33602e-9, A3 2.85013e-6, A1-A3 4.87787e-6, A5 (Entsorgung Verpackung) 2.95875e-10, C2 5.82284e-10, C3 5.59893e-8, D (energetisch) -2.4372e-6, D (stofflich) -3.57965e-7
- Entsorgter nicht gefährlicher Abfall (NHWD) / Residuos no peligrosos eliminados (NHWD) [kg]: A1 0.721763, A2 0.0280931, A3 14.1127, A1-A3 14.8626, A5 (Entsorgung Verpackung) 0.059587, C2 0.00171662, C3 0.11997, D (energetisch) 33.3113, D (stofflich) -0.0603755
- Entsorgter radioaktiver Abfall (RWD) / Residuos radiactivos eliminados (RWD) [kg]: A1 0.0209696, A2 0.000168705, A3 0.20371, A1-A3 0.224848, A5 (Entsorgung Verpackung) 8.53907e-5, C2 1.39781e-5, C3 0.0123357, D (energetisch) -0.43193, D (stofflich) -0.00539729
- Komponenten für die Wiederverwendung (CRU) / Componentes para su reutilización (CRU) [kg]: A1 0, A2 0, A3 0, A1-A3 0, A5 (Entsorgung Verpackung) 0, C2 0, C3 0, D (energetisch) 0, D (stofflich) 0
- Stoffe zum Recycling (MFR) / Materiales para el reciclaje (MFR) [kg]: A1 0, A2 0, A3 0, A1-A3 0, A5 (Entsorgung Verpackung) 0, C2 0, C3 823.903, D (energetisch) 0, D (stofflich) 0
- Stoffe für die Energierückgewinnung (MER) / Materiales para valorización energética (recuperación de energía) (MER) [kg]: A1 0, A2 0, A3 0, A1-A3 0, A5 (Entsorgung Verpackung) 2.61847, C2 0, C3 823.903, D (energetisch) 0, D (stofflich) 0
- Exportierte elektrische Energie (EEE) / Energía exportada electrica (EEE) [MJ]: A1 0, A2 0, A3 0.0197759, A1-A3 0.0197759, A5 (Entsorgung Verpackung) 10.9103, C2 0, C3 0, D (energetisch) 0, D (stofflich) 0
- Exportierte thermische Energie (EET) / Energía exportada termal (EET) [MJ]: A1 0, A2 0, A3 0.0459418, A1-A3 0.0459418, A5 (Entsorgung Verpackung) 20.1297, C2 0, C3 0, D (energetisch) 0, D (stofflich) 0

## Impact indicators
- Globales Erwärmungspotenzial - total (GWP-total) [kg CO2-Äqv.]: A1 -1137.51, A2 13.0917, A3 234.987, A1-A3 -889.431, A5 (Entsorgung Verpackung) 5.4154, C2 0.833765, C3 1258.8, D (energetisch) -229.471, D (stofflich) -18.8781
- Globales Erwärmungspotenzial - fossil (GWP-fossil) [kg CO2-Äqv.]: A1 109.156, A2 13.0917, A3 239.788, A1-A3 362.036, A5 (Entsorgung Verpackung) 0.614878, C2 0.833765, C3 12.138, D (energetisch) -229.471, D (stofflich) -18.8781
- Globales Erwärmungspotenzial - biogen (GWP-biogenic) [kg CO2-Äqv.]: A1 -1246.67, A2 0, A3 -4.80053, A1-A3 -1251.47, A5 (Entsorgung Verpackung) 4.80053, C2 0, C3 1246.67, D (energetisch) 0, D (stofflich) 0
- Abbaupotenzial der stratosphärischen Ozonschicht (ODP) [kg CFC 11-Äquiv.]: A1 5.48851e-13, A2 3.31701e-15, A3 7.5924e-12, A1-A3 8.14457e-12, A5 (Entsorgung Verpackung) 9.95058e-16, C2 1.10761e-16, C3 4.15483e-13, D (energetisch) -1.45443e-11, D (stofflich) -1.79606e-13
- Versauerungspotenzial, kumulierte Überschreitung (AP) [mol H+ eqv.]: A1 0.197712, A2 0.0757297, A3 1.77308, A1-A3 2.04652, A5 (Entsorgung Verpackung) 0.00110863, C2 0.0050336, C3 0.0174679, D (energetisch) -0.444283, D (stofflich) -0.101769
- Eutrophierungspotenzial - Süßwasser (EP-freshwater) [kg P eqv.]: A1 0.000171344, A2 2.74176e-5, A3 0.000958257, A1-A3 0.00115702, A5 (Entsorgung Verpackung) 1.51888e-7, C2 2.57352e-6, C3 5.08852e-5, D (energetisch) -0.00178345, D (stofflich) -4.62155e-5
- Eutrophierungspotenzial - Salzwasser (EP-marine) [kg N eqv.]: A1 0.201611, A2 0.0373517, A3 0.732334, A1-A3 0.971296, A5 (Entsorgung Verpackung) 0.000355818, C2 0.00246638, C3 0.00558653, D (energetisch) -0.163923, D (stofflich) -0.0483124
- Eutrophierungspotenzial - Land (EP-terrestrial) [mol N eqv.]: A1 0.873229, A2 0.413362, A3 8.54094, A1-A3 9.82753, A5 (Entsorgung Verpackung) 0.00528841, C2 0.0272986, C3 0.0583261, D (energetisch) -1.2424, D (stofflich) -0.531747
- Bildungspotenzial für troposphärisches Ozon (POCP) [kg NMVOC eqv.]: A1 0.235484, A2 0.0700566, A3 2.03041, A1-A3 2.33595, A5 (Entsorgung Verpackung) 0.00095386, C2 0.00465146, C3 0.0138795, D (energetisch) -0.407202, D (stofflich) -0.124983
- Potenzial für die Verknappung abiotischer Ressourcen – nicht fossile Ressourcen (ADPE) [kg Sb-Äqv.]: A1 1.70579e-5, A2 1.14038e-6, A3 9.19857e-5, A1-A3 0.000110184, A5 (Entsorgung Verpackung) 1.54611e-8, C2 6.60001e-8, C3 4.98206e-6, D (energetisch) -0.000181768, D (stofflich) -3.24806e-6
- Potenzial für die Verknappung abiotischer Ressourcen – fossile Brennstoffe (ADPF) [MJ]: A1 2760.63, A2 174.435, A3 2937.47, A1-A3 5872.54, A5 (Entsorgung Verpackung) 1.66668, C2 11.5403, C3 153.938, D (energetisch) -6987.77, D (stofflich) -246.641
- Wasser-Entzugspotenzial (Benutzer) (WDP) [m3 world eqv.]: A1 0.553901, A2 0.00906176, A3 0.760949, A1-A3 1.32391, A5 (Entsorgung Verpackung) 0.0179665, C2 0.000737195, C3 0.0472656, D (energetisch) 1.65114, D (stofflich) -0.0283236
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
## Use advice
Aufgrund der hohen Abdeckung bildet der Datensatz die durchschnittlichen Produktionsverhältnisse und die damit verbundenen Umweltwirkungen repräsentativ für Deutschland ab. Liegen keine herstellerspezifischen Ökobilanzergebnisse des verwendeten Produkts vor, empfiehlt sich die Verwendung dieses Durchschnittsdatensatzes.

## Data sources
- Rüter S, Diederichs S (2012) Ökobilanz Basisdaten für Bauprodukte aus Holz, Hamburg, Johann Heinrich von Thünen Institut, Institut für Holztechnologie und Holzbiologie, Abschlussbericht
- GaBi database (general)
