# EPDM Dach- und Dichtungsbahnen NOVOPROOF ® DA, FA, DA-F, DA-K, DA-S, DA-G, DA-FG, DA-SK

Dataset: ILCD process, EPD, average dataset
Geography: DE
Reference year: 2018
Valid until: 2023
Classification: OEKOBAU.DAT: Kunststoffe / Dachbahnen / Elastomer-Dachbahnen
Classification: IBUCategories: 02 Bauprodukte / Abdichtungen / Dach- und Dichtungsbahnsysteme aus Kunststoffen und Elastomeren
Method details: Dach- und Dichtungsbahnsysteme aus Kunststoffen und Elastomeren.pdf
Generated by: SaarGummi Construction Deutschland GmbH
Registration number: EPD-DUR-20180034-IBD1-DE
Owner: SaarGummi Construction Deutschland GmbH
Compliance: DIN EN 15804; ISO 14025
Review: Accredited third party review by Institut Bauen und Umwelt e. V.
Amounts: rows without a unit in brackets have none in this file; such an amount is in the reference unit of its flow, which a separate flow dataset defines
copyright: true
licenseType: Free of charge for all users and uses
accessRestrictions: None

## General comment
NovoProof®-Dichtungssysteme bestehen aus voll vernetzten Elastomerbahnen auf Basis von EPDM (Ethylen-Propylen-Dien-Monomer-Kautschuk).

Die NovoProof® Familie umfasst vielfältige Varianten:
NovoProof® FA
Homogene EPDM-Bauwerksdichtung
NovoProof® DA
Homogene Dachabdichtungsbahn
NovoProof® DA-F
Flammhemmende Dachabdichtungsbahn
NovoProof® DA-K
Flammhemmende Dachabdichtungsbahn
mit unterseitiger Vlieskaschierung
NovoProof® DA-S
Flammhemmende Dachabdichtungsbahn
mit unterseitiger Dickvlieskaschierung
NovoProof® DA-G
Hellgraue, flammhemmende Dachabdichtungsbahn mit
unterseitiger Vlieskaschierung
NovoProof® DA-FG
Flammhemmende Dachabdichtungsbahn
mit unterseitiger Glasgewebekaschierung
NovoProof® DA-SK
Flammhemmende Dachabdichtungsbahn
mit unterseitiger Glasgewebekaschierung und vollflächiger Selbstklebeschicht

Der Durchschnitt über diese Produkte wurde auf
Grundlage der Verkaufszahlen in 2017 gebildet.
Für das Inverkehrbringen des Produkts in der
EU/EFTA gilt die Verordnung (EU) Nr. 305/2011
/CPR/. Das Produkt benötigt eine Leistungserklärung
unter Berücksichtigung der
- /DIN EN 13956:2012/ - Abdichtungsbahnen bzw. der
- /DIN EN 13859-2:2014/ - Abdichtungsbahnen
- und die CE-Kennzeichnung

## Technology and included processes
Grundlage der Produktion von Gummimischungen als Werkstoff für die Herstellung von EPDM-Dach- und Dichtungsbahnen ist eine Rezeptur, die die eingesetzten Rohstoffe qualitativ als auch quantitativ festschreibt. Der Herstellprozess in Wadern-Büschfeld ist ein klassischer Batchprozess. Die benötigten Rohstoffe werden gemäß der Rezepturrechner gesteuert in automatische Waagen dosiert und über geeignete Fördereinrichtungen in einem Innenmischer bereitgestellt. Das Ergebnis des Mischprozesses ist eine homogene Rohgummimischung. Produktionsbegleitend werden die Qualitätsmerkmale wie zum Beispiel Festigkeit, Dehnung, Härte, Dichte, Rheometer-Kurve an allen fertigen Rohmischungen geprüft. Die so hergestellte Rohgummimischung wird im nächsten Schritt auf einer Roller-Head-Anlage weiterverarbeitet. Der kontinuierliche Produktionsprozess beginnt mit der Extrusion, dabei wird das Material mithilfe von Breitspritzkopf und Kalander auf die gewünschte Dicke (0,6 – 2,5 mm) und Breite (max. 1400 mm) gebracht. Danach folgt, je nach Produkt, die Zuführung von Thermofast-Fügebändern und ggf. Vliesen bei den Produkten DA-K, DA-G und DA-S oder Glasgewebe bei den Produkten DA-FG und DA-SK mit anschließender Prägung der Oberfläche. Im weiteren Prozessverlauf wird die so geformte Bahn in einem Heißluftkanal in einem kontinuierlichen Prozess vulkanisiert (vernetzt), wodurch eine dauerhafte Verbindung zwischen der EPDMSchicht und dem Thermofast®-Fügerand erreicht wird. Nach der Vulkanisation wird die Bahn über eine Abkühlstrecke auf Raumtemperatur gebracht und als Rollenware aufgewickelt. Bei Bedarf können die Bahnen vorkonfektioniert werden. Die Entwicklung und Herstellung erfolgt gemäß den Anforderungen des Qualitätsmanagementsystems nach /DIN EN ISO 9001:2008/. Die Qualität der fertigen Produkte wird regelmäßig durch die werkseigene Produktionskontrolle und durch externe Qualitätsüberwachungen gesichert.
Technische Daten:
Für die technischen Daten gelten die Angaben in der Leistungserklärung.

NA = Daten können beim Hersteller angefragt werden.
n.r. = nicht relevant

Leistungswerte des Produkts entsprechend der Leistungserklärung in Bezug auf dessen Wesentliche Merkmale gemäß /DIN EN 13956:2012/ -Abdichtungsbahnen/DIN EN 13859-2:2014/ -Abdichtungsbahnen
Deklarierte Einheit:
Die deklarierte Einheit ist 1 m² des nach der Produktionsmenge gewichteten Mittels für die mechanisch befestigten, unter Auflast befestigten oder verklebten, mittels Heißluft verschweißten NovoProof Dach- und Dichtungsbahnen (DA, DA-F, DA-K, DA-G,
DA-S, DA-FG, DA-SK, FA), inklusive Verpackungsmaterialien und
Befestigungsmaterialien.

## Technical purpose
Die NovoProof®-Flächendichtsysteme eigenen sich für
alle einlagigen Verlegesysteme auf Flachdächern.
Für die Verwendung gelten die jeweiligen nationalen
Bestimmungen.

NovoProof® DA wird als vorgefertigte Dichtungsplane
geliefert und unter Auflast (Kies, Platten) oder unter
Gründächern verlegt.

NovoProof® DA-F wird als vorgefertigte Dichtungsplane
geliefert. Durch die Flammhemmende Mischung ist eine Auflast nicht zwingend notwendig.

NovoProof® DA-K/S/G/FG-Bahnen werden ohne Auflast mechanisch befestigt oder teilflächig verklebt verlegt.
NovoProof® DA SK Bahnen werden ohne Auflast vollflächig verklebt.
NovoProof® FA wird zur dauerelastischen, luft-und
wasserdichten Abdichtung von Fenster- und
Fassadenanschlüsse eingesetzt. Die Bahn wird dabei
mit der Außenwand und/oder Fenster verklebt.

## Scenarios
- S1: Thermische Verwertung (C3-2 & D2)
- S2: Szenario 2

## Reference product
- EPDM Dach- und Dichtungsbahnen NOVOPROOF DA, FA, DA-F, DA-K, DA-S, DA-G, DA-FG, DA-SK: 1

## Inputs
- Erneuerbare Primärenergie als Energieträger (PERE) [MJ]: A1-A3 9.6128, A4 0.0245, A5 0.9242, C2 0.00493, C3 (S1) 0.0633, C3 (S2) 0.0848, D (S1) -2.63, D (S2) -5.76
- Erneuerbare Primärenergie zur stofflichen Nutzung (PERM) [MJ]: A1-A3 0.0972, A4 0, A5 -0.0972, C2 0, C3 (S1) 0, C3 (S2) 0, D (S1) 0, D (S2) 0
- Total erneuerbare Primärenergie (PERT) [MJ]: A1-A3 9.71, A4 0.0245, A5 0.827, C2 0.00493, C3 (S1) 0.0633, C3 (S2) 0.0848, D (S1) -2.63, D (S2) -5.76
- Nicht-erneuerbare Primärenergie als Energieträger (PENRE) [MJ]: A1-A3 88.84, A4 0.488, A5 14.1, C2 0.0982, C3 (S1) 0.186, C3 (S2) 25.361, D (S1) -78.2, D (S2) -29.1
- Nicht-erneuerbare Primärenergie zur stofflichen Nutzung (PENRM) [MJ]: A1-A3 26.16, A4 0, A5 -1.5, C2 0, C3 (S1) -24.66, C3 (S2) -24.66, D (S1) 0, D (S2) 0
- Total nicht erneuerbare Primärenergie (PENRT) [MJ]: A1-A3 115, A4 0.488, A5 12.6, C2 0.0982, C3 (S1) -24.474, C3 (S2) 0.701, D (S1) -78.2, D (S2) -29.1
- Einsatz von Sekundärstoffen (SM) [kg]: A1-A3 0, A4 0, A5 0, C2 0, C3 (S1) 0, C3 (S2) 0, D (S1) 0.8, D (S2) 0
- Erneuerbare Sekundärbrennstoffe (RSF) [MJ]: A1-A3 0, A4 0, A5 0, C2 0, C3 (S1) 0, C3 (S2) 0, D (S1) 0, D (S2) 0
- Nicht erneuerbare Sekundärbrennstoffe (NRSF) [MJ]: A1-A3 0, A4 0, A5 0, C2 0, C3 (S1) 0, C3 (S2) 0, D (S1) 0, D (S2) 0
- Einsatz von Süßwasserressourcen (FW) [m^3]: A1-A3 0.535, A4 4.53e-5, A5 0.0301, C2 9.12e-6, C3 (S1) 9.03e-5, C3 (S2) 0.00843, D (S1) -0.00935, D (S2) 0

## Outputs
- Gefährlicher Abfall zur Deponie (HWD) [kg]: A1-A3 2.51e-7, A4 2.56e-8, A5 1.59e-8, C2 5.15e-9, C3 (S1) 7.53e-11, C3 (S2) 1.1e-9, D (S1) -3.82e-7, D (S2) -0.00392
- Entsorgter nicht gefährlicher Abfall (NHWD) [kg]: A1-A3 0.046, A4 3.73e-5, A5 0.00595, C2 7.5e-6, C3 (S1) 0.000122, C3 (S2) 0.0206, D (S1) -0.0322, D (S2) 0
- Entsorgter radioaktiver Abfall (RWD) [kg]: A1-A3 0.00209, A4 6.66e-7, A5 0.000257, C2 1.34e-7, C3 (S1) 2.89e-5, C3 (S2) 3.7e-5, D (S1) -0.000621, D (S2) 0
- Komponenten für die Wiederverwendung (CRU) [kg]: A1-A3 0, A4 0, A5 0, C2 0, C3 (S1) 0, C3 (S2) 0, D (S1) 0, D (S2) 0
- Stoffe zum Recycling (MFR) [kg]: A1-A3 0, A4 0, A5 0, C2 0, C3 (S1) 1.59, C3 (S2) 0, D (S1) 0, D (S2) 0
- Stoffe für die Energierückgewinnung (MER) [kg]: A1-A3 0, A4 0, A5 0, C2 0, C3 (S1) 0, C3 (S2) 0, D (S1) 0, D (S2) 0
- Exportierte elektrische Energie (EEE) [MJ]: A1-A3 0, A4 0, A5 0.263476, C2 0, C3 (S1) 0, C3 (S2) 5.93, D (S1) 0, D (S2) 0
- Exportierte thermische Energie (EET) [MJ]: A1-A3 0, A4 0, A5 0.61069, C2 0, C3 (S1) 0, C3 (S2) 14.31, D (S1) 0, D (S2) 0

## Impact indicators
- Globales Erwärmungspotenzial (GWP) [kg CO_(2)-Äq.]: A1-A3 4.79, A4 0.0352, A5 0.69, C2 0.00708, C3 (S1) 0.0106, C3 (S2) 3.16, D (S1) -2.82, D (S2) -2.03
- Abbau Potential der stratosphärischen Ozonschicht (ODP) [kg CFC11-Äq.]: A1-A3 2.91e-7, A4 1.18e-14, A5 1.65e-8, C2 2.38e-15, C3 (S1) 4.7e-13, C3 (S2) 8.98e-10, D (S1) -3.34e-11, D (S2) -3.97e-12
- Versauerungspotenzial von Boden und Wasser (AP) [kg SO_(2)-Äq.]: A1-A3 0.00986, A4 0.000147, A5 0.00109, C2 4.31e-5, C3 (S1) 3.03e-5, C3 (S2) 0.000245, D (S1) -0.0036, D (S2) -0.00221
- Eutrophierungspotenzial (EP) [kg PO_(4)^(3)-Äq.]: A1-A3 0.00117, A4 3.66e-5, A5 0.000119, C2 1.09e-5, C3 (S1) 2.74e-6, C3 (S2) 5.46e-5, D (S1) -0.000434, D (S2) -0.000349
- Bildungspotential für troposphärisches Ozon (POCP) [kg Ethen-Äq.]: A1-A3 0.000936, A4 -5.4e-5, A5 0.000125, C2 -1.92e-5, C3 (S1) 1.93e-6, C3 (S2) 2.24e-5, D (S1) -0.000525, D (S2) -0.000226
- Potenzial für den abiotischen Abbau nicht fossiler Ressourcen (ADPE) [kg Sb-Äq.]: A1-A3 1.53e-5, A4 2.83e-9, A5 3.18e-6, C2 5.7e-10, C3 (S1) 4.23e-9, C3 (S2) -4.36e-8, D (S1) -2.09e-6, D (S2) -5.75e-7
- Potenzial für den abiotischen Abbau fossiler Brennstoffe (ADPF) [MJ]: A1-A3 110, A4 0.486, A5 11.9, C2 0.0978, C3 (S1) 0.113, C3 (S2) 0.598, D (S1) -76.6, D (S2) -26

## Use advice
Gültigkeitsbereich:
Die vorliegende EPD bezieht sich auf den gesamten Lebensweg einer Durchschnittsdach- und dichtungsbahn von SaarGummi Construction Deutschland der Varianten DA, FA, DA-F, DA-K, DA-G, DA-S, DA-FG und DA-SK. Die unterschiedlichen technischen Eigenschaften werden in Kapitel 2.3 dargestellt.
Die Produkte werden am Produktionsstandort in Wadern-Büschfeld, Deutschland, produziert.
Systemgrenze:
Typ der EPD: Wiege bis Werkstor – mit Optionen

Module A1-A3
Die Herstellungsphase enthält die Produktion der notwendigen Rohstoffe inklusive aller Vorketten sowie der notwendigen Beschaffungstransporte. Für die Produktion der deklarierten Einheit wurden auch die hierfür notwendige elektrische und thermische Energie sowie Hilfs- und Betriebsstoffe inklusive deren Vorketten betrachtet. Anfallende Abfälle und Abwässer werden bis zu deren vollständigen Beseitigung berücksichtigt.

Modul A4
Dieses Modul betrachtet die ökologischen Auswirkungen des Transportes der deklarierten Einheit vom Werkstor bis zur Baustelle.

Modul A5
Hier wurden die entstehenden Umweltwirkungen bei der Entsorgung der Produktverpackungsmaterialien berücksichtigt. In diesem wird auch ein durchschnittlicher Installationsaufwand (Verschweißen, mechanische Befestigung, Verklebung) betrachtet.

Module C2-3
Die Module beinhalten die Umweltwirkungen der Abfallbehandlung am Ende der Produktnutzung sowie die zugehörigen Transporte. In Szenario 1 wird hier der Aufwand für das Aufbereiten, in Szenario 2 der Aufwand für die Verbrennung der Dichtungsbahn modelliert.

Modul D
Die aus der Abfallbehandlung (aus A5 und C3) resultierenden Wertströme, die potenziell als energetischer (Verbrennung mit
Energierückgewinnung) oder werkstofflicher Input (Recycling) für ein nachgelagertes Produktsystem dienen können, werden hier als Nutzen außerhalb der Systemgrenzen ausgewiesen.

## Data sources
- GaBi Database (all versions)
- GaBi database SP35 2018
