# Gips (CaSO4-Beta-Halbhydrat); grinded and purified product

Dataset: ILCD process, EPD, generic dataset
Geography: DE
Reference year: 2021
Valid until: 2022
Classification: oekobau.dat: Mineralische Baustoffe / Bindemittel / Gips
Owner: Sphera Solutions GmbH
Compliance: EN 15804+A2
Review: Dependent internal review by Sphera Solutions GmbH; Independent external review by GaBi user forum
Amounts: rows without a unit in brackets have none in this file; such an amount is in the reference unit of its flow, which a separate flow dataset defines
copyright: true
licenseType: Free of charge for all users and uses
accessRestrictions: The license conditions as stated on https://www.oekobaudat.de/ apply.
accessRestrictions: Es gelten die Lizenzbedingungen wie sie auf https://www.oekobaudat.de/ genannt sind.

## General comment
Dieser Datensatz wurde nach dem European Standard EN 15804+A2 für Nachhaltiges Bauen modelliert. Ergebnisse werden in Modulen abgebildet, die den strukturierten Ausdruck von Ergebnissen über den gesamten Lebenszyklus zulassen.

## Geography
Der Datensatz bildet die länderspezifische Situation in Deutschland ab. Dabei werden Haupttechnologien, spezifische regionale Charakteristiken und ggf. Importstatistiken berücksichtigt.

## Time period
Jährlicher Durchschnitt

## Technology and included processes
Beta-Hemihydrat-Gips entsteht durch Kalzinierung von dehydriertem Kalziumsulfat (zwei Moleküle pro Molekül Calciumsulfat binden chemisch Wasser) zu Halbhydrat (0,5 Moleküle pro Molekül Calciumsulfat binden chemisch Wasser) in Dampf-Autoklaven/Dampfkochtöpfe. In Deutschland wird Beta-Halbhydrate gewonnen durch dehydriertes Kalziumsulfat, das während der Rauchgasentschwefelung in Steinkohle-Kraftwerken anfällt hergestellt. Ein Drittel des dehydrierten Kalziumsulfats wird mit Zügen über längere Strecken transportiert. Um die Folgen der Herstellung des dehydrierten Kalziumsulfats aus Kraftwerken einzuschätzen, wird der tatsächliche Stromverbrauch für die Dehydrierung und Reinigung des Gipsschlamms berücksichtigt.

In der Entsorgungsphase wird ein manueller Rückbau (lastenfrei) in Modul C1 angenommen. Der Transport in Modul C2 zur Deponie erfolgt mit einem LKW (50km). In C3 wird, sofern relevant, eine Verpackung mit PE-Folie berücksichtigt (z.B. bei Mineralfaserprodukten, 0,0125 kg Folie je kg entsorgtes Material). In Modul C4 werden dem Produkt entsprechende, durchschnittliche Deponieemissionen (Bezugsraum Deutschland) ausgewiesen. Die Nutzung von Deponiegas wird nicht berücksichtigt.

## Technical purpose
Dieses Produkt kann im Baubereich verwendet werden.

## Safety margin
10 %. Produktsystem weitgehend vollständig abgebildet. Gute technologische, zeitliche und geographische Repräsentativität.

## Reference product
- Gips (CaSO4-Beta-Halbhydrat): 1

## Inputs
- Erneuerbare Primärenergie als Energieträger (PERE) [MJ]: A1-A3 0.17062, C2 0.00250352, C4 0.0298181
- Erneuerbare Primärenergie zur stofflichen Nutzung (PERM) [MJ]: A1-A3 0, C2 0, C4 0
- Total erneuerbare Primärenergie (PERT) [MJ]: A1-A3 0.17062, C2 0.00250352, C4 0.0298181
- Nicht-erneuerbare Primärenergie als Energieträger (PENRE) [MJ]: A1-A3 1.61582, C2 0.0431358, C4 0.220791
- Nicht-erneuerbare Primärenergie zur stofflichen Nutzung (PENRM) [MJ]: A1-A3 0, C2 0, C4 0
- Total nicht-erneuerbare Primärenergie (PENRT) [MJ]: A1-A3 1.61582, C2 0.0431358, C4 0.220791
- Einsatz von Sekundärstoffen (SM) [kg]: A1-A3 0, C2 0, C4 0
- Erneuerbare Sekundärbrennstoffe (SF) [MJ]: A1-A3 0, C2 0, C4 0
- Nicht erneuerbare Sekundärbrennstoffe (NRSF) [MJ]: A1-A3 0, C2 0, C4 0
- Nettoeinsatz von Süßwasserressourcen (FW) [m3]: A1-A3 0.00015533, C2 2.22501e-6, C4 5.43855e-5

## Outputs
- Gefährlicher Abfall zur Deponie (HWD) [kg]: A1-A3 3.87475e-10, C2 1.80294e-12, C4 2.34898e-11
- Entsorgter nicht gefährlicher Abfall (NHWD) [kg]: A1-A3 0.000728751, C2 6.9631e-6, C4 1.10108
- Entsorgter radioaktiver Abfall (RWD) [kg]: A1-A3 1.84394e-5, C2 4.13944e-8, C4 2.27928e-6
- Komponenten für die Wiederverwendung (CRU) [kg]: A1-A3 0, C2 0, C4 0
- Stoffe zum Recycling (MFR) [kg]: A1-A3 0, C2 0, C4 0
- Stoffe für die Energierückgewinnung (MER) [kg]: A1-A3 0, C2 0, C4 0
- Exportierte elektrische Energie (EEE) [MJ]: A1-A3 0, C2 0, C4 0
- Exportierte thermische Energie (EET) [MJ]: A1-A3 0, C2 0, C4 0

## Impact indicators
- Globales Erwärmungspotenzial - total (GWP-total) [kg CO2 eq.]: A1-A3 0.103949, C2 0.00328302, C4 0.0162553
- Globales Erwärmungspotenzial - fossil (GWP-fossil) [kg CO2 eq.]: A1-A3 0.103449, C2 0.00326065, C4 0.0166455
- Globales Erwärmungspotenzial - biogen (GWP-biogenic) [kg CO2 eq.]: A1-A3 0.000445058, C2 1.47059e-6, C4 -0.000439177
- Globales Erwärmungspotenzial - luluc (GWP-luluc) [kg CO2 eq.]: A1-A3 5.52273e-5, C2 2.08997e-5, C4 4.89387e-5
- Abbaupotenzial der stratosphärischen Ozonschicht (ODP) [kg CFC-11 eq.]: A1-A3 7.36272e-16, C2 8.3268e-19, C4 6.53135e-17
- Versauerungspotenzial, kumulierte Überschreitung (AP) [Mole of H+ eq.]: A1-A3 9.98445e-5, C2 1.02241e-5, C4 0.000118483
- Eutrophierungspotenzial - Süßwasser (EP-freshwater) [kg P eq.]: A1-A3 8.77262e-8, C2 6.69276e-9, C4 2.80155e-8
- Eutrophierungspotenzial - Salzwasser (EP-marine) [kg N eq.]: A1-A3 3.97797e-5, C2 4.77293e-6, C4 3.07591e-5
- Eutrophierungspotenzial - Land (EP-terrestrial) [Mole of N eq.]: A1-A3 0.000436334, C2 5.32938e-5, C4 0.00033794
- Bildungspotenzial für troposphärisches Ozon (POCP) [kg NMVOC eq.]: A1-A3 0.000112573, C2 9.20431e-6, C4 9.32028e-5
- Potenzial für die Verknappung abiotischer Ressourcen nicht fossile Ressourcen (ADPE) [kg Sb eq.]: A1-A3 1.41522e-8, C2 2.83075e-10, C4 1.57775e-9
- Potenzial für die Verknappung abiotischer Ressourcen fossile Brennstoffe (ADPF) [MJ]: A1-A3 1.61572, C2 0.043134, C4 0.220674
- Wasser-Entzugspotenzial (Benutzer) (WDP) [m³ world equiv.]: A1-A3 0.00395639, C2 1.26504e-5, C4 0.00178142

## Use advice
Der Datensatz repräsentiert ein Cradle to Gate Inventar. Er kann verwendet werden, um die Lieferkette des jeweiligen Produktes in einer repräsentativen Weise zu charakterisieren. Die Kombination mit einzelnen Einheitenprozessen und diesem Produkt ermöglicht die Erstellung von anwenderspezifischen (Produkt-) LCAs.

## Data sources
- Gips-Datenbuch, 2006
- Documentation of data quality management
- GaBi Database Edition 2021, CUP2021.01
- GaBi database (all versions)
