# Tor - Hörmann KG Brockhagen - Industrie-Sectionaltore aus Polyurethan

Dataset: ILCD process, EPD, specific dataset
Geography: DE
Reference year: 2020
Valid until: 2026
Classification: OEKOBAU.DAT: Komponenten von Fenstern und Vorhangfassaden / Türen und Tore / Kunststoff
Synonyms: Industrietore aus Polyurethan, Polyurethan-Sectionaltore
Method details: Produktkategorieregeln Teil A; Produktkategorieregeln Teil B – für Türen und Tore
Generated by: ift Rosenheim
Registration number: EPD-STPU-0.3.2
Owner: Hörmann KG Brockhagen
Compliance: EN 15804+A2
Review: Independent external review by Susanne Volz
Amounts: rows without a unit in brackets have none in this file; such an amount is in the reference unit of its flow, which a separate flow dataset defines
copyright: true
licenseType: Free of charge for all users and uses
accessRestrictions: None

## General comment
Dieser Datensatz beinhaltet die Ergebnisse für die Module A1-A3 sowie die Module A4, A5, B2, B3, B6, C1, C2, C3, C4, D gemäß EN 15804. Ein Vergleich mit anderen Produkten ist nur mit einer vergleichbaren Anwendung im Gebäude zulässig. Grundsätzlich ist eine Gegenüberstellung oder die Bewertung von EPD Daten nur möglich, wenn alle zu vergleichenden Datensätze nach EN 15804 erstellt wurden und der Gebäudekontext, bzw. die produktspezifischen Leistungsmerkmale berücksichtigt werden.

## Geography
Dieser Datensatz repräsentiert die Situation des Unternehmens Hörmann KG Brockhagen in 33803 Steinhagen, im Hinblick auf die wichtigsten Technologien und die gesetzlichen Rahmenbedingungen.

## Time period
jährlicher Durchschnitt

## Technology and included processes
Die Ökobilanzergebnisse umfassen die Lebenszyklusstadien der Herstellung der Vorprodukte bis hin zur Rohstoffgewinnung und Verarbeitungsprozesse von als Input dienenden Sekundärstoffen (z.B. Recyclingprozesse), deren Transporte zum Werk sowie die Produktion selbst, einschließlich der Bereitstellung von allen Hilfs- und Betriebsstoffen, Energie, sowie die vollständige Abfallbehandlung oder die Deponierung der Restabfälle während des Stadiums der Produktion. Die Module A1, A2 und A3 sind hier als ein aggregiertes Modul A1-A3 ausgewiesen. Falls für diesen Datensatz weitere Module berechnet wurden, sind diese separat zu finden und können für eine Betrachtung des gesamten Lebenszyklus zusammengeführt werden.

## Technical purpose
Hörmann Sectionaltore für die Außen- (als auch Innenanwendung) als platzsparender Abschluss für Gebäudeöffnungen und Zufahrten im industriellen, gewerblichen sowie privaten Bereich

## Reference product
- Tor - Hörmann KG Brockhagen - Industrie-Sectionaltore aus Polyurethan: 1

## Inputs
- Frischwasserverbrauch (FW) [m3]: A1-A3 0.16, A4 0.00342, A5 0.00886, B2 0.5, B3 0.0191, B4 0, B5 0, B6 0.74, B7 0, C1 0, C2 3.94e-5, C3 0.0144, C4 5.9e-5, D -0.0732
- Nicht-erneuerbare Primärenergie als Energieträger (PENRE) [MJ]: A1-A3 800.57, A4 65.5, A5 0.91, B2 14, B3 195, B4 0, B5 0, B6 1660, B7 0, C1 0, C2 0.75, C3 2.57, C4 0.24, D -426
- Nicht-erneuerbare Primärenergie zur stofflichen Nutzung (PENRM) [MJ]: A1-A3 52.44, A4 0, A5 -1.49, B2 0, B3 0, B4 0, B5 0, B6 0, B7 0, C1 0, C2 0, C3 -48.41, C4 0, D -2.55
- Verbrauch nicht erneuerbarer Sekundärbrennstoffe (NRSF) [MJ]: A1-A3 2.52e-30, A4 0, A5 0, B2 0, B3 0, B4 0, B5 0, B6 0, B7 0, C1 0, C2 0, C3 0, C4 0, D 0
- Erneuerbare Primärenergie als Energieträger (PERE) [MJ]: A1-A3 177.8, A4 3.91, A5 0.21, B2 0.41, B3 12, B4 0, B5 0, B6 763, B7 0, C1 0, C2 0.0449, C3 0.98, C4 0.0322, D -59.5
- Erneuerbare Primärenergie zur stofflichen Nutzung (PERM) [MJ]: A1-A3 31.1, A4 0, A5 -31.1, B2 0, B3 0, B4 0, B5 0, B6 0, B7 0, C1 0, C2 0, C3 -48.41, C4 0, D 0
- Erneuerbare Sekundärbrennstoffe (RSF) [MJ]: A1-A3 1.66e-31, A4 0, A5 0, B2 0, B3 0, B4 0, B5 0, B6 0, B7 0, C1 0, C2 0, C3 0, C4 0, D 0
- Einsatz von Sekundärstoffen (SM) [kg]: A1-A3 0.04, A4 0, A5 0, B2 0, B3 0, B4 0, B5 0, B6 0, B7 0, C1 0, C2 0, C3 0, C4 0, D 0
- Total nicht erneuerbare Primärenergie (PENRT) [MJ]: A1-A3 853.01, A4 65.5, A5 -0.58, B2 14, B3 195, B4 0, B5 0, B6 1660, B7 0, C1 0, C2 0.75, C3 -45.84, C4 0.24, D -428.55
- Gesamtverbrauch von erneuerbarer Primärenergie (PERT) [MJ]: A1-A3 208.9, A4 3.91, A5 -30.89, B2 0.41, B3 12, B4 0, B5 0, B6 763, B7 0, C1 0, C2 0.0449, C3 -47.43, C4 0.0322, D -59.5

## Outputs
- Komponenten für die Wiederverwendung (CRU) [kg]: A1-A3 0, A4 0, A5 0, B2 0, B3 0, B4 0, B5 0, B6 0, B7 0, C1 0, C2 0, C3 0, C4 0, D 0
- Exportierte elektrische Energie (EEE) [MJ]: A1-A3 0.63, A4 0, A5 4.47, B2 0, B3 1.65, B4 0, B5 0, B6 0, B7 0, C1 0, C2 0, C3 9.77, C4 0, D 0
- Exportierte thermische Energie (EET) [MJ]: A1-A3 1.46, A4 0, A5 10.5, B2 0, B3 0.57, B4 0, B5 0, B6 0, B7 0, C1 0, C2 0, C3 22.4, C4 0, D 0
- Gefährlicher Abfall zur Beseitigung (HWD) [kg]: A1-A3 1e-6, A4 2.76e-9, A5 2.04e-10, B2 5.35e-10, B3 1.31e-7, B4 0, B5 0, B6 4.38e-7, B7 0, C1 0, C2 3.18e-11, C3 6.97e-10, C4 2.54e-11, D -4.61e-8
- Stoff für die Energierückgewinnung (MER) [kg]: A1-A3 0, A4 0, A5 0, B2 0, B3 0, B4 0, B5 0, B6 0, B7 0, C1 0, C2 0, C3 2.58, C4 0, D 0
- Stoffe zum Recycling (MFR) [kg]: A1-A3 1.65, A4 0, A5 0, B2 0, B3 8.09, B4 0, B5 0, B6 0, B7 0, C1 0, C2 0, C3 20.1, C4 0, D 0
- Ungefährlicher Abfall zur Beseitigung (NHWD) [kg]: A1-A3 2.1, A4 0.0111, A5 0.0325, B2 0.15, B3 0.49, B4 0, B5 0, B6 1.17, B7 0, C1 0, C2 0.000127, C3 0.14, C4 1.19, D -1.32
- Entsorgter radioaktiver Abfall (RWD) [kg]: A1-A3 0.0133, A4 8.01e-5, A5 2.58e-5, B2 7.59e-5, B3 0.00149, B4 0, B5 0, B6 0.25, B7 0, C1 0, C2 9.21e-7, C3 0.00012, C4 2.51e-6, D -0.00757

## Impact indicators
- Potenzial für die Verknappung abiotischer Ressourcen – nicht fossile Ressourcen (ADPE) [kg Sb-Äqv.]: A1-A3 0.00122, A4 4.54e-7, A5 1.23e-8, B2 5.39e-8, B3 2.05e-5, B4 0, B5 0, B6 2.74e-5, B7 0, C1 0, C2 5.22e-9, C3 5.15e-8, C4 1.7e-9, D -0.000615
- Potenzial für die Verknappung abiotischer Ressourcen – fossile Brennstoffe (ADPF) [MJ]: A1-A3 797.78, A4 65.4, A5 0.91, B2 14, B3 194, B4 0, B5 0, B6 1650, B7 0, C1 0, C2 0.75, C3 2.57, C4 0.24, D -460
- Versauerungspotenzial, kumulierte Überschreitung (AP) [mol H+ eqv.]: A1-A3 0.16, A4 0.00714, A5 0.000729, B2 0.000852, B3 0.0503, B4 0, B5 0, B6 0.19, B7 0, C1 0, C2 6.6e-5, C3 0.00184, C4 0.000128, D -0.12
- Eutrophierungspotenzial - Süßwasser (EP-freshwater) [kg P eqv.]: A1-A3 0.000244, A4 1.02e-5, A5 1.23e-7, B2 6.54e-6, B3 1.61e-5, B4 0, B5 0, B6 0.00025, B7 0, C1 0, C2 1.18e-7, C3 5.52e-7, C4 3.02e-8, D -4.58e-5
- Eutrophierungspotenzial - Salzwasser (EP-marine) [kg N eqv.]: A1-A3 0.0378, A4 0.00281, A5 0.000213, B2 0.00017, B3 0.0112, B4 0, B5 0, B6 0.046, B7 0, C1 0, C2 2.39e-5, C3 0.000576, C4 3.33e-5, D -0.0261
- Eutrophierungspotenzial - Land (EP-terrestrial) [mol N eqv.]: A1-A3 0.41, A4 0.0323, A5 0.00347, B2 0.00163, B3 0.12, B4 0, B5 0, B6 0.48, B7 0, C1 0, C2 0.000279, C3 0.00866, C4 0.000366, D -0.28
- Globales Erwärmungspotenzial - total (GWP-total) [kg CO2-Äqv.]: A1-A3 61.23, A4 4.98, A5 3.61, B2 0.36, B3 20.4, B4 0, B5 0, B6 93.9, B7 0, C1 0, C2 0.057, C3 5.92, C4 0.0175, D -46
- Globales Erwärmungspotenzial - fossil (GWP-fossil) [kg CO2-Äqv.]: A1-A3 64.47, A4 4.95, A5 0.23, B2 0.35, B3 20.4, B4 0, B5 0, B6 93, B7 0, C1 0, C2 0.0566, C3 5.91, C4 0.018, D -45.9
- Globales Erwärmungspotenzial - biogen (GWP-biogenic) [kg CO2-Äqv.]: A1-A3 -3.9, A4 0.00295, A5 3.38, B2 0.00738, B3 0.0203, B4 0, B5 0, B6 0.79, B7 0, C1 0, C2 3.39e-5, C3 0.00149, C4 -0.000523, D -0.0754
- Globales Erwärmungspotenzial - luluc (GWP-luluc) [kg CO2-Äqv.]: A1-A3 0.0401, A4 0.0316, A5 7.17e-5, B2 0.000146, B3 0.00842, B4 0, B5 0, B6 0.13, B7 0, C1 0, C2 0.000364, C3 0.000333, C4 5.29e-5, D -0.0249
- Abbaupotenzial der stratosphärischen Ozonschicht (ODP) [kg CFC 11-Äquiv.]: A1-A3 9.4e-11, A4 1.75e-15, A5 8.62e-16, B2 1.52e-15, B3 1.54e-11, B4 0, B5 0, B6 2.23e-12, B7 0, C1 0, C2 2.01e-17, C3 4.02e-15, C4 7e-17, D -4.31e-12
- Bildungspotenzial für troposphärisches Ozon (POCP) [kg NMVOC eqv.]: A1-A3 0.12, A4 0.00644, A5 0.000558, B2 0.000586, B3 0.037, B4 0, B5 0, B6 0.13, B7 0, C1 0, C2 5.83e-5, C3 0.0015, C4 0.000101, D -0.0827
- Wasser-Entzugspotenzial (Benutzer) (WDP) [m3 world eqv.]: A1-A3 0.76, A4 0.0193, A5 0.38, B2 21.5, B3 -0.059, B4 0, B5 0, B6 14.9, B7 0, C1 0, C2 0.000222, C3 0.6, C4 0.00193, D -0.23
- Potenzielles Auftreten von Krankheiten aufgrund von Feinstaubemissionen (PM) [disease incidence]: A1-A3 2.31e-6, A4 4.15e-8, A5 3.91e-9, B2 7.06e-9, B3 6.67e-7, B4 0, B5 0, B6 1.63e-6, B7 0, C1 0, C2 4.26e-10, C3 1.07e-8, C4 1.59e-9, D -1.49e-6
- Potenzielle Wirkung durch Exposition des Menschen mit U235 (IRP) [kBq U235 eqv.]: A1-A3 1.81, A4 0.0079, A5 0.00238, B2 0.00955, B3 0.14, B4 0, B5 0, B6 40.5, B7 0, C1 0, C2 9.08e-5, C3 0.0111, C4 0.000264, D -0.88
- Potenzielle Toxizitätsvergleichseinheit für Ökosysteme (ETP-fw) [CTUe]: A1-A3 267.53, A4 52.8, A5 0.36, B2 12.7, B3 48, B4 0, B5 0, B6 696, B7 0, C1 0, C2 0.61, C3 0.96, C4 0.14, D -175
- Potenzielle Toxizitätsvergleichseinheit für den Menschen - kanzerogene Wirkung (HTP-c) [CTUh]: A1-A3 2.69e-7, A4 1.06e-9, A5 2.55e-11, B2 2.44e-10, B3 2.31e-7, B4 0, B5 0, B6 1.97e-8, B7 0, C1 0, C2 1.22e-11, C3 1.04e-10, C4 2.01e-11, D -2.88e-7
- Potenzielle Toxizitätsvergleichseinheit für den Menschen - nicht kanzerogene Wirkung (HTP-nc) [CTUh]: A1-A3 9.54e-7, A4 5.46e-8, A5 1.03e-9, B2 1.31e-8, B3 2.2e-7, B4 0, B5 0, B6 7.44e-7, B7 0, C1 0, C2 6.22e-10, C3 8.61e-9, C4 2.22e-9, D -5.09e-7
- Potenzieller Bodenqualitätsindex (SQP) [dimensionless]: A1-A3 652.67, A4 20.5, A5 0.27, B2 0.34, B3 12.3, B4 0, B5 0, B6 522, B7 0, C1 0, C2 0.24, C3 0.91, C4 0.0483, D -46.2

## Use advice
A1-A3 sowie Module A4, A5, B2, B3, B6, C1, C2, C3, C4, D. Das Umweltprofil beinhaltet die Aufwendungen für die Lebenszyklus-Stadien cradle to gate mit Optionen (Modul A1-A3). Die Herstellung der Verpackung wurde innerhalb der Module A1-A3 berücksichtigt.

## Review details
Die angewendete LCI Methode ist in Übereinstimmung mit ISO 14040 und 14044. Die Dokumentation enthält alle relevanten Informationen im Hinblick auf die Datenqualität und den Umfang der Anwendung der jeweiligen LCI Ergebnisse bzw. der Datensätze. Der Datensatz repräsentiert den Stand der Technik bezogen auf die funktionelle Einheit.

## Data sources
- GaBi database (general)
