# Fenster - heroal-Johann Henkenjohann GmbH & Co. KG - Aluminium-Hebe-Schiebetür / -PSK

Dataset: ILCD process, EPD, template dataset
Geography: DE
Reference year: 2019
Valid until: 2026
Classification: OEKOBAU.DAT: Komponenten von Fenstern und Vorhangfassaden / Fenster / Metallfenster
Synonyms: Aluminium-Fenstersysteme; Hebeschiebetür; Hebe-Schiebetürsystem; Parallel-Schiebe-Kipp; S77; S77 SL; W72 PSK
Method details: Produktkategorieregeln Teil A; EPD heroal Fenster und Hebeschiebeelemente; Produktkategorieregeln Teil B – für Fenster, Flachdachfenster, Lichtkuppeln und Lichtbänder
Owner: heroal-Johann Henkenjohann GmbH & Co. KG
Compliance: EN 15804
Review: Independent external review by Patrick Wortner
Amounts: rows without a unit in brackets have none in this file; such an amount is in the reference unit of its flow, which a separate flow dataset defines
copyright: true

## General comment
Aluminiumfenster mit Bautiefen von 77 mm bis 202 mm.
Ansichtsbreiten von 35 mm bis 52 mm.

Dieser Datensatz beinhaltet die Ergebnisse für die Module A1-A3 sowie die Module B2, B3, B4, B5, B6, B7, C1, C2, C3, C4, und D gemäß EN 15804. Das Umweltprofil beinhaltet die Aufwendungen für die Lebenszyklus-Stadien cradle to gate mit Optionen. Die Herstellung der Verpackung wurde innerhalb der Module A1-A3 berücksichtigt.

## Geography
Dieser Datensatz repräsentiert die Situation von Unternehmen, die Produkte entsprechend den Systemen von heroal-Johann Henkenjohann GmbH & Co. KG produzieren, im Hinblick auf die wichtigsten Technologien und die gesetzlichen Rahmenbedingungen.

## Time period
jährlicher Durchschnitt

## Technology and included processes
Die Ökobilanzergebnisse umfassen die Lebenszyklusstadien der Herstellung der Vorprodukte bis hin zur Rohstoffgewinnung und Verarbeitungsprozesse von als Input dienenden Sekundärstoffen (z.B. Recyclingprozesse), deren Transporte zum Werk sowie die Produktion selbst, einschließlich der Bereitstellung von allen Hilfs- und Betriebsstoffen, Energie, sowie die vollständige Abfallbehandlung oder die Deponierung der Restabfälle während des Stadiums der Produktion. Die Module A1, A2 und A3 sind hier als ein aggregiertes Modul A1-A3 ausgewiesen. Falls für diesen Datensatz weitere Module berechnet wurden, sind diese separat zu finden und können für eine Betrachtung des gesamten Lebenszyklus zusammengeführt werden.

## Technical purpose
Hebe-Schiebetürsysteme aus Aluminium für alle Gebäudeklassen.

## Reference product
- Fenster - heroal-Johann Henkenjohann GmbH & Co. KG - Aluminium-Hebe-Schiebetür / -PSK: 1

## Inputs
- Frischwasserverbrauch (FW) [m3]: A1-A3 1.65, A4 0.00588, A5 0.00158, B2 0.28, B3 0.18, B4 0, B5 0, B6 0, B7 0, C1 0, C2 0.000916, C3 0.0229, C4 0.000925, D -0.68
- Nicht-erneuerbare Primärenergie als Energieträger (PENRE) [MJ]: A1-A3 2710, A4 92.1, A5 3.18, B2 1480, B3 777, B4 0, B5 2203.43, B6 0, B7 0, C1 0, C2 14.4, C3 70.41, C4 7.34, D -930
- Nicht-erneuerbare Primärenergie zur stofflichen Nutzung (PENRM) [MJ]: A1-A3 74.8, A4 0, A5 -3.06, B2 0, B3 0, B4 0, B5 0, B6 0, B7 0, C1 0, C2 0, C3 -68.15, C4 -3.59, D 0
- Verbrauch nicht erneuerbarer Sekundärbrennstoffe (NRSF) [MJ]: A1-A3 0, A4 0, A5 0, B2 0, B3 0, B4 0, B5 0, B6 0, B7 0, C1 0, C2 0, C3 0, C4 0, D 0
- Erneuerbare Primärenergie als Energieträger (PERE) [MJ]: A1-A3 744, A4 5.13, A5 2.23, B2 21.1, B3 46.5, B4 0, B5 490.37, B6 0, B7 0, C1 0, C2 0.8, C3 0.7, C4 0.51, D -285
- Erneuerbare Primärenergie zur stofflichen Nutzung (PERM) [MJ]: A1-A3 2.21, A4 0, A5 -2.21, B2 0, B3 0, B4 0, B5 0.00404, B6 0, B7 0, C1 0, C2 0, C3 0, C4 0, D 0
- Erneuerbare Sekundärbrennstoffe (RSF) [MJ]: A1-A3 0, A4 0, A5 0, B2 0, B3 0, B4 0, B5 0, B6 0, B7 0, C1 0, C2 0, C3 0, C4 0, D 0
- Einsatz von Sekundärstoffen (SM) [kg]: A1-A3 2.03, A4 0, A5 0, B2 0, B3 1.13, B4 0, B5 2.03, B6 0, B7 0, C1 0, C2 0, C3 0, C4 0, D 0
- Total nicht erneuerbare Primärenergie (PENRT) [MJ]: A1-A3 2780, A4 92.1, A5 0.12, B2 1480, B3 777, B4 0, B5 2198.63, B6 0, B7 0, C1 0, C2 14.4, C3 2.26, C4 3.75, D -930
- Gesamtverbrauch von erneuerbarer Primärenergie (PERT) [MJ]: A1-A3 746, A4 5.13, A5 0.0231, B2 21.1, B3 46.5, B4 0, B5 490.16, B6 0, B7 0, C1 0, C2 0.8, C3 0.7, C4 0.51, D -285

## Outputs
- Komponenten für die Wiederverwendung (CRU) [kg]: A1-A3 0, A4 0, A5 0, B2 0, B3 0, B4 0, B5 0, B6 0, B7 0, C1 0, C2 0, C3 0, C4 0, D 0
- Exportierte elektrische Energie (EEE) [MJ]: A1-A3 0.85, A4 0, A5 1.29, B2 0, B3 7.72, B4 0, B5 24.34, B6 0, B7 0, C1 0, C2 0, C3 22.2, C4 0, D 0
- Exportierte thermische Energie (EET) [MJ]: A1-A3 1.88, A4 0, A5 2.31, B2 0, B3 13.7, B4 0, B5 43.69, B6 0, B7 0, C1 0, C2 0, C3 39.5, C4 0, D 0
- Gefährlicher Abfall zur Beseitigung (HWD) [kg]: A1-A3 0.00474, A4 4.64e-9, A5 2.18e-11, B2 2.02e-7, B3 0.00408, B4 0, B5 0.00474, B6 0, B7 0, C1 0, C2 7.23e-10, C3 4.87e-10, C4 3.98e-10, D -1.39e-7
- Stoff für die Energierückgewinnung (MER) [kg]: A1-A3 0, A4 0, A5 0, B2 0, B3 0, B4 0, B5 0, B6 0, B7 0, C1 0, C2 0, C3 0, C4 0, D 0
- Stoffe zum Recycling (MFR) [kg]: A1-A3 2.85, A4 0, A5 0, B2 0, B3 29.4, B4 0, B5 20.85, B6 0, B7 0, C1 0, C2 0, C3 18, C4 0, D 0
- Ungefährlicher Abfall zur Beseitigung (NHWD) [kg]: A1-A3 53.7, A4 0.0137, A5 0.00795, B2 0.45, B3 29.5, B4 0, B5 59.67, B6 0, B7 0, C1 0, C2 0.00213, C3 0.042, C4 18.7, D -14.5
- Entsorgter radioaktiver Abfall (RWD) [kg]: A1-A3 0.11, A4 0.000111, A5 6.4e-6, B2 0.00331, B3 0.0147, B4 0, B5 0.0731, B6 0, B7 0, C1 0, C2 1.74e-5, C3 0.000219, C4 3.94e-5, D -0.0461

## Impact indicators
- Potenzial für den abiotischen Abbau nicht fossiler Ressourcen (ADPE) / Potencial de agotamiento de recursos abióticos para recursos no fósiles (ADPE) [kg Sb-Äqv.]: A1-A3 0.00126, A4 5.89e-7, A5 6.44e-9, B2 1.05e-5, B3 0.00114, B4 0, B5 0.00122, B6 0, B7 0, C1 0, C2 9.17e-8, C3 7.58e-8, C4 9.85e-8, D -7.3e-5
- Potenzial für den abiotischen Abbau fossiler Brennstoffe (ADPF) / Potencial de agotamiento de recursos abióticos para recursos fósiles (ADPF) [MJ]: A1-A3 2490, A4 91.8, A5 0.1, B2 1470, B3 739, B4 0, B5 2007.55, B6 0, B7 0, C1 0, C2 14.3, C3 1.7, C4 3.65, D -812
- Versauerungspotenzial von Boden und Wasser (AP) / Potencial de acidificación del suelo y de los recursos de agua (AP) [kg SO2-Äqv.]: A1-A3 0.81, A4 0.0156, A5 6.76e-5, B2 0.0474, B3 0.39, B4 0, B5 0.62, B6 0, B7 0, C1 0, C2 0.00203, C3 0.00074, C4 0.00161, D -0.28
- Eutrophierungspotenzial (EP) / Potencial de eutrofización (EP) [kg Phosphat-Äqv.]: A1-A3 0.0734, A4 0.00389, A5 1.39e-5, B2 0.00787, B3 0.0309, B4 0, B5 0.064, B6 0, B7 0, C1 0, C2 0.000502, C3 0.000153, C4 0.000183, D -0.0235
- Globales Erwärmungspotenzial (GWP) / Potencial de calentamiento global (GWP) [kg CO2-Äqv.]: A1-A3 179, A4 6.74, A5 0.66, B2 48.2, B3 43.9, B4 0, B5 146.72, B6 0, B7 0, C1 0, C2 1.05, C3 10.5, C4 0.27, D -67.3
- Abbau Potential der stratosphärischen Ozonschicht (ODP) / Potencial de agotamiento de la capa de ozono estratosférico (ODP) [kg R11 eq.]: A1-A3 4.76e-8, A4 1.18e-15, A5 9.71e-17, B2 1.04e-13, B3 1.64e-8, B4 0, B5 4.76e-8, B6 0, B7 0, C1 0, C2 1.83e-16, C3 2.8e-15, C4 1.46e-15, D -2.9e-13
- Bildungspotential für troposphärisches Ozon (POCP) / Potencial de formación de ozono troposférico (POCP) [kg Ethen-Äqv.]: A1-A3 0.0478, A4 -0.00555, A5 5.64e-6, B2 0.0129, B3 0.0222, B4 0, B5 0.0338, B6 0, B7 0, C1 0, C2 -0.00066, C3 7.48e-5, C4 0.000123, D 0.00142

## Use advice
Dieser Datensatz beinhaltet die Ergebnisse für die Module A1-A3 sowie die Module A4, A5, B2, B3, B4, B5, B6, B7, C1, C2, C3, C4, D gemäß EN 15804.
Ein Vergleich mit anderen Produkten ist nur mit einer vergleichbaren Anwendung im Gebäude zulässig. Grundsätzlich ist eine Gegenüberstellung oder die Bewertung von EPD Daten nur möglich, wenn alle zu vergleichenden Datensätze nach EN 15804 erstellt wurden und der Gebäudekontext, bzw. die produktspezifischen Leistungsmerkmale berücksichtigt werden.

Die Muster-EPD erlangt Gültigkeit durch die Übertragung an den Hersteller durch das ift. Aktuell gültige EPDs sind der nachfolgenden Liste zu entehmen und auf www.ift-service.de/epd veröffentlicht.
EPD-Nummer und Deklarationsinhaber:
Derzeit sind keine gültigen EPDs vorhanden.

## Review details
Die angewendete LCI Methode ist in Übereinstimmung mit ISO 14040 und 14044. Die Dokumentation enthält alle relevanten Informationen im Hinblick auf die Datenqualität und den Umfang der Anwendung der jeweiligen LCI Ergebnisse bzw. der Datensätze. Der Datensatz repräsentiert den Stand der Technik bezogen auf die funktionelle Einheit.

## Data sources
- GaBi database (general)
