# Rahmenprofile für Türen - Verband Fenster + Fassade - Rahmenprofil für Stahl-/Edelstahlbrandschutztür

Dataset: ILCD process, EPD, template dataset
Geography: RER
Reference year: 2017
Valid until: 2023
Classification: OEKOBAU.DAT: Komponenten von Fenstern und Vorhangfassaden / Rahmen / Profile / Stahl
Synonyms: Brandschutztürprofil aus Stahl, rostfreiem Edelstahl oder wetterfestem Baustahl; Brandschutztür
Method details: Produktkategorieregeln Teil A; Produktkategorieregeln Teil B – für Türen und Tore
Generated by: ift Rosenheim
Registration number: M-EPD-TUE-000
Owner: Verband Fenster + Fassade
Compliance: EN 15804
Review: Independent external review by Patrick Wortner
Amounts: rows without a unit in brackets have none in this file; such an amount is in the reference unit of its flow, which a separate flow dataset defines
copyright: true
licenseType: Free of charge for all users and uses
accessRestrictions: None
Declaration holders can be found on page 3.

## General comment
Dieser Datensatz beinhaltet die Ergebnisse für die Module A1-A3 gemäß EN 15804. Ein Vergleich mit anderen Produkten ist nur mit einer vergleichbaren Anwendung im Gebäude zulässig. Grundsätzlich ist eine Gegenüberstellung oder die Bewertung von EPD Daten nur möglich, wenn alle zu vergleichenden Datensätze nach EN 15804 erstellt wurden und der Gebäudekontext, bzw. die produktspezifischen Leistungsmerkmale berücksichtigt werden.

## Geography
Dieser Datensatz repräsentiert die Situation von Unternehmen, die Produkte entsprechend den Systemen von Forster Profilsysteme AG, Jansen AG, RP Technik GmbH, Ottostumm SA, voestalpine Krems GmbH produzieren, im Hinblick auf die wichtigsten Technologien und die gesetzlichen Rahmenbedingungen.

## Time period
jährlicher Durchschnitt

## Technology and included processes
Die Ökobilanzergebnisse umfassen die Lebenszyklusstadien der Herstellung der Vorprodukte bis hin zur Rohstoffgewinnung und Verarbeitungsprozesse von als Input dienenden Sekundärstoffen (z.B. Recyclingprozesse), deren Transporte zum Werk sowie die Produktion selbst, einschließlich der Bereitstellung von allen Hilfs- und Betriebsstoffen, Energie, sowie die vollständige Abfallbehandlung oder die Deponierung der Restabfälle während des Stadiums der Produktion. Die Module A1, A2 und A3 sind hier als ein aggregiertes Modul A1-A3 ausgewiesen. Falls für diesen Datensatz weitere Module berechnet wurden, sind diese separat zu finden und können für eine Betrachtung des gesamten Lebenszyklus zusammengeführt werden.

## Technical purpose
Rahmenprofile für Stahl-/Edelstahlbrandschutztüren zur Anwendung in Büro- und Verwaltungsgebäuden sowie öffentlichen Gebäuden als auch im privaten Bereich.

## Reference product
- Rahmenprofile für Türen - Verband Fenster + Fassade - Rahmenprofil für Stahl-/Edelstahlbrandschutztür: 1

## Inputs
- Frischwasserverbrauch (FW) [m3]: A1-A3 0.16
- Nicht-erneuerbare Primärenergie als Energieträger (PENRE) [MJ]: A1-A3 521.99
- Nicht-erneuerbare Primärenergie zur stofflichen Nutzung (PENRM) [MJ]: A1-A3 34.6
- Verbrauch nicht erneuerbarer Sekundärbrennstoffe (NRSF) [MJ]: A1-A3 1.68e-8
- Erneuerbare Primärenergie als Energieträger (PERE) [MJ]: A1-A3 88.72
- Erneuerbare Primärenergie zur stofflichen Nutzung (PERM) [MJ]: A1-A3 0
- Erneuerbare Sekundärbrennstoffe (RSF) [MJ]: A1-A3 1.43e-9
- Einsatz von Sekundärstoffen (SM) [kg]: A1-A3 0
- Total nicht erneuerbare Primärenergie (PENRT) [MJ]: A1-A3 556.59
- Gesamtverbrauch von erneuerbarer Primärenergie (PERT) [MJ]: A1-A3 88.72

## Outputs
- Komponenten für die Wiederverwendung (CRU) [kg]: A1-A3 0
- Exportierte elektrische Energie (EEE) [MJ]: A1-A3 0.37
- Exportierte thermische Energie (EET) [MJ]: A1-A3 0.69
- Gefährlicher Abfall zur Beseitigung (HWD) [kg]: A1-A3 5.98e-7
- Stoff für die Energierückgewinnung (MER) [kg]: A1-A3 0
- Stoffe zum Recycling (MFR) [kg]: A1-A3 0
- Ungefährlicher Abfall zur Beseitigung (NHWD) [kg]: A1-A3 1.51
- Entsorgter radioaktiver Abfall (RWD) [kg]: A1-A3 0.0286

## Impact indicators
- Potenzial für den abiotischen Abbau nicht fossiler Ressourcen (ADPE) / Potencial de agotamiento de recursos abióticos para recursos no fósiles (ADPE) [kg Sb-Äqv.]: A1-A3 9.94e-5
- Potenzial für den abiotischen Abbau fossiler Brennstoffe (ADPF) / Potencial de agotamiento de recursos abióticos para recursos fósiles (ADPF) [MJ]: A1-A3 482.92
- Versauerungspotenzial von Boden und Wasser (AP) / Potencial de acidificación del suelo y de los recursos de agua (AP) [kg SO2-Äqv.]: A1-A3 0.1
- Eutrophierungspotenzial (EP) / Potencial de eutrofización (EP) [kg Phosphat-Äqv.]: A1-A3 0.00961
- Globales Erwärmungspotenzial (GWP) / Potencial de calentamiento global (GWP) [kg CO2-Äqv.]: A1-A3 37.89
- Abbau Potential der stratosphärischen Ozonschicht (ODP) / Potencial de agotamiento de la capa de ozono estratosférico (ODP) [kg R11 eq.]: A1-A3 1.09e-8
- Bildungspotential für troposphärisches Ozon (POCP) / Potencial de formación de ozono troposférico (POCP) [kg Ethen-Äqv.]: A1-A3 0.00984

## Use advice
A1-A3. Das Umweltprofil beinhaltet die Aufwendungen für die Lebenszyklus-Stadien cradle to gate (Modul A1-A3).

Die Muster-EPD erlangt Gültigkeit durch die Übertragung an den Hersteller durch das ift. Aktuell gültige EPDs sind der nachfolgenden Liste zu entehmen und auf www.ift-service.de/epd veröffentlicht.
EPD-Nummer und Deklarationsinhaber:
- M-EPD-TUE-GB-001, Thoruns AB, SE-63103 Eskilstuna
- M-EPD-TUE-GB-002, CREANI SL, ES-08401 Granollers
- M-EPD-TUE-GB-003, TALOS Metallbau, GR-19002 Paiania
- M-EPD-TUE-GB-004, Sobrima SAS, FR-67726 Hoerdt Cedex
- M-EPD-TUE-GB-005, Sottas SA, CH-1630 Bulle
- M-EPD-TUE-006, Jansen AG, CH-9463 Oberriet

## Review details
Die angewendete LCI Methode ist in Übereinstimmung mit ISO 14040 und 14044. Die Dokumentation enthält alle relevanten Informationen im Hinblick auf die Datenqualität und den Umfang der Anwendung der jeweiligen LCI Ergebnisse bzw. der Datensätze. Der Datensatz repräsentiert den Stand der Technik bezogen auf die funktionelle Einheit.

## Data sources
- GaBi database (general)
