# Schüttung aus Polystyrolschaumstoff-Partikeln (zementgebunden)

Dataset: ILCD process, EPD, generic dataset
Geography: DE
Reference year: 2018
Valid until: 2022
Classification: oekobau.dat: Dämmstoffe / Expandiertes Polystyrol (EPS) / EPS weiß
Owner: thinkstep
Compliance: DIN EN 15804
Review: Dependent internal review by thinkstep, IABP-GaBi, IBP-GaBi; Independent external review by GaBi user forum, GaBi bug forum, GaBi user community
Amounts: rows without a unit in brackets have none in this file; such an amount is in the reference unit of its flow, which a separate flow dataset defines
copyright: true

## General comment
Dieser Datensatz wurde nach dem European Standard EN 15804 für Nachhaltiges Bauen modelliert. Ergebnisse werden in Modulen abgebildet, die den strukturierten Ausdruck von Ergebnissen über den gesamten Lebenszyklus zulassen.

## Geography
Der Datensatz bildet die länderspezifische Situation in Deutschland ab. Dabei werden Haupttechnologien, spezifische regionale Charakteristiken und ggf. Importstatistiken berücksichtigt.

## Time period
Jährlicher Durchschnitt

## Technology and included processes
In der Regel werden EPS-Partikel für Schüttungen durch Zerkleinerung von Produktionsabfällen (z.B. aus der EPS Plattenproduktion) hergestellt. Da die Preisunterschiede für beispielsweise EPS Platten und EPS Schüttung je Volumeneinheit vernachlässigbar klein sind wurde hier auf eine ökonomische Allokation der Umweltlasten zwischen Haupt- und Nebenprodukt verzichtet. Stattdessen wurde mit 100% Primärmaterial bilanziert. Weitere Rohstoffe sind Zement und Sand. Das Gemisch wird mit Wasser vermischt und ähnlich einem Zementestrich eingebaut. Die Herstellung von EPS und der Zementeinsatz dominieren die Ökobilanz (zusammen >80% des GWP).

Hintergrundsystem:
Strom: Die Stromerzeugung wird entsprechend der länderspezifischen Randbedingungen modelliert. Die landesspezifische Analyse beinhaltet:
1.: Spezifische Kraftwerke der verschiedenen fossilen Energieträger und der Einsatz erneuerbarer Energien sind entsprechend der länderspezifischen Energieträgermixe modelliert. Die Analyse bezieht Stromimporte aus den Nachbarländern, Transmissions-und Verteilungsverluste und den Eigenverbrauch im Kraftwerk und bei der Verteilung bzw. Speicherung, z. B. durch Pumpspeicherwerke, ein.
2.: Die landes-/regionalspezifischen Technologiestandards sowie die Erzeugung in Elektrizitätskraftwerken und/oder in speziellen Kraftwerken mit Kraft-Wärme-Kopplung (KWK) sind berücksichtigt.
3.: Die länderspezifische Energieträgerbereitstellung (mit Anteil der Importe und/oder Eigenversorgung) einschließlich der Energieträger-Eigenschaften (z. B. Elementar- und Energiegehalte) werden berücksichtigt.
4.: Die Förderung, Produktion, Verarbeitung und Transportprozesse werden entsprechend der Situation im jeweiligen Stromerzeugerland modelliert. Die unterschiedlichen Produktions- und Verarbeitungsverfahren (Emissionen und Wirkungsgrade) in den verschiedenen Energieerzeugerländern werden einbezogen, z. B. Rohöl-Veredelungsverfahren oder Abfackel-Raten an den Ölplattformen.
Thermische Energie, Prozessdampf: Die Erzeugung von Dampf und thermischer Energie in Heizkraftwerken wird entsprechend der landesspezifischen Situation (Emissionsgrenzwerte, Energieträgerbasis) modelliert.
Der Wirkungsgrad für die thermische Energieerzeugung beträgt per Definition 100% des Energieträgereinsatzes. Für Prozessdampf liegt der Wirkungsgrad im Bereich von 85-95%. Die zur Heizenergie-Erzeugung verwendeten Energieträger werden entsprechend der nationalen Situation modelliert (siehe Kapitel Strom oben).
Transporte: Alle relevanten und bekannten Transportprozesse in Form von See- und Binnenschiffsverkehr sowie Bahn-, Lkw- und der Leitungstransport sind enthalten.
Energieträger: Die Energieträger werden entsprechend der spezifischen Versorgungslage modelliert (siehe Kapitel Strom oben).
Raffinerieprodukte: Diesel, Benzin, technische Gase, Heizöl, Schmierstoffe und Rückstände, wie Bitumen, werden mit einem parametrierten länderspezifische Raffineriemodell modelliert. Das Raffinerie-Modell bezieht die länderspezifischen Veredelungsverfahren (z. B. Emissionspegel, interner Energieverbrauch etc.) und das länderspezifische Produktspektrum ein, das sich je nach Land stark unterscheiden kann. Die Rohöl-Förderung wird gemäß der länderspezifischen Situation mit den jeweiligen Energieträger-Eigenschaften modelliert.

## Technical purpose
Gebundene Schüttungen aus Polystyrolschaumstoff (EPS) werden als Dämm- und Ausgleichsschicht vorallem im Altbau eingesetzt. Bei entsprechendem Aufbau (lastverteilende Schicht über der Schüttung) können Lasten bis etwa 5 kN/m² durch die Schüttung abgetragen werden. Es können Schütthöhen von 4 - 50cm in einem Arbeitsschritt eingebracht werden.

## Safety margin
10 %. Produktsystem weitgehend vollständig abgebildet. Gute technologische, zeitliche und geographische Repräsentativität.

## Reference product
- Schüttung aus Polystyrolschaumstoff-Partikeln (zementgebunden) [m3]: 1

## Inputs
- Erneuerbare Primärenergie als Energieträger (PERE) [MJ]: A1-A3 111.135, C1 0, C2 0.0559328, C3 3.35622, D -181.187
- Erneuerbare Primärenergie zur stofflichen Nutzung (PERM) [MJ]: A1-A3 0, C1 0, C2 0, C3 0, D 0
- Total erneuerbare Primärenergie (PERT) [MJ]: A1-A3 111.135, C1 0, C2 0.0559328, C3 3.35622, D -181.187
- Nicht-erneuerbare Primärenergie als Energieträger (PENRE) [MJ]: A1-A3 1750.42, C1 0, C2 0.96078, C3 1269.1, D -633.971
- Nicht-erneuerbare Primärenergie zur stofflichen Nutzung (PENRM) [MJ]: A1-A3 1253.56, C1 0, C2 0, C3 -1253.56, D 0
- Total nicht erneuerbare Primärenergie (PENRT) [MJ]: A1-A3 3003.98, C1 0, C2 0.96078, C3 15.5447, D -633.971
- Einsatz von Sekundärstoffen (SM) [kg]: A1-A3 0, C1 0, C2 0, C3 0, D 0
- Erneuerbare Sekundärbrennstoffe (RSF) [MJ]: A1-A3 0, C1 0, C2 0, C3 0, D 0
- Nicht erneuerbare Sekundärbrennstoffe (NRSF) [MJ]: A1-A3 0, C1 0, C2 0, C3 0, D 0
- Einsatz von Süßwasserressourcen (FW) [m3]: A1-A3 0.463155, C1 0, C2 5.00925e-5, C3 0.19699, D -0.0845199

## Outputs
- Gefährlicher Abfall zur Deponie (HWD) [kg]: A1-A3 1.61569e-6, C1 0, C2 3.59034e-8, C3 1.50793e-8, D -3.35139e-7
- Entsorgter nicht gefährlicher Abfall (NHWD) [kg]: A1-A3 7.29626, C1 0, C2 0.000168634, C3 0.627934, D -0.298238
- Entsorgter radioaktiver Abfall (RWD) [kg]: A1-A3 0.0186601, C1 0, C2 1.0115e-6, C3 0.00048624, D -0.0218902
- Komponenten für die Wiederverwendung (CRU) [kg]: A1-A3 0, C1 0, C2 0, C3 0, D 0
- Stoffe zum Recycling (MFR) [kg]: A1-A3 0, C1 0, C2 0, C3 0, D 0
- Stoffe für die Energierückgewinnung (MER) [kg]: A1-A3 0, C1 30.8, C2 0, C3 0, D 0
- Exportierte elektrische Energie (EEE) [MJ]: A1-A3 0, C1 0, C2 0, C3 159.262, D 0
- Exportierte thermische Energie (EET) [MJ]: A1-A3 0, C1 0, C2 0, C3 367.242, D 0

## Impact indicators
- Globales Erwärmungspotenzial (GWP) [kg CO2 Äquiv.]: A1-A3 160.083, C1 0, C2 0.0714833, C3 103.432, D -43.3217
- Abbaupotenzial der stratosphärischen Ozonschicht (ODP) [kg R11 Äquiv.]: A1-A3 5.83396e-13, C1 0, C2 2.36612e-17, C3 1.89926e-14, D -1.00188e-12
- Versauerungspotential (AP) [kg SO2 Äquiv.]: A1-A3 0.165967, C1 0, C2 0.000144388, C3 0.00821342, D -0.0365647
- Eutrophierungspotential (EP) [kg Phosphat Äquiv.]: A1-A3 0.0225384, C1 0, C2 3.43251e-5, C3 0.00185421, D -0.0069288
- Bildungspotenzial für troposphärisches Ozon (POCP) [kg Ethen Äquiv.]: A1-A3 0.492608, C1 0, C2 -4.71913e-5, C3 0.000607381, D -0.00372505
- Potenzial für den abiotischen Abbau nicht fossiler Ressourcen (ADPE) [kg Sb Äquiv.]: A1-A3 1.22928e-5, C1 0, C2 6.01538e-9, C3 2.02809e-7, D -1.07577e-5
- Potenzial für den abiotischen Abbau fossiler Brennstoffe (ADPF) [MJ]: A1-A3 2956.89, C1 0, C2 0.958195, C3 14.3173, D -578.709

## Use advice
Dieser Datensatz bezieht sich auf 1 m³ Schüttung aus Polystyrolschaumstoff-Partikeln. Als Bindemittel wird Zement eingesetzt. Trockenrohdichte 350 kg/m³, Wärmeleitfähigkeit 0,1 - 0,15 W/mK. Der Datensatz kann für die näherungsweise Abschätzung anderer Schüttdichten von 300 - 400 kg verwendet werden.

Der Datensatz repräsentiert ein Cradle to Gate Inventar. Er kann verwendet werden, um die Lieferkette des jeweiligen Produktes in einer repräsentativen Weise zu charakterisieren. Die Kombination mit einzelnen Einheitenprozessen und diesem Produkt ermöglicht die Erstellung von anwenderspezifischen (Produkt-) LCAs

## Data sources
- GaBi databases
- GaBi Database Edition 2020, SP40
- GaBi database (all versions)
