# Melaminharz-Schaum; 10 kg/m3

Dataset: ILCD process, EPD, generic dataset
Geography: DE
Reference year: 2018
Valid until: 2022
Classification: oekobau.dat: Dämmstoffe / Melaminharz / Schaum
Owner: thinkstep
Compliance: DIN EN 15804
Review: Dependent internal review by thinkstep, IABP-GaBi, IBP-GaBi; Independent external review by GaBi user forum, GaBi bug forum, GaBi user community
Amounts: rows without a unit in brackets have none in this file; such an amount is in the reference unit of its flow, which a separate flow dataset defines
copyright: true

## General comment
Dieser Datensatz wurde nach dem European Standard EN 15804 für Nachhaltiges Bauen modelliert. Ergebnisse werden in Modulen abgebildet, die den strukturierten Ausdruck von Ergebnissen über den gesamten Lebenszyklus zulassen.

## Geography
Der Datensatz bildet die länderspezifische Situation in Deutschland ab. Dabei werden Haupttechnologien, spezifische regionale Charakteristiken und ggf. Importstatistiken berücksichtigt.

## Time period
Jährlicher Durchschnitt

## Technology and included processes
Dieser Datensatz von Melaminharzschaumstoff beinhaltet die Lebenszyklus-Phasen Cradle to gate: von der Rohstoff- und Hilfsstoffherstellung sowie die Melaminharzschaumstoff-Produktion inklusive Betreiben der Produktionsanlage und Abwasseraufbereitung. Melamin wird aus Harnstoff schrittweise unter niedrigem Druck (0,7 MPa) in einem katalytischem Dampfphasenverfahren produziert. Harnstoff wird in Melamin umgewandelt, indem man Aluminiumoxid als Fließkatalysatoren durch vorgeheiztes Ammonium bei einer Reaktionstemperatur von 400 °C Ammonium- und Kohlendioxid verwendet. Melamin verlässt den Reaktor im gasförmigen Zustand zusammen mit Ammoniak und Kohlendioxid. Die Mischung wird mit recycelter Mutterlauge abgekühlt (ab nachfolgender Kristallisation) und separiert Ammonium- und Kohlendioxid vom Produkt. Melamin ..... aus dem Gasstrom und wird am Boden eines Dampfsiebs gesammelt. Es wird durch Kristallisation und eine Filterung über Aktivkohle gereinigt. Überschüssiges Ammonium wird zurückgewonnen und im Reaktor wiederverwertet. Die Systemgrenze sind geschnittene Melaminharzschaumstoff-Blöcke, die am Fabriktor (bereit zum Transport), mit einer Abdeckfolie abgedeckt werden. Transporte von der Fabrik zur Baustelle werden nicht berücksichtigt und müssen in ein Konzept eingearbeitet werden.

Hintergrundsystem:

Strom: Die Stromerzeugung wird entsprechend der länderspezifischen Randbedingungen modelliert. Die landesspezifische Analyse beinhaltet:
1.: Spezifische Kraftwerke der verschiedenen fossilen Energieträger und der Einsatz erneuerbarer Energien sind entsprechend der länderspezifischen Energieträgermixe modelliert. Die Analyse bezieht Stromimporte aus den Nachbarländern, Transmissions-und Verteilungsverluste und den Eigenverbrauch im Kraftwerk und bei der Verteilung bzw. Speicherung, z. B. durch Pumpspeicherwerke, ein.
2.: Die landes-/regionalspezifischen Technologiestandards sowie die Erzeugung in Elektrizitätskraftwerken und/oder in speziellen Kraftwerken mit Kraft-Wärme-Kopplung (KWK) sind berücksichtigt.
3.: Die länderspezifische Energieträgerbereitstellung (mit Anteil der Importe und/oder Eigenversorgung) einschließlich der Energieträger-Eigenschaften (z. B. Elementar- und Energiegehalte) werden berücksichtigt.
4.: Die Förderung, Produktion, Verarbeitung und Transportprozesse werden entsprechend der Situation im jeweiligen Stromerzeugerland modelliert. Die unterschiedlichen Produktions- und Verarbeitungsverfahren (Emissionen und Wirkungsgrade) in den verschiedenen Energieerzeugerländern werden einbezogen, z. B. Rohöl-Veredelungsverfahren oder Abfackel-Raten an den Ölplattformen.
Thermische Energie, Prozessdampf: Die Erzeugung von Dampf und thermischer Energie in Heizkraftwerken wird entsprechend der landesspezifischen Situation (Emissionsgrenzwerte, Energieträgerbasis) modelliert.
Der Wirkungsgrad für die thermische Energieerzeugung beträgt per Definition 100% des Energieträgereinsatzes. Für Prozessdampf liegt der Wirkungsgrad im Bereich von 85-95%. Die zur Heizenergie-Erzeugung verwendeten Energieträger werden entsprechend der nationalen Situation modelliert (siehe Kapitel Strom oben).
Transporte: Alle relevanten und bekannten Transportprozesse in Form von See- und Binnenschiffsverkehr sowie Bahn-, Lkw- und der Leitungstransport sind enthalten.
Energieträger: Die Energieträger werden entsprechend der spezifischen Versorgungslage modelliert (siehe Kapitel Strom oben).
Raffinerieprodukte: Diesel, Benzin, technische Gase, Heizöl, Schmierstoffe und Rückstände, wie Bitumen, werden mit einem parametrierten länderspezifische Raffineriemodell modelliert. Das Raffinerie-Modell bezieht die länderspezifischen Veredelungsverfahren (z. B. Emissionspegel, interner Energieverbrauch etc.) und das länderspezifische Produktspektrum ein, das sich je nach Land stark unterscheiden kann. Die Rohöl-Förderung wird gemäß der länderspezifischen Situation mit den jeweiligen Energieträger-Eigenschaften modelliert.
"

## Technical purpose
Dieses Produkt kann im Baubereich verwendet werden.

## Safety margin
20 %. Produktsystem bis auf wenige Prozesse/Flüsse abgebildet. Technologische, zeitliche und geographische Repräsentativität teilweise gegeben.

## Reference product
- Melaminharz-Schaum: 1

## Inputs
- Erneuerbare Primärenergie als Energieträger (PERE) [MJ]: A1-A3 7.66864, C1 0, C2 0.0021792, C3 0.186829, D -2.78178
- Erneuerbare Primärenergie zur stofflichen Nutzung (PERM) [MJ]: A1-A3 0, C1 0, C2 0, C3 0, D 0
- Total erneuerbare Primärenergie (PERT) [MJ]: A1-A3 7.66864, C1 0, C2 0.0021792, C3 0.186829, D -2.78178
- Nicht-erneuerbare Primärenergie als Energieträger (PENRE) [MJ]: A1-A3 104.936, C1 0, C2 0.037433, C3 17.4908, D -9.70936
- Nicht-erneuerbare Primärenergie zur stofflichen Nutzung (PENRM) [MJ]: A1-A3 16.8, C1 0, C2 0, C3 -16.8, D 0
- Total nicht erneuerbare Primärenergie (PENRT) [MJ]: A1-A3 121.736, C1 0, C2 0.037433, C3 0.690775, D -9.70936
- Einsatz von Sekundärstoffen (SM) [kg]: A1-A3 0, C1 0, C2 0, C3 0, D 0
- Erneuerbare Sekundärbrennstoffe (RSF) [MJ]: A1-A3 0, C1 0, C2 0, C3 0, D 0
- Nicht erneuerbare Sekundärbrennstoffe (NRSF) [MJ]: A1-A3 0, C1 0, C2 0, C3 0, D 0
- Einsatz von Süßwasserressourcen (FW) [m3]: A1-A3 0.0218847, C1 0, C2 1.95166e-6, C3 0.00353066, D -0.00129759

## Outputs
- Gefährlicher Abfall zur Deponie (HWD) [kg]: A1-A3 9.71164e-8, C1 0, C2 1.39883e-9, C3 2.56024e-9, D -5.13551e-9
- Entsorgter nicht gefährlicher Abfall (NHWD) [kg]: A1-A3 0.138001, C1 0, C2 6.57015e-6, C3 0.149603, D -0.00457308
- Entsorgter radioaktiver Abfall (RWD) [kg]: A1-A3 0.000927619, C1 0, C2 3.94093e-8, C3 2.66965e-5, D -0.000336084
- Komponenten für die Wiederverwendung (CRU) [kg]: A1-A3 0, C1 0, C2 0, C3 0, D 0
- Stoffe zum Recycling (MFR) [kg]: A1-A3 0, C1 0, C2 0, C3 0, D 0
- Stoffe für die Energierückgewinnung (MER) [kg]: A1-A3 0, C1 1.2, C2 0, C3 0, D 0
- Exportierte elektrische Energie (EEE) [MJ]: A1-A3 0, C1 0, C2 0, C3 2.66749, D 0
- Exportierte thermische Energie (EET) [MJ]: A1-A3 0, C1 0, C2 0, C3 6.12435, D 0

## Impact indicators
- Globales Erwärmungspotenzial (GWP) [kg CO2 Äquiv.]: A1-A3 6.5813, C1 0, C2 0.00278506, C3 1.43404, D -0.663676
- Abbaupotenzial der stratosphärischen Ozonschicht (ODP) [kg R11 Äquiv.]: A1-A3 3.07012e-14, C1 0, C2 9.21867e-19, C3 1.04377e-15, D -1.53821e-14
- Versauerungspotential (AP) [kg SO2 Äquiv.]: A1-A3 0.00528444, C1 0, C2 5.62553e-6, C3 0.000161159, D -0.000560638
- Eutrophierungspotential (EP) [kg Phosphat Äquiv.]: A1-A3 0.00301715, C1 0, C2 1.33734e-6, C3 3.58544e-5, D -0.000106253
- Bildungspotenzial für troposphärisches Ozon (POCP) [kg Ethen Äquiv.]: A1-A3 0.000691021, C1 0, C2 -1.6854e-6, C3 1.49199e-5, D -5.70835e-5
- Potenzial für den abiotischen Abbau nicht fossiler Ressourcen (ADPE) [kg Sb Äquiv.]: A1-A3 8.03055e-6, C1 0, C2 2.34365e-10, C3 1.08154e-8, D -1.65081e-7
- Potenzial für den abiotischen Abbau fossiler Brennstoffe (ADPF) [MJ]: A1-A3 119.392, C1 0, C2 0.0373323, C3 0.623384, D -8.86092

## Use advice
Der Datensatz repräsentiert ein Cradle to Gate Inventar. Er kann verwendet werden, um die Lieferkette des jeweiligen Produktes in einer repräsentativen Weise zu charakterisieren. Die Kombination mit einzelnen Einheitenprozessen und diesem Produkt ermöglicht die Erstellung von anwenderspezifischen (Produkt-) LCAs.

## Data sources
- GaBi Database Edition 2020, SP40
- GaBi database (all versions)
