# Holzfaserdämmplatten

Dataset: ILCD process, EPD, average dataset
Geography: RER
Reference year: 2020
Valid until: 2025
Classification: OEKOBAU.DAT: Dämmstoffe / Holzfasern / Holzfaserdämmplatte
Classification: IBUCategories: 02 Bauprodukte / Holzwerkstoffe / Holzwerkstoffe
Method details: Holzwerkstoffe.pdf
Generated by: Sphera Solutions GmbH
Registration number: EPD-GTX-20200178-IBC1-DE
Owner: GUTEX Holzfaserplattenwerk H. Henselmann GmbH + Co KG
Compliance: DIN EN 15804; ISO 14025
Review: Accredited third party review by Institut Bauen und Umwelt e. V.
Amounts: rows without a unit in brackets have none in this file; such an amount is in the reference unit of its flow, which a separate flow dataset defines
copyright: true
licenseType: Free of charge for all users and uses
accessRestrictions: None

## General comment
GUTEX Holzfaserplatten sind plattenförmige Dämmstoffe, die nach EN 13171 aus Holzfasern hergestellt werden.

Im Trockenverfahren werden aus Holzfasern unter Zugabe geringer Mengen Polyurethan(PUR)-Harz Dämmplatten gefertigt, diese werden nach der Produktion aufgeteilt, gegebenenfalls profiliert und konfektioniert. Es können hydrophobierte und nicht hydrophobierte einschichtige Dämmplatten bis zu 240 mm hergestellt werden.

## Technology and included processes
Der Herstellungsprozess gliedert sich in folgende Prozessschritte: 1. Anlieferung der Hackschnitzel 2. Zerfasern der Hackschnitzel mit Hilfe des Defibratorverfahrens 3. Hydrophobierung der Fasern mit Paraffin 4. Fasertrocknung im Stromtrockner 5. Beleimung der Faser mit PUR-Harz 6. Streuung der Fasern auf das Formband zu einer Matte 7. Aushärtung der Matte in der Kalibrier- und Aushärteeinheit 8. Aufteilen, Profilieren und Konfektionieren. Der Standort ist zertifiziert nach ISO 9001.
Technische Daten:
Folgende (bau)technische Daten im Lieferzustand sind für GUTEX Holzfaserplatten relevant:
Deklarierte Einheit:
Die zugrundeliegende deklarierte Einheit ist 1 m³ Holzfaserdämmplatte mit einer nach Produktionsmengen (m³/Jahr) gewichteten mittleren Dichte von 167 kg/m³.

## Technical purpose
Sowohl im Neu- als auch im Altbau können die GUTEX Dämmstoffe eingesetzt werden: als Wärmedämmverbundsystem für die Putzfassade, Wanddämmung für die hinterlüftete Fassade, Aufdachdämmung bzw. Unterdeckung, Dämmung von Geschossdecken, Innendämmung der Außenwand, Dämmung der Installationsebene und Trittschalldämmung für Fußböden.

## Reference product
- 1 m³ Holzfaserdämmplatte (): 1

## Inputs
- Erneuerbare Primärenergie als Energieträger (PERE) [MJ]: A1-A3 316, A5 141.286, C3 0, D -833.4
- Erneuerbare Primärenergie zur stofflichen Nutzung (PERM) [MJ]: A1-A3 2902, A5 -137.108, C3 -2765, D 0
- Total erneuerbare Primärenergie (PERT) [MJ]: A1-A3 3218, A5 4.178, C3 -2765, D -833.4
- Nicht-erneuerbare Primärenergie als Energieträger (PENRE) [MJ]: A1-A3 1227, A5 16.8, C3 0, D -2627
- Nicht-erneuerbare Primärenergie zur stofflichen Nutzung (PENRM) [MJ]: A1-A3 251, A5 -11.2, C3 -240, D 0
- Total nicht erneuerbare Primärenergie (PENRT) [MJ]: A1-A3 1478, A5 5.573, C3 -240, D -2627
- Einsatz von Sekundärstoffen (SM) [kg]: A1-A3 0, A5 0, C3 0, D 0
- Erneuerbare Sekundärbrennstoffe (RSF) [MJ]: A1-A3 0, A5 0, C3 0, D 3008
- Nicht erneuerbare Sekundärbrennstoffe (NRSF) [MJ]: A1-A3 0, A5 0, C3 0, D 0
- Einsatz von Süßwasserressourcen (FW) [m^3]: A1-A3 0.3129, A5 0.05302, C3 0, D -0.2616

## Outputs
- Gefährlicher Abfall zur Deponie (HWD) [kg]: A1-A3 2.949e-6, A5 6.782e-9, C3 0, D -1.434e-6
- Entsorgter nicht gefährlicher Abfall (NHWD) [kg]: A1-A3 0.5877, A5 0.3073, C3 0, D -0.03311
- Entsorgter radioaktiver Abfall (RWD) [kg]: A1-A3 0.01082, A5 0.000178, C3 0, D -0.1257
- Komponenten für die Wiederverwendung (CRU) [kg]: A1-A3 0, A5 0, C3 0, D 0
- Stoffe zum Recycling (MFR) [kg]: A1-A3 0, A5 0, C3 0, D 0
- Stoffe für die Energierückgewinnung (MER) [kg]: A1-A3 0, A5 0, C3 167, D 0
- Exportierte elektrische Energie (EEE) [MJ]: A1-A3 0, A5 27.75, C3 0, D 0
- Exportierte thermische Energie (EET) [MJ]: A1-A3 0, A5 64.91, C3 0, D 0

## Impact indicators
- Globales Erwärmungspotenzial (GWP) [kg CO_(2)-Äq.]: A1-A3 -198.4, A5 21.76, C3 270, D -184.5
- Abbau Potential der stratosphärischen Ozonschicht (ODP) [kg CFC11-Äq.]: A1-A3 8.517e-13, A5 6.951e-15, C3 0, D -4.701e-12
- Versauerungspotenzial von Boden und Wasser (AP) [kg SO_(2)-Äq.]: A1-A3 0.1318, A5 0.002808, C3 0, D 0.2386
- Eutrophierungspotenzial (EP) [kg PO_(4)^(3)-Äq.]: A1-A3 0.02621, A5 0.0005747, C3 0, D -0.006272
- Bildungspotential für troposphärisches Ozon (POCP) [kg Ethen-Äq.]: A1-A3 0.01554, A5 0.0001789, C3 0, D 0.02911
- Potenzial für den abiotischen Abbau nicht fossiler Ressourcen (ADPE) [kg Sb-Äq.]: A1-A3 9.07e-5, A5 4.827e-7, C3 0, D -5.104e-5
- Potenzial für den abiotischen Abbau fossiler Brennstoffe (ADPF) [MJ]: A1-A3 1451, A5 5.124, C3 0, D -2309

## Use advice
Gültigkeitsbereich:
Die Deklaration gilt für die im Trockenverfahren hergestellten Holzfaserdämmplatten die von der Firma
GUTEX am Standort Waldshut-Tiengen hergestellt werden.
Systemgrenze:
Als Typ der EPD wird deklariert: Wiege bis Werkstor - mit Optionen. Die Umweltproduktdeklaration bezieht sich auf das Produktstadium (Modul A1–A3, inklusive Rohstoffbereitstellung, Transport, Herstellung und Verpackungsmaterialen). Darüber hinaus wurde auch ein End-of-Life-Szenario (Modul D) berechnet: die Verbrennung mit Energierückgewinnung. Die Verwertung der Verpackungsmaterialien ist in A5 berücksichtigt.

## Data sources
- GaBi Database (all versions)
- GaBi database SP33 2017
