# Strom aus PV (1 kWh)

Dataset: ILCD process, EPD, generic dataset
Geography: DE
Reference year: 2021
Valid until: 2022
Classification: oekobau.dat: Sonstige / Energieträger - Bereitstellung frei Verbraucher / Strom
Owner: Sphera Solutions GmbH
Compliance: EN 15804+A2
Review: Dependent internal review by Sphera Solutions GmbH; Independent external review by GaBi user forum
Amounts: rows without a unit in brackets have none in this file; such an amount is in the reference unit of its flow, which a separate flow dataset defines
copyright: true
licenseType: Free of charge for all users and uses
accessRestrictions: The license conditions as stated on https://www.oekobaudat.de/ apply.
accessRestrictions: Es gelten die Lizenzbedingungen wie sie auf https://www.oekobaudat.de/ genannt sind.

## General comment
Dieser Datensatz wurde nach dem European Standard EN 15804+A2 für Nachhaltiges Bauen modelliert. Ergebnisse werden in Modulen abgebildet, die den strukturierten Ausdruck von Ergebnissen über den gesamten Lebenszyklus zulassen.

## Geography
Der Datensatz bildet die länderspezifische Situation in Deutschland ab. Dabei werden Haupttechnologien, spezifische regionale Charakteristiken und ggf. Importstatistiken berücksichtigt.

## Time period
Jährlicher Durchschnitt

## Technology and included processes
Der Datensatz beinhaltet die Herstellung der Photovoltaikanlagen basiert auf dem globalen durchschnittlichen Marktmix der installierten Photovoltaik-Technologien ab: Monokristaline Siliziumzellen 42%, Polykristaline Siliziumzellen 47%, Cadmium-Tellurid Zellen (CdTe) 7% und Kupfer-Indium-Gallium-Diselenid Zellen 4%. Die Herstellung und der Betrieb des Systems werden berücksichtigt. Die Lebensdauer der Paneele wird mit 20 Jahren modelliert. Die folgenden durchschnittlichen Wirkungsgrade pro Technologie werden verwendet: Monokristaline Siliziumzellen 18%, Polykristaline Siliziumzellen 16%, Cadmiumtellurid (CdTe) 17%, Kupfer-Indium-Gallium-Diselenid 15%. Die Systemwirkungsgrade werden mit 75% für die Schrägdachinstallation und 80% für die Bodenmontage berücksichtigt. Der Anteil der Schrägdachinstallation beträgt 90%.

## Technical purpose
Elektrische Energie wird für den Betrieb verschiedener technischer Anlagen und Installationen im Gebäudekontext benötigt.

## Safety margin
0 %.

## Reference product
- Strom aus PV (1 kWh): 3.6

## Inputs
- Erneuerbare Primärenergie als Energieträger (PERE) [MJ]: B6 21.6783
- Erneuerbare Primärenergie zur stofflichen Nutzung (PERM) [MJ]: B6 0
- Total erneuerbare Primärenergie (PERT) [MJ]: B6 21.6783
- Nicht-erneuerbare Primärenergie als Energieträger (PENRE) [MJ]: B6 0.881078
- Nicht-erneuerbare Primärenergie zur stofflichen Nutzung (PENRM) [MJ]: B6 0
- Total nicht-erneuerbare Primärenergie (PENRT) [MJ]: B6 0.881078
- Einsatz von Sekundärstoffen (SM) [kg]: B6 0
- Erneuerbare Sekundärbrennstoffe (SF) [MJ]: B6 0
- Nicht erneuerbare Sekundärbrennstoffe (NRSF) [MJ]: B6 0
- Nettoeinsatz von Süßwasserressourcen (FW) [m3]: B6 0.000490473

## Outputs
- Gefährlicher Abfall zur Deponie (HWD) [kg]: B6 7.3971e-9
- Entsorgter nicht gefährlicher Abfall (NHWD) [kg]: B6 0.00531692
- Entsorgter radioaktiver Abfall (RWD) [kg]: B6 4.3546e-5
- Komponenten für die Wiederverwendung (CRU) [kg]: B6 0
- Stoffe zum Recycling (MFR) [kg]: B6 0
- Stoffe für die Energierückgewinnung (MER) [kg]: B6 0
- Exportierte elektrische Energie (EEE) [MJ]: B6 0
- Exportierte thermische Energie (EET) [MJ]: B6 0

## Impact indicators
- Globales Erwärmungspotenzial - total (GWP-total) [kg CO2 eq.]: B6 0.0683219
- Globales Erwärmungspotenzial - fossil (GWP-fossil) [kg CO2 eq.]: B6 0.0682811
- Globales Erwärmungspotenzial - biogen (GWP-biogenic) [kg CO2 eq.]: B6 -2.12661e-5
- Globales Erwärmungspotenzial - luluc (GWP-luluc) [kg CO2 eq.]: B6 6.20625e-5
- Abbaupotenzial der stratosphärischen Ozonschicht (ODP) [kg CFC-11 eq.]: B6 2.67482e-13
- Versauerungspotenzial, kumulierte Überschreitung (AP) [Mole of H+ eq.]: B6 0.000276534
- Eutrophierungspotenzial - Süßwasser (EP-freshwater) [kg P eq.]: B6 1.09673e-7
- Eutrophierungspotenzial - Salzwasser (EP-marine) [kg N eq.]: B6 5.01678e-5
- Eutrophierungspotenzial - Land (EP-terrestrial) [Mole of N eq.]: B6 0.000546374
- Bildungspotenzial für troposphärisches Ozon (POCP) [kg NMVOC eq.]: B6 0.000190262
- Potenzial für die Verknappung abiotischer Ressourcen nicht fossile Ressourcen (ADPE) [kg Sb eq.]: B6 2.24623e-6
- Potenzial für die Verknappung abiotischer Ressourcen fossile Brennstoffe (ADPF) [MJ]: B6 0.880173
- Wasser-Entzugspotenzial (Benutzer) (WDP) [m³ world equiv.]: B6 0.0141709

## Use advice
Dieser Datensatz bezieht sich auf die Produktion von 1 kWh (3,6 MJ) elektrischer Energie aus Solarenergie mittels Photovoltaik. Der Datensatz kann verwendet werden, um die potentiellen Umweltwirkungen durch Stromverbräuche aus Photovoltaik Anlagen während der Gebäudenutzungsphase zu bilanzieren.

## Data sources
- Documentation of data quality management
- GaBi Database Edition 2021, CUP2021.01
- GaBi database (all versions)
