# Warmgewalztes Stahlband

Dataset: ILCD process, EPD, average dataset
Geography: AT
Reference year: 2021
Valid until: 2026
Classification: OEKOBAU.DAT: Metalle / Stahl und Eisen / Stahlbleche
Classification: IBUCategories: 02 Bauprodukte / Metallbauprodukte und Zubehör / Baustähle
Method details: Baustähle.pdf
Generated by: Daxner & Merl GmbH
Registration number: EPD-VOE-20210206-IBA1-DE
Owner: voestalpine AG
Compliance: DIN EN 15804+A2; ISO 14025
Review: Accredited third party review by Institut Bauen und Umwelt e. V.
Amounts: rows without a unit in brackets have none in this file; such an amount is in the reference unit of its flow, which a separate flow dataset defines
copyright: true
licenseType: Free of charge for all users and uses
accessRestrictions: None

## General comment
Warmgewalztes Stahlband der voestalpine Stahl GmbH bzw. weiterbehandelt durch die voestalpine Steel & Service Center GmbH, besteht aus einem über die Hochofenroute kontinuierlich gefertigten Stahlband mit einem oder mehreren, vom Kunden gewünschten, Behandlungsschritten (z. B. Beizen oder Glühen). In die Durchschnittsbetrachtung dieser EPD wurden niedrig- und mittellegierte Stähle, aber auch höherfeste Güten miteinbezogen.

## Technology and included processes
Das Ausgangsmaterial für die Herstellung des Warmbandes ist die Stahlbramme, die über die Primärroute (Hochofen, LD-Stahlwerk) hergestellt wird. Der flüssige Rohstahl wird mittels Stranggussverfahren zu Brammen gegossen. Die gegossenen Brammen werden über Stoß- bzw. Hubbalkenöfen erneut auf 900-1250 °C erwärmt und in mehreren Walzschritten zu Bändern mit einer Dicke von 1,5 - 20 mm gewalzt. Auf dem Warmband bildet sich eine Walzzunderschicht aus, die vor der Weiterverarbeitung, je nach Kundenwunsch, mechanisch entfernt wird (Entzundern über Streckrichtanlage). In weiterer Folge wird das Stahlband je nach Kundenwunsch mittels Salzsäure gebeizt oder bei Tafelprodukten längs- bzw. quergeteilt und in der Tafelglühe nachgeglüht.
Technische Daten:
Maßgebend sind die in der Leistungserklärung aufgeführten Daten:
Deklarierte Einheit:
Die vorliegende Umwelt-Produktdeklaration bezieht sich auf eine deklarierte Einheit von 1 Tonne warmgewalztes Stahlband.

## Technical purpose
Die Anwendungsbereiche der warmgewalzten Stahlbänder betreffen viele Branchen und Bereiche - aufgeteilt in mehrere Segmente:

Haustechnik

Profilindustrie

Rohrindustrie

Nutzfahrzeugindustrie

Automobilzulieferindustrie

Automobilindustrie

Maschinenbau

Stahl- und Anlagenbau

DruckbehälterproduktionDas warmgewalzte Stahlband der voestalpine Stahl GmbH wird mit unterschiedlichen Güten ausgeliefert. Durch zusätzliche Behandlungsschritte (Beizen, Glühen) werden kundenspezifische Produktanforderungen erfüllt. Das deklarierte Produkt weist aufgrund der gewählten chemischen Zusammensetzung und der Warmwalz- und Glühparameter definierte Festigkeits- und Verarbeitungseigenschaften (Umformen, Schweißen) auf. Je nach Anwendungszweck werden unterschiedliche Oberflächenausführungen angeboten, walzblaue Oberfläche (verzundert) oder gebeizt oder gebeizt/geölt.

## Reference product
- Warmband (): 1000

## Inputs
- Erneuerbare Primärenergie als Energieträger (PERE) [MJ]: A1-A3 994.583, C1 0, C2 2.29163, C3 0, C4 2.56803, D 1107.86
- Erneuerbare Primärenergie zur stofflichen Nutzung (PERM) [MJ]: A1-A3 0, C1 0, C2 0, C3 0, C4 0, D 0
- Total erneuerbare Primärenergie (PERT) [MJ]: A1-A3 994.583, C1 0, C2 2.29163, C3 0, C4 2.56803, D 1107.86
- Nicht-erneuerbare Primärenergie als Energieträger (PENRE) [MJ]: A1-A3 17615.9, C1 0, C2 39.97, C3 0, C4 35.5601, D -12049.4
- Nicht-erneuerbare Primärenergie zur stofflichen Nutzung (PENRM) [MJ]: A1-A3 0, C1 0, C2 0, C3 0, C4 0, D 0
- Total nicht erneuerbare Primärenergie (PENRT) [MJ]: A1-A3 17615.9, C1 0, C2 39.97, C3 0, C4 35.5601, D -12049.4
- Einsatz von Sekundärstoffen (SM) [kg]: A1-A3 133.756, C1 0, C2 0, C3 0, C4 0, D 816.24
- Erneuerbare Sekundärbrennstoffe (RSF) [MJ]: A1-A3 0, C1 0, C2 0, C3 0, C4 0, D 0
- Nicht erneuerbare Sekundärbrennstoffe (NRSF) [MJ]: A1-A3 0, C1 0, C2 0, C3 0, C4 0, D 0
- Einsatz von Süßwasserressourcen (FW) [m^3]: A1-A3 3.40064, C1 0, C2 0.00262466, C3 0, C4 0.000367451, D -6.09893

## Outputs
- Gefährlicher Abfall zur Deponie (HWD) [kg]: A1-A3 5.49139e-6, C1 0, C2 2.1061e-9, C3 0, C4 6.30055e-9, D 3.35993e-6
- Entsorgter nicht gefährlicher Abfall (NHWD) [kg]: A1-A3 24.7428, C1 0, C2 0.00627081, C3 0, C4 50.0682, D 144.84
- Entsorgter radioaktiver Abfall (RWD) [kg]: A1-A3 0.12125, C1 0, C2 7.25026e-5, C3 0, C4 0.000405317, D 0.000436137
- Komponenten für die Wiederverwendung (CRU) [kg]: A1-A3 0, C1 0, C2 0, C3 0, C4 0, D 0
- Stoffe zum Recycling (MFR) [kg]: A1-A3 0, C1 0, C2 0, C3 950, C4 0, D 0
- Stoffe für die Energierückgewinnung (MER) [kg]: A1-A3 0, C1 0, C2 0, C3 0, C4 0, D 0
- Exportierte elektrische Energie (EEE) [MJ]: A1-A3 0, C1 0, C2 0, C3 0, C4 0, D 0
- Exportierte thermische Energie (EET) [MJ]: A1-A3 0, C1 0, C2 0, C3 0, C4 0, D 0

## Impact indicators
- Globales Erwärmungspotenzial total (GWP-total) [kg CO_(2)-Äq.]: A1-A3 2169.6, C1 0, C2 3.02407, C3 0, C4 2.41918, D -1384.63
- Globales Erwärmungspotenzial fossil (GWP-fossil) [kg CO_(2)-Äq.]: A1-A3 2164.97, C1 0, C2 3.00319, C3 0, C4 2.44175, D -1383.93
- Globales Erwärmungspotenzial biogen (GWP-biogenic) [kg CO_(2)-Äq.]: A1-A3 3.90763, C1 0, C2 -0.00356122, C3 0, C4 -0.0250097, D -0.896533
- Globales Erwärmungspotenzial luluc (GWP-luluc) [kg CO_(2)-Äq.]: A1-A3 0.719436, C1 0, C2 0.0244391, C3 0, C4 0.00244365, D 0.200285
- Abbau Potential der stratosphärischen Ozonschicht (ODP) [kg CFC11-Äq.]: A1-A3 5.91335e-11, C1 0, C2 5.90297e-16, C3 0, C4 5.76801e-15, D -2.30751e-12
- Versauerungspotenzial von Boden und Wasser (AP) [mol H^(+)-Äq.]: A1-A3 4.53484, C1 0, C2 0.00991632, C3 0, C4 0.00777562, D -2.48431
- Eutrophierungspotenzial Süßwasser (EP-freshwater) [kg PO_(4)-Äq.]: A1-A3 0.00215423, C1 0, C2 8.88276e-6, C3 0, C4 1.85847e-6, D -0.000282991
- Eutrophierungspotenzial Salzwasser (EP-marine) [kg N-Äq.]: A1-A3 0.944176, C1 0, C2 0.00455498, C3 0, C4 0.00193046, D -0.370242
- Eutrophierungspotenzial Land (EP-terrestrial) [mol N-Äq.]: A1-A3 10.2504, C1 0, C2 0.0508449, C3 0, C4 0.0211802, D -3.60952
- Bildungspotential für troposphärisches Ozon (POCP) [kg NMVOC-Äq.]: A1-A3 3.30597, C1 0, C2 0.00894108, C3 0, C4 0.00608284, D -1.89551
- Potenzial für den abiotischen Abbau nicht fossiler Ressourcen (ADPE) [kg Sb-Äq.]: A1-A3 0.00186824, C1 0, C2 2.65014e-7, C3 0, C4 1.68496e-7, D -0.00301123
- Potenzial für den abiotischen Abbau fossiler Brennstoffe (ADPF) [MJ]: A1-A3 17494.9, C1 0, C2 39.8249, C3 0, C4 35.5529, D -12045.7
- Wassernutzung (WDP) [m^(3) Welt-Äq. entzogen]: A1-A3 64.6273, C1 0, C2 0.0277457, C3 0, C4 -0.028939, D -271.573
- Auftreten von Krankheiten aufgrund von Feinstaubemissionen (PM) [Krankheitsfälle]
- Wirkung durch Exposition des Menschen mit U235 (IR) [kBq U235-Äq.]
- Toxizitätsvergleichseinheit für Ökosysteme (ETP-fw) [CTUe]
- Toxizitätsvergleichseinheit für Menschen (krebserregend) (HTP-c) [CTUh]
- Toxizitätsvergleichseinheit für Menschen (nicht krebserregend) (HTP-nc) [CTUh]
- Bodenqualitätsindex (SQP) [SQP]

## Use advice
Gültigkeitsbereich:
Die vorliegende Umwelt-Produktdeklaration bezieht sich auf eine deklarierte Einheit von 1 Tonne warmgewalztes Stahlband produziert am Standort Linz.
Systemgrenze:
Die Ökobilanz des durchschnittlichen warmgewalzten Stahlbandes beinhaltet eine cradle-to-gate-Betrachtung (Wiege bis zum Werkstor) der auftretenden Umweltwirkungen mit den Modulen C1-C4 und Modul D (A1-A3 + C + D). Die folgenden Lebenszyklusphasen werden in der Analyse berücksichtigt:

Modul A1-A3 | Produktionsstadium

Das Produktionsstadium beinhaltet die Aufwendungen der Rohstoffversorgung (Kohle, Eisenerz, Pellets etc.) sowie der damit verbundenen Transporte zum Produktionsstandort Linz. Innerhalb der Werksgrenzen werden die benötigten Material- und Energieflüsse für die Sinteranlage, die Kokerei, die Hochöfen, das Stahlwerk, die Warmbandstraße und das Beizen separat betrachtet.

Die Energiebereitstellung am Standort Linz erfolgt über ein Kraftwerk, in dem Hüttengase zur Energiegewinnung verwertet werden. Da mehr Energie verbraucht wird als durch das eigene Kraftwerk zur Verfügung steht, werden zusätzlich Erdgas und elektrische Energie vom österreichischen Netz bezogen. Auch die Produktion der Verpackung des warmgewalzten Stahlbandes ist in Modul A1-A3 erfasst.

Modul C1 | Rückbau

Für das End-of-Life-Szenario wird angenommen, dass das Endprodukt nicht mit anderen Materialien verbunden ist und sortenrein rückgebaut werden kann. Die mit dem Rückbau verbundenen Aufwände werden damit als gering eingeschätzt und sind somit vernachlässigbar.

Modul C2 | Transport

Modul C2 beinhaltet den Transport zur Abfallbehandlung. Dazu wird der Transport via LKW über 50 km Transportdistanz als repräsentatives Szenario angesetzt.
Modul C3 | Abfallbehandlung

Jener Produktfluss, der das Modul D zum Recycling erreicht, verlässt das Produktsystem in C3. Aufwendungen für die Zerkleinerung und Sortierung des Stahlschrottes sind aufgrund der Geringfügigkeit der zu erwartenden Umweltwirkung nicht enthalten.
Modul C4 | Entsorgung

Das Modul C4 deklariert die durch die Deponierung

(5 % des Produktes) entstehenden Umweltwirkungen.
Modul D | Nutzen und Lasten außerhalb der Systemgrenzen

Im Modul D werden die Substitutionspotenziale von Primärstahl durch ein Recyclingszenario (95 % des Produktes) dargestellt.

## Data sources
- GaBi Database (all versions)
- GaBi Database Edition 2021, CUP 2021.01
