# Fußbodenbelag mehrschichtiges Nadelvlies (Teppichboden, 1400 g/m²)

Dataset: ILCD process, EPD, generic dataset
Geography: DE
Reference year: 2018
Valid until: 2022
Classification: oekobau.dat: Kunststoffe / Bodenbeläge / Textile Bodenbeläge
Owner: thinkstep
Compliance: DIN EN 15804
Review: Dependent internal review by thinkstep, IABP-GaBi, IBP-GaBi; Independent external review by GaBi user forum, GaBi bug forum, GaBi user community
Amounts: rows without a unit in brackets have none in this file; such an amount is in the reference unit of its flow, which a separate flow dataset defines
copyright: true

## General comment
Dieser Datensatz wurde nach dem European Standard EN 15804 für Nachhaltiges Bauen modelliert. Ergebnisse werden in Modulen abgebildet, die den strukturierten Ausdruck von Ergebnissen über den gesamten Lebenszyklus zulassen.

## Geography
Der Datensatz bildet die länderspezifische Situation in Deutschland ab. Dabei werden Haupttechnologien, spezifische regionale Charakteristiken und ggf. Importstatistiken berücksichtigt.

## Time period
Jährlicher Durchschnitt

## Technology and included processes
In diesem Datensatz ist ein Durchschnitt aus homogenen (Typ 1) und mehrschichtigen (Typ 2/3) Bodenbelägen betrachtet mit einem durchschnittliche Nutzschichtgewicht von 600 g/m².
Die Zusammensetzung der polymeren Nutzschicht besteht aus 37% Polymid 6, 37% Polypropylen und 26% Polyester.
Als Färbung der Nutzschicht ist für diesen Datensatz ein Durchschnitt aus spinngefärbtem und stranggefärbtem Garn angenommen.
Die Nadelvliese sind mit einer Appretur versehen, die auf einer durchschnittlichen Rezeptur aus SBR-Latex und SA-Latex basiert und mit Flammschutz versehen ist.

Die Herstellung der polymeren Nutzschicht dominiert die Ökobilanz.

Hintergrundsystem:
Strom: Die Stromerzeugung wird entsprechend der länderspezifischen Randbedingungen modelliert. Die landesspezifische Analyse beinhaltet:
1.: Spezifische Kraftwerke der verschiedenen fossilen Energieträger und der Einsatz erneuerbarer Energien sind entsprechend der länderspezifischen Energieträgermixe modelliert. Die Analyse bezieht Stromimporte aus den Nachbarländern, Transmissions-und Verteilungsverluste und den Eigenverbrauch im Kraftwerk und bei der Verteilung bzw. Speicherung, z. B. durch Pumpspeicherwerke, ein.
2.: Die landes-/regionalspezifischen Technologiestandards sowie die Erzeugung in Elektrizitätskraftwerken und/oder in speziellen Kraftwerken mit Kraft-Wärme-Kopplung (KWK) sind berücksichtigt.
3.: Die länderspezifische Energieträgerbereitstellung (mit Anteil der Importe und/oder Eigenversorgung) einschließlich der Energieträger-Eigenschaften (z. B. Elementar- und Energiegehalte) werden berücksichtigt.
4.: Die Förderung, Produktion, Verarbeitung und Transportprozesse werden entsprechend der Situation im jeweiligen Stromerzeugerland modelliert. Die unterschiedlichen Produktions- und Verarbeitungsverfahren (Emissionen und Wirkungsgrade) in den verschiedenen Energieerzeugerländern werden einbezogen, z. B. Rohöl-Veredelungsverfahren oder Abfackel-Raten an den Ölplattformen.
Thermische Energie, Prozessdampf: Die Erzeugung von Dampf und thermischer Energie in Heizkraftwerken wird entsprechend der landesspezifischen Situation (Emissionsgrenzwerte, Energieträgerbasis) modelliert.
Der Wirkungsgrad für die thermische Energieerzeugung beträgt per Definition 100% des Energieträgereinsatzes. Für Prozessdampf liegt der Wirkungsgrad im Bereich von 85-95%. Die zur Heizenergie-Erzeugung verwendeten Energieträger werden entsprechend der nationalen Situation modelliert (siehe Kapitel Strom oben).
Transporte: Alle relevanten und bekannten Transportprozesse in Form von See- und Binnenschiffsverkehr sowie Bahn-, Lkw- und der Leitungstransport sind enthalten.
Energieträger: Die Energieträger werden entsprechend der spezifischen Versorgungslage modelliert (siehe Kapitel Strom oben).
Raffinerieprodukte: Diesel, Benzin, technische Gase, Heizöl, Schmierstoffe und Rückstände, wie Bitumen, werden mit einem parametrierten länderspezifische Raffineriemodell modelliert. Das Raffinerie-Modell bezieht die länderspezifischen Veredelungsverfahren (z. B. Emissionspegel, interner Energieverbrauch etc.) und das länderspezifische Produktspektrum ein, das sich je nach Land stark unterscheiden kann. Die Rohöl-Förderung wird gemäß der länderspezifischen Situation mit den jeweiligen Energieträger-Eigenschaften modelliert.

## Technical purpose
Der Einsatzbereich des deklarierten Bodenbelags ist der Objektbereich. Im Allgemeinen erfolgt die Installation im Gebäude als verklebte Verlegung.

## Safety margin
10 %. Produktsystem weitgehend vollständig abgebildet. Gute technologische, zeitliche und geographische Repräsentativität.

## Reference product
- Nadelvlies Bodenbelag: 1

## Inputs
- Erneuerbare Primärenergie als Energieträger (PERE) [MJ]: A1-A3 13.2513, C1 0, C2 0.00279664, C3 0.279174, D -6.93458
- Erneuerbare Primärenergie zur stofflichen Nutzung (PERM) [MJ]: A1-A3 0, C1 0, C2 0, C3 0, D 0
- Total erneuerbare Primärenergie (PERT) [MJ]: A1-A3 13.2513, C1 0, C2 0.00279664, C3 0.279174, D -6.93458
- Nicht-erneuerbare Primärenergie als Energieträger (PENRE) [MJ]: A1-A3 142.582, C1 0, C2 0.048039, C3 50.3388, D -23.3716
- Nicht-erneuerbare Primärenergie zur stofflichen Nutzung (PENRM) [MJ]: A1-A3 48.73, C1 0, C2 0, C3 -48.73, D 0
- Total nicht erneuerbare Primärenergie (PENRT) [MJ]: A1-A3 191.312, C1 0, C2 0.048039, C3 1.6088, D -23.3716
- Einsatz von Sekundärstoffen (SM) [kg]: A1-A3 0, C1 0, C2 0, C3 0, D 0
- Erneuerbare Sekundärbrennstoffe (RSF) [MJ]: A1-A3 3.75508e-9, C1 0, C2 0, C3 0, D 0
- Nicht erneuerbare Sekundärbrennstoffe (NRSF) [MJ]: A1-A3 4.41079e-8, C1 0, C2 0, C3 0, D 0
- Einsatz von Süßwasserressourcen (FW) [m3]: A1-A3 0.038053, C1 0, C2 2.50463e-6, C3 0.0109003, D -0.003233

## Outputs
- Gefährlicher Abfall zur Deponie (HWD) [kg]: A1-A3 1.19375e-7, C1 0, C2 1.79517e-9, C3 1.47633e-9, D -1.24595e-8
- Entsorgter nicht gefährlicher Abfall (NHWD) [kg]: A1-A3 0.161736, C1 0, C2 8.43169e-6, C3 0.0563092, D -0.0111994
- Entsorgter radioaktiver Abfall (RWD) [kg]: A1-A3 0.00479312, C1 0, C2 5.05752e-8, C3 4.04121e-5, D -0.000837881
- Komponenten für die Wiederverwendung (CRU) [kg]: A1-A3 0, C1 0, C2 0, C3 0, D 0
- Stoffe zum Recycling (MFR) [kg]: A1-A3 0, C1 0, C2 0, C3 0, D 0
- Stoffe für die Energierückgewinnung (MER) [kg]: A1-A3 0, C1 1.54, C2 0, C3 0, D 0
- Exportierte elektrische Energie (EEE) [MJ]: A1-A3 0, C1 0, C2 0, C3 6.09691, D 0
- Exportierte thermische Energie (EET) [MJ]: A1-A3 0, C1 0, C2 0, C3 13.1537, D 0

## Impact indicators
- Globales Erwärmungspotenzial (GWP) [kg CO2 Äquiv.]: A1-A3 8.91813, C1 0, C2 0.00357416, C3 4.04533, D -1.60441
- Abbaupotenzial der stratosphärischen Ozonschicht (ODP) [kg R11 Äquiv.]: A1-A3 3.68438e-9, C1 0, C2 1.18306e-18, C3 1.58009e-15, D -3.83512e-14
- Versauerungspotential (AP) [kg SO2 Äquiv.]: A1-A3 0.0128738, C1 0, C2 7.21942e-6, C3 0.00250068, D -0.00137188
- Eutrophierungspotential (EP) [kg Phosphat Äquiv.]: A1-A3 0.00181342, C1 0, C2 1.71626e-6, C3 0.000581077, D -0.000260533
- Bildungspotenzial für troposphärisches Ozon (POCP) [kg Ethen Äquiv.]: A1-A3 0.00197164, C1 0, C2 -2.35957e-6, C3 0.000144935, D -0.00013858
- Potenzial für den abiotischen Abbau nicht fossiler Ressourcen (ADPE) [kg Sb Äquiv.]: A1-A3 2.58479e-6, C1 0, C2 3.00769e-10, C3 1.80975e-8, D -4.0865e-7
- Potenzial für den abiotischen Abbau fossiler Brennstoffe (ADPF) [MJ]: A1-A3 179.169, C1 0, C2 0.0479098, C3 1.50678, D -21.2564

## Use advice
Dieser Datensatz bezieht sich auf die Herstellung von 1 m² mehrschichtigem Nadelvlies Bodenbelag mit einem Flächengewicht von 1400 g/m². Das Flächengewicht der polymeren Nutzschicht beträgt 600 g/m².
Die Skalierung des Datensatzes auf andere Flächengewichte wird nicht empfohlen, da insbesondere die Zusammensetzung/Masse der polymeren Nutzschicht (und nicht das Flächengewicht des Bodenbelags) für die Ökobilanzergebnisse entscheidend ist.

## Data sources
- GaBi databases
- Gemeinschaft Umweltfreundlicher Teppichboden e.V. (GUT)
- GaBi Database Edition 2020, SP40
- GaBi database (all versions)
