# TPO/FPO Dach-und Dichtungsbahn

Dataset: ILCD process, EPD, specific dataset
Geography: RER
Reference year: 2021
Valid until: 2026
Classification: OEKOBAU.DAT: Kunststoffe / Dachbahnen / TPO-Dachbahnen (FPO)
Classification: IBUCategories: 02 Bauprodukte / Abdichtungen / Dach- und Dichtungsbahnsysteme aus Kunststoffen und Elastomeren
Method details: Dach- und Dichtungsbahnsysteme aus Kunststoffen und Elastomeren.pdf
Generated by: Sphera Solutions GmbH
Registration number: EPD-KBC-20210162-IBC1-DE
Owner: KÖSTER BAUCHEMIE AG
Compliance: DIN EN 15804+A2; ISO 14025
Review: Accredited third party review by Institut Bauen und Umwelt e. V.
Amounts: rows without a unit in brackets have none in this file; such an amount is in the reference unit of its flow, which a separate flow dataset defines
copyright: true
licenseType: Free of charge for all users and uses
accessRestrictions: None

## General comment
KÖSTER TPO Pro ist eine mit Heißluft verschweißbare Kunststoff Dach- und Dichtungsbahn aus flexiblen bzw. thermoplastischen Polyolefinen (FPO bzw. TPO) mit einem signifikanten Anteil an sortenreinem, recyceltem Polyethylen und einer mittigen Glasvlieseinlage.

Die mittige Glasvliesarmierung dient als zusätzlicher Festigkeitsträger und verbessert damit die mechanischen Eigenschaften der Dach- und Dichtungsbahn.

## Technology and included processes
Die Produktion der KÖSTER TPO Pro Dach- und Dichtungsbahnen ist nach /DIN EN ISO 9001/ zertifiziert. Die Herstellung der Bahnen erfolgt auf einer Zwei-Düsen Extrusionsanlage. Der Rohstoff wird in einem Extruder auf die entsprechende Temperatur erwärmt und unter Druck dem Prozess zugefügt. Durch Massentemperatur- und Druckmessung lassen sich die beiden niedrigviskosen Schmelzeströme überwachen. Die mittige Glasvlieseinlage dient als zusätzlicher Festigkeitsträger und verbessert damit die mechanischen Eigenschaften der Dach- und Dichtungsbahn. Durch die Regulierung der austretenden Schmelzeströme am Ende der Extrusionsdüsen wird die gewünschte Dicke der Dach- und Dichtungsbahnen erzielt. Die Bahnen werden nach dem Verlassen des Glättwerkes und vor dem Aufwickeln auf unter 30 °C abgekühlt. Die Kühlung erfolgt durch die wassergekühlten Walzen. Das aufgeheizte Wasser wird über einen Wärmetauscher gekühlt in den Wasserkreislauf zurückgeführt und wiederverwendet.
Technische Daten:
Bezeichnung nach DIN SPEC 20000-201:

KÖSTER TPO Pro 1.5: DE/E1-FPO-BV-E-GV-1,5

Bezeichnung nach DIN/TS 20000-202:
KÖSTER TPO 1.5: BA-FPO-BV-E-GV-1,5
Deklarierte Einheit:
Die deklarierte Einheit ist 1 m² produzierte TPO Pro Dachbahn mit einer Dicke von 1,5 mm und einem Flächengewicht von 1,505 kg/m².
Die deklarierten Dachbahnen sind nicht selbstklebend. Die Nähte werden durch thermisches Verschweißen zusammengefügt.

## Technical purpose
KÖSTER TPO Pro Dach- und Dichtungsbahnen dienen zur Abdichtung von unbelüfteten und belüfteten Flachdächern, geneigten Dächern, Terrassen, Balkonen und Tiefgaragen bei direkter Bewitterung und unter Auflast.
Sie können außerdem zur Abdichtung von Bauwerken gegen Bodenfeuchte und drückendes Wasser, wie Feuchträumen, Sprinklerbehältern und Teichen verwendet werden.
KÖSTER TPO Pro Dach- und Dichtungsbahnen können lose (unter Auflast) oder mechanisch befestigt verlegt werden.

## Scenarios
- S1: 100% stoffliches Recycling als Asphaltzusatz
- S2: 100% thermische Verwertung

## Reference product
- TPO Pro Dachbahn (1,5 mm Dicke, 1,505 kg/m²) (): 1

## Inputs
- Erneuerbare Primärenergie als Energieträger (PERE) [MJ]: A1-A3 6.0178, A4 0.00708, A5 0.422, C1 0, C2 (S1) 0.0169, C2 (S2) 0.00338, C3 (S1) 0.0262, C3 (S2) 0.135, D (S1) -0.777, D (S2) -8.88
- Erneuerbare Primärenergie zur stofflichen Nutzung (PERM) [MJ]: A1-A3 0.393, A4 0, A5 -0.393, C1 0, C2 (S1) 0, C2 (S2) 0, D (S1) 0, D (S2) 0
- Total erneuerbare Primärenergie (PERT) [MJ]: A1-A3 6.4078, A4 0.00708, A5 0.0295, C1 0, C2 (S1) 0.0169, C2 (S2) 0.00338, C3 (S1) 0.0262, C3 (S2) 0.135, D (S1) -0.777, D (S2) -8.88
- Nicht-erneuerbare Primärenergie als Energieträger (PENRE) [MJ]: A1-A3 23.256, A4 0.122, A5 0.13, C1 0, C2 (S1) 0.301, C2 (S2) 0.0602, C3 (S1) 13, C3 (S2) 13.5, D (S1) -37.7, D (S2) -40.4
- Nicht-erneuerbare Primärenergie zur stofflichen Nutzung (PENRM) [MJ]: A1-A3 12.9, A4 0, A5 -0.056, C1 0, C2 (S1) 0, C2 (S2) 0, C3 (S1) -12.9, C3 (S2) -12.9, D (S1) 0, D (S2) 0
- Total nicht erneuerbare Primärenergie (PENRT) [MJ]: A1-A3 36.156, A4 0.122, A5 0.0741, C1 0, C2 (S1) 0.301, C2 (S2) 0.0602, C3 (S1) 0.0592, C3 (S2) 0.632, D (S1) -37.7, D (S2) -40.4
- Einsatz von Sekundärstoffen (SM) [kg]: A1-A3 1.0081, A4 0, A5 0, C1 0, C2 (S1) 0, C2 (S2) 0, C3 (S1) 0, C3 (S2) 0, D (S1) 0, D (S2) 0
- Erneuerbare Sekundärbrennstoffe (RSF) [MJ]: A1-A3 0, A4 0, A5 0, C1 0, C2 (S1) 0, C2 (S2) 0, C3 (S1) 0, C3 (S2) 0, D (S1) 0, D (S2) 0
- Nicht erneuerbare Sekundärbrennstoffe (NRSF) [MJ]: A1-A3 0, A4 0, A5 0, C1 0, C2 (S1) 0, C2 (S2) 0, C3 (S1) 0, C3 (S2) 0, D (S1) 0, D (S2) 0
- Einsatz von Süßwasserressourcen (FW) [m^3]: A1-A3 0.018496, A4 6.34e-6, A5 0.000183, C1 0, C2 (S1) 1.96e-5, C2 (S2) 3.91e-6, C3 (S1) 3.03e-5, C3 (S2) 0.0102, D (S1) -0.00472, D (S2) -0.0103

## Outputs
- Gefährlicher Abfall zur Deponie (HWD) [kg]: A1-A3 2.843e-8, A4 4.54e-9, A5 3.44e-11, C1 0, C2 (S1) 1.4e-8, C2 (S2) 2.8e-9, C3 (S1) 2.45e-11, C3 (S2) 4.12e-10, D (S1) -7e-9, D (S2) -1.61e-8
- Entsorgter nicht gefährlicher Abfall (NHWD) [kg]: A1-A3 0.167324, A4 2.13e-5, A5 0.000481, C1 0, C2 (S1) 4.61e-5, C2 (S2) 9.21e-6, C3 (S1) 4.2e-5, C3 (S2) 0.0187, D (S1) -0.00645, D (S2) -0.0187
- Entsorgter radioaktiver Abfall (RWD) [kg]: A1-A3 0.000840322, A4 1.28e-7, A5 1e-5, C1 0, C2 (S1) 3.73e-7, C2 (S2) 7.45e-8, C3 (S1) 8.98e-6, C3 (S2) 4.25e-5, D (S1) -0.000259, D (S2) -0.00303
- Komponenten für die Wiederverwendung (CRU) [kg]: A1-A3 0, A4 0, A5 0, C1 0, C2 (S1) 0, C2 (S2) 0, C3 (S1) 0, C3 (S2) 0, D (S1) 0, D (S2) 0
- Stoffe zum Recycling (MFR) [kg]: A1-A3 0, A4 0, A5 0, C1 0, C2 (S1) 0, C2 (S2) 0, C3 (S1) 1.51, C3 (S2) 0, D (S1) 0, D (S2) 0
- Stoffe für die Energierückgewinnung (MER) [kg]: A1-A3 0, A4 0, A5 0, C1 0, C2 (S1) 0, C2 (S2) 0, C3 (S1) 0, C3 (S2) 0, D (S1) 0, D (S2) 0
- Exportierte elektrische Energie (EEE) [MJ]: A1-A3 0, A4 0, A5 0.0939, C1 0, C2 (S1) 0, C2 (S2) 0, C3 (S1) 0, C3 (S2) 10.1, D (S1) 0, D (S2) 0
- Exportierte thermische Energie (EET) [MJ]: A1-A3 0, A4 0, A5 0.168, C1 0, C2 (S1) 0, C2 (S2) 0, C3 (S1) 0, C3 (S2) 17.9, D (S1) 0, D (S2) 0

## Impact indicators
- Globales Erwärmungspotenzial total (GWP-total) [kg CO_(2)-Äq.]: A1-A3 1.6102, A4 0.00921, A5 0.0667, C1 0, C2 (S1) 0.0227, C2 (S2) 0.00454, C3 (S1) 0.00338, C3 (S2) 4.72, D (S1) -0.963, D (S2) -2.39
- Globales Erwärmungspotenzial fossil (GWP-fossil) [kg CO_(2)-Äq.]: A1-A3 1.6391, A4 0.00916, A5 0.00852, C1 0, C2 (S1) 0.0225, C2 (S2) 0.00451, C3 (S1) 0.00337, C3 (S2) 4.72, D (S1) -0.958, D (S2) -2.38
- Globales Erwärmungspotenzial biogen (GWP-biogenic) [kg CO_(2)-Äq.]: A1-A3 -0.0325407, A4 3.68e-6, A5 0.0582, C1 0, C2 (S1) 0, C2 (S2) 0, C3 (S1) 1.12e-5, C3 (S2) 8.54e-5, D (S1) -0.0048, D (S2) -0.0056
- Globales Erwärmungspotenzial luluc (GWP-luluc) [kg CO_(2)-Äq.]: A1-A3 0.0021354, A4 3.83e-5, A5 5.61e-6, C1 0, C2 (S1) 0.000183, C2 (S2) 3.66e-5, C3 (S1) 4.88e-6, C3 (S2) 3.07e-5, D (S1) -0.00019, D (S2) -0.00168
- Abbau Potential der stratosphärischen Ozonschicht (ODP) [kg CFC11-Äq.]: A1-A3 2.36357e-14, A4 2.25e-18, A5 8.37e-17, C1 0, C2 (S1) 2.71e-18, C2 (S2) 5.43e-19, C3 (S1) 7.4e-17, C3 (S2) 4.04e-16, D (S1) -2.15e-15, D (S2) -2.5e-14
- Versauerungspotenzial von Boden und Wasser (AP) [mol H^(+)-Äq.]: A1-A3 0.0159527, A4 8.24e-6, A5 1.65e-5, C1 0, C2 (S1) 2.32e-5, C2 (S2) 4.63e-6, C3 (S1) 7.43e-6, C3 (S2) 0.000482, D (S1) -0.00204, D (S2) -0.00334
- Eutrophierungspotenzial Süßwasser (EP-freshwater) [kg PO_(4)-Äq.]: A1-A3 9.1602e-6, A4 1.99e-8, A5 1.04e-8, C1 0, C2 (S1) 6.86e-8, C2 (S2) 1.37e-8, C3 (S1) 8.99e-9, C3 (S2) 5.68e-8, D (S1) -1.01e-6, D (S2) -3.09e-6
- Eutrophierungspotenzial Salzwasser (EP-marine) [kg N-Äq.]: A1-A3 0.00097932, A4 2.51e-6, A5 4.54e-6, C1 0, C2 (S1) 6.75e-6, C2 (S2) 1.35e-6, C3 (S1) 1.65e-6, C3 (S2) 0.000101, D (S1) -0.000503, D (S2) -0.000863
- Eutrophierungspotenzial Land (EP-terrestrial) [mol N-Äq.]: A1-A3 0.010617, A4 3.06e-5, A5 5.97e-5, C1 0, C2 (S1) 8.13e-5, C2 (S2) 1.63e-5, C3 (S1) 1.73e-5, C3 (S2) 0.00222, D (S1) -0.00537, D (S2) -0.00925
- Bildungspotential für troposphärisches Ozon (POCP) [kg NMVOC-Äq.]: A1-A3 0.003899, A4 6.74e-6, A5 1.24e-5, C1 0, C2 (S1) 1.87e-5, C2 (S2) 3.75e-6, C3 (S1) 4.52e-6, C3 (S2) 0.000299, D (S1) -0.00244, D (S2) -0.00248
- Potenzial für den abiotischen Abbau nicht fossiler Ressourcen (ADPE) [kg Sb-Äq.]: A1-A3 0.0184002, A4 7.6e-10, A5 1.12e-9, C1 0, C2 (S1) 1.62e-9, C2 (S2) 3.24e-10, C3 (S1) 9.74e-10, C3 (S2) 6.18e-9, D (S1) -1.11e-7, D (S2) -3.93e-7
- Potenzial für den abiotischen Abbau fossiler Brennstoffe (ADPF) [MJ]: A1-A3 36.156, A4 0.122, A5 0.0741, C1 0, C2 (S1) 0.301, C2 (S2) 0.0601, C3 (S1) 0.0592, C3 (S2) 0.632, D (S1) -37.7, D (S2) -40.3
- Wassernutzung (WDP) [m^(3) Welt-Äq. entzogen]: A1-A3 0.142399, A4 3.94e-5, A5 0.00723, C1 0, C2 (S1) 0.000202, C2 (S2) 4.04e-5, C3 (S1) 0.000734, C3 (S2) 0.436, D (S1) -0.184, D (S2) -0.248
- Auftreten von Krankheiten aufgrund von Feinstaubemissionen (PM) [Krankheitsfälle]
- Wirkung durch Exposition des Menschen mit U235 (IR) [kBq U235-Äq.]
- Toxizitätsvergleichseinheit für Ökosysteme (ETP-fw) [CTUe]
- Toxizitätsvergleichseinheit für Menschen (krebserregend) (HTP-c) [CTUh]
- Toxizitätsvergleichseinheit für Menschen (nicht krebserregend) (HTP-nc) [CTUh]
- Bodenqualitätsindex (SQP) [SQP]

## Use advice
Gültigkeitsbereich:
Diese EPD ist gültig für 1 m² der folgenden Dachbahnen unterschiedlicher Dicken. In Kapitel 5 sind die Werte von KÖSTER TPO Pro 1.5 deklariert. Weiteren Materialdicken können mithilfe einer Umrechnungsformel (siehe Kapitel 3.1) berechnet werden.
Die Ökobilanz beruht auf den Daten der KÖSTER BAUCHEMIE AG aus dem Produktionsjahr 2019, hergestellt im Werk Aurich in Deutschland.
Systemgrenze:
Typ der EPD: Wiege bis Werkstor - mit Optionen.

Produktstadium (A1- A3)

Rohstoffbereitstellung sowie LKW-Transport der Rohstoffe zum Werk. Produktionsaufwendungen und Herstellung des Verpackungsmaterials.

Stadium der Errichtung des Bauwerks (A4- A5)

Modul A4: LKW-Transport zur Baustelle (100 km). Transportentfernung kann ggfs. auf Gebäudeebene angepasst werden (z.B. bei 200 tatsächlicher Transportentfernung: Multiplikation der Ökobilanzwerte mit dem Faktor 2).

Modul A5: Verpackungsbehandlung und resultierende Gutschriften in Modul D. Verschweißen mit Heißluft (Energieverbrauch 0,031 MJ/m²). Verschnitte wurden vernachlässigt, da sie vom Gebäudekontext abhängen.

Entsorgungsstadium (C1- C4)

Modul C1: Manueller Rückbau (lastenfrei)

Modul C2: LKW-Transport zur Abfallaufbereitung zum stofflichen Recycling: 250 km (C2/1) und Transport zur thermischen Verwertung: 50 km (C2/2)

Transportentfernung kann ggfs. auf Gebäudeebene angepasst werden (z.B. bei doppelter km tatsächlicher Transportentfernung: Multiplikation der Ökobilanzwerte mit dem Faktor 2).

Modul C3/1: Abfallaufbereitung (Zerkleinerung) für stoffliches Recycling als Additiv bei der Asphaltherstellung.

Modul C3/2 Lasten aus thermischer Verwertung.

Gutschriften und Lasten außerhalb der Systemgrenzen (D)

Szenario D/1: Stoffliches Recycling als Asphaltzusatz (Abschätzung der ersparten Aufwendungen durch Verwendung eines Polyethylen Granulat Datensatzes). Die Gutschrift erfolgt nur für den primären Kunststoffanteil, das heißt für den Rezyklat Anteil im Produkt wird keine Gutschrift vergeben (Doppelzählung). Szenario D/2: Ersparte Aufwendungen durch Energiesubstitution aus thermischer Verwertung des Produkts (Substitution von Strom und thermischer Energie).

## Data sources
- GaBi Database (all versions)
- GaBi database SP40 2020
