# Konstruktionsvollholz & GLT® – Geprüfte Leimholz Träger

Dataset: ILCD process, EPD, average dataset
Geography: AT
Reference year: 2021
Valid until: 2026
Classification: OEKOBAU.DAT: Holz / Vollholz / Konstruktionsvollholz
Classification: IBUCategories: 02 Bauprodukte / Produkte aus Bauholz / Vollholzprodukte
Method details: Vollholzprodukte.pdf
Generated by: Daxner & Merl GmbH
Registration number: EPD-HAS-20210170-IBD1-DE
Owner: HASSLACHER Holding GmbH
Compliance: DIN EN 15804+A2; ISO 14025
Review: Accredited third party review by Institut Bauen und Umwelt e. V.
Amounts: rows without a unit in brackets have none in this file; such an amount is in the reference unit of its flow, which a separate flow dataset defines
copyright: true
licenseType: Free of charge for all users and uses
accessRestrictions: None

## General comment
Konstruktionsvollholz der HASSLACHER Holding GmbH ist ein industriell gefertigtes Produkt für tragende Konstruktionen. Es besteht aus technisch getrockneten, keilgezinkten, d. h. in der Länge kraftschlüssig mittels Keilzinkenverbindungen gestoßenen Bohlen und Kanthölzern aus Nadelholz, die visuell oder maschinell nach ihrer Festigkeit sortiert werden. Für die Verklebung werden Klebstoffe nach 2.5 verwendet. Konstruktionsvollholz wird mit einer maximalen Holzfeuchte von 18 % hergestellt.

Konstruktionsvollholz wird mit Maßen nach 2.4 und mit Maßtoleranzen gemäß EN 336 geliefert.

Konstruktionsvollholz ist insbesondere auf Grund schärferer Vorgaben hinsichtlich des Einschnitts und der Holzfeuchte sehr formstabil und neigt daher weniger zur Rissbildung als übliches Vollholz. Konstruktionsvollholz kann mit gegenüber üblichem keilgezinkten oder nicht keilgezinkten Schnittholz erhöhten Anforderungen an die Oberfläche hergestellt werden.

Die Herstellung unterliegt einer Eigen- und Fremdüberwachung gemäß EN 15497.

## Technology and included processes
Für die Herstellung von Konstruktionsvollholz wird konventionelles Schnittholz zunächst auf unter 18 % Holzfeuchte (Zielfeuchte: ca. 15 %) getrocknet, vorgehobelt und visuell, jedoch vorwiegend maschinell nach der Festigkeit sortiert. Identifizierte Bereiche mit festigkeitsmindernden Stellen werden abhängig von der erwünschten Festigkeitsklasse ausgekappt. Bei keilgezinktem Konstruktionsvollholz werden die entstandenen Schnittholzabschnitte durch Keilzinkenverbindungen zu endlos langen Lamellen gestoßen. Konstruktionsvollholz der HASSLACHER Preding Holzindustrie GmbH wird nach der Aushärtung einem Zug-Prüflastverfahren ausgesetzt. Wird die Zugprüfung positiv bestanden, werden die Querschnitte gehobelt, gefast, abgebunden und verpackt. Bei Bedarf können eine Behandlung mit Holzschutzmitteln oder eine Oberflächenveredelung oder auch Abbundarbeiten erfolgen.
Technische Daten:
Angegeben sind die bautechnischen Daten für keilgezinktes Vollholz aus Nadelholz nach EN 15497.
Deklarierte Einheit:
Die vorliegende Umwelt-Produktdeklaration bezieht sich auf eine deklarierte Einheit von 1 m³ HASSLACHER Konstruktionsvollholz mit einer durchschnittlichen Rohdichte von 470 kg/m³ und einer Auslieferungsfeuchte von 15 %.

## Technical purpose
Konstruktionsvollholz findet Anwendung als tragendes Bauteil in Konstruktionen des Hoch- und Brückenbaus.

Die Verwendung eines vorbeugenden chemischen Holzschutzes nach DIN 68800-3 ist unüblich und nur zulässig, wenn der bauliche Holzschutz nach DIN 68800-2 alleine nicht ausreichend ist. Sofern in Ausnahmefällen ein vorbeugendes chemisches Holzschutzmittel zum Einsatz kommt, muss dieses über eine allgemeine bauaufsichtliche Zulassung oder Zulassung nach Biozidrichtlinie geregelt sein.

## Reference product
- Konstruktionsvollholz (): 1

## Inputs
- Erneuerbare Primärenergie als Energieträger (PERE) [MJ]: A1-A3 2000.34, C1 0, C2 1.07706, C3 7682.24, C4 0, D -1826.45
- Erneuerbare Primärenergie zur stofflichen Nutzung (PERM) [MJ]: A1-A3 7654, C1 0, C2 0, C3 -7651.6, C4 0, D 0
- Total erneuerbare Primärenergie (PERT) [MJ]: A1-A3 9654.34, C1 0, C2 1.07706, C3 30.6381, C4 0, D -1826.45
- Nicht-erneuerbare Primärenergie als Energieträger (PENRE) [MJ]: A1-A3 712.895, C1 0, C2 18.7859, C3 66.5405, C4 0, D -7167.85
- Nicht-erneuerbare Primärenergie zur stofflichen Nutzung (PENRM) [MJ]: A1-A3 33.6725, C1 0, C2 0, C3 0, C4 0, D 0
- Total nicht erneuerbare Primärenergie (PENRT) [MJ]: A1-A3 746.568, C1 0, C2 18.7859, C3 66.5405, C4 0, D -7167.85
- Einsatz von Sekundärstoffen (SM) [kg]: A1-A3 0.121862, C1 0, C2 0, C3 0, C4 0, D 0
- Erneuerbare Sekundärbrennstoffe (RSF) [MJ]: A1-A3 0, C1 0, C2 0, C3 0, C4 0, D 7651.6
- Nicht erneuerbare Sekundärbrennstoffe (NRSF) [MJ]: A1-A3 0, C1 0, C2 0, C3 0, C4 0, D 0
- Einsatz von Süßwasserressourcen (FW) [m^3]: A1-A3 0.809528, C1 0, C2 0.00123359, C3 0.0298324, C4 0, D -1.20244

## Outputs
- Gefährlicher Abfall zur Deponie (HWD) [kg]: A1-A3 2.00256e-6, C1 0, C2 9.89869e-10, C3 1.75785e-8, C4 0, D -1.60827e-6
- Entsorgter nicht gefährlicher Abfall (NHWD) [kg]: A1-A3 1.80397, C1 0, C2 0.00294728, C3 0.0471551, C4 0, D 0.271643
- Entsorgter radioaktiver Abfall (RWD) [kg]: A1-A3 0.0160736, C1 0, C2 3.40762e-5, C3 0.00990141, C4 0, D -0.588619
- Komponenten für die Wiederverwendung (CRU) [kg]: A1-A3 0, C1 0, C2 0, C3 0, C4 0, D 0
- Stoffe zum Recycling (MFR) [kg]: A1-A3 0, C1 0, C2 0, C3 0, C4 0, D 0
- Stoffe für die Energierückgewinnung (MER) [kg]: A1-A3 0, C1 0, C2 0, C3 470, C4 0, D 0
- Exportierte elektrische Energie (EEE) [MJ]: A1-A3 0, C1 0, C2 0, C3 0, C4 0, D 0
- Exportierte thermische Energie (EET) [MJ]: A1-A3 0, C1 0, C2 0, C3 0, C4 0, D 0

## Impact indicators
- Globales Erwärmungspotenzial total (GWP-total) [kg CO_(2)-Äq.]: A1-A3 -695.816, C1 0, C2 1.42131, C3 759.456, C4 0, D -419.258
- Globales Erwärmungspotenzial fossil (GWP-fossil) [kg CO_(2)-Äq.]: A1-A3 56.691, C1 0, C2 1.4115, C3 3.73757, C4 0, D -408.123
- Globales Erwärmungspotenzial biogen (GWP-biogenic) [kg CO_(2)-Äq.]: A1-A3 -752.971, C1 0, C2 -0.00167377, C3 755.713, C4 0, D -10.816
- Globales Erwärmungspotenzial luluc (GWP-luluc) [kg CO_(2)-Äq.]: A1-A3 0.463294, C1 0, C2 0.0114864, C3 0.00529095, C4 0, D -0.319425
- Abbau Potential der stratosphärischen Ozonschicht (ODP) [kg CFC11-Äq.]: A1-A3 1.34398e-6, C1 0, C2 2.7744e-16, C3 8.94654e-14, C4 0, D -5.31659e-12
- Versauerungspotenzial von Boden und Wasser (AP) [mol H^(+)-Äq.]: A1-A3 0.455492, C1 0, C2 0.00466067, C3 0.00777939, C4 0, D 0.304727
- Eutrophierungspotenzial Süßwasser (EP-freshwater) [kg PO_(4)-Äq.]: A1-A3 0.00180674, C1 0, C2 4.1749e-6, C3 1.00274e-5, C4 0, D -0.000604653
- Eutrophierungspotenzial Salzwasser (EP-marine) [kg N-Äq.]: A1-A3 0.194016, C1 0, C2 0.00214084, C3 0.00184769, C4 0, D 0.0577358
- Eutrophierungspotenzial Land (EP-terrestrial) [mol N-Äq.]: A1-A3 1.93415, C1 0, C2 0.0238971, C3 0.0193988, C4 0, D 0.697954
- Bildungspotential für troposphärisches Ozon (POCP) [kg NMVOC-Äq.]: A1-A3 0.522839, C1 0, C2 0.00420231, C3 0.00501477, C4 0, D 0.261618
- Potenzial für den abiotischen Abbau nicht fossiler Ressourcen (ADPE) [kg Sb-Äq.]: A1-A3 2.53487e-5, C1 0, C2 1.24556e-7, C3 1.0996e-6, C4 0, D -7.47094e-5
- Potenzial für den abiotischen Abbau fossiler Brennstoffe (ADPF) [MJ]: A1-A3 745.915, C1 0, C2 18.7177, C3 66.5249, C4 0, D -7166.89
- Wassernutzung (WDP) [m^(3) Welt-Äq. entzogen]: A1-A3 10.6495, C1 0, C2 0.0130405, C3 0.59968, C4 0, D -10.4912
- Auftreten von Krankheiten aufgrund von Feinstaubemissionen (PM) [Krankheitsfälle]
- Wirkung durch Exposition des Menschen mit U235 (IR) [kBq U235-Äq.]
- Toxizitätsvergleichseinheit für Ökosysteme (ETP-fw) [CTUe]
- Toxizitätsvergleichseinheit für Menschen (krebserregend) (HTP-c) [CTUh]
- Toxizitätsvergleichseinheit für Menschen (nicht krebserregend) (HTP-nc) [CTUh]
- Bodenqualitätsindex (SQP) [SQP]

## Use advice
Gültigkeitsbereich:
Dieses Dokument bezieht sich auf von der HASSLACHER Gruppe am Standort Preding (Österreich) gefertigtes, durchschnittliches HASSLACHER Konstruktionsvollholz & GLT® – Geprüfte Leimholz Träger. Der Gültigkeitsbereich bezieht sich auf die gesamte Konstruktionsvollholz-Produktion der HASSLACHER-Gruppe (100 %). Es ist von einer guten Repräsentativität des deklarierten Durchschnitts auszugehen.
Systemgrenze:
Die Ökobilanz von HASSLACHER Konstruktionsvollholz beinhaltet eine cradle-to-gate-Betrachtung (Wiege bis zum Werkstor) der auftretenden Umweltwirkungen mit den Modulen C1-C4 und Modul D (A1-A3, +C, +D). Die folgenden Lebenszyklusphasen werden in der Analyse berücksichtigt:

Modul A1-A3 | Produktionsstadium

Das Produktionsstadium beinhaltet die Aufwendungen der Rohstoffversorgung (Schnittholz, Herstellung des Leimsystems etc.) sowie der damit verbundenen Transporte bezogen auf den Produktionsstandort in Preding. Innerhalb der Werksgrenzen werden die Sortierung, das Hobeln, das Keilzinken, das Fasen und der Abbund inklusive der Verpackung des Produkts berücksichtigt. Der Anteil des mit grünem Strom gedeckten Strombedarfs am Gesamtstrombedarf beträgt 100 % (Emissionsfaktor GWP-Gesamt: 13 g CO2-Äquivalent/kWh). Die Wärmebereitstellung erfolgt durch die energetische Nutzung der hölzernen Reststoffe aus der Produktion.

Modul C1 | Rückbau/Abriss

Nach dem Ablösen der auf dem Produkt liegenden Bauteilschichten können die Verbindungen durch Schrauben oder Sägen einfach gelöst und mittels Kränen zum Ort des Abtransports gehoben werden. Der dafür anfallende Energieaufwand ist gering und kann vernachlässigt werden. Der tatsächliche Energieeinsatz ist abhängig vom Einbau der Produkte und kann damit im jeweiligen Gebäudekontext stark variieren.

Modul C2 | Transport zur Abfallbehandlung

Modul C2 beinhaltet den Transport zur Abfallbehandlung. Dazu wird der Transport via LKW über 50 km Transportdistanz als repräsentatives Szenario angesetzt.

Modul C3 | Abfallbehandlung

In Modul C3 wird das Hacken nach Ausbau der Produkte betrachtet. Die Holzprodukte und mit ihnen die materialinhärenten Eigenschaften verlassen das Produktsystem als Sekundärbrennstoff in Modul C3.

Modul C4 | Beseitigung

Das angesetzte Szenario deklariert die energetische Verwertung der Holzprodukte, wodurch keine Umweltauswirkungen aus der Abfallbehandlung der Produkte in C4 zu erwarten sind.

Modul D | Nutzen und Lasten außerhalb der Systemgrenze

In Modul D wird die energetische Verwertung des Produktes am Lebensende inklusive den entsprechenden energetischen Substitutionspotenzialen in Form eines europäischen Durchschnittsszenarios beschrieben.

## Data sources
- GaBi Database (all versions)
- GaBi Database Edition 2021, CUP 2021.01
