# Knauf GaBi Gipskartonplatten Feuerschutz - GKF und GKFI - 12,5 mm; 10,0 kg / m²

Dataset: ILCD process, EPD, specific dataset
Geography: AT
Reference year: 2019
Valid until: 2024
Classification: OEKOBAU.DAT: Mineralische Baustoffe / Steine und Elemente / Gipsplatten
Synonyms: Gipsplatte, Gipskarton, Trockenbauplatte, Beplankung, Feuerschutzplatte, Nassraumplatte, Feuchtraumplatte
Method details: PKR Bau EPD GmbH PKR-Code: 2.10.1 Stand 17.08.2017 "Gipsplatten"
Generated by: IBO Institut für Baubiologie und Bauökologie
Registration number: BAU EPD-KNAUF-2019-1-Gipskartonplatten-GaBi
Owner: Knauf Gesellschaft m.b.H., Österreich
Compliance: EN 15804; ISO 14025
Review: Independent external review by Bau EPD GmbH - DI Sarah Richter
Amounts: rows without a unit in brackets have none in this file; such an amount is in the reference unit of its flow, which a separate flow dataset defines
copyright: true
licenseType: Free of charge for all users and uses

## General comment
Betrachtet werden die Gipsplatten (Knauf Feuerschutzplatte 12,5 mm/GKF/Typ DF, Knauf Feuerschutzplatte imprägniert 12,5 mm/GKFI/Typ DFH2) der Knauf GmbH für die Ausführung von nichttragenden Systemen.
Die Produkte werden aus Stuckgips (gebrannter Rohgips), Wasser, Karton, Kernleim und Additiven hergestellt. Die EPD repräsentiert den Durchschnitt der von Juli 2018 bis Juni 2019 produzierten Gipsplatten in Weißenbach/Liezen.
Die Rohdichte der Platten Knauf GKF und GKFI beträgt 800 kg/m³.
Als funktionale Einheit wurde ein Quadratmeter (m2) Gipsplatte festgelegt.

## Time period
Die EPD repräsentiert den Durchschnitt der von Juli 2018 bis Juni 2019 produzierten Gipsplatten in Weißenbach/Liezen. Die EPD wurde am 10.10.2019 ausgestellt.

## Technology and included processes
Herstellungsprozess:
Die Produkte werden aus Stuckgips (gebrannter Rohgips), Wasser, Karton, Kernleim und Additiven hergestellt. Siehe auch beigefügtes Flussdiagramm.

Die Plattendicke beträgt 12,5 mm. Das Gewicht einer Platte beträgt 10,0 kg/m². Die Rohdichte beträgt 800 kg/m². Die Wärmeleitfähigkeit beträgt 0,21 W/mK.
Spezifische Produktinformationen sind auf der Homepage der Fa. Knauf Gesellschaft m.b.H. abrufbar (http://www.knauf.at)

Brandschutz
Aufgrund ihrer Zusammensetzung sind Knauf-Platten geeignet, um im Brandfall Sicherheit zu gewährleisten.
Knauf Gipsplatten sind nach ÖNORM EN 13501-1 (EN 520) als A2- s1, d0 klassifiziert. Beim Brand wird kein/kaum Rauch (s1) frei und es entsteht kein brennendes Abfallen/Abtropfen (d0).
Trockenbausysteme aus Knauf-Platten bieten einen definierten Feuerwiderstand (EI30, EI 60, EI 90). Diese Leistungsfähigkeit der klassifizierten Knauf Systeme wird auch durch die Knauf Systemgarantie bestätigt.

Die Knauf-Platten werden auf Mehrwegpaletten ausgeliefert, während des LKW-Transportes werden diese mit Mehrweg-Spanngurten gesichert. Die Platten sind während des Transports und der Lagerung vor Witterungseinflüssen zu schützen.

## Technical purpose
Knauf Gipsplatten werden für die Ausführung von nichttragenden Systemen aus Gipsplatten gemäß ÖNORM B 3415 (wie z.B. Gipskartonständerwände, abgehängte Decken, nachträgliche Dachgeschoß-Ausbauten, Schachtwände und Bauteilverkleidungen sowie imprägnierte Platten auch in Feuchträumen) verwendet. Feuerschutzplatten werden zur Errichtung von Brandabschnitten verwendet.
Knauf-Platten sind Bestandteil von Knauf Metallständerwänden gem. ETA-13/0018.

## Reference product
- Knauf Gipskartonplatten Feuerschutz - GKF und GKFI - 12,5 mm (800 kg/m³ u. 10,0 kg/m²): 1

## Inputs
- Erneuerbare Primärenergie als Energieträger (PERE) / Uso de energía primaria renovable excluyendo los recursos de energía primaria renovable utilizada como materia prima (PERE) [MJ]: C1 0.00169444, C2 0.0247618, C3 0, C4 0.258862, D -1.32586, A1-A3 6.10711, A4 0.112063, A5 0.567925, B1 0, B2 0, B3 0, B4 0, B5 0, B6 0, B7 0, C1 0, C2 0, C3 0, C4 0, D 0
- Erneuerbare Primärenergie zur stofflichen Nutzung (PERM) / Uso de energía primaria renovable utilizada como materia prima (PERM) [MJ]: C1 0, C2 0, C3 0, C4 0, D 0, A1-A3 5.37953, A4 0, A5 0, B1 0, B2 0, B3 0, B4 0, B5 0, B6 0, B7 0, C1 0, C2 0, C3 0, C4 0, D 0
- Total erneuerbare Primärenergie (PERT) / Uso total de la energía primaria renovable (energía primaria y recursos de energía primaria renovable utilizada como materia prima) (PERT) [MJ]: C1 0.00169444, C2 0.0247618, C3 0, C4 0.258862, D -1.32586, A1-A3 11.4866, A4 0.112063, A5 0.567925, B1 0, B2 0, B3 0, B4 0, B5 0, B6 0, B7 0, C1 0, C2 0, C3 0, C4 0, D 0
- Nicht-erneuerbare Primärenergie als Energieträger (PENRE) / Uso de energía primaria no renovable, excluyendo los recursos de energía primaria no renovable utilizada como materia prima (PENRE) [MJ]: C1 0.455019, C2 0.431412, C3 0, C4 2.2757, D -2.79912, A1-A3 39.186, A4 1.63026, A5 4.03148, B1 0, B2 0, B3 0, B4 0, B5 0, B6 0, B7 0, C1 0, C2 0, C3 0, C4 0, D 0
- Nicht-erneuerbare Primärenergie zur stofflichen Nutzung (PENRM) / Uso de la energía primaria no renovable utilizada como materia prima (PENRM) [MJ]: C1 0, C2 0, C3 0, C4 0, D 0, A1-A3 0.791663, A4 0, A5 0, B1 0, B2 0, B3 0, B4 0, B5 0, B6 0, B7 0, C1 0, C2 0, C3 0, C4 0, D 0
- Total nicht erneuerbare Primärenergie (PENRT) / Uso total de la energía primaria no renovable (energía primaria y recursos de energía primaria renovable utilizada como materia prima) (PENRT) [MJ]: C1 0.455019, C2 0.431412, C3 0, C4 2.2757, D -2.79912, A1-A3 39.9776, A4 1.63026, A5 4.03148, B1 0, B2 0, B3 0, B4 0, B5 0, B6 0, B7 0, C1 0, C2 0, C3 0, C4 0, D 0
- Einsatz von Sekundärstoffen (SM) / Uso de materiales secundarios (SM) [kg]: C1 0, C2 0, C3 0, C4 0, D 0, A1-A3 0.244, A4 0, A5 0, B1 0, B2 0, B3 0, B4 0, B5 0, B6 0, B7 0, C1 0, C2 0, C3 0, C4 0, D 0
- Erneuerbare Sekundärbrennstoffe (RSF) / Uso de combustibles secundarios renovables (RSF) [MJ]: C1 0, C2 0, C3 0, C4 0, D 0, A1-A3 0, A4 0, A5 0, B1 0, B2 0, B3 0, B4 0, B5 0, B6 0, B7 0, C1 0, C2 0, C3 0, C4 0, D 0
- Nicht erneuerbare Sekundärbrennstoffe (NRSF) / Uso de combustibles secundarios no renovables (NRSF) [MJ]: C1 0, C2 0, C3 0, C4 0, D 0, A1-A3 0, A4 0, A5 0, B1 0, B2 0, B3 0, B4 0, B5 0, B6 0, B7 0, C1 0, C2 0, C3 0, C4 0, D 0
- Einsatz von Süßwasserressourcen (FW) / Uso neto de recursos de agua dulce (FW) [m3]: C1 3.17858e-6, C2 6.12007e-5, C3 0, C4 0.000463397, D -0.00112653, A1-A3 0.0143213, A4 0.000165855, A5 0.00330233, B1 0, B2 0, B3 0, B4 0, B5 0, B6 0, B7 0, C1 0, C2 0, C3 0, C4 0, D 0

## Outputs
- Gefährlicher Abfall zur Deponie (HWD) / Residuos peligrosos eliminados (HWD) [kg]: C1 7.03693e-11, C2 3.23075e-8, C3 0, C4 5.20467e-8, D -4.49693e-9, A1-A3 9.17216e-7, A4 2.07684e-7, A5 5.9324e-8, B1 0, B2 0, B3 0, B4 0, B5 0, B6 0, B7 0, C1 0, C2 0, C3 0, C4 0, D 0
- Entsorgter nicht gefährlicher Abfall (NHWD) / Residuos no peligrosos eliminados (NHWD) [kg]: C1 5.45824e-5, C2 3.71647e-5, C3 0, C4 10.5385, D -0.00565915, A1-A3 0.0328332, A4 0.000205746, A5 0.563001, B1 0, B2 0, B3 0, B4 0, B5 0, B6 0, B7 0, C1 0, C2 0, C3 0, C4 0, D 0
- Entsorgter radioaktiver Abfall (RWD) / Residuos radiactivos eliminados (RWD) [kg]: C1 1.78812e-7, C2 9.23285e-7, C3 0, C4 3.14345e-5, D -7.27564e-5, A1-A3 0.000162009, A4 2.82273e-6, A5 4.71074e-5, B1 0, B2 0, B3 0, B4 0, B5 0, B6 0, B7 0, C1 0, C2 0, C3 0, C4 0, D 0
- Komponenten für die Wiederverwendung (CRU) / Componentes para su reutilización (CRU) [kg]: C1 0, C2 0, C3 0, C4 0, D 0, A1-A3 0, A4 0, A5 0, B1 0, B2 0, B3 0, B4 0, B5 0, B6 0, B7 0, C1 0, C2 0, C3 0, C4 0, D 0
- Stoffe zum Recycling (MFR) / Materiales para el reciclaje (MFR) [kg]: C1 0, C2 0, C3 0, C4 0, D 0, A1-A3 0, A4 0, A5 0, B1 0, B2 0, B3 0, B4 0, B5 0, B6 0, B7 0, C1 0, C2 0, C3 0, C4 0, D 0
- Stoffe für die Energierückgewinnung (MER) / Materiales para valorización energética (recuperación de energía) (MER) [kg]: C1 0, C2 0, C3 0, C4 0, D 0, A1-A3 0, A4 0, A5 0.0195999, B1 0, B2 0, B3 0, B4 0, B5 0, B6 0, B7 0, C1 0, C2 0, C3 0, C4 0, D 0
- Exportierte elektrische Energie (EEE) / Energía exportada electrica (EEE) [MJ]: C1 0, C2 0, C3 0, C4 0, D 0, A1-A3 0, A4 0, A5 0.88, B1 0, B2 0, B3 0, B4 0, B5 0, B6 0, B7 0, C1 0, C2 0, C3 0, C4 0, D 0
- Exportierte thermische Energie (EET) / Energía exportada termal (EET) [MJ]: C1 0, C2 0, C3 0, C4 0, D 0, A1-A3 0, A4 0, A5 2.184, B1 0, B2 0, B3 0, B4 0, B5 0, B6 0, B7 0, C1 0, C2 0, C3 0, C4 0, D 0

## Impact indicators
- Globales Erwärmungspotenzial (GWP) / Potencial de calentamiento global (GWP) [kg CO2-Äqv.]: C1 0.0330842, C2 0.031654, C3 0, C4 0.710312, D -0.256066, A1-A3 1.7631, A4 0.122057, A5 0.261748, B1 0, B2 0, B3 0, B4 0, B5 0, B6 0, B7 0, C1 0, C2 0, C3 0, C4 0, D 0
- Abbau Potential der stratosphärischen Ozonschicht (ODP) / Potencial de agotamiento de la capa de ozono estratosférico (ODP) [kg R11 eq.]: C1 4.42683e-15, C2 2.2547e-13, C3 0, C4 1.66138e-12, D -2.92813e-12, A1-A3 1.35018e-8, A4 3.00839e-13, A5 4.86396e-9, B1 0, B2 0, B3 0, B4 0, B5 0, B6 0, B7 0, C1 0, C2 0, C3 0, C4 0, D 0
- Versauerungspotenzial von Boden und Wasser (AP) / Potencial de acidificación del suelo y de los recursos de agua (AP) [kg SO2-Äqv.]: C1 3.61995e-5, C2 0.000139224, C3 0, C4 0.00101249, D -0.000495709, A1-A3 0.0036579, A4 0.000200223, A5 0.00100432, B1 0, B2 0, B3 0, B4 0, B5 0, B6 0, B7 0, C1 0, C2 0, C3 0, C4 0, D 0
- Eutrophierungspotenzial (EP) / Potencial de eutrofización (EP) [kg Phosphat-Äqv.]: C1 3.97186e-6, C2 3.42039e-5, C3 0, C4 0.000137748, D -6.24049e-5, A1-A3 0.00112972, A4 4.80729e-5, A5 0.000161681, B1 0, B2 0, B3 0, B4 0, B5 0, B6 0, B7 0, C1 0, C2 0, C3 0, C4 0, D 0
- Bildungspotential für troposphärisches Ozon (POCP) / Potencial de formación de ozono troposférico (POCP) [kg Ethen-Äqv.]: C1 6.20094e-6, C2 -4.75344e-5, C3 0, C4 9.72959e-5, D -4.49671e-5, A1-A3 0.000500799, A4 -4.0329e-5, A5 6.72517e-5, B1 0, B2 0, B3 0, B4 0, B5 0, B6 0, B7 0, C1 0, C2 0, C3 0, C4 0, D 0
- Potenzial für den abiotischen Abbau nicht fossiler Ressourcen (ADPE) / Potencial de agotamiento de recursos abióticos para recursos no fósiles (ADPE) [kg Sb-Äqv.]: C1 8.96077e-10, C2 2.33135e-9, C3 0, C4 5.81998e-8, D -5.61733e-8, A1-A3 7.91897e-6, A4 9.25114e-9, A5 2.64009e-5, B1 0, B2 0, B3 0, B4 0, B5 0, B6 0, B7 0, C1 0, C2 0, C3 0, C4 0, D 0
- Potenzial für den abiotischen Abbau fossiler Brennstoffe (ADPF) / Potencial de agotamiento de recursos abióticos para recursos fósiles (ADPF) [MJ]: C1 0.454561, C2 0.429061, C3 0, C4 2.19646, D -2.61433, A1-A3 39.3989, A4 1.62298, A5 3.81825, B1 0, B2 0, B3 0, B4 0, B5 0, B6 0, B7 0, C1 0, C2 0, C3 0, C4 0, D 0

## Use advice
Anmerkung zur Vergleichbarkeit: Ein Vergleich mit anderen Produkten ist nur mit einer vergleichbaren Anwendung im Gebäude sinnvoll. Grundsätzlich ist eine Gegenüberstellung oder die Bewertung von EPD Daten nur möglich, wenn alle zu vergleichenden Datensätze nach EN 15804 erstellt wurden und die produktspezifischen Leistungsmerkmale berücksichtigt werden.

## Data sources
- GaBi database SP30 2016
- GaBi database (general)
- Software: Umberto LCA+
