# Hochdichte Faserplatte (Durchschnitt DE)

Dataset: ILCD process, EPD, representative dataset
Geography: DE
Reference year: 2021
Valid until: 2026
Classification: OEKOBAU.DAT: Holz / Holzwerkstoffe / Holzfaserplatten
Method details: EN 15804; ILCD format
Generated by: Thünen-Institut für Holzforschung
Owner: Thünen-Institut für Holzforschung
Compliance: EN 15804+A2; EN 16485
Review: Independent external review by Dr. Frank Werner - Umwelt & Entwicklung
Amounts: rows without a unit in brackets have none in this file; such an amount is in the reference unit of its flow, which a separate flow dataset defines
copyright: true

## General comment
Weitere Informationen zur deklarierten Einheit (Zusammensetzung) und die auf Herstellerangaben beruhende Sachbilanz (In- und Output der Stoff- und Energieströme) stehen als Excel-Datei unter dem Unterpunkt Hintergrund-Bericht zum Download bereit.
Der Datensatz wurde 2021 als Aktualisierung mit gleichbleibendem Vordergrundsystem erstellt. Alle Hintergrunddaten entstammen der GaBi Professional Datenbank in der Content Version 2021.1. Die Modellierung und Berechnung der Ökobilanz basiert auf den europäischen Normen EN 15804:2012+A2:2019 und EN 16485:2014. Bei Rückfragen wenden Sie sich bitte an holzundklima@thuenen.de.

## Geography
Die Produktion der an der Ökobilanzstudie beteiligten Projektpartner lag bei 360.000 m³/a, was einer deutschlandweiten Abdeckung von 23% entspricht.

## Time period
Der Datensatz basiert auf Produktionsdaten aus den Jahren 2009 bis 2011 (Vordergrundsystem).
Eine Aktualisierung des Hintergrundsystems erfolgte 2021.

## Technology and included processes
Hochdichte Faserplatten (HDF) sind im Trockenverfahren hergestellte Holzwerkstoffe auf Basis von Holzfasern. Neben Holzfasern besteht HDF aus duroplastischen Bindemitteln und weiteren Zusätzen. Die Herstellung von HDF verläuft analog zur Herstellung von MDF, jedoch werden höhere Dichten erreicht. Zur Herstellung von HDF werden Industrieholz und Hackschnitzel als Holzrohstoffe angeliefert. Das Rundholz wird entrindet, zerhackt und zusammen mit den Hackschnitzeln gekocht. Die gekochten Hackschnitzel werden in einem Refiner unter hohem Druck zerfasert und anschließend direkt beleimt. Die beleimten Fasern werden getrocknet und zur Verpressung in entsprechenden Dicken gestreut. Der verpresste Plattenstrang wird aufgetrennt und formatiert. Nachdem der Klebstoff vollständig ausgehärtet ist, werden die Platten verpackt.
Die Holzfeuchte des Produktes liegt bei 9%

## Technical purpose
Hochdichte Faserplatten finden im Innen- und Dachausbau Anwendung. Bevorzugt werden sie als Trägermaterial für hohe Belastung bei geringer Materialstärke (z. B. Laminatfußböden) eingesetzt.

## Scenarios
- energetisch (Modul D): therm. Verwertung
- stofflich (Modul D): stoffl. Verwertung
- Entsorgung Verpackung (Modul A5): Das Modul A5 enthält ausschließlich die Entsorgung der Verpackungsmaterialien

## Reference product
- HDF (849,9 kg/m³): 1

## Inputs
- Erneuerbare Primärenergie als Energieträger (PERE) / Uso de energía primaria renovable excluyendo los recursos de energía primaria renovable utilizada como materia prima (PERE) [MJ]: A1 195.396, A2 30.4998, A3 3587.34, A1-A3 3813.23, A5 (Entsorgung Verpackung) 0.42824, C2 0.645815, C3 100.439, D (energetisch) 6540.24, D (stofflich) -53.8012
- Erneuerbare Primärenergie zur stofflichen Nutzung (PERM) / Uso de energía primaria renovable utilizada como materia prima (PERM) [MJ]: A1 12898.7, A2 0, A3 62.9527, A1-A3 12961.6, A5 (Entsorgung Verpackung) -62.9527, C2 0, C3 -12898.7, D (energetisch) 0, D (stofflich) 0
- Total erneuerbare Primärenergie (PERT) / Uso total de la energía primaria renovable (energía primaria y recursos de energía primaria renovable utilizada como materia prima) (PERT) [MJ]: A1 13094.1, A2 30.4998, A3 3650.29, A1-A3 16774.8, A5 (Entsorgung Verpackung) -62.5245, C2 0.645815, C3 -12798.2, D (energetisch) 6540.24, D (stofflich) -53.8012
- Nicht-erneuerbare Primärenergie als Energieträger (PENRE) / Uso de energía primaria no renovable, excluyendo los recursos de energía primaria no renovable utilizada como materia prima (PENRE) [MJ]: A1 2390.84, A2 386.615, A3 2681.33, A1-A3 5458.78, A5 (Entsorgung Verpackung) 2.15087, C2 11.5877, C3 153.986, D (energetisch) -3609.25, D (stofflich) -252.113
- Nicht-erneuerbare Primärenergie zur stofflichen Nutzung (PENRM) / Uso de la energía primaria no renovable utilizada como materia prima (PENRM) [MJ]: A1 1189.27, A2 0, A3 7.092, A1-A3 1196.36, A5 (Entsorgung Verpackung) -7.092, C2 0, C3 -1189.27, D (energetisch) 0, D (stofflich) 0
- Total nicht erneuerbare Primärenergie (PENRT) / Uso total de la energía primaria no renovable (energía primaria y recursos de energía primaria renovable utilizada como materia prima) (PENRT) [MJ]: A1 3580.11, A2 386.615, A3 2688.42, A1-A3 6655.15, A5 (Entsorgung Verpackung) -4.94113, C2 11.5877, C3 -1035.28, D (energetisch) -3609.25, D (stofflich) -252.113
- Einsatz von Sekundärstoffen (SM) / Uso de materiales secundarios (SM) [kg]: A1 0, A2 0, A3 0, A1-A3 0, A5 (Entsorgung Verpackung) 0, C2 0, C3 0, D (energetisch) 0, D (stofflich) 849.964
- Erneuerbare Sekundärbrennstoffe (RSF) / Uso de combustibles secundarios renovables (RSF) [MJ]: A1 0, A2 0, A3 3943.21, A1-A3 3943.21, A5 (Entsorgung Verpackung) 0, C2 0, C3 0, D (energetisch) 0, D (stofflich) 0
- Nicht erneuerbare Sekundärbrennstoffe (NRSF) / Uso de combustibles secundarios no renovables (NRSF) [MJ]: A1 0, A2 0, A3 0, A1-A3 0, A5 (Entsorgung Verpackung) 0, C2 0, C3 0, D (energetisch) 0, D (stofflich) 0
- Einsatz von Süßwasserressourcen (FW) / Uso neto de recursos de agua dulce (FW) [m3]: A1 0.687046, A2 0.0331707, A3 1.19803, A1-A3 1.91825, A5 (Entsorgung Verpackung) 0.0216913, C2 0.000739236, C3 0.0472656, D (energetisch) 1.23335, D (stofflich) -0.0292277

## Outputs
- Gefährlicher Abfall zur Deponie (HWD) / Residuos peligrosos eliminados (HWD) [kg]: A1 2.27239e-5, A2 2.42107e-8, A3 4.19505e-6, A1-A3 2.69432e-5, A5 (Entsorgung Verpackung) 3.87751e-10, C2 5.83896e-10, C3 5.59893e-8, D (energetisch) -1.66874e-6, D (stofflich) -3.52348e-7
- Entsorgter nicht gefährlicher Abfall (NHWD) / Residuos no peligrosos eliminados (NHWD) [kg]: A1 0.934083, A2 0.0698223, A3 6.4647, A1-A3 7.46861, A5 (Entsorgung Verpackung) 0.113852, C2 0.00172137, C3 0.11997, D (energetisch) 29.59, D (stofflich) -0.0594281
- Entsorgter radioaktiver Abfall (RWD) / Residuos radiactivos eliminados (RWD) [kg]: A1 0.0284834, A2 0.00373229, A3 0.168661, A1-A3 0.200876, A5 (Entsorgung Verpackung) 0.000108998, C2 1.40168e-5, C3 0.0123357, D (energetisch) -0.296634, D (stofflich) -0.00566146
- Komponenten für die Wiederverwendung (CRU) / Componentes para su reutilización (CRU) [kg]: A1 0, A2 0, A3 0, A1-A3 0, A5 (Entsorgung Verpackung) 0, C2 0, C3 0, D (energetisch) 0, D (stofflich) 0
- Stoffe zum Recycling (MFR) / Materiales para el reciclaje (MFR) [kg]: A1 0, A2 0, A3 0, A1-A3 0, A5 (Entsorgung Verpackung) 0, C2 0, C3 849.964, D (energetisch) 0, D (stofflich) 0
- Stoffe für die Energierückgewinnung (MER) / Materiales para valorización energética (recuperación de energía) (MER) [kg]: A1 0, A2 0, A3 0, A1-A3 0, A5 (Entsorgung Verpackung) 3.26671, C2 0, C3 849.964, D (energetisch) 0, D (stofflich) 0
- Exportierte elektrische Energie (EEE) / Energía exportada electrica (EEE) [MJ]: A1 0, A2 0, A3 0.0239921, A1-A3 0.0239921, A5 (Entsorgung Verpackung) 13.0403, C2 0, C3 0, D (energetisch) 0, D (stofflich) 0
- Exportierte thermische Energie (EET) / Energía exportada termal (EET) [MJ]: A1 0, A2 0, A3 0.0557366, A1-A3 0.0557366, A5 (Entsorgung Verpackung) 23.9631, C2 0, C3 0, D (energetisch) 0, D (stofflich) 0

## Impact indicators
- Globales Erwärmungspotenzial - total (GWP-total) [kg CO2-Äqv.]: A1 -1080.29, A2 28.4913, A3 191.706, A1-A3 -860.09, A5 (Entsorgung Verpackung) 6.61397, C2 0.836074, C3 1239.24, D (energetisch) -93.3828, D (stofflich) -19.2086
- Globales Erwärmungspotenzial - fossil (GWP-fossil) [kg CO2-Äqv.]: A1 146.818, A2 28.4913, A3 197.695, A1-A3 373.004, A5 (Entsorgung Verpackung) 0.625005, C2 0.836074, C3 12.138, D (energetisch) -93.3828, D (stofflich) -19.2086
- Globales Erwärmungspotenzial - biogen (GWP-biogenic) [kg CO2-Äqv.]: A1 -1227.11, A2 0, A3 -5.98896, A1-A3 -1233.09, A5 (Entsorgung Verpackung) 5.98896, C2 0, C3 1227.11, D (energetisch) 0, D (stofflich) 0
- Abbaupotenzial der stratosphärischen Ozonschicht (ODP) [kg CFC 11-Äquiv.]: A1 7.78076e-13, A2 3.32334e-14, A3 6.53671e-12, A1-A3 7.34802e-12, A5 (Entsorgung Verpackung) 1.38953e-15, C2 1.11068e-16, C3 4.15483e-13, D (energetisch) -9.98866e-12, D (stofflich) -1.88521e-13
- Versauerungspotenzial, kumulierte Überschreitung (AP) [mol H+ eqv.]: A1 0.334358, A2 0.193317, A3 0.814176, A1-A3 1.34185, A5 (Entsorgung Verpackung) 0.00133455, C2 0.00504754, C3 0.0174679, D (energetisch) -0.299829, D (stofflich) -0.100842
- Eutrophierungspotenzial - Süßwasser (EP-freshwater) [kg P eqv.]: A1 0.000250361, A2 8.45114e-5, A3 0.00100077, A1-A3 0.00133564, A5 (Entsorgung Verpackung) 2.11009e-7, C2 2.58065e-6, C3 5.08852e-5, D (energetisch) -0.00122416, D (stofflich) -4.6953e-5
- Eutrophierungspotenzial - Salzwasser (EP-marine) [kg N eqv.]: A1 0.273494, A2 0.0951311, A3 0.343211, A1-A3 0.711836, A5 (Entsorgung Verpackung) 0.000435314, C2 0.00247321, C3 0.00558653, D (energetisch) -0.111851, D (stofflich) -0.047793
- Eutrophierungspotenzial - Land (EP-terrestrial) [mol N eqv.]: A1 1.52001, A2 1.0501, A3 3.70471, A1-A3 6.27483, A5 (Entsorgung Verpackung) 0.0063653, C2 0.0273742, C3 0.0583261, D (energetisch) -0.8282, D (stofflich) -0.525945
- Bildungspotenzial für troposphärisches Ozon (POCP) [kg NMVOC eqv.]: A1 0.38329, A2 0.223292, A3 1.15603, A1-A3 1.76262, A5 (Entsorgung Verpackung) 0.00116862, C2 0.00466435, C3 0.0138795, D (energetisch) -0.27732, D (stofflich) -0.123646
- Potenzial für die Verknappung abiotischer Ressourcen – nicht fossile Ressourcen (ADPE) [kg Sb-Äqv.]: A1 2.33276e-5, A2 2.44739e-6, A3 8.26294e-5, A1-A3 0.000108404, A5 (Entsorgung Verpackung) 2.11538e-8, C2 6.61828e-8, C3 4.98206e-6, D (energetisch) -0.000124843, D (stofflich) -3.35981e-6
- Potenzial für die Verknappung abiotischer Ressourcen – fossile Brennstoffe (ADPF) [MJ]: A1 3579.91, A2 386.124, A3 2680.52, A1-A3 6646.56, A5 (Entsorgung Verpackung) 2.14986, C2 11.5723, C3 153.938, D (energetisch) -4797.4, D (stofflich) -252.083
- Wasser-Entzugspotenzial (Benutzer) (WDP) [m3 world eqv.]: A1 0.687046, A2 0.0331707, A3 1.19803, A1-A3 1.91825, A5 (Entsorgung Verpackung) 0.0216913, C2 0.000739236, C3 0.0472656, D (energetisch) 1.23335, D (stofflich) -0.0292277
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
## Use advice
Aufgrund der hohen Abdeckung bildet der Datensatz die durchschnittlichen Produktionsverhältnisse und die damit verbundenen Umweltwirkungen repräsentativ für Deutschland ab. Liegen keine herstellerspezifischen Ökobilanzergebnisse des verwendeten Produkts vor, empfiehlt sich die Verwendung dieses Durchschnittsdatensatzes.

## Data sources
- Rüter S, Diederichs S (2012) Ökobilanz Basisdaten für Bauprodukte aus Holz, Hamburg, Johann Heinrich von Thünen Institut, Institut für Holztechnologie und Holzbiologie, Abschlussbericht
- GaBi database (general)
