# GUTEX Thermofibre

Dataset: ILCD process, EPD, specific dataset
Geography: RER
Reference year: 2019
Valid until: 2024
Classification: OEKOBAU.DAT: Dämmstoffe / Holzfasern / Holzfaserdämmplatte
Classification: IBUCategories: 01 Grundstoffe und Vorprodukte / Produkte für Beton, Mörtel und Einpressmörtel / Betonzusatzmittel
Method details: Betonzusatzmittel.pdf
Generated by: Thünen-Institut für Holzforschung
Registration number: EPD-GTX-20190018-IBA1-DE
Owner: GUTEX Holzfaserplattenwerk H. Henselmann GmbH + Co KG
Compliance: DIN EN 15804; ISO 14025
Review: Accredited third party review by Institut Bauen und Umwelt e. V.
Amounts: rows without a unit in brackets have none in this file; such an amount is in the reference unit of its flow, which a separate flow dataset defines
copyright: true
licenseType: Free of charge for all users and uses
accessRestrictions: None

## General comment
GUTEX Thermofibre sind lose Holzfasern, die nach /ETA-12/0181/ getrocknet in vorkomprimierten Gebinden bereitgestellt werden.

Die Holzfasern werden aus Nadelholz-Hackschnitzeln durch mechanische Zerkleinerung hergestellt.

Die Einblasrohdichte vom Anwendungsbereich ab und beträgt im Mittel ca. 35 kg/m³.

## Technology and included processes
Ausgangsbasis für die Produktherstellung sind angelieferte Hackschnitzel von regionalen Sägewerken, die unter Feuchte- und Wärmeeinfluss zu Holzfasern aufgeschlossen werden. Anschließend werden die Fasern getrocknet und in einem Abfüllprozess zu gleichbleibend großen und schweren Gebinden verpackt. Der Produktionsstandort arbeitet auf Basis eines zertifizierten Qualitätsmanagements (/ISO 9001/).
Technische Daten:
Leistungswerte des Produkts entsprechend der Leistungserklärung (GX-01-0029-02) in Bezug auf dessen wesentliche Merkmale gemäß /ETA-12/0181/ vom 21.06.2017.
Deklarierte Einheit:
Die deklarierte Einheit der ökologischen Betrachtung ist die Bereitstellung von 1 kg GUTEX Thermofibre.

Hinweis: für die Bilanzierung auf Gebäudeebene sind je nach Anwendungsfall unterschiedliche Dichten anzunehmen (siehe Kapitel 2.3).

## Technical purpose
Der Wärmedämmstoff dient zur Herstellung von nicht druckbelastbaren Dämmschichten durch maschinelle Verarbeitung an der Anwendungsstelle.

Folgende Anwendungsbereiche sind möglich:

- Raumausfüllende Dämmung in geschlossenen Hohlräumen von Außen- und Innenwänden

- Dämmung in geschlossenen Hohlräumen zwischen Sparren und Holzbalken

- Freiliegende Dämmung auf horizontalen oder mäßig geneigten Flächen

- Dämmung nicht begehbarer, jedoch zugänglicher oberster Geschossdecken

- Hohlraumdämmung zwischen Lagerhölzern im Fußbodenbereich und vergleichbaren Unterkonstruktionen

## Reference product
- GUTEX Thermofibre (): 1

## Inputs
- Erneuerbare Primärenergie als Energieträger (PERE) [MJ]: A1 0.107752, A2 0.00475656, A3 0.767701, A5 1.074, C2 0.000607673, C3 0, D 13.9214
- Erneuerbare Primärenergie zur stofflichen Nutzung (PERM) [MJ]: A1 17.0548, A2 0, A3 1.06851, A5 -1.06851, C2 0, C3 -17.0548, D 0
- Total erneuerbare Primärenergie (PERT) [MJ]: A1 17.1626, A2 0.00475656, A3 1.83621, A5 0.00548571, C2 0.000607673, C3 -17.0548, D 13.9214
- Nicht-erneuerbare Primärenergie als Energieträger (PENRE) [MJ]: A1 0.674382, A2 0.10069, A3 8.36718, A5 0.357205, C2 0.0128637, C3 0, D -14.2211
- Nicht-erneuerbare Primärenergie zur stofflichen Nutzung (PENRM) [MJ]: A1 0.35, A2 0, A3 0.32616, A5 -0.32616, C2 0, C3 -0.35, D 0
- Total nicht erneuerbare Primärenergie (PENRT) [MJ]: A1 1.02438, A2 0.10069, A3 8.69334, A5 0.0310451, C2 0.0128637, C3 -0.35, D -14.2211
- Einsatz von Sekundärstoffen (SM) [kg]: A1 0, A2 0, A3 0, A5 0, C2 0, C3 0, D 0
- Erneuerbare Sekundärbrennstoffe (RSF) [MJ]: A1 0, A2 0, A3 0, A5 0, C2 0, C3 0, D 17.0548
- Nicht erneuerbare Sekundärbrennstoffe (NRSF) [MJ]: A1 0, A2 0, A3 0, A5 0, C2 0, C3 0, D 0.35
- Einsatz von Süßwasserressourcen (FW) [m^3]: A1 0.00106958, A2 9.35294e-6, A3 0.00376481, A5 0.000299024, C2 1.19488e-6, C3 0, D 0.00191356

## Outputs
- Gefährlicher Abfall zur Deponie (HWD) [kg]: A1 0, A2 0, A3 0, A5 0, C2 0, C3 0, D 0
- Entsorgter nicht gefährlicher Abfall (NHWD) [kg]: A1 0, A2 0, A3 0.0001812, A5 0, C2 0, C3 0, D 0
- Entsorgter radioaktiver Abfall (RWD) [kg]: A1 1.6738e-5, A2 1.37542e-7, A3 2.15143e-5, A5 1.26689e-6, C2 1.75717e-8, C3 0, D -0.000668049
- Komponenten für die Wiederverwendung (CRU) [kg]: A1 0, A2 0, A3 0, A5 0, C2 0, C3 0, D 0
- Stoffe zum Recycling (MFR) [kg]: A1 0, A2 0, A3 0, A5 0, C2 0, C3 0, D 0
- Stoffe für die Energierückgewinnung (MER) [kg]: A1 0, A2 0, A3 0, A5 0, C2 0, C3 1, D 0
- Exportierte elektrische Energie (EEE) [MJ]: A1 0, A2 0, A3 0, A5 0.168128, C2 0, C3 0, D 0
- Exportierte thermische Energie (EET) [MJ]: A1 0, A2 0, A3 0, A5 0.409573, C2 0, C3 0, D 0

## Impact indicators
- Globales Erwärmungspotenzial (GWP) [kg CO_(2)-Äq.]: A1 -1.55089, A2 0.00716958, A3 0.39824, A5 0.125663, C2 0.000915947, C3 1.62132, D -0.94077
- Abbau Potential der stratosphärischen Ozonschicht (ODP) [kg CFC11-Äq.]: A1 5.9016e-14, A2 3.69824e-15, A3 1.4502e-13, A5 7.74507e-15, C2 4.72468e-16, C3 0, D -2.14159e-12
- Versauerungspotenzial von Boden und Wasser (AP) [kg SO_(2)-Äq.]: A1 0.000249204, A2 3.02804e-5, A3 0.000363795, A5 1.51492e-5, C2 3.86846e-6, C3 0, D -0.00100538
- Eutrophierungspotenzial (EP) [kg PO_(4)^(3)-Äq.]: A1 5.70497e-5, A2 7.54503e-6, A3 5.43299e-5, A5 2.57092e-6, C2 9.63914e-7, C3 0, D -0.000151532
- Bildungspotential für troposphärisches Ozon (POCP) [kg Ethen-Äq.]: A1 1.90911e-6, A2 -1.23187e-5, A3 6.37933e-5, A5 8.74356e-7, C2 -1.57377e-6, C3 0, D -0.000103015
- Potenzial für den abiotischen Abbau nicht fossiler Ressourcen (ADPE) [kg Sb-Äq.]: A1 1.6881e-8, A2 4.44082e-10, A3 1.10972e-7, A5 2.80411e-9, C2 5.67336e-11, C3 0, D -2.90734e-7
- Potenzial für den abiotischen Abbau fossiler Brennstoffe (ADPF) [MJ]: A1 0.982152, A2 0.100338, A3 8.31291, A5 0.0278517, C2 0.0128187, C3 0, D -12.8867

## Use advice
Gültigkeitsbereich:
Diese Umwelt-Produktdeklaration gilt für die im Werk Gutenburg (s. Herstelleradresse) produzierte lose Holzfaserdämmung GUTEX Thermofibre.
Systemgrenze:
Der Deklarationstyp entspricht einer EPD „von der Wiege bis Werkstor - mit Optionen“. Inhalte sind das Stadium der Produktion, also von der Bereitstellung der Rohstoffe bis zum Werkstor der Produktion (cradle-to-gate, Module A1-A3), sowie die Entsorgung der Produktverpackung in Modul A5 und Teile des Endes des Lebensweges (Modul C2-C4). Darüber hinaus erfolgt eine Betrachtung des potenziellen Nutzens und der Lasten über den Lebensweg des Produktes hinaus (Modul D).

Im Einzelnen werden in Modul A1 die Bereitstellung des Holz-Rohstoffes in Form von Hackschnitzeln aus dem Forst und die Bereitstellung der Zusätze bilanziert. Die Transporte dieser Stoffe werden in Modul A2 berücksichtigt. Modul A3 umfasst die Bereitstellung der Brennstoffe, Betriebsmittel und des Stromes sowie die Herstellungsprozesse vor Ort. Diese sind im Wesentlichen die Zerfaserung, die Fasertrocknung, das Zugeben der Zusätze sowie die Verpackung der Produkte.

Modul A5 beinhaltet ausschließlich die Entsorgung der Verpackungsmaterialien.

Modul C2 berücksichtigt den Transport zum Entsorger, Modul C3 die Aufbereitung und Sortierung des Altholzes.

Zudem werden gemäß /EN 16485/ die CO2-Äquivalente des in Produkt und Verpackung befindlichen Kohlenstoffs sowie die im Produkt und seiner Verpackung enthaltene erneuerbare und nicht erneuerbare Primärenergie (PERM und PENRM) als Abgänge in Modul C3 verbucht. Die sich aus der thermischen Verwertung des Produkts ergebenden Lasten und Potenziale am Ende seines Lebensweges, sowie der potenzielle Nutzen durch Substitution fossiler Brennstoffe im Zuge der Energieerzeugung bei thermischer Verwertung der Produktverpackung, werden in Modul D bilanziert.

## Data sources
- GaBi Database (all versions)
- GaBi database SP33 2017
