# Glasfaserbeton concrete skin und öko Skin

Dataset: ILCD process, EPD, average dataset
Geography: DE
Reference year: 2018
Valid until: 2023
Classification: OEKOBAU.DAT: Mineralische Baustoffe / Steine und Elemente / Faserzement
Classification: IBUCategories: 02 Bauprodukte / Innen-, Außenwand und Deckenbekleidungen / Faserzement / Faserbeton
Method details: Faserzement / Faserbeton.pdf
Generated by: Sphera Solutions GmbH
Registration number: EPD-RSE-20180069-IAD2-DE
Owner: Rieder Sales GmbH
Compliance: DIN EN 15804; ISO 14025
Review: Accredited third party review by Institut Bauen und Umwelt e. V.
Amounts: rows without a unit in brackets have none in this file; such an amount is in the reference unit of its flow, which a separate flow dataset defines
copyright: true
licenseType: Free of charge for all users and uses
accessRestrictions: None

## General comment
concrete skin und öko skin sind Fassadenplatten aus dem Material fibreC-Glasfaserbeton. Die Bewehrung besteht aus Textil und Fasern aus alkaliresistentem Glas (AR-Glas). Die Platte ist durchgängig gefärbt. Die Standardstärke beträgt 13 mm. Die Deklaration gilt für die Oberflächen ferro, ferro light und matt, sowie für 12 Farben.

## Technology and included processes
Die glasfaserverstärkten Betonplatten werden in einem speziellen Extrusionsverfahren hergestellt. Nach entsprechender Aushärtung werden die Platten der weiteren Bearbeitung zugeführt (Oberfläche, Zuschnitte, Bohrungen etc.)
Technische Daten:
Es gelten die Daten der Leistungserklärung.
Deklarierte Einheit:
Die Deklaration bezieht sich auf die deklarierte Einheit von 1 t gemäß dem IBU-PCR Anleitungstext Teil B für die Produktgruppe Faserzement / Faserbeton.

Betrachtet wird ein durchschnittliches Produkt für den Standort Kolbermoor in Deutschland. fibreC Glasfaserbeton hat eine Dicke von 13 mm, dass durchschnittliche Flächengewicht beträgt 28,73 kg/m²

## Technical purpose
Die Platten aus fibreC Glasfaserbeton dienen als Bekleidungsmaterial für vorgehängte hinterlüftete Fassaden, als Verkleidung im Innen- und Außenbereich und als Bodenbelag.

## Reference product
- concrete skin und öko skin (): 1000

## Inputs
- Erneuerbare Primärenergie als Energieträger (PERE) [MJ]: A1-A3 1599
- Erneuerbare Primärenergie zur stofflichen Nutzung (PERM) [MJ]: A1-A3 0
- Total erneuerbare Primärenergie (PERT) [MJ]: A1-A3 1599
- Nicht-erneuerbare Primärenergie als Energieträger (PENRE) [MJ]: A1-A3 8777
- Nicht-erneuerbare Primärenergie zur stofflichen Nutzung (PENRM) [MJ]: A1-A3 24
- Total nicht erneuerbare Primärenergie (PENRT) [MJ]: A1-A3 8801
- Einsatz von Sekundärstoffen (SM) [kg]: A1-A3 0
- Erneuerbare Sekundärbrennstoffe (RSF) [MJ]: A1-A3 0
- Nicht erneuerbare Sekundärbrennstoffe (NRSF) [MJ]: A1-A3 0
- Einsatz von Süßwasserressourcen (FW) [m^3]: A1-A3 2.88

## Outputs
- Gefährlicher Abfall zur Deponie (HWD) [kg]: A1-A3 3.05e-5
- Entsorgter nicht gefährlicher Abfall (NHWD) [kg]: A1-A3 180.2
- Entsorgter radioaktiver Abfall (RWD) [kg]: A1-A3 0.24
- Komponenten für die Wiederverwendung (CRU) [kg]: A1-A3 0
- Stoffe zum Recycling (MFR) [kg]: A1-A3 0
- Stoffe für die Energierückgewinnung (MER) [kg]: A1-A3 0
- Exportierte elektrische Energie (EEE) [MJ]: A1-A3 0
- Exportierte thermische Energie (EET) [MJ]: A1-A3 0

## Impact indicators
- Globales Erwärmungspotenzial (GWP) [kg CO_(2)-Äq.]: A1-A3 723.9
- Abbau Potential der stratosphärischen Ozonschicht (ODP) [kg CFC11-Äq.]: A1-A3 1.02e-8
- Versauerungspotenzial von Boden und Wasser (AP) [kg SO_(2)-Äq.]: A1-A3 1.89
- Eutrophierungspotenzial (EP) [kg PO_(4)^(3)-Äq.]: A1-A3 0.19
- Bildungspotential für troposphärisches Ozon (POCP) [kg Ethen-Äq.]: A1-A3 0.0869
- Potenzial für den abiotischen Abbau nicht fossiler Ressourcen (ADPE) [kg Sb-Äq.]: A1-A3 0.00324
- Potenzial für den abiotischen Abbau fossiler Brennstoffe (ADPF) [MJ]: A1-A3 8192

## Use advice
Gültigkeitsbereich:
Die Ökobilanz beruht auf Daten der Rieder Sales GmbH aus dem Produktionsjahr 2016. Gegenstand der Untersuchung sind die in der Rieder Faserbeton-Elemente GmbH in Kolbermoor, Deutschland, hergestellten Glasfaserbetonplatten, die als durchschnittliches Produkt gemittelt über die im Bezugsjahr angefallenen Produktionsmengen deklariert werden.
Systemgrenze:
Diese Ökobilanz adressiert das Lebenszyklusstadium der Produktherstellung „Wiege bis Werkstor“.

Das Produktionsstadium umfasst die Module A1 (Rohstoffbereitstellung), A2 (Transport), A3 (Herstellung) gemäß der /DIN EN 15804:2014/

## Data sources
- GaBi Database (all versions)
- GaBi database SP33 2017
