# Fenster - TMP Fenster+Türen GmbH - Fenster aus Kunststoff

Dataset: ILCD process, EPD, specific dataset
Geography: DE
Reference year: 2020
Valid until: 2027
Classification: OEKOBAU.DAT: Komponenten von Fenstern und Vorhangfassaden / Fenster / Kunststofffenster
Synonyms: Kunststofffenster, Drehfenster, Kippfenster, Drehkipp-Fenster, Softline 76/82 AD/MD, Gealan S9000
Method details: Produktkategorieregeln Teil A; Produktkategorieregeln Teil B – für Fenster, Flachdachfenster, Lichtkuppeln und Lichtbänder
Generated by: ift Rosenheim
Registration number: EPD-TKF-50.0
Owner: TMP Fenster+Türen GmbH
Compliance: EN 15804+A2
Review: Independent external review by Susanne Volz
Amounts: rows without a unit in brackets have none in this file; such an amount is in the reference unit of its flow, which a separate flow dataset defines
copyright: true
licenseType: Free of charge for all users and uses
accessRestrictions: None

## General comment
Kunststofffenster mit Buatiefen bis 82 mm.

Dieser Datensatz beinhaltet die Ergebnisse für die Module A1-A3 sowie die Module B2, B3, B4, B5, B6, B7, C1, C2, C3, C4, und D gemäß EN 15804. Das Umweltprofil beinhaltet die Aufwendungen für die Lebenszyklus-Stadien cradle to gate mit Optionen. Die Herstellung der Verpackung wurde innerhalb der Module A1-A3 berücksichtigt.

## Geography
Dieser Datensatz repräsentiert die Situation der TMP Fenster+Türen GmbH im Hinblick auf die wichtigsten Technologien und die gesetzlichen Rahmenbedingungen.

## Time period
jährlicher Durchschnitt

## Technology and included processes
Die Ökobilanzergebnisse umfassen die Lebenszyklusstadien der Herstellung der Vorprodukte bis hin zur Rohstoffgewinnung und Verarbeitungsprozesse von als Input dienenden Sekundärstoffen (z.B. Recyclingprozesse), deren Transporte zum Werk sowie die Produktion selbst, einschließlich der Bereitstellung von allen Hilfs- und Betriebsstoffen, Energie, sowie die vollständige Abfallbehandlung oder die Deponierung der Restabfälle während des Stadiums der Produktion. Die Module A1, A2 und A3 sind hier als ein aggregiertes Modul A1-A3 ausgewiesen. Falls für diesen Datensatz weitere Module berechnet wurden, sind diese separat zu finden und können für eine Betrachtung des gesamten Lebenszyklus zusammengeführt werden.

## Technical purpose
Fenster aus Kunststoff für Wohn-, Industrie- und Verwaltungsgebäude

## Reference product
- Fenster - TMP Fenster+Türen GmbH - Fenster aus Kunststoff: 1

## Inputs
- Frischwasserverbrauch (FW) [m3]: A1-A3 0.33, A4 0.00424, A5 0.00768, B2 0.28, B3 0, B4 0.26, B5 0, B6 0, B7 0, C1 0, C2 4.61e-5, C3 0.00956, C4 0.000845, D -0.1
- Nicht-erneuerbare Primärenergie als Energieträger (PENRE) [MJ]: A1-A3 1298.33, A4 66.5, A5 11.74, B2 1500, B3 0, B4 1160, B5 0, B6 0, B7 0, C1 0, C2 0.72, C3 42.55, C4 17.1, D -512
- Nicht-erneuerbare Primärenergie zur stofflichen Nutzung (PENRM) [MJ]: A1-A3 284.7, A4 0, A5 -11.02, B2 0, B3 0, B4 0, B5 0, B6 0, B7 0, C1 0, C2 0, C3 -32.85, C4 -13.68, D 0
- Verbrauch nicht erneuerbarer Sekundärbrennstoffe (NRSF) [MJ]: A1-A3 2.12e-11, A4 0, A5 0, B2 0, B3 0, B4 1.75e-11, B5 0, B6 0, B7 0, C1 0, C2 0, C3 0, C4 0, D -3.95e-12
- Erneuerbare Primärenergie als Energieträger (PERE) [MJ]: A1-A3 175.24, A4 3.71, A5 15.42, B2 22.1, B3 0, B4 137, B5 0, B6 0, B7 0, C1 0, C2 0.0403, C3 3.27, C4 0.46, D -60.4
- Erneuerbare Primärenergie zur stofflichen Nutzung (PERM) [MJ]: A1-A3 15.26, A4 0, A5 -15.26, B2 0, B3 0, B4 0, B5 0, B6 0, B7 0, C1 0, C2 0, C3 0, C4 0, D 0
- Erneuerbare Sekundärbrennstoffe (RSF) [MJ]: A1-A3 1.8e-12, A4 0, A5 0, B2 0, B3 0, B4 1.49e-12, B5 0, B6 0, B7 0, C1 0, C2 0, C3 0, C4 0, D -3.36e-13
- Einsatz von Sekundärstoffen (SM) [kg]: A1-A3 1, A4 0, A5 0, B2 0, B3 0, B4 0.83, B5 0, B6 0, B7 0, C1 0, C2 0, C3 0, C4 0, D -0.19
- Total nicht erneuerbare Primärenergie (PENRT) [MJ]: A1-A3 1583.03, A4 66.5, A5 0.72, B2 1500, B3 0, B4 1160, B5 0, B6 0, B7 0, C1 0, C2 0.72, C3 9.7, C4 3.42, D -512
- Gesamtverbrauch von erneuerbarer Primärenergie (PERT) [MJ]: A1-A3 190.5, A4 3.71, A5 0.16, B2 22.1, B3 0, B4 137, B5 0, B6 0, B7 0, C1 0, C2 0.0403, C3 3.27, C4 0.46, D -60.4

## Outputs
- Komponenten für die Wiederverwendung (CRU) [kg]: A1-A3 0, A4 0, A5 0, B2 0, B3 0, B4 0, B5 0, B6 0, B7 0, C1 0, C2 0, C3 0, C4 0, D 0
- Exportierte elektrische Energie (EEE) [MJ]: A1-A3 9.1, A4 0, A5 4.99, B2 0, B3 0, B4 20.3, B5 0, B6 0, B7 0, C1 0, C2 0, C3 4.01, C4 0, D 0
- Exportierte thermische Energie (EET) [MJ]: A1-A3 21.4, A4 0, A5 11.6, B2 0, B3 0, B4 47.3, B5 0, B6 0, B7 0, C1 0, C2 0, C3 9.17, C4 0, D 0
- Gefährlicher Abfall zur Beseitigung (HWD) [kg]: A1-A3 0.00363, A4 3.35e-9, A5 1.57e-10, B2 2.05e-7, B3 0, B4 0.00299, B5 0, B6 0, B7 0, C1 0, C2 3.64e-11, C3 2.22e-9, C4 3.64e-10, D -0.000678
- Stoff für die Energierückgewinnung (MER) [kg]: A1-A3 0, A4 0, A5 0, B2 0, B3 0, B4 0, B5 0, B6 0, B7 0, C1 0, C2 0, C3 0, C4 0, D 0
- Stoffe zum Recycling (MFR) [kg]: A1-A3 3.77, A4 0, A5 0, B2 0, B3 0, B4 23, B5 0, B6 0, B7 0, C1 0, C2 0, C3 20, C4 0, D -0.44
- Ungefährlicher Abfall zur Beseitigung (NHWD) [kg]: A1-A3 32.68, A4 0.00988, A5 0.0326, B2 0.43, B3 0, B4 48.2, B5 0, B6 0, B7 0, C1 0, C2 0.000107, C3 2.66, C4 17.1, D -5.75
- Entsorgter radioaktiver Abfall (RWD) [kg]: A1-A3 0.0354, A4 8.05e-5, A5 1.99e-5, B2 0.00357, B3 0, B4 0.0239, B5 0, B6 0, B7 0, C1 0, C2 8.75e-7, C3 0.000395, C4 3.59e-5, D -0.0118

## Impact indicators
- Potenzial für die Verknappung abiotischer Ressourcen – nicht fossile Ressourcen (ADPE) [kg Sb-Äqv.]: A1-A3 0.0026, A4 3.8e-7, A5 9.54e-9, B2 5.74e-6, B3 0, B4 0.00248, B5 0, B6 0, B7 0, C1 0, C2 4.13e-9, C3 1.74e-7, C4 2.43e-8, D -9.51e-5
- Potenzial für die Verknappung abiotischer Ressourcen – fossile Brennstoffe (ADPF) [MJ]: A1-A3 1580, A4 66.4, A5 0.72, B2 1500, B3 0, B4 1160, B5 0, B6 0, B7 0, C1 0, C2 0.72, C3 9.7, C4 3.42, D -512
- Versauerungspotenzial, kumulierte Überschreitung (AP) [mol H+ eqv.]: A1-A3 0.5, A4 0.00463, A5 0.000619, B2 0.06, B3 0, B4 0.39, B5 0, B6 0, B7 0, C1 0, C2 4.87e-5, C3 0.00206, C4 0.00184, D -0.12
- Eutrophierungspotenzial - Süßwasser (EP-freshwater) [kg P eqv.]: A1-A3 0.000171, A4 1.48e-5, A5 9.64e-8, B2 7.08e-5, B3 0, B4 0.000144, B5 0, B6 0, B7 0, C1 0, C2 1.61e-7, C3 1.86e-6, C4 4.33e-7, D -4.6e-5
- Eutrophierungspotenzial - Salzwasser (EP-marine) [kg N eqv.]: A1-A3 0.0965, A4 0.00138, A5 0.000153, B2 0.0199, B3 0, B4 0.0752, B5 0, B6 0, B7 0, C1 0, C2 1.45e-5, C3 0.000805, C4 0.000477, D -0.0243
- Eutrophierungspotenzial - Land (EP-terrestrial) [mol N eqv.]: A1-A3 1.11, A4 0.0169, A5 0.0029, B2 0.21, B3 0, B4 0.88, B5 0, B6 0, B7 0, C1 0, C2 0.000175, C3 0.00983, C4 0.00524, D -0.28
- Globales Erwärmungspotenzial - total (GWP-total) [kg CO2-Äqv.]: A1-A3 90.57, A4 5, A5 3.26, B2 50.7, B3 0, B4 77.1, B5 0, B6 0, B7 0, C1 0, C2 0.0544, C3 4.68, C4 0.25, D -28.1
- Globales Erwärmungspotenzial - fossil (GWP-fossil) [kg CO2-Äqv.]: A1-A3 89.96, A4 4.96, A5 1.71, B2 50.4, B3 0, B4 75.1, B5 0, B6 0, B7 0, C1 0, C2 0.0541, C3 4.67, C4 0.26, D -28
- Globales Erwärmungspotenzial - biogen (GWP-biogenic) [kg CO2-Äqv.]: A1-A3 0.47, A4 -0.00636, A5 1.55, B2 0.29, B3 0, B4 1.89, B5 0, B6 0, B7 0, C1 0, C2 -6.92e-5, C3 0.00246, C4 -0.00749, D -0.13
- Globales Erwärmungspotenzial - luluc (GWP-luluc) [kg CO2-Äqv.]: A1-A3 0.0967, A4 0.0409, A5 5.72e-5, B2 0.0089, B3 0, B4 0.12, B5 0, B6 0, B7 0, C1 0, C2 0.000444, C3 0.00153, C4 0.000758, D -0.0275
- Abbaupotenzial der stratosphärischen Ozonschicht (ODP) [kg CFC 11-Äquiv.]: A1-A3 1.29e-8, A4 6.37e-16, A5 6.67e-16, B2 8.11e-14, B3 0, B4 1.03e-8, B5 0, B6 0, B7 0, C1 0, C2 6.93e-18, C3 1.32e-14, C4 1e-15, D -2.75e-9
- Bildungspotenzial für troposphärisches Ozon (POCP) [kg NMVOC eqv.]: A1-A3 0.31, A4 0.0039, A5 0.000405, B2 0.1, B3 0, B4 0.24, B5 0, B6 0, B7 0, C1 0, C2 4.15e-5, C3 0.00221, C4 0.00144, D -0.08
- Wasser-Entzugspotenzial (Benutzer) (WDP) [m3 world eqv.]: A1-A3 4.68, A4 0.0433, A5 0.33, B2 6.49, B3 0, B4 5.2, B5 0, B6 0, B7 0, C1 0, C2 0.000471, C3 0.35, C4 0.0277, D -0.32
- Potenzielles Auftreten von Krankheiten aufgrund von Feinstaubemissionen (PM) [disease incidence]: A1-A3 4.84e-6, A4 2.87e-8, A5 3.66e-9, B2 4.22e-7, B3 0, B4 3.78e-6, B5 0, B6 0, B7 0, C1 0, C2 3.06e-10, C3 3.33e-8, C4 2.28e-8, D -1.15e-6
- Potenzielle Wirkung durch Exposition des Menschen mit U235 (IRP) [kBq U235 eqv.]: A1-A3 4.68, A4 0.0115, A5 0.00184, B2 0.41, B3 0, B4 2.9, B5 0, B6 0, B7 0, C1 0, C2 0.000125, C3 0.0365, C4 0.00378, D -1.74
- Potenzielle Toxizitätsvergleichseinheit für Ökosysteme (ETP-fw) [CTUe]: A1-A3 1817.25, A4 48, A5 0.28, B2 604, B3 0, B4 1480, B5 0, B6 0, B7 0, C1 0, C2 0.52, C3 3.32, C4 1.95, D -416
- Potenzielle Toxizitätsvergleichseinheit für den Menschen - kanzerogene Wirkung (HTP-c) [CTUh]: A1-A3 1.37e-7, A4 9.69e-10, A5 2.34e-11, B2 1.71e-8, B3 0, B4 7.03e-8, B5 0, B6 0, B7 0, C1 0, C2 1.05e-11, C3 2.51e-10, C4 2.88e-10, D -5.67e-8
- Potenzielle Toxizitätsvergleichseinheit für den Menschen - nicht kanzerogene Wirkung (HTP-nc) [CTUh]: A1-A3 1.25e-6, A4 4.99e-8, A5 9.33e-10, B2 8.57e-7, B3 0, B4 9.97e-7, B5 0, B6 0, B7 0, C1 0, C2 5.43e-10, C3 2.31e-8, C4 3.17e-8, D -3.65e-7
- Potenzieller Bodenqualitätsindex (SQP) [dimensionless]: A1-A3 370.92, A4 22.8, A5 0.21, B2 17.8, B3 0, B4 355, B5 0, B6 0, B7 0, C1 0, C2 0.25, C3 2.98, C4 0.69, D -44.8

## Use advice
Dieser Datensatz beinhaltet die Ergebnisse für die Module A1-A3 sowie die Module A4, A5, B2, B3, B4, B5, B6, B7, C1, C2, C3, C4, D gemäß EN 15804.
Ein Vergleich mit anderen Produkten ist nur mit einer vergleichbaren Anwendung im Gebäude zulässig. Grundsätzlich ist eine Gegenüberstellung oder die Bewertung von EPD Daten nur möglich, wenn alle zu vergleichenden Datensätze nach EN 15804 erstellt wurden und der Gebäudekontext, bzw. die produktspezifischen Leistungsmerkmale berücksichtigt werden.

## Review details
Die angewendete LCI Methode ist in Übereinstimmung mit ISO 14040 und 14044. Die Dokumentation enthält alle relevanten Informationen im Hinblick auf die Datenqualität und den Umfang der Anwendung der jeweiligen LCI Ergebnisse bzw. der Datensätze. Der Datensatz repräsentiert den Stand der Technik bezogen auf die funktionelle Einheit.

## Data sources
- GaBi database (general)
