# Großformatplatten - GFP

Dataset: ILCD process, EPD, average dataset
Geography: CH
Reference year: 2020
Valid until: 2025
Classification: OEKOBAU.DAT: Holz / Vollholz / Brettschichtholzplatte
Classification: IBUCategories: 02 Bauprodukte / Produkte aus Bauholz / Vollholzprodukte
Method details: Vollholzprodukte.pdf
Generated by: Dr. Frank Werner - Umwelt & Entwicklung
Registration number: EPD-SLH-20200098-IBC1-DE
Owner: Schilliger Holz AG
Compliance: DIN EN 15804; ISO 14025
Review: Accredited third party review by Institut Bauen und Umwelt e. V.
Amounts: rows without a unit in brackets have none in this file; such an amount is in the reference unit of its flow, which a separate flow dataset defines
copyright: true
licenseType: Free of charge for all users and uses
accessRestrictions: None

## General comment
Die Großformatplatte (abgekürzt GFP oder X-Lam) ist ein industriell gefertigtes flächiges Holzprodukt für tragende Zwecke. Es wird als Platte oder Scheibenelement eingesetzt. Die Großformatplatte entspricht in der Machart dem Brettsperrholz. Sie ist i.d.R. symmetrisch aufgebaut und besteht aus mindestens drei rechtwinklig zueinander verklebten Lagen aus Nadelvollholz. Einzelheiten zu den Querschnittsaufbauten können den herstellerspezifischen Zulassungen entnommen werden (Leistungserklärung GFP / SHI / 03-01052020, gemäß ETA-19/0675, 01.05.2020, Titel „Schilliger Grossformatplatte GFP“ gemäss ETA-19/0675, erstellt im Einklang mit der Verordnung (EU) Nr. 305/2011). Weitere Informationen zu den Querschnittsaufbauten und Produkteigenschaften können auch den technischen Merkblättern entnommen werden, die der Betrieb zu jedem Produkt auf seiner Internetseite veröffentlicht.

Schilliger Holz AG bietet Großformatplatten in verschiedenen Ausführungen an. Sei es als klassische Mehrschichtplatte, als Sandwichplatte, als Hohlkastenelement, als einseitig beplankte Rippenplatte oder als Bausatz für die werkseitige Herstellung von Fertigelementen. Durch den kreuzweisen Aufbau sind Großformatplattenelemente einerseits sehr formstabil und können andererseits Lasten sowohl längs wie auch quer zur Haupttragrichtung übertragen. Die Platten werden mit modernsten CNC Maschinen bearbeitet und können samt Oberflächenbehandlung montagefertig geliefert werden.

Eine ausführliche Beschreibung der GFP befindet sich auf der Firmenwebeseite "www.schilliger.ch".

## Technology and included processes
Verwendet wird nur betriebsintern produziertes Schnittholz, das auf 10 % bis 12 % Holzfeuchte vorgetrocknet und unbehandelt ist. Die Holzfeuchte jeder Lamelle wird gemessen und nach einer visuellen Vorsortierung 4-seitig gehobelt. Anschließend durchlaufen sie den Qualitätsscanner, welcher Fehlerstellen für die Auskappung markiert und die Lamellen nach ihrer Qualität sortiert. Nachdem die Fehlerstellen ausgekappt sind werden die Lamellen zu einem Endlosstrang keilgezinkt und kommissionsbezogen abgelängt. Nach einem weiteren Hobelvorgang werden die Lamellen zu einem einlagigen Brett verleimt; diese Brettlagen werden wiederum um jeweils 90° gedreht zu mehrschichtigen, großformatigen Platten verleimt. Das fertige Produkt wird abschließend geschliffen, eventuell abgebunden und endkontrolliert. Die Kommissionspakete werden zur Auslieferung in Polyethylen-Folie verpackt. Während des Produktionsprozesses werden die Qualitätsanforderungen der ISO 9001 eingehalten (Zertifikatsnummer 01 100 1300116 LGA-Intercert).
Technische Daten:
Die Schilliger Großformatplatten GFP erfüllen die Anforderungen nach ETA-19/0675.

Die Schilliger Großformatplatten GFP werden aus Fichten- und Tannenholz hergestellt. Weitere Holzarten sind auf Anfrage möglich. Für die Verklebung werden Einkomponenten-Klebstoffe auf Polyurethanbasis (PUR) nach Kap. 2.5 verwendet. Die GFP werden mit einer durchschnittlichen Holzfeuchte von 10% bis 12% hergestellt und mit den mechanischen Eigenschaften der Festigkeitsklassen C24 (EN 338:2016) produziert. Die mechanischen Eigenschaften sind direkt der ETA 19/0675 Anhang 2 zu entnehmen und gelten für die in der ETA 19/0675 Anhang 3 angegeben Kalkulationsmethoden.

Sie werden mit Maßen nach Kap. 2.4 geliefert.
Deklarierte Einheit:
Die deklarierten Umweltkennzahlen beziehen sich auf 1 m3 Schilliger Großformatplatten gemäß ETA-19/0675.

## Technical purpose
Schilliger Großformatplatten werden für einseitig oder zweiseitig sichtbare Wand-und Deckenkonstruktionen maßgenau gefertigt. Sie eignen sich als tragende oder verkleidende Elemente sowohl für den Ingenieurholzbau als auch für den Wohnungs- und Bürobau.

## Reference product
- Schilliger Großformatplatten (): 1

## Inputs
- Erneuerbare Primärenergie als Energieträger (PERE) [MJ]: A1-A3 743.589, A4 1.6966, A5 0.00427483, C2 0.407629, C3 8.50641, C4 0, D -826.979
- Erneuerbare Primärenergie zur stofflichen Nutzung (PERM) [MJ]: A1-A3 7302, A4 0, A5 0, C2 0, C3 -7302, C4 0, D 0
- Total erneuerbare Primärenergie (PERT) [MJ]: A1-A3 8045.59, A4 1.6966, A5 0.00427483, C2 0.407629, C3 -7293.49, C4 0, D -826.979
- Nicht-erneuerbare Primärenergie als Energieträger (PENRE) [MJ]: A1-A3 2448.94, A4 115.451, A5 23.0445, C2 26.2565, C3 80.7102, C4 0, D -6583.81
- Nicht-erneuerbare Primärenergie zur stofflichen Nutzung (PENRM) [MJ]: A1-A3 104.8, A4 0, A5 -22.8, C2 0, C3 -82, C4 0, D 0
- Total nicht erneuerbare Primärenergie (PENRT) [MJ]: A1-A3 2553.74, A4 115.451, A5 0.244545, C2 26.2565, C3 -1.28983, C4 0, D -6583.81
- Einsatz von Sekundärstoffen (SM) [kg]: A1-A3 0, A4 0, A5 0, C2 0, C3 0, C4 0, D 0
- Erneuerbare Sekundärbrennstoffe (RSF) [MJ]: A1-A3 0, A4 0, A5 0, C2 0, C3 0, C4 0, D 7302
- Nicht erneuerbare Sekundärbrennstoffe (NRSF) [MJ]: A1-A3 0, A4 0, A5 0, C2 0, C3 0, C4 0, D 82
- Einsatz von Süßwasserressourcen (FW) [m^3]

## Outputs
- Gefährlicher Abfall zur Deponie (HWD) [kg]: A1-A3 0.00189128, A4 0.000130793, A5 1.55233e-6, C2 3.12178e-5, C3 9.9583e-5, C4 0, D -0.00236602
- Entsorgter nicht gefährlicher Abfall (NHWD) [kg]: A1-A3 23.6711, A4 1.01985, A5 0.0265445, C2 0.203227, C3 0.450024, C4 0, D 0.309351
- Entsorgter radioaktiver Abfall (RWD) [kg]: A1-A3 0.0316116, A4 0.000128836, A5 2.87022e-7, C2 3.10156e-5, C3 0.000705433, C4 0, D -0.0774024
- Komponenten für die Wiederverwendung (CRU) [kg]: A1-A3 0, A4 0, A5 0, C2 0, C3 0, C4 0, D 0
- Stoffe zum Recycling (MFR) [kg]: A1-A3 0, A4 0, A5 0, C2 0, C3 0, C4 0, D 0
- Stoffe für die Energierückgewinnung (MER) [kg]: A1-A3 0, A4 0, A5 0, C2 0, C3 424, C4 0, D 0
- Exportierte elektrische Energie (EEE) [MJ]: A1-A3 0, A4 0, A5 5.8, C2 0, C3 0, C4 0, D 0
- Exportierte thermische Energie (EET) [MJ]: A1-A3 0, A4 0, A5 3, C2 0, C3 0, C4 0, D 0

## Impact indicators
- Globales Erwärmungspotenzial (GWP) [kg CO_(2)-Äq.]: A1-A3 -622.725, A4 7.21858, A5 1.57772, C2 1.64937, C3 700.295, C4 0, D -199.91
- Abbau Potential der stratosphärischen Ozonschicht (ODP) [kg CFC11-Äq.]: A1-A3 9.39541e-6, A4 3.10727e-7, A5 1.57746e-9, C2 3.67913e-8, C3 1.99209e-7, C4 0, D -3.98963e-5
- Versauerungspotenzial von Boden und Wasser (AP) [kg SO_(2)-Äq.]: A1-A3 0.418122, A4 0.0375028, A5 0.000155109, C2 0.00948429, C3 0.015966, C4 0, D -0.216348
- Eutrophierungspotenzial (EP) [kg PO_(4)^(3)-Äq.]: A1-A3 0.0942162, A4 0.00822988, A5 5.09358e-5, C2 0.0020208, C3 0.00212808, C4 0, D -0.00174586
- Bildungspotential für troposphärisches Ozon (POCP) [kg Ethen-Äq.]: A1-A3 0.104995, A4 0.00134051, A5 2.5996e-6, C2 0.000282497, C3 0.000718719, C4 0, D -0.0141266
- Potenzial für den abiotischen Abbau nicht fossiler Ressourcen (ADPE) [kg Sb-Äq.]: A1-A3 0.000149206, A4 1.70366e-5, A5 1.66826e-8, C2 4.14642e-6, C3 1.48294e-6, C4 0, D -6.60733e-5
- Potenzial für den abiotischen Abbau fossiler Brennstoffe (ADPF) [MJ]: A1-A3 1018.28, A4 109.327, A5 0.231346, C2 24.7818, C3 49.3405, C4 0, D -2901.48

## Use advice
Gültigkeitsbereich:
Diese Deklaration umfasst die von der Schilliger Holz AG gefertigte Großformatplatten gemäß ETA 19/0675.

Der Produktionsstandort ist das Werk in Haltikon/Küssnacht, Schweiz.
Systemgrenze:
EPD von der Wiege bis zum Werkstor - mit Optionen.

Die Herstellung der Schilliger Großformatplatte (Module A1–A3) umfasst die Forstprozesse, den Transport des Rundholzes zur Sägerei, die Herstellung der Sägeware und daraus der Großformatplatten sowie die damit zusammenhängenden Hintergrundprozesse (Stromgewinnung, Gewinnung fossiler Treib- und Brennstoffe etc.). Weiter wird die Herstellung des Leimes sowie der Verpackung mit bilanziert. Die benötigte Infrastruktur für die Sägerei und das Leimholzwerk wurde aus ecoinvent übernommen.

Der Gehalt an biogenem CO2 wird gemäß PCR beim Treibhauspotezial (GWP) als negativer Input verrechnet.

Abfälle, Sekundärmaterialien oder Sekundärbrennstoffe werden in der Produktion nicht eingesetzt. Rinde, Hackschnitzel/Hobelspäne und weitere rohe Sägeware verlassen das Produktsystem als Ko-Produkte.

In Modul A4 wird ein durchschnittlicher Transport der Schilliger Großformatplatten über 125 km auf die Baustelle bilanziert.

Modul A5 umfasst die Entsorgung der PE-Verpackung in einer Müllverbrennungsanlage (KVA). In der KVA erzeugte Wärme und Strom werden als exportierte Energie in Modul D verrechnet.

Installationsmaterial wird in Modul A5 nicht verrechnet, da sich Art und Menge des Installationsmaterials je nach Verwendung der Großformatplatten unterscheiden; Installationsmaterial muss bei der Bilanzierung eines Gebäudes entsprechend ergänzt werden.

Modul C2 umfasst den Transport der rückgebauten Großformatplatten zu einem Biomassekraftwerk.

In Modul C3 wird das Hacken der rückgebauten Großformatplatten abgebildet; es wird in Übereinstimmung mit EN 16485 davon ausgegangen, dass nicht druckbehandeltes Altholz das Ende der Abfalleigenschaften erreicht, wenn es als Hackschnitzel verfügbar wird und als Sekundärbrennstoff mit dem entsprechenden Gehalt an biogenem Kohlenstoff (als CO2-Äquivalent) und der gespeicherten erneuerbaren Primärenergie den Bilanzraum verlässt.

In Modul C4 fallen keine Prozesse/Umweltwirkungen an.

In Modul D ist die energetische Verwertung der Hackschnitzel in einem Biomassekraftwerk verrechnet. Dabei wird davon ausgegangen, dass die rückgewonnene Energie den Strommix Deutschland sowie Wärme ab industrieller Erdgasfeuerung ersetzt. Analog verrechnet wird die exportierte Energie aus der energetischen Nutzung der PE-Verpackung aus Modul A5.

## Data sources
- ecoinvent database (all versions)
- ecoinvent 2.2 database
