# Tectofin RV plus, Tectofin SK

Dataset: ILCD process, EPD, average dataset
Geography: RER
Reference year: 2020
Valid until: 2025
Classification: OEKOBAU.DAT: Kunststoffe / Dachbahnen / PVC-Dachbahnen
Classification: IBUCategories: 02 Bauprodukte / Abdichtungen / Dach- und Dichtungsbahnsysteme aus Kunststoffen und Elastomeren
Method details: Dach- und Dichtungsbahnsysteme aus Kunststoffen und Elastomeren.pdf
Generated by: BMI Technical Services GmbH
Registration number: EPD-BMI-20200177-IBA1-DE
Owner: BMI Technical Services GmbH
Compliance: DIN EN 15804+A2; ISO 14025
Review: Accredited third party review by Institut Bauen und Umwelt e. V.
Amounts: rows without a unit in brackets have none in this file; such an amount is in the reference unit of its flow, which a separate flow dataset defines
copyright: true
licenseType: Free of charge for all users and uses
accessRestrictions: None

## General comment
Tectofin RV plus ist eine mit Glasvlieseinlage und Vlieskaschierung ausgestattete, bitumenverträgliche Kunststoff-Dach- und Dichtungsbahn auf Basis einer patentierten Rezepturkombination von hochpolymerem Kunststoff mit Kautschuk; speziell für den Neubau und Großflächen konzipiert und gestaltet.

Bezeichnung nach DIN SPEC 20000-201:

DE/E1-PVC-P-BV-E-GV-K-PV (1,5).

Bezeichnung nach DIN SPEC 20000-202:

BA-PVC-P-BV-E-GV-K-PV (1,5).

Tectofin SK ist eine selbstklebende bitumenverträgliche Dachbahn auf Basis einer patentierten Rezepturkombination von hochpolymerem Kunststoff mit Kautschuk; speziell für den verklebten Aufbau im hochwertigen Neubau konzipiert und gestaltet.

Bezeichnung nach DIN SPEC 20000-201: DE/E1-PVC-P-BV-E-GV-K-PV-SK (1,5).

## Technology and included processes
Die Grundstoffe der Rezeptur werden in einem Mischer zusammengeführt und gemischt und anschließend in einem Extruder geknetet und plastifiziert. Durch eine Breitschlitzdüse wird im Extrusionsverfahren die untere Schicht gefertigt und im Walzenspalt geprägt und mit einem Glasvlies verbunden. Über eine Kühlstrecke wird dieses Vormaterial auf eine Großdocke gewickelt. Im zweiten Arbeitsgang wird die Rezeptur wie zuvor beschrieben gemischt und plastifiziert. Nach Austritt aus der Breitschlitzdüse wird die zugeführte Unterschicht aus Tectofin Bahnenmaterial mit dem Glasvlies mit der Tectofin Oberschicht durch Temperatur und Druck im Walzenspalt verbunden. Über Kühlwalzen erfolgt die Abkühlung der Bahn. Auf dem Weg zur Konfektionierung erhält die Bahn einen eindeutigen Bahnenaufdruck inkl. Chargennummmer zur Rückverfolgbarkeit. Die Bahn wird auf die entsprechende Breite zugeschnitten. Anschließend erfolgt die Vlieskaschierung. Bei der Tectofin SK wird in einem weiteren Schritt die Klebemasse inklusive Trennfolie aufgebracht. Die Produktion ist nach ISO 9001 zertifiziert.
Deklarierte Einheit:
Die deklarierte Einheit ist 1 m² produzierte Dachbahn Tectofin RV Plus und Tectofin SK. Es wird (Worst Case: Tectofin SK) die Dicke von 2,6 mm mit einem Flächengewicht von 2,4 kg/m² deklariert.

## Technical purpose
Tectofin RV plus wird als Dachabdichtung für exponierte und abgedeckte Flachdächer eingesetzt. Die Anwendung sieht eine verklebte oder mechanisch befestigte Verlegung freiliegend oder mit Auflast (Kies, Platten, Parkdeck und Begrünung) vor.

Tectofin RV plus wird auch als Feuchtigkeitssperre (Typ A) und als Grundwassersperre (Typ T) eingesetzt.

Tectofin SK wird als Dachabdichtung für exponierte und abgedeckte Flachdächer eingesetzt. Die Anwendung sieht eine verklebte Verlegung freiliegend oder mit Auflast (Kies, Platten, Parkdeck und Begrünung) vor.

Die Tectofin Verlegeanleitung des Herstellers ist bei der Verarbeitung einzuhalten.

## Reference product
- Tectofin RV Plus und Tectofin SK (worst case) Dicke: 2,6 mm; Flächengewicht: 2,4 kg/m²: 1

## Inputs
- Erneuerbare Primärenergie als Energieträger (PERE) [MJ]: A1-A3 24.1334, C1 0, C2 0.00441, C3 2.38, C4 0, D -5.49
- Erneuerbare Primärenergie zur stofflichen Nutzung (PERM) [MJ]: A1-A3 0.11, C1 0, C2 0, C3 0, C4 0, D 0
- Total erneuerbare Primärenergie (PERT) [MJ]: A1-A3 24.2434, C1 0, C2 0.00441, C3 2.38, C4 0, D -5.49
- Nicht-erneuerbare Primärenergie als Energieträger (PENRE) [MJ]: A1-A3 184.995, C1 0, C2 0.0757, C3 57.1, C4 0, D -25.3
- Nicht-erneuerbare Primärenergie zur stofflichen Nutzung (PENRM) [MJ]: A1-A3 48.96, C1 0, C2 0, C3 -45.6, C4 0, D 0
- Total nicht erneuerbare Primärenergie (PENRT) [MJ]: A1-A3 233.955, C1 0, C2 0.0757, C3 11.5, C4 0, D -25.3
- Einsatz von Sekundärstoffen (SM) [kg]: A1-A3 0, C1 0, C2 0, C3 0, C4 0, D 0
- Erneuerbare Sekundärbrennstoffe (RSF) [MJ]: A1-A3 0, C1 0, C2 0, C3 0, C4 0, D 0
- Nicht erneuerbare Sekundärbrennstoffe (NRSF) [MJ]: A1-A3 0, C1 0, C2 0, C3 0, C4 0, D 0
- Einsatz von Süßwasserressourcen (FW) [m^3]: A1-A3 0.0670588, C1 0, C2 3.95e-6, C3 0.0126, C4 0, D -0.00636

## Outputs
- Gefährlicher Abfall zur Deponie (HWD) [kg]: A1-A3 1.23597e-6, C1 0, C2 2.83e-9, C3 5.19e-8, C4 0, D -1.01e-8
- Entsorgter nicht gefährlicher Abfall (NHWD) [kg]: A1-A3 0.651931, C1 0, C2 1.33e-5, C3 3.82, C4 0, D -0.0116
- Entsorgter radioaktiver Abfall (RWD) [kg]: A1-A3 0.00305678, C1 0, C2 7.97e-8, C3 0.000364, C4 0, D -0.00187
- Komponenten für die Wiederverwendung (CRU) [kg]: A1-A3 0, C1 0, C2 0, C3 0, C4 0, D 0
- Stoffe zum Recycling (MFR) [kg]: A1-A3 0, C1 0, C2 0, C3 0, C4 0, D 0
- Stoffe für die Energierückgewinnung (MER) [kg]: A1-A3 0, C1 0, C2 0, C3 0, C4 0, D 0
- Exportierte elektrische Energie (EEE) [MJ]: A1-A3 0, C1 0, C2 0, C3 6.27, C4 0, D 0
- Exportierte thermische Energie (EET) [MJ]: A1-A3 0, C1 0, C2 0, C3 11.4, C4 0, D 0

## Impact indicators
- Globales Erwärmungspotenzial total (GWP-total) [kg CO_(2)-Äq.]: A1-A3 12.3963, C1 0, C2 0.00573, C3 6.23, C4 0, D -1.49
- Globales Erwärmungspotenzial fossil (GWP-fossil) [kg CO_(2)-Äq.]: A1-A3 12.6061, C1 0, C2 0.0057, C3 6.23, C4 0, D -1.49
- Globales Erwärmungspotenzial biogen (GWP-biogenic) [kg CO_(2)-Äq.]: A1-A3 -0.193927, C1 0, C2 2.29e-6, C3 -0.00272, C4 0, D -0.00349
- Globales Erwärmungspotenzial luluc (GWP-luluc) [kg CO_(2)-Äq.]: A1-A3 0.017565, C1 0, C2 2.39e-5, C3 0.00127, C4 0, D -0.00104
- Abbau Potential der stratosphärischen Ozonschicht (ODP) [kg CFC11-Äq.]: A1-A3 1.36105e-10, C1 0, C2 1.4e-18, C3 9.48e-15, C4 0, D -1.55e-14
- Versauerungspotenzial von Boden und Wasser (AP) [mol H^(+)-Äq.]: A1-A3 0.0220973, C1 0, C2 4.79e-6, C3 0.00185, C4 0, D -0.00208
- Eutrophierungspotenzial Süßwasser (EP-freshwater) [kg PO_(4)-Äq.]: A1-A3 0.000111512, C1 0, C2 1.24e-8, C3 1.6e-6, C4 0, D -1.91e-6
- Eutrophierungspotenzial Salzwasser (EP-marine) [kg N-Äq.]: A1-A3 0.0061613, C1 0, C2 1.38e-6, C3 0.000611, C4 0, D -0.000538
- Eutrophierungspotenzial Land (EP-terrestrial) [mol N-Äq.]: A1-A3 0.064075, C1 0, C2 1.71e-5, C3 0.00747, C4 0, D -0.00577
- Bildungspotential für troposphärisches Ozon (POCP) [kg NMVOC-Äq.]: A1-A3 0.0233201, C1 0, C2 3.85e-6, C3 0.00173, C4 0, D -0.00155
- Potenzial für den abiotischen Abbau nicht fossiler Ressourcen (ADPE) [kg Sb-Äq.]: A1-A3 232.955, C1 0, C2 0.0757, C3 11.5, C4 0, D -25.3
- Potenzial für den abiotischen Abbau fossiler Brennstoffe (ADPF) [MJ]: A1-A3 1.76947e-5, C1 0, C2 4.74e-10, C3 1.36e-7, C4 0, D -2.44e-7
- Wassernutzung (WDP) [m^(3) Welt-Äq. entzogen]: A1-A3 0.559541, C1 0, C2 2.46e-5, C3 0.481, C4 0, D -0.154
- Auftreten von Krankheiten aufgrund von Feinstaubemissionen (PM) [Krankheitsfälle]: A1-A3 1.95985e-7, C1 0, C2 5.4e-11, C3 4.45e-8, C4 0, D -1.77e-8
- Wirkung durch Exposition des Menschen mit U235 (IR) [kBq U235-Äq.]: A1-A3 0.306596, C1 0, C2 7.7e-6, C3 0.037, C4 0, D -0.307
- Toxizitätsvergleichseinheit für Ökosysteme (ETP-fw) [CTUe]: A1-A3 118.19, C1 0, C2 0.0631, C3 9.52, C4 0, D -5.43
- Toxizitätsvergleichseinheit für Menschen (krebserregend) (HTP-c) [CTUh]: A1-A3 1.23378e-8, C1 0, C2 1.5e-12, C3 3.76e-10, C4 0, D -2.36e-10
- Toxizitätsvergleichseinheit für Menschen (nicht krebserregend) (HTP-nc) [CTUh]: A1-A3 1.21663e-6, C1 0, C2 6.68e-11, C3 4e-8, C4 0, D -8.76e-9
- Bodenqualitätsindex (SQP) [SQP]: A1-A3 64.863, C1 0, C2 0.0237, C3 2.6, C4 0, D -3.95

## Use advice
Gültigkeitsbereich:
Diese Deklaration gilt für Tectofin RV plus und Tectofin SK Dach- und Dichtungsbahnen, die am Standort Wächtersbach in Deutschland hergestellt werden. Es werden die Ökobilanzergebnisse von Tectofin SK in der Stärke von 2,6 mm mit einem Flächengewicht von 2,4 kg/m² (worst case) deklariert.

Die Ökobilanz beruht auf durchschnittlichen Produktionsdaten des Geschäftsjahres 2019. Diese wurden von der BMI GmbH zur Verfügung gestellt.
Systemgrenze:
Typ der EPD: Wiege bis Werkstor mit Optionen.

Folgende Module werden in der Ökobilanz berücksichtigt:

Produktstadium (A1-A3): Das Produktstadium der BMI Dachbahnen umfasst: A1 Rohstoffbereitstellung und –verarbeitung und Verarbeitungsprozesse von als Input dienenden Sekundärstoffen, (z.B. Recyclingprozesse),A2 LKW-Transporte der Rohstoffe zum Werk (Wächtersbach (DE)), A3 Dachbahnherstellung im Werk, (inkl. Energiebereitstellung, Wasserbereitstellung, Bereitstellung von Hilfsstoffen, Entsorgung der Produktionsabfälle, Herstellung der Verpackungsmaterialien).

Entsorgungsstadium (C1-C4): Das Entsorgungsstadium BMI Dachbahnen umfasst:

EoL-Szenario: 100% Thermische Verwertung der Dachbahnen in einer MVA mit einem R1-Wert > 0,6 mit Rückgewinnungspotentialen in D aus Energiesubstitution C1 manuell selektiver Ausbau (lastenfrei),C2 LKW-Transport (50 km) zur thermischen Verwertung (MVA). C3 Abfallbehandlung der Dachbahnen: 100% Thermische Verwertung in einer MVA, C4 keine weiteren Aufwände durch Deponierung/ Entsorgung

Potentiale und Lasten außerhalb der Systemgrenzen (D) der BMI Dachbahnen:

Modul D umfasst Rückgewinnungspotentiale aus der thermischen Verwertung der Dachbahnen in einer MVA durch Energiesubstitution.

## Data sources
- GaBi Database (all versions)
- GaBi database SP40 2020
