# Glas - Bundesverband Flachglas e.V. - Verbundsicherheitsglas

Dataset: ILCD process, EPD, template dataset
Geography: RER
Reference year: 2017
Valid until: 2022
Classification: Komponenten von Fenstern und Vorhangfassaden / Füllungen / Transparente Füllungen
Classification: OEKOBAU.DAT: Komponenten von Fenstern und Vorhangfassaden / Füllungen / Transparente Füllungen
Synonyms: VSG; Kalk-Natronsilicatglas; PVB-Folie
Method details: Produktkategorieregeln Teil A; Produktkategorieregeln Teil B – für Flachglas im Bauwesen; EPD Flachglas, Einscheibensicherheitsglas und Verbundsicherheitsglas
Owner: Bundesverband Flachglas e.V.
Compliance: EN 15804
Review: Independent external review by Patrick Wortner
Amounts: rows without a unit in brackets have none in this file; such an amount is in the reference unit of its flow, which a separate flow dataset defines
copyright: true

## General comment
Dieser Datensatz beinhaltet die Ergebnisse für die Module A1-A3 sowie die Module C1, C2, C3, C4, D gemäß EN 15804. Ein Vergleich mit anderen Produkten ist nur mit einer vergleichbaren Anwendung im Gebäude zulässig. Grundsätzlich ist eine Gegenüberstellung oder die Bewertung von EPD Daten nur möglich, wenn alle zu vergleichenden Datensätze nach EN 15804 erstellt wurden und der Gebäudekontext, bzw. die produktspezifischen Leistungsmerkmale berücksichtigt werden.

## Geography
Dieser Datensatz repräsentiert die Situation der Mitgliedsfirmen des Bundesverbands Flachglas e.V., im Hinblick auf die wichtigsten Technologien und die gesetzlichen Rahmenbedingungen.

## Time period
jährlicher Durchschnitt

## Technology and included processes
Die Ökobilanzergebnisse umfassen die Lebenszyklusstadien der Herstellung der Vorprodukte bis hin zur Rohstoffgewinnung und Verarbeitungsprozesse von als Input dienenden Sekundärstoffen (z.B. Recyclingprozesse), deren Transporte zum Werk sowie die Produktion selbst, einschließlich der Bereitstellung von allen Hilfs- und Betriebsstoffen, Energie, sowie die vollständige Abfallbehandlung oder die Deponierung der Restabfälle während des Stadiums der Produktion. Die Module A1, A2 und A3 sind hier als ein aggregiertes Modul A1-A3 ausgewiesen. Falls für diesen Datensatz weitere Module berechnet wurden, sind diese separat zu finden und können für eine Betrachtung des gesamten Lebenszyklus zusammengeführt werden.

## Technical purpose
Verbundsicherheitsglas (VSG) für die Weiterverarbeitung zu Mehrscheiben-Isolierglas und Anwendungen als Glas für das Bauwesen (Verwendung in der Gebäudehülle und beim Ausbau von baulichen Anlagen/Bauwerken).

## Reference product
- Glas - Bundesverband Flachglas e.V. - Verbundsicherheitsglas: 1

## Inputs
- Einsatz von Süßwasserressourcen (FW) / Uso neto de recursos de agua dulce (FW) [m3]: A1-A3 0.310033, C1 0.00164932, C2 8.11092e-5, C3 0.00240306, C4 0.000442343, D -0.00487204
- Nicht-erneuerbare Primärenergie als Energieträger (PENRE) / Uso de energía primaria no renovable, excluyendo los recursos de energía primaria no renovable utilizada como materia prima (PENRE) [MJ]: A1-A3 838.602, C1 3.22168, C2 0.798, C3 4.69398, C4 10.9554, D -33.8324
- Nicht-erneuerbare Primärenergie zur stofflichen Nutzung (PENRM) / Uso de la energía primaria no renovable utilizada como materia prima (PENRM) [MJ]: A1-A3 8.64, C1 0, C2 0, C3 0, C4 -8.64, D 0
- Nicht erneuerbare Sekundärbrennstoffe (NRSF) / Uso de combustibles secundarios no renovables (NRSF) [MJ]: A1-A3 2.00205e-19, C1 4.78724e-30, C2 6.53826e-29, C3 6.975e-30, C4 4.1212e-22, D -1.7036e-20
- Erneuerbare Primärenergie als Energieträger (PERE) / Uso de energía primaria renovable excluyendo los recursos de energía primaria renovable utilizada como materia prima (PERE) [MJ]: A1-A3 184.409, C1 1.21039, C2 0.0440143, C3 1.76353, C4 0.286736, D -2.26626
- Erneuerbare Primärenergie zur stofflichen Nutzung (PERM) / Uso de energía primaria renovable utilizada como materia prima (PERM) [MJ]: A1-A3 0, C1 0, C2 0, C3 0, C4 0, D 0
- Erneuerbare Sekundärbrennstoffe (RSF) / Uso de combustibles secundarios renovables (RSF) [MJ]: A1-A3 1.70442e-20, C1 0, C2 4.30901e-30, C3 0, C4 3.50853e-23, D -1.45034e-21
- Einsatz von Sekundärstoffen (SM) / Uso de materiales secundarios (SM) [kg]: A1-A3 0.73347, C1 0, C2 0, C3 0, C4 0, D 0
- Total nicht erneuerbare Primärenergie (PENRT) / Uso total de la energía primaria no renovable (energía primaria y recursos de energía primaria renovable utilizada como materia prima) (PENRT) [MJ]: A1-A3 847.242, C1 3.22168, C2 0.798, C3 4.69398, C4 2.31541, D -33.8324
- Total erneuerbare Primärenergie (PERT) / Uso total de la energía primaria renovable (energía primaria y recursos de energía primaria renovable utilizada como materia prima) (PERT) [MJ]: A1-A3 184.409, C1 1.21039, C2 0.0440143, C3 1.76353, C4 0.286736, D -2.26626

## Outputs
- Komponenten für die Wiederverwendung (CRU) / Componentes para su reutilización (CRU) [kg]: A1-A3 0, C1 0, C2 0, C3 0, C4 0
- Exportierte elektrische Energie (EEE) / Energía exportada electrica (EEE) [MJ]: A1-A3 1.71033, C1 0, C2 0, C3 0, C4 0
- Exportierte thermische Energie (EET) / Energía exportada termal (EET) [MJ]: A1-A3 3.20843, C1 0, C2 0, C3 0, C4 0
- Gefährlicher Abfall zur Deponie (HWD) / Residuos peligrosos eliminados (HWD) [kg]: A1-A3 8.53236e-7, C1 1.51112e-9, C2 4.6141e-8, C3 2.20171e-9, C4 3.98409e-8, D -3.53623e-8
- Stoffe für die Energierückgewinnung (MER) / Materiales para valorización energética (recuperación de energía) (MER) [kg]: A1-A3 0, C1 0, C2 0, C3 0, C4 0
- Stoffe zum Recycling (MFR) / Materiales para el reciclaje (MFR) [kg]: A1-A3 2.25678, C1 0, C2 0, C3 4.45842, C4 0
- Entsorgter nicht gefährlicher Abfall (NHWD) / Residuos no peligrosos eliminados (NHWD) [kg]: A1-A3 19.3786, C1 0.00226936, C2 6.68484e-5, C3 0.00330646, C4 10.8608, D -0.311182
- Entsorgter radioaktiver Abfall (RWD) / Residuos radiactivos eliminados (RWD) [kg]: A1-A3 0.0808236, C1 0.000533496, C2 1.09213e-6, C3 0.000777306, C4 3.35521e-5, D -0.0009435

## Impact indicators
- Potenzial für den abiotischen Abbau nicht fossiler Ressourcen (ADPE) / Potencial de agotamiento de recursos abióticos para recursos no fósiles (ADPE) [kg Sb-Äqv.]: A1-A3 0.000365014, C1 9.37056e-8, C2 4.79757e-9, C3 1.36529e-7, C4 6.62778e-8, D -5.01343e-6
- Potenzial für den abiotischen Abbau fossiler Brennstoffe (ADPF) / Potencial de agotamiento de recursos abióticos para recursos fósiles (ADPF) [MJ]: A1-A3 641.67, C1 1.87712, C2 0.795192, C3 2.73497, C4 2.2306, D -31.4541
- Versauerungspotenzial von Boden und Wasser (AP) / Potencial de acidificación del suelo y de los recursos de agua (AP) [kg SO2-Äqv.]: A1-A3 0.294491, C1 0.000500785, C2 0.000339067, C3 0.000729642, C4 0.0010216, D -0.0126457
- Eutrophierungspotenzial (EP) / Potencial de eutrofización (EP) [kg Phosphat-Äqv.]: A1-A3 0.0255527, C1 4.69238e-5, C2 8.71476e-5, C3 6.83682e-5, C4 0.000141045, D -0.00162874
- Globales Erwärmungspotenzial (GWP) / Potencial de calentamiento global (GWP) [kg CO2-Äqv.]: A1-A3 47.5794, C1 0.176362, C2 0.0578074, C3 0.256959, C4 0.172656, D -2.31708
- Abbau Potential der stratosphärischen Ozonschicht (ODP) / Potencial de agotamiento de la capa de ozono estratosférico (ODP) [kg R11 eq.]: A1-A3 4.56064e-8, C1 7.83978e-13, C2 1.59653e-15, C3 1.14226e-12, C4 3.91663e-14, D -1.34778e-12
- Bildungspotential für troposphärisches Ozon (POCP) / Potencial de formación de ozono troposférico (POCP) [kg Ethen-Äqv.]: A1-A3 0.0176065, C1 3.13504e-5, C2 -0.000151797, C3 4.56776e-5, C4 7.94118e-5, D 0.00177356

## Use advice
A1-A3 sowie Module C1, C2, C3, C4, D. Das Umweltprofil beinhaltet die Aufwendungen für die Lebenszyklus-Stadien cradle to gate mit Optionen (Modul A1-A3).

Der Aufbau des Verbundsicherheitsglases bezieht sich auf eine Glasdicke von 6 mm.

Die Muster-EPD erlangt Gültigkeit durch die Übertragung an den Hersteller durch das ift. Aktuell gültige EPDs sind der nachfolgenden Liste zu entehmen und auf www.ift-service.de/epd veröffentlicht.
EPD-Nummer und Deklarationsinhaber:
- M-EPD-FEV-002001, Semcoglas Holding GmbH, 26655 Westerstede
- M-EPD-FEV-002002, Q4Glass ABJ Investors Sp. z.o.o. Sp. k., 75-209 Koszalin
- M-EPD-FEV-002003, arcon Flachglas-Veredelung GmbH & Co. KG, 91555 Feuchtwangen
- M-EPD-FEV-002004, Pilkington Deutschland AG, 45966 Gladbeck
- M-EPD-FEV-002005, EUROGLAS GmbH, 39340 Haldensleben
- M-EPD-FEV-002006, Hero-Glas Veredelungs GmbH, 26906 Dersum
- M-EPD-FEV-002007, Glas Tech S.A., 62-020 Swarzedz
- M-EPD-FEV-002008, Opolglass Sp. z.o.o., 45-125 Opole
- M-EPD-FEV-002009, thermopor glas GmbH, 52399 Merzenich
- M-EPD-FEV-002011, Scheuten Glas Nederland Base Glass Unit, 5928 LN Venlo
- M-EPD-FEV-002012, Scheuten Glas Nederland Glass Tech Unit,5928 LN Venlo
- M-EPD-FEV-002013, Glas Trösch GmbH, 86720 Nördlingen
- M-EPD-FEV-002014, Flachglas Wernberg GmbH, 92533 Wernberg-Köblitz
- M-EPD-FEV-002015, OKALUX GmbH, 97828 Marktheidenfeld-Altfeld
- M-EPD-FEV-002016, Brakeler Thermo-Glas, GmbH, 33034 Brakel
- M-EPD-FEV-GB-002017, Pilkington IGP Sp. O o.o, 27-600 Sandomierz
- M-EPD-FEV-GB-002018, PRESS GLASS SA, 42-262 Poczesna
- M-EPD-FEV-002019, Isophon glas GmbH, 34346 Hann. Münden
- M-EPD-FEV-002020, sedak GmbH & Co. KG, 86368 Gersthofen
- M-EPD-FEV-002021, Schollglas Holding und Geschäftsführungsgesell-schaft mbH, 30890 Barsinghausen
- M-EPD-FEV-GB-002022, REFLEX Gornja Radgona d.o.o., 9250 Gornja Radgona
- M-EPD-FEV-GB-002023, UNIGLAS GmbH & Co. KG, 56410 Montabaur

## Review details
Die angewendete LCI Methode ist in Übereinstimmung mit ISO 14040 und 14044. Die Dokumentation enthält alle relevanten Informationen im Hinblick auf die Datenqualität und den Umfang der Anwendung der jeweiligen LCI Ergebnisse bzw. der Datensätze. Der Datensatz repräsentiert den Stand der Technik bezogen auf die funktionelle Einheit.

## Data sources
- GaBi database (general)
