# PU-Dämmplatten aus Blockschaumstoff

Dataset: ILCD process, EPD, average dataset
Geography: DE
Reference year: 2016
Valid until: 2022
Classification: OEKOBAU.DAT: Dämmstoffe / Polyurethan-Hartschaum (PU) / PU Blockschaum
Classification: IBUCategories: 02 Bauprodukte / Wärmedämmungsprodukte / Dämmstoffe aus Schaumkunststoffen
Method details: Dämmstoffe aus Schaumkunststoffen.pdf
Generated by: Sphera Solutions GmbH
Registration number: EPD-IVP-20160147-IBE1-DE
Owner: Industrieverband Polyurethan-Hartschaum e.V.
Compliance: DIN EN 15804; ISO 14025
Review: Accredited third party review by Institut Bauen und Umwelt e. V.
Amounts: rows without a unit in brackets have none in this file; such an amount is in the reference unit of its flow, which a separate flow dataset defines
copyright: false
licenseType: Free of charge for all users and uses
accessRestrictions: None

## General comment
Polyurethan-Hartschaum (PU) ist ein geschlossenzelliger Schaumstoff, der als werkmäßig hergestellter Wärmedämmstoff in Form von Dämmplatten im Hochbau und für haus- und betriebstechnische Anlagen eingesetzt wird. Die Produktfamilie der Polyurethan-Dämmstoffe (PU) umfasst die Produktvarianten Polyurethan (PUR) und Polyisocyanurat (PIR) - siehe /EN 13165/. PU-Dämmstoffe werden in Form von Blockschaum und als Dämmplatten mit flexiblen Deckschichten hergestellt.

Diese Produktdeklaration bezieht sich auf PU-Dämmplatten ohne Deckschichten aus Blockschaumstoff. Diese Umwelt-Produktdeklaration basiert auf gewichteten Mittelwerten, ermittelt auf Basis der Einzelwerte aus den Produktionswerken der genannten Herstellerfirmen (siehe Abschnitt 3.1).

## Technology and included processes
Polyurethan-Hartschaum (PU) ist ein geschlossenzelliger Schaumstoff, der als werkmäßig hergestellter Wärmedämmstoff in Form von Dämmplatten im Hochbau und für haus- und betriebstechnische Anlagen eingesetzt wird. Die Produktfamilie der Polyurethan-Dämmstoffe (PU) umfasst die Produktvarianten Polyurethan (PUR) und Polyisocyanurat (PIR) - siehe /EN 13165/ und /EN 14308/. PU-Dämmstoffe werden in Form von Blockschaum und als Dämmplatten mit flexiblen Deckschichten hergestellt. Diese Produktdeklaration bezieht sich auf PU-Dämmplatten ohne Deckschichten aus Blockschaumstoff. Polyurethan-Hartschaum entsteht durch chemische Reaktion von Methylendiphenyl-Diisocyanat (MDI, ca. 55-65 %) und Polyol (ca. 20-30 %) unter Zusatz von niedrig siedenden Treibmitteln (ca. 4-6 %). Diese Produktdeklaration bezieht sich auf Dämmplatten aus Blockschaumstoff, die mit dem Kohlenwasserstoff Pentan aufgeschäumt werden. Als Hilfsstoffe werden Wasser (ca. 0,5 %), Schaumstabilisatoren und Katalysatoren (ca. 3%) sowie Flammschutzmittel (chlorhaltige bzw. nicht chlorhaltige Phosphorsäureester, ca. 5–10 %) zugesetzt. Die Ökobilanz betrachtet folgende Module des Lebenszyklus: Rohstoffgewinnung und – bereitstellung (A1), Transporte der Rohstoffe (A2), Herstellung inklusive Verpackung (A3), Transport zur Baustelle (A4), Einbau ins Gebäude ( thermische Verwertung der Verschnitte und Verpackungsabfälle)-(A5), Transport zum End-of-Life (C2), Abfallbehandlung: Energie für Schredder (C3), thermische Verwertung in einer Müllverbrennungsanlage (MVA) - (C4), Nutzenpotenzial außerhalb der Systemgrenze aufgrund der Energiesubstitution in der MVA (D).
Technische Daten:
Zur Bestimmung der technischen Daten werden die Prüfmethoden gemäß /DIN EN 1316/, /DIN 13165/ und /DIN EN 14308/ verwendet.
Deklarierte Einheit:
Die deklarierte Einheit ist 1 m² installierte PU-Dämmplatte aus Blockschaumstoff und den folgenden Spezifikationen:

## Technical purpose
Das Anwendungsgebiet von PU-Hartschaum-Dämmstoffen ist die Wärmedämmung im Hochbau (z.B. Steildach, Flachdach, Boden, Decke und Außenwand (außen und innen)). Darüber hinaus wird PU-Hartschaum für die Dämmung haus- und betriebstechnischer Anlagen verwendet.

## Reference product
- 1 m² installierte PU-Dämmplatte aus Blockschaumstoff: 1

## Inputs
- Erneuerbare Primärenergie als Energieträger (PERE) [MJ]: A1-A3 16.3, A4 0.226, A5 0.238, C2 0.0446, C3 0.498, C4 0.227, D -8.87
- Erneuerbare Primärenergie zur stofflichen Nutzung (PERM) [MJ]: A1-A3 0, A4 0, A5 0, C2 0, C3 0, C4 0, D 0
- Total erneuerbare Primärenergie (PERT) [MJ]: A1-A3 16.3, A4 0.226, A5 0.238, C2 0.0446, C3 0.498, C4 0.227, D -8.87
- Nicht-erneuerbare Primärenergie als Energieträger (PENRE) [MJ]: A1-A3 226, A4 3.98, A5 5.56, C2 0.788, C3 1.78, C4 2.33, D -67.2
- Nicht-erneuerbare Primärenergie zur stofflichen Nutzung (PENRM) [MJ]: A1-A3 99, A4 0, A5 0, C2 0, C3 0, C4 0, D 0
- Total nicht erneuerbare Primärenergie (PENRT) [MJ]: A1-A3 325, A4 3.98, A5 5.56, C2 0.788, C3 1.78, C4 2.33, D -67.2
- Einsatz von Sekundärstoffen (SM) [kg]: A1-A3 0, A4 0, A5 0, C2 0, C3 0, C4 0, D 0
- Erneuerbare Sekundärbrennstoffe (RSF) [MJ]: A1-A3 0, A4 0, A5 0, C2 0, C3 0, C4 0, D 0
- Nicht erneuerbare Sekundärbrennstoffe (NRSF) [MJ]: A1-A3 0, A4 0, A5 0, C2 0, C3 0, C4 0, D 0
- Einsatz von Süßwasserressourcen (FW) [m^3]: A1-A3 0.0947, A4 0.000565, A5 0.00226, C2 0.000112, C3 0.000769, C4 0.0202, D -0.0138

## Outputs
- Gefährlicher Abfall zur Deponie (HWD) [kg]: A1-A3 1.46e-5, A4 3.01e-7, A5 2.55e-7, C2 5.96e-8, C3 1.13e-9, C4 1.3e-9, D -2.56e-8
- Entsorgter nicht gefährlicher Abfall (NHWD) [kg]: A1-A3 0.36, A4 0.000335, A5 0.00454, C2 6.62e-5, C3 0.00107, C4 0.00892, D -0.0233
- Entsorgter radioaktiver Abfall (RWD) [kg]: A1-A3 0.00765, A4 5.69e-6, A5 0.00013, C2 1.13e-6, C3 0.000269, C4 0.000106, D -0.00478
- Komponenten für die Wiederverwendung (CRU) [kg]: A1-A3 0, A4 0, A5 0, C2 0, C3 0, C4 0, D 0
- Stoffe zum Recycling (MFR) [kg]: A1-A3 0, A4 0, A5 0, C2 0, C3 0, C4 0, D 0
- Stoffe für die Energierückgewinnung (MER) [kg]: A1-A3 0, A4 0, A5 0, C2 0, C3 0, C4 0, D 4.04
- Exportierte elektrische Energie (EEE) [MJ]: A1-A3 0, A4 0, A5 0.509, C2 0, C3 0, C4 13.1, D 0
- Exportierte thermische Energie (EET) [MJ]: A1-A3 0, A4 0, A5 1.164, C2 0, C3 0, C4 30.2, D 0

## Impact indicators
- Globales Erwärmungspotenzial (GWP) [kg CO_(2)-Äq.]: A1-A3 14.8, A4 0.289, A5 0.54, C2 0.0572, C3 0.102, C4 8.74, D -4
- Abbau Potential der stratosphärischen Ozonschicht (ODP) [kg CFC11-Äq.]: A1-A3 2.34e-5, A4 1.32e-12, A5 4e-7, C2 2.62e-13, C3 7.25e-11, C4 2.59e-11, D -1.29e-9
- Versauerungspotenzial von Boden und Wasser (AP) [kg SO_(2)-Äq.]: A1-A3 0.0306, A4 0.00164, A5 0.000618, C2 0.000324, C3 0.000284, C4 0.00351, D -0.00626
- Eutrophierungspotenzial (EP) [kg PO_(4)^(3)-Äq.]: A1-A3 0.0049, A4 0.000409, A5 0.000108, C2 8.09e-5, C3 2.54e-5, C4 0.000891, D -0.000637
- Bildungspotential für troposphärisches Ozon (POCP) [kg Ethen-Äq.]: A1-A3 0.0196, A4 -0.000673, A5 0.000212, C2 -0.000133, C3 1.96e-5, C4 0.000236, D -0.000672
- Potenzial für den abiotischen Abbau nicht fossiler Ressourcen (ADPE) [kg Sb-Äq.]: A1-A3 2.88e-5, A4 1.92e-8, A5 4.89e-7, C2 3.8e-9, C3 3.34e-8, C4 6.87e-8, D -6.71e-7
- Potenzial für den abiotischen Abbau fossiler Brennstoffe (ADPF) [MJ]: A1-A3 306, A4 3.97, A5 5.24, C2 0.785, C3 1.11, C4 2.07, D -55.2

## Use advice
Gültigkeitsbereich:
Diese Umwelt-Produktdeklaration gilt für die PU-Dämmplatte aus Blockschaumstoff, hergestellt von den IVPU-Mitgliedern Paul Bauder GmbH & Co. KG und puren GmbH. Diese IVPU-Mitglieder repräsentieren den überwiegenden Teil des Polyurethan-Blockschaumstoffmarktes in Deutschland. Diese Umwelt-Produktdeklaration basiert auf gewichteten Mittelwerten, ermittelt auf Basis der Einzelwerte aus den Produktionswerken der genannten Herstellerfirmen (siehe Abschnitt 3.1).
Systemgrenze:
Typ der EPD: Wiege bis Werkstor - mit Optionen

Die Ökobilanz betrachtet folgende Module des Lebenszyklus:

· Rohstoffgewinnung und –bereitstellung (A1)

· Transporte der Rohstoffe (A2)

· Herstellung inklusive Verpackung (A3)

· Transport zur Baustelle (A4)

· Einbau ins Gebäude (thermische Verwertung der Verschnitte und Verpackungsabfälle) (A5)

· Transport zum End-of-Life (C2)

· Abfallbehandlung: Energie für Schredder (C3)

· Thermische Verwertung in einer Müllverbrennnungsanlage (MVA) - (C4)

· Nutzenpotenzial außerhalb der Systemgrenze aufgrund der Energiesubstitution in der MVA (D)

## Data sources
- GaBi Database (all versions)
- GaBi database SP29 2016
