# Biogas (1 kg)

Dataset: ILCD process, EPD, generic dataset
Geography: DE
Reference year: 2021
Valid until: 2022
Classification: oekobau.dat: Sonstige / Energieträger - Bereitstellung frei Verbraucher / Biogas
Owner: Sphera Solutions GmbH
Compliance: EN 15804+A2
Review: Dependent internal review by Sphera Solutions GmbH; Independent external review by GaBi user forum
Amounts: rows without a unit in brackets have none in this file; such an amount is in the reference unit of its flow, which a separate flow dataset defines
copyright: true
licenseType: Free of charge for all users and uses
accessRestrictions: The license conditions as stated on https://www.oekobaudat.de/ apply.
accessRestrictions: Es gelten die Lizenzbedingungen wie sie auf https://www.oekobaudat.de/ genannt sind.

## General comment
Dieser Datensatz wurde nach dem European Standard EN 15804+A2 für Nachhaltiges Bauen modelliert. Ergebnisse werden in Modulen abgebildet, die den strukturierten Ausdruck von Ergebnissen über den gesamten Lebenszyklus zulassen.

## Geography
Der Datensatz bildet die länderspezifische Situation in Deutschland ab. Dabei werden Haupttechnologien, spezifische regionale Charakteristiken und ggf. Importstatistiken berücksichtigt.

## Time period
Jährlicher Durchschnitt

## Technology and included processes
Biogas wird aus unterschiedlichen Quellen gewonnen. Der Datensatz bilden den sogenannten "Verbrauchsmix" in Deutschland ab. Der hinterlegte Mix beinhaltet 70,9% Biogas durch anaerobe Fermentation von organischen Abfällen und Energiepflanzen zu Biogas durch Nassfermentation, 17,8% Biogas aus Deponien mit Deponiegaserzeugung und 11,3% Biogas aus Klärschlamm. Alle wesentlichen Prozessschritte der Biogasherstellung wie Transporte, Aufbereitung der Substrate, Fermentation, Abgasreinigung und Verdichtung des Biogases sind im Datensatz enthalten.

## Technical purpose
Biogas wird überwiegend für die Erzeugung von elektrischer und thermischer Energie verwendet.

## Safety margin
10 %. Produktsystem weitgehend vollständig abgebildet. Gute technologische, zeitliche und geographische Repräsentativität.

## Reference product
- Biogas (1 kg): 1

## Inputs
- Erneuerbare Primärenergie als Energieträger (PERE) [MJ]: B6 46.0319
- Erneuerbare Primärenergie zur stofflichen Nutzung (PERM) [MJ]: B6 0
- Total erneuerbare Primärenergie (PERT) [MJ]: B6 46.0319
- Nicht-erneuerbare Primärenergie als Energieträger (PENRE) [MJ]: B6 2.11451
- Nicht-erneuerbare Primärenergie zur stofflichen Nutzung (PENRM) [MJ]: B6 0
- Total nicht-erneuerbare Primärenergie (PENRT) [MJ]: B6 2.11451
- Einsatz von Sekundärstoffen (SM) [kg]: B6 0
- Erneuerbare Sekundärbrennstoffe (SF) [MJ]: B6 0
- Nicht erneuerbare Sekundärbrennstoffe (NRSF) [MJ]: B6 0
- Nettoeinsatz von Süßwasserressourcen (FW) [m3]: B6 0.00970614

## Outputs
- Gefährlicher Abfall zur Deponie (HWD) [kg]: B6 2.39596e-9
- Entsorgter nicht gefährlicher Abfall (NHWD) [kg]: B6 0.0310742
- Entsorgter radioaktiver Abfall (RWD) [kg]: B6 5.31183e-5
- Komponenten für die Wiederverwendung (CRU) [kg]: B6 0
- Stoffe zum Recycling (MFR) [kg]: B6 0
- Stoffe für die Energierückgewinnung (MER) [kg]: B6 0
- Exportierte elektrische Energie (EEE) [MJ]: B6 0
- Exportierte thermische Energie (EET) [MJ]: B6 0

## Impact indicators
- Globales Erwärmungspotenzial - total (GWP-total) [kg CO2 eq.]: B6 -1.19536
- Globales Erwärmungspotenzial - fossil (GWP-fossil) [kg CO2 eq.]: B6 0.265777
- Globales Erwärmungspotenzial - biogen (GWP-biogenic) [kg CO2 eq.]: B6 -1.46685
- Globales Erwärmungspotenzial - luluc (GWP-luluc) [kg CO2 eq.]: B6 0.00571417
- Abbaupotenzial der stratosphärischen Ozonschicht (ODP) [kg CFC-11 eq.]: B6 1.39113e-15
- Versauerungspotenzial, kumulierte Überschreitung (AP) [Mole of H+ eq.]: B6 0.00328439
- Eutrophierungspotenzial - Süßwasser (EP-freshwater) [kg P eq.]: B6 8.12328e-5
- Eutrophierungspotenzial - Salzwasser (EP-marine) [kg N eq.]: B6 0.00151376
- Eutrophierungspotenzial - Land (EP-terrestrial) [Mole of N eq.]: B6 0.0135348
- Bildungspotenzial für troposphärisches Ozon (POCP) [kg NMVOC eq.]: B6 0.00174141
- Potenzial für die Verknappung abiotischer Ressourcen nicht fossile Ressourcen (ADPE) [kg Sb eq.]: B6 1.19576e-6
- Potenzial für die Verknappung abiotischer Ressourcen fossile Brennstoffe (ADPF) [MJ]: B6 2.06533
- Wasser-Entzugspotenzial (Benutzer) (WDP) [m³ world equiv.]: B6 0.0166894

## Use advice
Dieser Datensatz bezieht sich auf die Herstellung von 1 kg Biogas. Der Heizwert beträgt 36 MJ/kg. Der Methangehalt liegt bei 59%.
Der Datensatz beinhaltet keine Emissionen aus der Verbrennung des Biogases, sondern lediglich die Herstellungsaufwendungen inklusive der Speicherung biogenen Kohlenstoffs. Für eine vollständige Betrachtung müssen die Emissionen aus der Nutzung des Biogases und Effizienzen auf Gebäudeebene separat berücksichtigt werden.

## Data sources
- Documentation of data quality management
- GaBi Database Edition 2021, CUP2021.01
- GaBi database (all versions)
