# 3- und 5-Schicht Massivholzplatte (Durchschnitt DE)

Dataset: ILCD process, EPD, representative dataset
Geography: DE
Reference year: 2021
Valid until: 2026
Classification: OEKOBAU.DAT: Holz / Holzwerkstoffe / 3- und 5-Schichtplatten
Method details: EN 15804; ILCD format
Generated by: Thünen-Institut für Holzforschung
Owner: Thünen-Institut für Holzforschung
Compliance: EN 15804+A2; EN 16485
Review: Independent external review by Dr. Frank Werner - Umwelt & Entwicklung
Amounts: rows without a unit in brackets have none in this file; such an amount is in the reference unit of its flow, which a separate flow dataset defines
copyright: true

## General comment
Weitere Informationen zur deklarierten Einheit (Zusammensetzung) und die auf Herstellerangaben beruhende Sachbilanz (In- und Output der Stoff- und Energieströme) stehen als Excel-Datei unter dem Unterpunkt Hintergrund-Bericht zum Download bereit.
Der Datensatz wurde 2021 als Aktualisierung mit gleichbleibendem Vordergrundsystem erstellt. Alle Hintergrunddaten entstammen der GaBi Professional Datenbank in der Content Version 2021.1. Die Modellierung und Berechnung der Ökobilanz basiert auf den europäischen Normen EN 15804:2012+A2:2019 und EN 16485:2014. Bei Rückfragen wenden Sie sich bitte an holzundklima@thuenen.de.

## Geography
Für die Ökobilanzierung von Schicht-Massivholzplatten wurden Daten von 2 Werken berücksichtigt (Rüter & Diederichs 2012). Für alle in Rüter & Diederichs (2012) angeführten Vollholzprodukte wurden von 2009 bis 2011 insgesamt 178 Prozesslinien erfasst. Im Verhältnis zu den vom Statistischen Bundesamt gemeldeten Produktionsmengen im selben Zeitraum entspricht die erreichte Abdeckung von Vollholzprodukten aus Nadelschnittholz 38 %.

## Time period
Der Datensatz basiert auf Produktionsdaten aus den Jahren 2009 bis 2011 (Vordergrundsystem).
Eine Aktualisierung des Hintergrundsystems erfolgte 2021.

## Technology and included processes
Massivholzplatten sind in der Regel symmetrisch aufgebaut und bestehen aus drei oder fünf recht-winklig zueinander verklebten Lagen aus Nadelschnittholz. Die Plattendicke beträgt normalerweise zwischen 12 und 100 mm. Die Verklebung von Massivholzplatten wird vornehmlich mittels Melamin-Harnstoff-Formaldehyd-Bindemittel durchgeführt. Für die Herstellung von Massivholzplatten werden Bretter und Bohlen aus Nadelholz zunächst auf weniger als 15 % Holzfeuchte getrocknet, gehobelt und mittels Schmalseitenverklebung zu einer Einschichtplatte verklebt. Diese werden nach der Aushärtung gehobelt, beleimt und anschließend in der Presse kreuzweise angeordnet. Nach dem Pressen und Aushärten wird der Rohling gehobelt, gefast, abgebunden und verpackt.
Die Holzfeuchte des Produktes liegt bei 12%

## Technical purpose
Massivholzplatten in 3- oder 5- schichtigem Aufbau sind industriell gefertigte flächige Holzprodukte für den Innenausbau, Möbelbau oder konstruktiven Holzbau.

## Scenarios
- energetisch (Modul D): therm. Verwertung
- stofflich (Modul D): stoffl. Verwertung
- Entsorgung Verpackung (Modul A5): Das Modul A5 enthält ausschließlich die Entsorgung der Verpackungsmaterialien

## Reference product
- 3- und 5 Schichtplatte: 1

## Inputs
- Erneuerbare Primärenergie als Energieträger (PERE) / Uso de energía primaria renovable excluyendo los recursos de energía primaria renovable utilizada como materia prima (PERE) [MJ]: A1 360.464, A2 20.1168, A3 1751.31, A1-A3 2131.89, A5 (Entsorgung Verpackung) 0.0909782, C2 0.414532, C3 100.439, D (energetisch) 6036.25, D (stofflich) -28.3757
- Erneuerbare Primärenergie zur stofflichen Nutzung (PERM) / Uso de energía primaria renovable utilizada como materia prima (PERM) [MJ]: A1 8476.73, A2 0, A3 0, A1-A3 8476.73, A5 (Entsorgung Verpackung) 0, C2 0, C3 -8476.73, D (energetisch) 0, D (stofflich) 0
- Total erneuerbare Primärenergie (PERT) / Uso total de la energía primaria renovable (energía primaria y recursos de energía primaria renovable utilizada como materia prima) (PERT) [MJ]: A1 8837.2, A2 20.1168, A3 1751.31, A1-A3 10608.6, A5 (Entsorgung Verpackung) 0.0909782, C2 0.414532, C3 -8376.3, D (energetisch) 6036.25, D (stofflich) -28.3757
- Nicht-erneuerbare Primärenergie als Energieträger (PENRE) / Uso de energía primaria no renovable, excluyendo los recursos de energía primaria no renovable utilizada como materia prima (PENRE) [MJ]: A1 599.608, A2 336.556, A3 1090.88, A1-A3 2027.05, A5 (Entsorgung Verpackung) 0.415303, C2 7.43784, C3 153.986, D (energetisch) -4464.09, D (stofflich) -144.231
- Nicht-erneuerbare Primärenergie zur stofflichen Nutzung (PENRM) / Uso de la energía primaria no renovable utilizada como materia prima (PENRM) [MJ]: A1 178.382, A2 0, A3 27.612, A1-A3 205.994, A5 (Entsorgung Verpackung) -27.612, C2 0, C3 -178.382, D (energetisch) 0, D (stofflich) 0
- Total nicht erneuerbare Primärenergie (PENRT) / Uso total de la energía primaria no renovable (energía primaria y recursos de energía primaria renovable utilizada como materia prima) (PENRT) [MJ]: A1 777.99, A2 336.556, A3 1118.49, A1-A3 2233.04, A5 (Entsorgung Verpackung) -27.1967, C2 7.43784, C3 -24.3956, D (energetisch) -4464.09, D (stofflich) -144.231
- Einsatz von Sekundärstoffen (SM) / Uso de materiales secundarios (SM) [kg]: A1 0, A2 0, A3 0, A1-A3 0, A5 (Entsorgung Verpackung) 0, C2 0, C3 0, D (energetisch) 0, D (stofflich) 511.709
- Erneuerbare Sekundärbrennstoffe (RSF) / Uso de combustibles secundarios renovables (RSF) [MJ]: A1 22.108, A2 0, A3 87.2794, A1-A3 109.387, A5 (Entsorgung Verpackung) 0, C2 0, C3 0, D (energetisch) 0, D (stofflich) 0
- Nicht erneuerbare Sekundärbrennstoffe (NRSF) / Uso de combustibles secundarios no renovables (NRSF) [MJ]: A1 0, A2 0, A3 0, A1-A3 0, A5 (Entsorgung Verpackung) 0, C2 0, C3 0, D (energetisch) 0, D (stofflich) 0
- Einsatz von Süßwasserressourcen (FW) / Uso neto de recursos de agua dulce (FW) [m3]: A1 0.133903, A2 0.0186483, A3 0.325433, A1-A3 0.477984, A5 (Entsorgung Verpackung) 0.00405376, C2 0.000474497, C3 0.0472656, D (energetisch) 0.942661, D (stofflich) -0.015899

## Outputs
- Gefährlicher Abfall zur Deponie (HWD) / Residuos peligrosos eliminados (HWD) [kg]: A1 7.50565e-7, A2 1.51562e-8, A3 1.9441e-6, A1-A3 2.70982e-6, A5 (Entsorgung Verpackung) 8.92981e-11, C2 3.74788e-10, C3 5.59893e-8, D (energetisch) -1.6194e-6, D (stofflich) -2.31556e-7
- Entsorgter nicht gefährlicher Abfall (NHWD) / Residuos no peligrosos eliminados (NHWD) [kg]: A1 0.439758, A2 0.0541117, A3 1.85688, A1-A3 2.35075, A5 (Entsorgung Verpackung) 0.0224398, C2 0.0011049, C3 0.11997, D (energetisch) 12.0979, D (stofflich) -0.0390549
- Entsorgter radioaktiver Abfall (RWD) / Residuos radiactivos eliminados (RWD) [kg]: A1 0.00943232, A2 0.000444486, A3 0.0826234, A1-A3 0.0925002, A5 (Entsorgung Verpackung) 1.10716e-5, C2 8.997e-6, C3 0.0123357, D (energetisch) -0.286265, D (stofflich) -0.00286369
- Komponenten für die Wiederverwendung (CRU) / Componentes para su reutilización (CRU) [kg]: A1 0, A2 0, A3 0, A1-A3 0, A5 (Entsorgung Verpackung) 0, C2 0, C3 0, D (energetisch) 0, D (stofflich) 0
- Stoffe zum Recycling (MFR) / Materiales para el reciclaje (MFR) [kg]: A1 0, A2 0, A3 0, A1-A3 0, A5 (Entsorgung Verpackung) 0, C2 0, C3 511.709, D (energetisch) 0, D (stofflich) 0
- Stoffe für die Energierückgewinnung (MER) / Materiales para valorización energética (recuperación de energía) (MER) [kg]: A1 0, A2 0, A3 0, A1-A3 0, A5 (Entsorgung Verpackung) 0, C2 0, C3 511.709, D (energetisch) 0, D (stofflich) 0
- Exportierte elektrische Energie (EEE) / Energía exportada electrica (EEE) [MJ]: A1 0, A2 0, A3 0.399238, A1-A3 0.399238, A5 (Entsorgung Verpackung) 2.52043, C2 0, C3 0, D (energetisch) 0, D (stofflich) 0
- Exportierte thermische Energie (EET) / Energía exportada termal (EET) [MJ]: A1 0, A2 0, A3 0.927477, A1-A3 0.927477, A5 (Entsorgung Verpackung) 5.83316, C2 0, C3 0, D (energetisch) 0, D (stofflich) 0

## Impact indicators
- Globales Erwärmungspotenzial - total (GWP-total) [kg CO2-Äqv.]: A1 -763.89, A2 25.1403, A3 88.6932, A1-A3 -650.057, A5 (Entsorgung Verpackung) 0.872381, C2 0.536654, C3 818.566, D (energetisch) -247.944, D (stofflich) -11.1651
- Globales Erwärmungspotenzial - fossil (GWP-fossil) [kg CO2-Äqv.]: A1 42.5381, A2 25.1403, A3 88.6932, A1-A3 156.372, A5 (Entsorgung Verpackung) 0.872381, C2 0.536654, C3 12.138, D (energetisch) -247.944, D (stofflich) -11.1651
- Globales Erwärmungspotenzial - biogen (GWP-biogenic) [kg CO2-Äqv.]: A1 -806.428, A2 0, A3 0, A1-A3 -806.428, A5 (Entsorgung Verpackung) 0, C2 0, C3 806.428, D (energetisch) 0, D (stofflich) 0
- Abbaupotenzial der stratosphärischen Ozonschicht (ODP) [kg CFC 11-Äquiv.]: A1 2.904e-13, A2 9.18133e-15, A3 8.73514e-12, A1-A3 9.03473e-12, A5 (Entsorgung Verpackung) 3.69821e-16, C2 7.12915e-17, C3 4.15483e-13, D (energetisch) -9.63917e-12, D (stofflich) -9.50668e-14
- Versauerungspotenzial, kumulierte Überschreitung (AP) [mol H+ eqv.]: A1 0.193707, A2 0.144952, A3 0.380696, A1-A3 0.719356, A5 (Entsorgung Verpackung) 0.00038401, C2 0.00323989, C3 0.0174679, D (energetisch) -0.302867, D (stofflich) -0.0646757
- Eutrophierungspotenzial - Süßwasser (EP-freshwater) [kg P eqv.]: A1 8.77361e-5, A2 5.77511e-5, A3 0.000400095, A1-A3 0.000545583, A5 (Entsorgung Verpackung) 6.01242e-8, C2 1.65645e-6, C3 5.08852e-5, D (energetisch) -0.00118301, D (stofflich) -2.72706e-5
- Eutrophierungspotenzial - Salzwasser (EP-marine) [kg N eqv.]: A1 0.112777, A2 0.0713414, A3 0.153637, A1-A3 0.337755, A5 (Entsorgung Verpackung) 0.000107411, C2 0.00158749, C3 0.00558653, D (energetisch) -0.109923, D (stofflich) -0.0308454
- Eutrophierungspotenzial - Land (EP-terrestrial) [mol N eqv.]: A1 0.972133, A2 0.789564, A3 1.70422, A1-A3 3.46592, A5 (Entsorgung Verpackung) 0.00178433, C2 0.0175708, C3 0.0583261, D (energetisch) -0.863363, D (stofflich) -0.339653
- Bildungspotenzial für troposphärisches Ozon (POCP) [kg NMVOC eqv.]: A1 0.248434, A2 0.134137, A3 0.459574, A1-A3 0.842145, A5 (Entsorgung Verpackung) 0.000280091, C2 0.00299392, C3 0.0138795, D (energetisch) -0.273905, D (stofflich) -0.0797928
- Potenzial für die Verknappung abiotischer Ressourcen – nicht fossile Ressourcen (ADPE) [kg Sb-Äqv.]: A1 9.42804e-6, A2 2.17497e-6, A3 3.85158e-5, A1-A3 5.01188e-5, A5 (Entsorgung Verpackung) 5.37505e-9, C2 4.24811e-8, C3 4.98206e-6, D (energetisch) -0.000120486, D (stofflich) -1.81457e-6
- Potenzial für die Verknappung abiotischer Ressourcen – fossile Brennstoffe (ADPF) [MJ]: A1 777.927, A2 336.44, A3 1090.55, A1-A3 2204.91, A5 (Entsorgung Verpackung) 0.415192, C2 7.42793, C3 153.938, D (energetisch) -4641.38, D (stofflich) -144.215
- Wasser-Entzugspotenzial (Benutzer) (WDP) [m3 world eqv.]: A1 0.133903, A2 0.0186483, A3 0.325433, A1-A3 0.477984, A5 (Entsorgung Verpackung) 0.00405376, C2 0.000474497, C3 0.0472656, D (energetisch) 0.942661, D (stofflich) -0.015899
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
## Use advice
Der Datensatz bildet die durchschnittlichen Produktionsverhältnisse und die damit verbundenen Umweltwirkungen repräsentativ für Deutschland ab. Liegen keine herstellerspezifischen Ökobilanzergebnisse des verwendeten Produkts vor, empfiehlt sich die Verwendung dieses Durchschnittsdatensatzes.

## Data sources
- Rüter S, Diederichs S (2012) Ökobilanz Basisdaten für Bauprodukte aus Holz, Hamburg, Johann Heinrich von Thünen Institut, Institut für Holztechnologie und Holzbiologie, Abschlussbericht
- GaBi database (general)
