# BauderTHERMOFOL

Dataset: ILCD process, EPD, average dataset
Geography: DE
Reference year: 2016
Valid until: 2021
Classification: OEKOBAU.DAT: Kunststoffe / Dachbahnen / PVC-Dachbahnen
Classification: IBUCategories: 02 Bauprodukte / Abdichtungen / Dach- und Dichtungsbahnsysteme aus Kunststoffen und Elastomeren
Method details: Dach- und Dichtungsbahnsysteme aus Kunststoffen und Elastomeren.pdf
Owner: Paul Bauder GmbH & Co. KG
Compliance: DIN EN 15804; ISO 14025
Review: Accredited third party review by IBU
Amounts: rows without a unit in brackets have none in this file; such an amount is in the reference unit of its flow, which a separate flow dataset defines
copyright: true

## General comment
BauderTHERMOFOL sind Kunststoffdach- und Dichtungsbahnen auf Basis PVC-P mit einer Trägereinlage aus synthetischen Fasern. Die Produktpalette untergliedert sich in folgende Varianten:

· BauderTHERMOFOL U (12/15/18/20/24)

mittige Polyesterverstärkung

· BauderTHERMOFOL U (15/18/20) V

mittige Polyesterverstärkung, unterseitige Spezialvlieskaschierung

· BauderTHERMOFOL M (12/15/18/20)

mittige Polyesterverstärkung

Die ausgewiesenen Ergebnisse deklarieren einen Durchschnitt über alle THERMOFOL-Produkte. Die Durchschnittsbildung basiert auf den entsprechenden Produktionsmengen (nach produzierter Fläche).

## Technology and included processes
Die Fertigung der PVC-P Dach- und Dichtungsbahnen erfolgt in einem zweistufigen Verfahren: Im ersten Schritt werden die Rohstoffe zusammen gemischt und auf einem Extruder plastifiziert. Die Kunststoffmasse wird auf einem Kalander zu Folien ausgewalzt. Im zweiten Schritt erhalten die Folien eine mittige Polyestergewebeverstärkung. Ein Teil der PVC-P Dach- und Dichtungsbahnen erhält eine unterseitige Spezialvlieskaschierung. Nach Abkühlung und endgültigem Randbeschnitt werden die Produkte konfektioniert. Alle anfallenden Produktionsabfälle werden innerbetrieblich recycelt und dem Fertigungsprozess direkt wieder rückgeführt. Eine permanente Messung der Produktqualität und kontinuierliche Verbesserung der internen Prozesse wird durch den Einsatz des Qualitätsmanagementsystems nach /DIN EN ISO 9001/ gewährleistet. - Systemgrenzen: Wiege bis Bahre mit Optionen. - Transporte: es werden sämtliche Transporte im Lebenszyklus berücksichtigt. - Repräsentativität der EPD: Alle Datensätze wurden entsprechend den lokalen Gegebenheiten bestmöglich ausgewählt (u.a. EU-Datensätze ab Transport zur Baustelle). - Abfälle: Es existieren insgesamt zwei Szenarien, die einzeln genutzt werden können, da es sich jeweils um ein 100 % Szenario handelt (KEINE Mischszenarien).
Deklarierte Einheit:
Die deklarierte Einheit ist 1 m² des nach der Produktionsmenge gewichteten Mittels für die mechanisch oder unter Auflast befestigten, mittels Heißluft abgedichteten THERMOFOL Dachbahn-Varianten U (12/15/18/20/24), U (15/18/20) V und
M (12/15/18/20) inklusive Verpackungsmaterialien.

## Technical purpose
Die PVC-P Dach- und Dichtungsbahnen werden einlagig verlegt und an den Nähten heißluftverschweißt. Die Windsogsicherung erfolgt durch mechanische Befestigung, per Auflast oder per Verklebung.

Dachabdichtung

Einlagige Abdichtung von nicht genutzten und genutzten Dächern in flacher und geneigter Form.

Bauwerksabdichtung

Einlagige Abdichtung von nichtwasserdichten Bauwerken und Bauteilen gegen Bodenfeuchte und nicht drückendes Wasser.

BauderTHERMOFOL Dach- und Dichtungsbahnen werden je nach Anforderung:

· mechanisch befestigt,

· unter Auflast oder

· verklebt verlegt.

## Scenarios
- S1: Recyling-Route
- S2: MVA-Route

## Reference product
- 1 m² BauderTHERMOFOL U (12/15/18/20/24), U (15/18/20) V und M (12/15/18/20): 1

## Inputs
- Erneuerbare Primärenergie als Energieträger (PERE) [MJ]: A1-A3 7.75, A4 0.0491, A5 0.484, C2 (S1) 0.0184, C2 (S2) 0.00643, C3 (S1) 0.0601, C3 (S2) 1.33, D (S1) -5.94, D (S2) -0.104
- Erneuerbare Primärenergie zur stofflichen Nutzung (PERM) [MJ]: A1-A3 1.46, A4 0, A5 0, C2 (S1) 0, C2 (S2) 0, C3 (S1) 0, C3 (S2) 0, D (S1) 0, D (S2) 0
- Total erneuerbare Primärenergie (PERT) [MJ]: A1-A3 9.22, A4 0.0491, A5 0.484, C2 (S1) 0.0184, C2 (S2) 0.00643, C3 (S1) 0.0601, C3 (S2) 1.33, D (S1) -5.94, D (S2) -0.104
- Nicht-erneuerbare Primärenergie als Energieträger (PENRE) [MJ]: A1-A3 81.3, A4 0.867, A5 1.79, C2 (S1) 0.325, C2 (S2) 0.113, C3 (S1) 0.215, C3 (S2) 8.63, D (S1) -86.7, D (S2) -19.8
- Nicht-erneuerbare Primärenergie zur stofflichen Nutzung (PENRM) [MJ]: A1-A3 43.2, A4 0, A5 0, C2 (S1) 0, C2 (S2) 0, C3 (S1) 0, C3 (S2) 0, D (S1) 0, D (S2) 0
- Total nicht erneuerbare Primärenergie (PENRT) [MJ]: A1-A3 124, A4 0.867, A5 1.79, C2 (S1) 0.325, C2 (S2) 0.113, C3 (S1) 0.215, C3 (S2) 8.63, D (S1) -86.7, D (S2) -19.8
- Einsatz von Sekundärstoffen (SM) [kg]: A1-A3 0.0805, A4 0, A5 0, C2 (S1) 0, C2 (S2) 0, C3 (S1) 0, C3 (S2) 0, D (S1) 0, D (S2) 0
- Erneuerbare Sekundärbrennstoffe (RSF) [MJ]: A1-A3 0, A4 0, A5 0, C2 (S1) 0, C2 (S2) 0, C3 (S1) 0, C3 (S2) 0, D (S1) 0, D (S2) 0
- Nicht erneuerbare Sekundärbrennstoffe (NRSF) [MJ]: A1-A3 0, A4 0, A5 0, C2 (S1) 0, C2 (S2) 0, C3 (S1) 0, C3 (S2) 0, D (S1) 0, D (S2) 0
- Einsatz von Süßwasserressourcen (FW) [m^3]: A1-A3 1.86, A4 0.000123, A5 0.00108, C2 (S1) 4.62e-5, C2 (S2) 1.61e-5, C3 (S1) 9.27e-5, C3 (S2) 0.00933, D (S1) -0.0148, D (S2) -0.000691

## Outputs
- Gefährlicher Abfall zur Deponie (HWD) [kg]: A1-A3 7.31e-5, A4 0, A5 0, C2 (S1) 0, C2 (S2) 0, C3 (S1) 0, C3 (S2) 0, D (S1) 0, D (S2) 0
- Entsorgter nicht gefährlicher Abfall (NHWD) [kg]: A1-A3 0.259, A4 7.29e-5, A5 0.0318, C2 (S1) 2.74e-5, C2 (S2) 9.53e-6, C3 (S1) 0.000129, C3 (S2) 2.79, D (S1) -0.0323, D (S2) -0.00225
- Entsorgter radioaktiver Abfall (RWD) [kg]: A1-A3 0.00205, A4 1.24e-6, A5 0.000257, C2 (S1) 4.65e-7, C2 (S2) 1.62e-7, C3 (S1) 3.24e-5, C3 (S2) 0.000329, D (S1) -0.00254, D (S2) -2.45e-5
- Komponenten für die Wiederverwendung (CRU) [kg]: A1-A3 0, A4 0, A5 0, C2 (S1) 0, C2 (S2) 0, C3 (S1) 0, C3 (S2) 0, D (S1) 0, D (S2) 0
- Stoffe zum Recycling (MFR) [kg]: A1-A3 0, A4 0, A5 0, C2 (S1) 0, C2 (S2) 0, C3 (S1) 1.67, C3 (S2) 0, D (S1) 0, D (S2) 0
- Stoffe für die Energierückgewinnung (MER) [kg]: A1-A3 0, A4 0, A5 0.0792, C2 (S1) 0, C2 (S2) 0, C3 (S1) 0, C3 (S2) 1.86, D (S1) 0, D (S2) 0
- Exportierte elektrische Energie (EEE) [MJ]: A1-A3 0, A4 0, A5 0.164, C2 (S1) 0, C2 (S2) 0, C3 (S1) 0, C3 (S2) 4.09, D (S1) 0, D (S2) 0
- Exportierte thermische Energie (EET) [MJ]: A1-A3 0, A4 0, A5 0.46, C2 (S1) 0, C2 (S2) 0, C3 (S1) 0, C3 (S2) 11.5, D (S1) 0, D (S2) 0

## Impact indicators
- Globales Erwärmungspotenzial (GWP) [kg CO_(2)-Äq.]: A1-A3 5.18, A4 0.0632, A5 0.242, C2 (S1) 0.0237, C2 (S2) 0.00827, C3 (S1) 0.0123, C3 (S2) 4.5, D (S1) -3.44, D (S2) -1.22
- Abbau Potential der stratosphärischen Ozonschicht (ODP) [kg CFC11-Äq.]: A1-A3 7.59e-8, A4 2.88e-13, A5 6.86e-11, C2 (S1) 1.08e-13, C2 (S2) 3.77e-14, C3 (S1) 8.74e-12, C3 (S2) 2.7e-11, D (S1) -9.53e-10, D (S2) -1.23e-12
- Versauerungspotenzial von Boden und Wasser (AP) [kg SO_(2)-Äq.]: A1-A3 0.0167, A4 0.000273, A5 0.000345, C2 (S1) 0.000147, C2 (S2) 5.14e-5, C3 (S1) 3.43e-5, C3 (S2) 0.006, D (S1) -0.00544, D (S2) -0.000837
- Eutrophierungspotenzial (EP) [kg PO_(4)^(3)-Äq.]: A1-A3 0.0142, A4 6.69e-5, A5 2.88e-5, C2 (S1) 3.69e-5, C2 (S2) 1.29e-5, C3 (S1) 3.07e-6, C3 (S2) 0.000206, D (S1) -0.0008, D (S2) -0.000126
- Bildungspotential für troposphärisches Ozon (POCP) [kg Ethen-Äq.]: A1-A3 0.00281, A4 -9.34e-5, A5 2.09e-5, C2 (S1) -6.17e-5, C2 (S2) -2.15e-5, C3 (S1) 2.36e-6, C3 (S2) 0.00013, D (S1) -0.00228, D (S2) -0.000155
- Potenzial für den abiotischen Abbau nicht fossiler Ressourcen (ADPE) [kg Sb-Äq.]: A1-A3 0.0131, A4 4.17e-9, A5 5.19e-8, C2 (S1) 1.57e-9, C2 (S2) 5.46e-10, C3 (S1) 3.82e-9, C3 (S2) 1.97e-6, D (S1) -1.42e-5, D (S2) -6.14e-8
- Potenzial für den abiotischen Abbau fossiler Brennstoffe (ADPF) [MJ]: A1-A3 118, A4 0.864, A5 1.14, C2 (S1) 0.324, C2 (S2) 0.113, C3 (S1) 0.133, C3 (S2) 7.8, D (S1) -80.3, D (S2) -19.8

## Use advice
Gültigkeitsbereich:
Dieses Dokument ist gültig für die PVC-P Dach- und Dichtungsbahnen:

· BauderTHERMOFOL U (12/15/18/20/24),

· BauderTHERMOFOL U (15/18/20) V

· BauderTHERMOFOL M (12/15/18/20)

hergestellt im deutschen BAUDER Produktionswerk Bernsdorf.
Systemgrenze:
Typ der EPD: Wiege bis Werkstor (mit Optionen).

Verwendet werden gemäß EN 15804 die Module A1-5, C2-3 und D. Folgende Punkte wurden bei der Erstellung der Ökobilanz berücksichtigt:

Modul A1-3

Sämtliche Vorketten der verwendeten Rohstoffe und Materialien, sowie deren Beschaffungstransporte. Produktionsprozesse inklusive Energie- und Abfallströme (Wiege bis Werkstor). Anfallende Abfälle werden bis zum End of Waste-Status berücksichtigt.

Modul A4-5

Die Transporte zur Baustelle und ein durchschnittlicher Installationsaufwand (Heißluftverklebung und anfallende Verschnitte). Verwertung des Verpackungsmaterials.
Befestigungsmaterial ist nicht Teil des untersuchten Produktsystems. Entsprechend des eingesetzten Produkts bzw. Materials (Metall/ Kunststoff) ist die jeweilige EPD zu referenzieren.

Modul C2-1

Transporte im Rahmen der Recycling-Route.

Modul C2-2

Transporte im Rahmen der MVA-Route.

Modul C3-1

Stoffliche Verwertung (Recycling) des Produkts inklusive Aufbereitungsaufwand.

Modul C3-2

Thermische Verwertung (Verbrennung in einer WtE-Anlage) zur Reduzierung des Abfallvolumens für die Deponierung.

Module D-1 und D-2

Ausweis der durch die Abfallbehandlung in den Modulen A5, C3-1 und C3-2 entstandenen Gutschriften.

## Data sources
- BauderTHERMOFOL.pdf
- GaBi Database (all versions)
- GaBi database SP28 2015
