# Sonnenschutzlammellen Aluminium

Dataset: ILCD process, EPD, generic dataset
Geography: DE
Reference year: 2021
Valid until: 2022
Classification: oekobau.dat: Komponenten von Fenstern und Vorhangfassaden / Füllungen / Opake Füllungen
Owner: Sphera Solutions GmbH
Compliance: EN 15804+A2
Review: Dependent internal review by Sphera Solutions GmbH; Independent external review by GaBi user forum
Amounts: rows without a unit in brackets have none in this file; such an amount is in the reference unit of its flow, which a separate flow dataset defines
copyright: true
licenseType: Free of charge for all users and uses
accessRestrictions: The license conditions as stated on https://www.oekobaudat.de/ apply.
accessRestrictions: Es gelten die Lizenzbedingungen wie sie auf https://www.oekobaudat.de/ genannt sind.

## General comment
Dieser Datensatz wurde nach dem European Standard EN 15804+A2 für Nachhaltiges Bauen modelliert. Ergebnisse werden in Modulen abgebildet, die den strukturierten Ausdruck von Ergebnissen über den gesamten Lebenszyklus zulassen.

## Geography
Der Datensatz bildet die länderspezifische Situation in Deutschland ab. Dabei werden Haupttechnologien, spezifische regionale Charakteristiken und ggf. Importstatistiken berücksichtigt.

## Time period
Jährlicher Durchschnitt

## Technology and included processes
Vordergrundsystem
Dieser Datensatz bezieht sich auf die Herstellung und das Recycling von außenliegenden Sonnenschutzlamellen aus pulverbeschichtetem Aluminium für ein Fenster der Größe 240 x 160 cm, inklusive Führungsschienen aus pulverbeschichtetem Aluminium und Elektroantrieb (Masse 2kg und 200W Nennleistung). Der Datensatz wurde auf 1m² skaliert.

Transportprozesse für die Rohstoffe wurden berücksichtigt. Alle wichtigen Energie- und Stoffflüsse sind im System inbegriffen. Die Wirkungsbilanz der Produktionsanlagen und der Infrastruktur wurde im System nicht berücksichtigt.

In der Entsorgungsphase wird in Modul C1 für Stahlprodukte ein maschineller Rückbau bilanziert (Bagger). Für alle anderen Metalle erfolgt ein manueller Rückbau (lastenfrei). Sammelverluste werden vernachlässigt. Es wird angenommen, dass alle Metalle das Ende der Abfalleigenschaft direkt nach dem Ausbau erreichen. Das heißt die Lasten für die Aufbereitung und die Gutschriften für die Substitution von Primärmaterial werden in Modul D ausgewiesen.
Der Transport in Modul C2 zur Aufbereitungsanlage erfolgt mit einem LKW (50km).
In Modul D sind die Lasten für die Sortierung, Umschmelzen, Schlackebehandlung, Deponierung von Reststoffen, Behandlung von Filterstäuben und Krätzebehandlung enthalten. Die Gutschriften werden für die Nettoschrottmenge (zurückgebaute Menge abzüglich ggfs. enthaltenes Sekundärmaterial, abzüglich Aufbereitungsverluste) für den durchschnittlich vorhandenen Materialmix (aus verschiedenen Legierungen) vergeben.

Wenden Sie diesen Datensatz an, indem Sie die von der Jalousie bedeckte Fläche berechnen und diese Fläche in m² mit dem Ergebnis dieses Datensatzes multiplizieren.

## Technical purpose
Dieses Produkt kann im Baubereich verwendet werden.

## Safety margin
10 %. Produktsystem weitgehend vollständig abgebildet. Gute technologische, zeitliche und geographische Repräsentativität.

## Reference product
- Sonnenschutzlammellen Aluminium: 1

## Inputs
- Erneuerbare Primärenergie als Energieträger (PERE) [MJ]: A1-A3 99.5349, C1 0.000119413, C2 0.00457109, D -54.843
- Erneuerbare Primärenergie zur stofflichen Nutzung (PERM) [MJ]: A1-A3 0, C1 0, C2 0, D 0
- Total erneuerbare Primärenergie (PERT) [MJ]: A1-A3 99.5349, C1 0.000119413, C2 0.00457109, D -54.843
- Nicht-erneuerbare Primärenergie als Energieträger (PENRE) [MJ]: A1-A3 320.504, C1 0.00205749, C2 0.07876, D -174.044
- Nicht-erneuerbare Primärenergie zur stofflichen Nutzung (PENRM) [MJ]: A1-A3 0, C1 0, C2 0, D 0
- Total nicht-erneuerbare Primärenergie (PENRT) [MJ]: A1-A3 320.504, C1 0.00205749, C2 0.07876, D -174.044
- Einsatz von Sekundärstoffen (SM) [kg]: A1-A3 0, C1 0, C2 0, D 0
- Erneuerbare Sekundärbrennstoffe (SF) [MJ]: A1-A3 0, C1 0, C2 0, D 0
- Nicht erneuerbare Sekundärbrennstoffe (NRSF) [MJ]: A1-A3 0, C1 0, C2 0, D 0
- Nettoeinsatz von Süßwasserressourcen (FW) [m3]: A1-A3 0.180105, C1 1.06128e-7, C2 4.06256e-6, D -0.117846

## Outputs
- Gefährlicher Abfall zur Deponie (HWD) [kg]: A1-A3 4.25194e-8, C1 8.59964e-14, C2 3.29191e-12, D 1.89481e-8
- Entsorgter nicht gefährlicher Abfall (NHWD) [kg]: A1-A3 4.86421, C1 3.32126e-7, C2 1.27137e-5, D -2.959
- Entsorgter radioaktiver Abfall (RWD) [kg]: A1-A3 0.0210836, C1 1.97443e-9, C2 7.55805e-8, D -0.0131365
- Komponenten für die Wiederverwendung (CRU) [kg]: A1-A3 0, C1 0, C2 0, D 0
- Stoffe zum Recycling (MFR) [kg]: A1-A3 0, C1 2.281, C2 0, D 0
- Stoffe für die Energierückgewinnung (MER) [kg]: A1-A3 0, C1 0, C2 0, D 0
- Exportierte elektrische Energie (EEE) [MJ]: A1-A3 0, C1 0, C2 0, D 0
- Exportierte thermische Energie (EET) [MJ]: A1-A3 0, C1 0, C2 0, D 0

## Impact indicators
- Globales Erwärmungspotenzial - total (GWP-total) [kg CO2 eq.]: A1-A3 23.7288, C1 0.000153931, C2 0.00598267, D -13.4557
- Globales Erwärmungspotenzial - fossil (GWP-fossil) [kg CO2 eq.]: A1-A3 23.6275, C1 0.000152898, C2 0.00594183, D -13.426
- Globales Erwärmungspotenzial - biogen (GWP-biogenic) [kg CO2 eq.]: A1-A3 0.0889126, C1 3.61429e-8, C2 2.6851e-6, D -0.0272791
- Globales Erwärmungspotenzial - luluc (GWP-luluc) [kg CO2 eq.]: A1-A3 0.0123911, C1 9.96875e-7, C2 3.816e-5, D -0.00238775
- Abbaupotenzial der stratosphärischen Ozonschicht (ODP) [kg CFC-11 eq.]: A1-A3 3.03107e-13, C1 3.97172e-20, C2 1.52036e-18, D 3.592e-12
- Versauerungspotenzial, kumulierte Überschreitung (AP) [Mole of H+ eq.]: A1-A3 0.0832572, C1 2.05859e-6, C2 1.68464e-5, D -0.0490338
- Eutrophierungspotenzial - Süßwasser (EP-freshwater) [kg P eq.]: A1-A3 7.57249e-5, C1 3.19231e-10, C2 1.22201e-8, D -4.01695e-6
- Eutrophierungspotenzial - Salzwasser (EP-marine) [kg N eq.]: A1-A3 0.0148521, C1 9.36526e-7, C2 7.7608e-6, D -0.00771536
- Eutrophierungspotenzial - Land (EP-terrestrial) [Mole of N eq.]: A1-A3 0.153595, C1 1.02972e-5, C2 8.68292e-5, D -0.084018
- Bildungspotenzial für troposphärisches Ozon (POCP) [kg NMVOC eq.]: A1-A3 0.0426046, C1 2.80479e-6, C2 1.51337e-5, D -0.0234113
- Potenzial für die Verknappung abiotischer Ressourcen nicht fossile Ressourcen (ADPE) [kg Sb eq.]: A1-A3 0.000278421, C1 1.35021e-11, C2 5.16856e-10, D -1.01198e-6
- Potenzial für die Verknappung abiotischer Ressourcen fossile Brennstoffe (ADPF) [MJ]: A1-A3 320.17, C1 0.0020574, C2 0.0787567, D -173.791
- Wasser-Entzugspotenzial (Benutzer) (WDP) [m³ world equiv.]: A1-A3 5.02888, C1 6.03399e-7, C2 2.30979e-5, D -0.763486

## Use advice
Der Datensatz repräsentiert ein Cradle to Gate Inventar. Er kann verwendet werden, um die Lieferkette des jeweiligen Produktes in einer repräsentativen Weise zu charakterisieren. Die Kombination mit einzelnen Einheitenprozessen und diesem Produkt ermöglicht die Erstellung von anwenderspezifischen (Produkt-) LCAs.

## Data sources
- Documentation of data quality management
- GaBi Database Edition 2021, CUP2021.01
- GaBi database (all versions)
