# Parthos Raumtrennsystem

Dataset: ILCD process, EPD, specific dataset
Geography: NL
Reference year: 2018
Valid until: 2023
Classification: OEKOBAU.DAT: Komposite / Systembauteile / Innenwände
Classification: IBUCategories: 02 Bauprodukte / Raumtrennsysteme / Raumtrennsysteme
Method details: Raumtrennsysteme.pdf
Generated by: brands and values GmbH
Registration number: EPD-PAR-20180063-IBC1-DE
Owner: Parthos Deutschland GmbH
Compliance: DIN EN 15804; ISO 14025
Review: Accredited third party review by Institut Bauen und Umwelt e. V.
Amounts: rows without a unit in brackets have none in this file; such an amount is in the reference unit of its flow, which a separate flow dataset defines
copyright: true
licenseType: Free of charge for all users and uses
accessRestrictions: None

## General comment
Bei dem Mobilwandsystem Palace 110SI handelt es sich um eine nichttragende Innenwand akustisch, beidseitig aufgedoppelt. Sie besteht aus einzelnen, wandhohen Elementen, die mit einer bzw. zwei Rollen in ein Schienensystem eingehängt werden. Die Elemente lassen sich unabhängig voneinander verschieben. Je nach Ausbildung des Schienensystems lassen sich somit vielfältige Möglichkeiten der Raumaufteilung realisieren.

Je nach Ausbildung der Wand werden unterschiedlich hohe Schalldämmwerte erreicht. Durch die Verwendung von akustisch wirksamen Oberflächen können auch Schalldämpfungswerte entsprechend den Anforderungen erreicht werden.

## Technology and included processes
Die Elementherstellung erfolgt in einer Art Serienfertigung an mehreren Arbeitsplätzen, die jeder für sich, entsprechend den speziellen Anforderungen ausgestattet sind. Die vertikalen Profile werden zugeschnitten und mit den notwendigen Ausstanzungen versehen. Die oberen und unteren Dichtprofile werden aus vorgefertigten Aluformteilen und PU-Formteilen zusammengesetzt und für die weitere Montage bereitgelegt. Die zur Betätigung der Dichtprofile notwendige Mechanik aus Stahlrohren und Federn wird ebenfalls zusammengebaut und bereitgelegt. Alle vorgefertigten Bauteile werden dann an horizontalen Montagetischen zusammengefügt und fixiert. In dem nun vorliegenden Elementrahmen werden die oberen und unteren Dichtprofile und die Mechanik zur Bedienung der Dichtprofile montiert. Der verbleibende Hohlraum wird mit Mineralwolle verfüllt. Damit diese Wolle während des Transportes nicht hinausfallen kann, wird beidseitig eine Lage Papier aufgeklebt. Die Deckplatten werden an horizontalen Sägetischen auf Maß geschnitten. Die Späne und Abfälle werden abgesaugt bzw. gesammelt und der Entsorgung bzw. Verbrennung zugeführt. Wenn die Deckplatten nicht fertig beschichtet angeliefert wurden, erfolgt vor dem Zuschnitt die Verklebung der Deckplatten mit der gewünschten Oberfläche. Dazu wird eine großflächige, horizontale Presse genutzt, wobei der Klebeprozess durch Wärmezufuhr beschleunigt wird. Nach dem Zuschnitt werden alle Kanten mit einem Kantenband bzw. Umleimer ausgestattet. Zur Aufnahme der Aufkantungen der innenliegenden Profile, erhalten die Längskanten der Deckplatten eine Nut. Diese Arbeitsschritte werden halbautomatisch mit Hilfe spezieller Maschinen ausgeführt. Auf der Rückseite der Deckplattenwerden Montageplatten montiert. Diese dienen der Befestigung der Deckplatten an den Elementrahmen. Um den Schallschutz der Elemente zu erhöhen werden auf der Rückseite der Deckplatten zusätzlich sogenannte Schwermatten montiert. Nachdem die Rahmen und Deckplatten gefertigt sind, werden diese auf Paletten verpackt. Da die Abmessungen der Elemente variieren können, werden die Abmessungen der Palette den jeweiligen Bedürfnissen angepasst. Um den Transport an der Baustelle zu erleichtern, bzw. überhaupt möglich zu machen, werden Rahmen und Deckplatten getrennt transportiert und erst am Einbauort zusammengefügt. Dort werden die Rahmen in die bereits montierten Schienen eingehängt und anschließend werden beidseitig die Deckplatten montiert- d.h. die rückwärtigen Montageplatten werden in spezielle Aufhängevorrichtungen eingehängt.
Technische Daten:
Bautechnische Daten Palace 110 SI
Deklarierte Einheit:
Die deklarierte Einheit ist 1 m² des Mobilwandsystems Palace SI inkl. Verpackungsmaterialien, exklusive der jeweiligen Befestigungsmittel.

## Technical purpose
Einzelne, raumhohe Elemente werden unabhängig voneinander in einem Schienensystem bewegt und zu einer geschlossen Wand zusammengefügt.

Dichtungen am Fuß und Kopf des Elements, werden mit den angrenzenden Bauteilen verspannt und gewährleisten somit die notwendige Schalldämmung und Stabilität.

Das Mobilwandsystem macht eine variable Raumaufteilung möglich, die sich flexibel an die Nutzungsanforderung des Raumes anpassen lässt.

Zur Anwendung kommt das System insbesondere in Gebäuden aus den Bereichen: Messen, Tagungen, Universitäten, Schulen, Kindergärten, Büro- und Verwaltung.

## Reference product
- Parthos Mobilwandsystem (): 1

## Inputs
- Erneuerbare Primärenergie als Energieträger (PERE) [MJ]: A1-A3 -188.432, A4 2.61477, A5 9.75235, B6 0, C2 1.30247, C3 1033.97, C4 -0.033271, D -286.297
- Erneuerbare Primärenergie zur stofflichen Nutzung (PERM) [MJ]: A1-A3 1030.84, A4 0, A5 -9.696, B6 62.2281, C2 0, C3 -1021.14, C4 0, D 0
- Total erneuerbare Primärenergie (PERT) [MJ]: A1-A3 842.404, A4 2.61477, A5 0.0563479, B6 0, C2 1.30247, C3 12.8286, C4 -0.033271, D -286.297
- Nicht-erneuerbare Primärenergie als Energieträger (PENRE) [MJ]: A1-A3 2311.32, A4 38.1337, A5 11.8496, B6 62.2281, C2 23.6143, C3 639.729, C4 0.0855137, D -1478.62
- Nicht-erneuerbare Primärenergie zur stofflichen Nutzung (PENRM) [MJ]: A1-A3 335.646, A4 0, A5 -11.4856, B6 165.632, C2 0, C3 -324.16, C4 0, D 0
- Total nicht erneuerbare Primärenergie (PENRT) [MJ]: A1-A3 2646.97, A4 38.1337, A5 0.363972, B6 0, C2 23.6143, C3 315.569, C4 0.0855137, D -1478.62
- Einsatz von Sekundärstoffen (SM) [kg]: A1-A3 2.73, A4 0, A5 0, B6 165.632, C2 0, C3 0, C4 0, D 39.5
- Erneuerbare Sekundärbrennstoffe (RSF) [MJ]: A1-A3 0, A4 0, A5 0, B6 0, C2 0, C3 0, C4 0, D 0
- Nicht erneuerbare Sekundärbrennstoffe (NRSF) [MJ]: A1-A3 0, A4 0, A5 0, B6 0, C2 0, C3 0, C4 0, D 0
- Einsatz von Süßwasserressourcen (FW) [m^3]: A1-A3 13.7552, A4 0.00300219, A5 0.00381174, B6 0, C2 0.00240018, C3 0.233781, C4 -0.000400649, D -0.968577

## Outputs
- Gefährlicher Abfall zur Deponie (HWD) [kg]: A1-A3 6.05065e-6, A4 2.4308e-6, A5 2.42797e-10, B6 0.0847945, C2 1.3654e-6, C3 2.26065e-7, C4 0, D -1.29946e-5
- Entsorgter nicht gefährlicher Abfall (NHWD) [kg]: A1-A3 20.0034, A4 0.00299038, A5 0.00259991, B6 0, C2 0.00197817, C3 4.36015, C4 1.33, D -18.6655
- Entsorgter radioaktiver Abfall (RWD) [kg]: A1-A3 0.100578, A4 6.01039e-5, A5 1.53662e-5, B6 7.76897e-8, C2 3.23181e-5, C3 0.0105469, C4 -4.46851e-5, D -0.0911838
- Komponenten für die Wiederverwendung (CRU) [kg]: A1-A3 0, A4 0, A5 0, B6 0.116672, C2 0, C3 0, C4 0, D 0
- Stoffe zum Recycling (MFR) [kg]: A1-A3 0, A4 0, A5 0, B6 0.027428, C2 0, C3 48.1, C4 0, D 0
- Stoffe für die Energierückgewinnung (MER) [kg]: A1-A3 0, A4 0, A5 0, B6 0, C2 0, C3 0, C4 0, D 0
- Exportierte elektrische Energie (EEE) [MJ]: A1-A3 9.14, A4 0, A5 2.63, B6 0, C2 0, C3 117.64, C4 0, D 0
- Exportierte thermische Energie (EET) [MJ]: A1-A3 0, A4 0, A5 5.1, B6 0, C2 0, C3 223.1, C4 0, D 0

## Impact indicators
- Globales Erwärmungspotenzial (GWP) [kg CO_(2)-Äq.]: A1-A3 115.313, A4 2.82573, A5 1.76937, B6 9.06707, C2 1.71317, C3 101.625, C4 0.274959, D -111.493
- Abbau Potential der stratosphärischen Ozonschicht (ODP) [kg CFC11-Äq.]: A1-A3 1.97467e-6, A4 7.6522e-14, A5 1.96551e-14, B6 4.03058e-11, C2 4.72444e-14, C3 2.45133e-7, C4 -3.34006e-9, D 1.02722e-7
- Versauerungspotenzial von Boden und Wasser (AP) [kg SO_(2)-Äq.]: A1-A3 1.38483, A4 0.0115583, A5 0.000367313, B6 0.0257462, C2 0.00842057, C3 0.0555156, C4 0.000171437, D -1.31062
- Eutrophierungspotenzial (EP) [kg PO_(4)^(3)-Äq.]: A1-A3 0.0891864, A4 0.00292066, A5 9.0611e-5, B6 0.00241244, C2 0.00215608, C3 0.00852236, C4 0.000480411, D -0.0264593
- Bildungspotential für troposphärisches Ozon (POCP) [kg Ethen-Äq.]: A1-A3 0.139851, A4 -0.00480882, A5 2.42951e-5, B6 0.00161178, C2 -0.00358696, C3 0.00454998, C4 7.70615e-5, D -0.0698605
- Potenzial für den abiotischen Abbau nicht fossiler Ressourcen (ADPE) [kg Sb-Äq.]: A1-A3 0.054332, A4 3.01832e-7, A5 1.69375e-8, B6 4.81758e-6, C2 1.4197e-7, C3 2.50891e-5, C4 1.87838e-10, D -0.0733847
- Potenzial für den abiotischen Abbau fossiler Brennstoffe (ADPF) [MJ]: A1-A3 2365.98, A4 37.9798, A5 0.325197, B6 96.5061, C2 23.5314, C3 289.827, C4 0.198934, D -1257.31

## Use advice
Gültigkeitsbereich:
Diese Umweltproduktdeklaration verfolgt den Worst-Case-Ansatz für das Produkt Palace 110 SI, d.h. das Produkt mit der höchsten möglichen Schallschutz Dämmung und dem höchsten Gewicht aller Parthos Trennwandelemente. Die Datenerhebung basiert auf dem Geschäftsjahr 2017 am Produktionsstandort Panningen, Niederlanden.
Systemgrenze:
Typ der EPD: Wiege bis Bahre (mit Optionen) Berücksichtigt werden gemäß /EN 15804/ folgende Module:

Produktstadium: A1 – A3:

Das Modul beinhaltet die Extraktion und Aufbereitung der Rohstoffe sowie die Biomasseproduktion inklusive aller entsprechenden Vorketten einschließlich der Bereitstellung von Strom, Dampf und Wärme aus Primärenergien inklusive deren Extraktion, Raffinerie und Transport sowie die notwendigen Beschaffungstransporte bis zum Werkstor.

Baustadium: A4 – A5:

Dieses Modul umfasst den Distributionsweg sowie die energetische Verwertung der Verpackungsmaterialien.

Nutzungsstadium: B6:

Das Nutzungsstadium bezieht sich auf den Betrieb des Gebäudes und umfasst den Energieeinsatz für den Betrieb des deklarierten Produktes inklusive des Stand-by Energieverbrauchs.

Entsorgungsstadium: C2 – C4:

In diesem Modul werden die Transporte zur Recyclinganlage (C2) sowie Sammel-, Aufbereitungs- und Verwertungsaufwand berücksichtigt. Biogener Kohlenstoff (z.B. aus der Spanplatte) wird hier während der Verbrennung emittiert (C3). Glaswolle wird als einziger Inertstoff deponiert (C4).

Mögliche Potentiale und vermiedene Lasten außerhalb der Systemgrenze: D:

Ausweisung möglicher Lasten und Nutzen des Produktes außerhalb der Systemgrenze. Diese bestehen aus Energie-Gutschriften aus der thermischen Verwertung von Verpackungsabfällen (A5) sowie den Holz- und Kunststoffbestandteilen des Produkts (C3) in Form vom durchschnittlichen europäischen Strommix bzw. thermischer Energie aus Erdgas sowie stofflichen Gutschriften resultierend aus dem Recycling der Metalle.

## Data sources
- GaBi Database (all versions)
- GaBi database SP35 2018
