# Strom aus Windkraft

Dataset: ILCD process, EPD, generic dataset
Geography: DE
Reference year: 2021
Valid until: 2022
Classification: oekobau.dat: Sonstige / Energieträger - Bereitstellung frei Verbraucher / Strom
Owner: Sphera Solutions GmbH
Compliance: EN 15804+A2
Review: Dependent internal review by Sphera Solutions GmbH; Independent external review by GaBi user forum
Amounts: rows without a unit in brackets have none in this file; such an amount is in the reference unit of its flow, which a separate flow dataset defines
copyright: true
licenseType: Free of charge for all users and uses
accessRestrictions: The license conditions as stated on https://www.oekobaudat.de/ apply.
accessRestrictions: Es gelten die Lizenzbedingungen wie sie auf https://www.oekobaudat.de/ genannt sind.

## General comment
Dieser Datensatz wurde nach dem European Standard EN 15804+A2 für Nachhaltiges Bauen modelliert. Ergebnisse werden in Modulen abgebildet, die den strukturierten Ausdruck von Ergebnissen über den gesamten Lebenszyklus zulassen.

## Geography
Der Datensatz bildet die länderspezifische Situation in Deutschland ab. Dabei werden Haupttechnologien, spezifische regionale Charakteristiken und ggf. Importstatistiken berücksichtigt.

## Time period
Jährlicher Durchschnitt

## Technology and included processes
Vordergrundsystem: Der Datensatz beschreibt die Umweltwirkung einer durchschnittlichen Onshore- bzw. Offshore-Windkraftanlage. Die folgenden Lebenszyklusphasen sind in beiden Modellen berücksichtigt: Erzeugung, Transport, Installation, Betrieb und Abbau und Entfernung der Windkraftanlagen inkl. elektrischer Ausrüstung. Betrachtete Hauptbestandteile:
- Rotor (Nabe mit drei Rotorblättern)
- Gondel
- Turm
- Fundament
Der Windkraftanlage umfasst außerdem:
- Trafostation
- Elektrische Getriebe
- Interne Kabel , die die Turbinen zum Umspannwerk verbinden
- Außenkabel, die den Windpark an das bestehende Stromnetz anschließen
Leitungsverluste in Kabeln und der Trafostation sind mit etwa 5% des erzeugten Stroms berücksichtigt. Der Anteil der Onshore- und Offshore-Windkraft ist landes- bzw. regionalspezifisch modelliert.
Onshore-Windkraft-Ökobilanzmodell: Das Onshore-Modell basiert auf einem 300 MW-Windpark, bestehend aus 182 Einzelanlagen mit einer Leistung von je 1,65 MW. Die Rotorblattlänge beträgt 82 m. Der Kapazitätsfaktor liegt bei 40,8 (Wirkungsgrad der Stromerzeugung in Bezug auf ein theoretisches Maximum an Stromerzeugung). Die Betriebslebensdauer der Anlagen und Leitungen beträgt 20 Jahre. Wartung sowie die Verbrauch von Hilfsstoffen, wie z. B. Schmieröl für die Generatoren, sind enthalten. Volllast-Stunden sind für die entsprechende Region mit Hilfe von statistischen Informationen berücksichtigt und sind daher regional- bzw. landesspezifisch.
Offshore-Windkraft-Ökobilanzmodell: Das Offshore-Modell basiert auf einem 300 MW-Windpark, bestehend aus 100 Einzelanlagen mit einer Leistung von je 3,00 MW. Die Rotorblattlänge beträgt 90 m. Der Kapazitätsfaktor liegt bei 54,2 (Wirkungsgrad der Stromerzeugung in Bezug auf ein theoretisches Maximum von Stromerzeugung). Die Betriebslebensdauer der Anlagen und Leitungen beträgt 20 Jahre. Wartung sowie die Verbrauch von Hilfsstoffen, wie z. B. Schmieröl für die Generatoren, sind enthalten. Volllast-Stunden sind für die entsprechende Region mit Hilfe von statistischen Informationen berücksichtigt und sind daher regional- bzw. landesspezifisch.

Hintergrundsystem:
Strom: Die Stromerzeugung wird entsprechend der länderspezifischen Randbedingungen modelliert. Die landesspezifische Analyse beinhaltet:
1.: Spezifische Kraftwerke der verschiedenen fossilen Energieträger und der Einsatz erneuerbarer Energien sind entsprechend der länderspezifischen Energieträgermixe modelliert. Die Analyse bezieht Stromimporte aus den Nachbarländern, Transmissions-und Verteilungsverluste und den Eigenverbrauch im Kraftwerk und bei der Verteilung bzw. Speicherung, z. B. durch Pumpspeicherwerke, ein.
2.: Die landes-/regionalspezifischen Technologiestandards sowie die Erzeugung in Elektrizitätskraftwerken und/oder in speziellen Kraftwerken mit Kraft-Wärme-Kopplung (KWK) sind berücksichtigt.
3.: Die länderspezifische Energieträgerbereitstellung (mit Anteil der Importe und/oder Eigenversorgung) einschließlich der Energieträger-Eigenschaften (z. B. Elementar- und Energiegehalte) werden berücksichtigt.
4.: Die Förderung, Produktion, Verarbeitung und Transportprozesse werden entsprechend der Situation im jeweiligen Stromerzeugerland modelliert. Die unterschiedlichen Produktions- und Verarbeitungsverfahren (Emissionen und Wirkungsgrade) in den verschiedenen Energieerzeugerländern werden einbezogen, z. B. Rohöl-Veredelungsverfahren oder Abfackel-Raten an den Ölplattformen.
Thermische Energie, Prozessdampf: Die Erzeugung von Dampf und thermischer Energie in Heizkraftwerken wird entsprechend der landesspezifischen Situation (Emissionsgrenzwerte, Energieträgerbasis) modelliert.
Der Wirkungsgrad für die thermische Energieerzeugung beträgt per Definition 100% des Energieträgereinsatzes. Für Prozessdampf liegt der Wirkungsgrad im Bereich von 85-95%. Die zur Heizenergie-Erzeugung verwendeten Energieträger werden entsprechend der nationalen Situation modelliert (siehe Kapitel Strom oben).
Transporte: Alle relevanten und bekannten Transportprozesse in Form von See- und Binnenschiffsverkehr sowie Bahn-, Lkw- und der Leitungstransport sind enthalten.
Energieträger: Die Energieträger werden entsprechend der spezifischen Versorgungslage modelliert (siehe Kapitel Strom oben).
Raffinerieprodukte: Diesel, Benzin, technische Gase, Heizöl, Schmierstoffe und Rückstände, wie Bitumen, werden mit einem parametrierten länderspezifische Raffineriemodell modelliert. Das Raffinerie-Modell bezieht die länderspezifischen Veredelungsverfahren (z. B. Emissionspegel, interner Energieverbrauch etc.) und das länderspezifische Produktspektrum ein, das sich je nach Land stark unterscheiden kann. Die Rohöl-Förderung wird gemäß der länderspezifischen Situation mit den jeweiligen Energieträger-Eigenschaften modelliert.

## Technical purpose
Dieses Produkt kann im Baubereich verwendet werden.

## Safety margin
0 %.

## Reference product
- Strom aus Windkraft: 3.6

## Inputs
- Erneuerbare Primärenergie als Energieträger (PERE) [MJ]: B6 9.02702
- Erneuerbare Primärenergie zur stofflichen Nutzung (PERM) [MJ]: B6 0
- Total erneuerbare Primärenergie (PERT) [MJ]: B6 9.02702
- Nicht-erneuerbare Primärenergie als Energieträger (PENRE) [MJ]: B6 0.132905
- Nicht-erneuerbare Primärenergie zur stofflichen Nutzung (PENRM) [MJ]: B6 0
- Total nicht-erneuerbare Primärenergie (PENRT) [MJ]: B6 0.132905
- Einsatz von Sekundärstoffen (SM) [kg]: B6 0
- Erneuerbare Sekundärbrennstoffe (SF) [MJ]: B6 0
- Nicht erneuerbare Sekundärbrennstoffe (NRSF) [MJ]: B6 0
- Nettoeinsatz von Süßwasserressourcen (FW) [m3]: B6 3.88674e-5

## Outputs
- Gefährlicher Abfall zur Deponie (HWD) [kg]: B6 2.69335e-10
- Entsorgter nicht gefährlicher Abfall (NHWD) [kg]: B6 0.00197182
- Entsorgter radioaktiver Abfall (RWD) [kg]: B6 2.99155e-6
- Komponenten für die Wiederverwendung (CRU) [kg]: B6 0
- Stoffe zum Recycling (MFR) [kg]: B6 0
- Stoffe für die Energierückgewinnung (MER) [kg]: B6 0
- Exportierte elektrische Energie (EEE) [MJ]: B6 0
- Exportierte thermische Energie (EET) [MJ]: B6 0

## Impact indicators
- Globales Erwärmungspotenzial - total (GWP-total) [kg CO2 eq.]: B6 0.0107932
- Globales Erwärmungspotenzial - fossil (GWP-fossil) [kg CO2 eq.]: B6 0.0106112
- Globales Erwärmungspotenzial - biogen (GWP-biogenic) [kg CO2 eq.]: B6 0.000166001
- Globales Erwärmungspotenzial - luluc (GWP-luluc) [kg CO2 eq.]: B6 1.60642e-5
- Abbaupotenzial der stratosphärischen Ozonschicht (ODP) [kg CFC-11 eq.]: B6 8.9067e-15
- Versauerungspotenzial, kumulierte Überschreitung (AP) [Mole of H+ eq.]: B6 3.54833e-5
- Eutrophierungspotenzial - Süßwasser (EP-freshwater) [kg P eq.]: B6 1.96234e-8
- Eutrophierungspotenzial - Salzwasser (EP-marine) [kg N eq.]: B6 8.91196e-6
- Eutrophierungspotenzial - Land (EP-terrestrial) [Mole of N eq.]: B6 9.71582e-5
- Bildungspotenzial für troposphärisches Ozon (POCP) [kg NMVOC eq.]: B6 2.44355e-5
- Potenzial für die Verknappung abiotischer Ressourcen nicht fossile Ressourcen (ADPE) [kg Sb eq.]: B6 2.41312e-7
- Potenzial für die Verknappung abiotischer Ressourcen fossile Brennstoffe (ADPF) [MJ]: B6 0.132692
- Wasser-Entzugspotenzial (Benutzer) (WDP) [m³ world equiv.]: B6 0.000553432

## Use advice
Der Datensatz repräsentiert ein Cradle to Gate Inventar. Er kann verwendet werden, um die Lieferkette des jeweiligen Produktes in einer repräsentativen Weise zu charakterisieren. Die Kombination mit einzelnen Einheitenprozessen und diesem Produkt ermöglicht die Erstellung von anwenderspezifischen (Produkt-) LCAs.

## Data sources
- Documentation of data quality management
- GaBi Database Edition 2021, CUP2021.01
- GaBi database (all versions)
