# TECU Patina

Dataset: ILCD process, EPD, specific dataset
Geography: DE
Reference year: 2019
Valid until: 2024
Classification: OEKOBAU.DAT: Metalle / Kupfer / Kupferbleche
Classification: IBUCategories: 02 Bauprodukte / Metallbauprodukte und Zubehör / Baumetalle
Method details: Baumetalle.pdf
Generated by: SUSTAINUM Institut für zukunftsfähiges Wirtschaften Berlin eG
Registration number: EPD-KME-20190041-IBA1-DE
Owner: KME Germany GmbH & Co. KG
Compliance: DIN EN 15804; ISO 14025
Review: Accredited third party review by Institut Bauen und Umwelt e. V.
Amounts: rows without a unit in brackets have none in this file; such an amount is in the reference unit of its flow, which a separate flow dataset defines
copyright: true
licenseType: Free of charge for all users and uses
accessRestrictions: None

## General comment
Der Werkstoff TECU® Patina besteht zu 100 Masse-% aus Cu-DHP nach /EN 1172/, d. h. sauerstofffreiem phosphordesoxidiertem Kupfer mit begrenzt hohem Restphosphorgehalt. Die Werkstoff-bezeichnung lautet Cu-DHP CW024A. TECU® Patina Tafeln sind einseitig grün vorpatiniert. Die dabei charakteristischen unterschiedlichen Nuancen und Schattierungen der Patina-Oberfläche gleichen sich weitestgehend durch Bewitterung immer weiter dem für Kupfer typischen Erscheinungsbild an.

## Technology and included processes
TECU® Patina Tafeln werden in 10 Prozessschritten anwendungsfertig produziert: Abgießen Das hochreine Cu-DHP wird in Form von Brammen, das sind stranggegossene Blöcke, abgegossen. Anwärmen Die Brammen werden in einem Ofen auf eine Warmwalztemperatur von ca. 900 °C gebracht. Warmwalzen Auf einem Walzgerüst mit Ober- und Unterwalze (Revesier-Duo) werden die Brammen in mehreren Stichen, d.h. Verringern der Dicke durch jeweils verringerten Abstand der Walzen, heruntergewalzt und am Schluss zu einem Band aufgewickelt. Fräsen Durch die hohe Temperatur beim Anwärmen und Warmwalzen entsteht auf der Oberfläche durch Wärmeoxidation eine Zunderschicht, die vor den weiteren Arbeitsschritten durch einen Fräsvorgang entfernt wird. Dabei werden auf jeder Seite einige Zehntelmillimeter des Materials abgenommen. Kalt vorwalzen Auf einem Reversier-Quarto (Vierwalzengerüst) werden die Kupferbänder anschließend kalt in weiteren Stichen heruntergewalzt, dabei verfestigen sie sich durch die Umformung. Zwischenglühen Zur Weiterbearbeitung wird deshalb eine Wärmebehandlung durch Zwischenglühen durchgeführt, die eine gezielte Entfestigung des Kupfers bewirkt. Dieser Vorgang erfolgt in einer Schutzgasatmosphäre, um eine erneute Wärmeoxidation der Oberfläche auszuschließen. Fertigwalzen Die Enddicke von TECU® Patina beträgt meist 0,6 mm oder 0,7mm. Die gewünschte Festigkeit von meist R240 halb-hart wird in der Festigkeits- oder Zustandswalzung erreicht. Oberflächenveredelung/Patinierung Die Kupferbänder werden zunächst in Tafeln geschnitten und dann wird in einem patentierten mechanisch-chemisch-thermischen Verfahren eine grüne Patina direkt aus der Kupferoberfläche erzeugt. Streckrichten Auf einer Streckricht-Anlage werden die Toleranzen bzgl. Geradheit und Planheit weiter eingeengt. Verpackung Anschließend werden die einseitig grün patinierten TECU® Patina Tafeln verpackt.
Technische Daten:
Es gelten die Leistungswerte des Produkts entsprechend der Leistungserklärung in Bezug auf dessen Wesentliche Merkmale gemäß /DIN EN 14783:2013/ sowie

die folgenden technischen Daten für TECU® Patina:

/ISO 6507-1/, /ISO 6507-2/, /ISO 6892-1/, /ISO 1811-2/, /ISO 4739/.
Deklarierte Einheit:
Die Deklaration bezieht sich auf TECU® Patina vorpatiniertes Kupferbleche.

Die deklarierte Einheit ist 1 kg Kupferblech einseitig vorpatiniert (TECU® Patina).

## Technical purpose
TECU® Patina Tafeln werden für die Dachdeckung, Fassadengestaltung und als Systeme zur Dachentwässerung (Dachrinnen, Fallrohre und Zubehör), verwendet.

## Reference product
- TECU Patina Kupfertafel (): 1

## Inputs
- Erneuerbare Primärenergie als Energieträger (PERE) [MJ]: A1-A3 3.548, C2 0.00666, C3 0, C4 0.000338, D 0.0713
- Erneuerbare Primärenergie zur stofflichen Nutzung (PERM) [MJ]: A1-A3 0, C2 0, C3 0, C4 0, D 0
- Total erneuerbare Primärenergie (PERT) [MJ]: A1-A3 3.548, C2 0.00666, C3 0, C4 0.000338, D 0.0713
- Nicht-erneuerbare Primärenergie als Energieträger (PENRE) [MJ]: A1-A3 13.644, C2 0.0988, C3 0, C4 0.00457, D 0.43
- Nicht-erneuerbare Primärenergie zur stofflichen Nutzung (PENRM) [MJ]: A1-A3 0, C2 0, C3 0, C4 0, D 0
- Total nicht erneuerbare Primärenergie (PENRT) [MJ]: A1-A3 13.644, C2 0.0988, C3 0, C4 0.00457, D 0.43
- Einsatz von Sekundärstoffen (SM) [kg]: A1-A3 1.152, C2 0, C3 0, C4 0, D 0
- Erneuerbare Sekundärbrennstoffe (RSF) [MJ]: A1-A3 0, C2 0, C3 0, C4 0, D 0
- Nicht erneuerbare Sekundärbrennstoffe (NRSF) [MJ]: A1-A3 0, C2 0, C3 0, C4 0, D 0
- Einsatz von Süßwasserressourcen (FW) [m^3]: A1-A3 0.0035874, C2 7.72e-6, C3 0, C4 -2.15e-9, D 0.000604

## Outputs
- Gefährlicher Abfall zur Deponie (HWD) [kg]: A1-A3 2.43787e-8, C2 0, C3 0, C4 2.7866e-9, D 0
- Entsorgter nicht gefährlicher Abfall (NHWD) [kg]: A1-A3 2.29815, C2 0.000532769, C3 0, C4 3.12647, D 0
- Entsorgter radioaktiver Abfall (RWD) [kg]: A1-A3 0.000475131, C2 1.19334e-7, C3 0, C4 6.72801e-6, D 0
- Komponenten für die Wiederverwendung (CRU) [kg]: A1-A3 0, C2 0, C3 0, C4 0, D 0
- Stoffe zum Recycling (MFR) [kg]: A1-A3 0, C2 0, C3 -0.00994, C4 0, D 0
- Stoffe für die Energierückgewinnung (MER) [kg]: A1-A3 0, C2 0, C3 0, C4 0, D 0
- Exportierte elektrische Energie (EEE) [MJ]: A1-A3 0, C2 0, C3 0, C4 0, D 0
- Exportierte thermische Energie (EET) [MJ]: A1-A3 0, C2 0, C3 0, C4 0, D 0

## Impact indicators
- Globales Erwärmungspotenzial (GWP) [kg CO_(2)-Äq.]: A1-A3 0.9575, C2 0.00731, C3 0, C4 0.000304, D 0.0369
- Abbau Potential der stratosphärischen Ozonschicht (ODP) [kg CFC11-Äq.]: A1-A3 1.93935e-12, C2 1.55e-16, C3 0, C4 8.05e-17, D 8.53e-15
- Versauerungspotenzial von Boden und Wasser (AP) [kg SO_(2)-Äq.]: A1-A3 0.0011805, C2 2.8e-5, C3 0, C4 8.56e-7, D 0.000259
- Eutrophierungspotenzial (EP) [kg PO_(4)^(3)-Äq.]: A1-A3 0.00020118, C2 7.1e-6, C3 0, C4 1.08e-7, D 1.55e-5
- Bildungspotential für troposphärisches Ozon (POCP) [kg Ethen-Äq.]: A1-A3 6.298e-5, C2 -1.05e-5, C3 0, C4 7.6e-8, D 1.42e-5
- Potenzial für den abiotischen Abbau nicht fossiler Ressourcen (ADPE) [kg Sb-Äq.]: A1-A3 4.6652e-7, C2 7.63e-10, C3 0, C4 6.56e-11, D 4.1e-5
- Potenzial für den abiotischen Abbau fossiler Brennstoffe (ADPF) [MJ]: A1-A3 11.753, C2 0.0985, C3 0, C4 0.00441, D 0.414

## Use advice
Gültigkeitsbereich:
Dieses Dokument bezieht sich auf TECU® Patina der Firma KME Germany GmbH & Co. KG, hergestellt in Osnabrück, Deutschland. Die deklarierte Einheit bezieht sich auf 1 kg vorpatiniertes Kupferblech. Die Datenerhebung für die Herstellung des deklarierten Produktes erfolgte werksspezifisch mit aktuellen Jahresdaten von 2017. Der Deklarationsinhaber ist verantwortlich für die zugrunde liegenden Daten und deren Verifizierung.
Systemgrenze:
Die Ökobilanz betrachtet die Systemgrenzen "Wiege bis Werkstor - mit Optionen" und folgt dem modularen Aufbau nach /DIN EN 15804/. Die Ökobilanz berücksichtigt folgende Module:

A1-A3: Rohstoffversorgung, Transport, Herstellung
C2: Transport
C3: Abfallbehandlung
D: Wiederverwendungs-, Rückgewinnungs- oder Recyclingpotenzial

## Data sources
- GaBi Database (all versions)
- GaBi database SP36 2018
