# Kunststoffprofil EPDM; EPDM

Dataset: ILCD process, EPD, generic dataset
Geography: DE
Reference year: 2021
Valid until: 2022
Classification: oekobau.dat: Kunststoffe / Profile / Kunststoffprofile elastisch
Owner: Sphera Solutions GmbH
Compliance: EN 15804+A2
Review: Dependent internal review by Sphera Solutions GmbH; Independent external review by GaBi user forum
Amounts: rows without a unit in brackets have none in this file; such an amount is in the reference unit of its flow, which a separate flow dataset defines
copyright: true
licenseType: Free of charge for all users and uses
accessRestrictions: The license conditions as stated on https://www.oekobaudat.de/ apply.
accessRestrictions: Es gelten die Lizenzbedingungen wie sie auf https://www.oekobaudat.de/ genannt sind.

## General comment
Dieser Datensatz wurde nach dem European Standard EN 15804+A2 für Nachhaltiges Bauen modelliert. Ergebnisse werden in Modulen abgebildet, die den strukturierten Ausdruck von Ergebnissen über den gesamten Lebenszyklus zulassen.

## Geography
Der Datensatz bildet die länderspezifische Situation in Deutschland ab. Dabei werden Haupttechnologien, spezifische regionale Charakteristiken und ggf. Importstatistiken berücksichtigt.

## Time period
Jährlicher Durchschnitt

## Technology and included processes
Die Ökobilanzierung umfasst die Rohstoffbereitstellung, den Rohstofftransport und den Herstellungsaufwand für ein EPDM-Kunststoffprofil sowie dessen Entsorgung. Transporte vom Werk zum Einbauort sind nicht berücksichtigt und sollten nach Bedarf nachträglich einbezogen werden.
Zur Herstellung von EPDM: EPDM entsteht aus der Co-Polymerisation von Ethylen und Propylen. Die Polymerisation findet in Lösung statt. Der Prozess erfolgt bei Temperaturen zwischen 10 und 50°C und Druckverhältnissen zwischen 1 und 20 bar in einem kontinuierlichen Rührtankreaktor unter Zugabe eines Katalysators. Die Reaktion ist stark exotherm, was eine Kühlung notwendig macht. Organische Lösungsmittel wie Hexan kommen zum Einsatz. Nicht umgesetztes Propylen wird recycelt und wieder in den Reaktor eingespeist. Dem Reaktor nachgeschaltet erfolgt das Abstoppen der Reaktion mit Hilfe von Wasser, Alkohol oder anderen polaren Flüssigkeiten. Anschließend wird die Polymerlösung mit Natriumhydroxid gemischt, um die verbliebenen Katalysatorreste zu entfernen. Extenderöl oder ähnliche Substanzen werden zugegeben. Danach wird die Polymerlösung mit Dampf und heißem Wasser behandelt, um nicht umgesetzte Monomere und restliches Lösungsmittel zu beseitigen. Zur Sicherstellung einer kontrollierten Ausflockung werden Entschäumer und Trennmittel zugegeben. Anschließend erfolgt die Trocknung.

In Modul C1 wird ein manueller Rückbau (lastenfrei) angenommen. Sammelverluste werden vernachlässigt.
Der Transport in Modul C2 zur Verwertungsanlage erfolgt mit einem LKW (50km).
In Modul C3 wird die Zerkleinerung und thermische Behandlung (Verbrennung) des Materials berücksichtigt. Bei der Berechnung der Verbrennungsemissionen und Gutschriften wird der spezifische Heizwert des jeweiligen Materials sowie die Materialzusammensetzung berücksichtigt.
In Modul D erfolgen Gutschriften für die Substitution von Strom (deutscher Strommix) und thermischer Energie (aus Erdgas).

## Technical purpose
Dieses Produkt kann im Baubereich verwendet werden.

## Safety margin
10 %. Produktsystem weitgehend vollständig abgebildet. Gute technologische, zeitliche und geographische Repräsentativität.

## Reference product
- Kunststoffprofil EPDM: 1

## Inputs
- Erneuerbare Primärenergie als Energieträger (PERE) [MJ]: A1-A3 8.15996, C2 0.00200398, C3 0.141502, D -7.76397
- Erneuerbare Primärenergie zur stofflichen Nutzung (PERM) [MJ]: A1-A3 0, C2 0, C3 0, D 0
- Total erneuerbare Primärenergie (PERT) [MJ]: A1-A3 8.15996, C2 0.00200398, C3 0.141502, D -7.76397
- Nicht-erneuerbare Primärenergie als Energieträger (PENRE) [MJ]: A1-A3 69.0411, C2 0.0345287, C3 47.8656, D -22.8552
- Nicht-erneuerbare Primärenergie zur stofflichen Nutzung (PENRM) [MJ]: A1-A3 43, C2 0, C3 -43, D 0
- Total nicht-erneuerbare Primärenergie (PENRT) [MJ]: A1-A3 112.041, C2 0.0345287, C3 4.86563, D -22.8552
- Einsatz von Sekundärstoffen (SM) [kg]: A1-A3 0, C2 0, C3 0, D 0
- Erneuerbare Sekundärbrennstoffe (SF) [MJ]: A1-A3 0, C2 0, C3 0, D 0
- Nicht erneuerbare Sekundärbrennstoffe (NRSF) [MJ]: A1-A3 0, C2 0, C3 0, D 0
- Nettoeinsatz von Süßwasserressourcen (FW) [m3]: A1-A3 0.0142105, C2 1.78104e-6, C3 0.00738314, D -0.00288794

## Outputs
- Gefährlicher Abfall zur Deponie (HWD) [kg]: A1-A3 2.03348e-7, C2 1.44319e-12, C3 1.24703e-10, D -7.9414e-9
- Entsorgter nicht gefährlicher Abfall (NHWD) [kg]: A1-A3 0.0676935, C2 5.57372e-6, C3 0.0374094, D -0.0120775
- Entsorgter radioaktiver Abfall (RWD) [kg]: A1-A3 0.00101227, C2 3.31348e-8, C3 1.72504e-5, D -0.000835025
- Komponenten für die Wiederverwendung (CRU) [kg]: A1-A3 0, C2 0, C3 0, D 0
- Stoffe zum Recycling (MFR) [kg]: A1-A3 0, C2 0, C3 0, D 0
- Stoffe für die Energierückgewinnung (MER) [kg]: A1-A3 0, C2 0, C3 1, D 0
- Exportierte elektrische Energie (EEE) [MJ]: A1-A3 0, C2 0, C3 5.70153, D 0
- Exportierte thermische Energie (EET) [MJ]: A1-A3 0, C2 0, C3 12.9903, D 0

## Impact indicators
- Globales Erwärmungspotenzial - total (GWP-total) [kg CO2 eq.]: A1-A3 4.35165, C2 0.00262283, C3 2.8787, D -1.47025
- Globales Erwärmungspotenzial - fossil (GWP-fossil) [kg CO2 eq.]: A1-A3 4.31574, C2 0.00260492, C3 2.87841, D -1.45371
- Globales Erwärmungspotenzial - biogen (GWP-biogenic) [kg CO2 eq.]: A1-A3 0.0331702, C2 1.17716e-6, C3 0.000229855, D -0.0143948
- Globales Erwärmungspotenzial - luluc (GWP-luluc) [kg CO2 eq.]: A1-A3 0.00273782, C2 1.67295e-5, C3 5.63547e-5, D -0.00214454
- Abbaupotenzial der stratosphärischen Ozonschicht (ODP) [kg CFC-11 eq.]: A1-A3 3.28197e-14, C2 6.66532e-19, C3 5.77435e-16, D -3.38948e-14
- Versauerungspotenzial, kumulierte Überschreitung (AP) [Mole of H+ eq.]: A1-A3 0.00492174, C2 7.38555e-6, C3 0.000395932, D -0.00149412
- Eutrophierungspotenzial - Süßwasser (EP-freshwater) [kg P eq.]: A1-A3 6.88285e-6, C2 5.35732e-9, C3 1.11292e-7, D -3.56781e-6
- Eutrophierungspotenzial - Salzwasser (EP-marine) [kg N eq.]: A1-A3 0.00160327, C2 3.40237e-6, C3 8.18571e-5, D -0.00054919
- Eutrophierungspotenzial - Land (EP-terrestrial) [Mole of N eq.]: A1-A3 0.0170878, C2 3.80663e-5, C3 0.00186694, D -0.00585013
- Bildungspotenzial für troposphärisches Ozon (POCP) [kg NMVOC eq.]: A1-A3 0.00493532, C2 6.6347e-6, C3 0.000219189, D -0.00143793
- Potenzial für die Verknappung abiotischer Ressourcen nicht fossile Ressourcen (ADPE) [kg Sb eq.]: A1-A3 1.56817e-6, C2 2.26592e-10, C3 8.12612e-9, D -4.57435e-7
- Potenzial für die Verknappung abiotischer Ressourcen fossile Brennstoffe (ADPF) [MJ]: A1-A3 116.334, C2 0.0345273, C3 0.56546, D -22.8519
- Wasser-Entzugspotenzial (Benutzer) (WDP) [m³ world equiv.]: A1-A3 -0.14325, C2 1.01262e-5, C3 0.316407, D -0.0175308

## Use advice
Der Datensatz repräsentiert ein Cradle to Gate Inventar. Er kann verwendet werden, um die Lieferkette des jeweiligen Produktes in einer repräsentativen Weise zu charakterisieren. Die Kombination mit einzelnen Einheitenprozessen und diesem Produkt ermöglicht die Erstellung von anwenderspezifischen (Produkt-) LCAs.

## Data sources
- Plastics Europe Association of Plastics Manufacturers, 2006
- ULLMANN'S Encyclopedia of Industrial Chemistry
- Documentation of data quality management
- GaBi Database Edition 2021, CUP2021.01
- GaBi database (all versions)
