# WrapTec

Dataset: ILCD process, EPD, average dataset
Geography: DE
Reference year: 2018
Valid until: 2023
Classification: OEKOBAU.DAT: Kunststoffe / Folien und Vliese / Folien zur Abdichtung
Classification: IBUCategories: 02 Bauprodukte / Abdichtungen / Dach- und Dichtungsbahnsysteme aus Kunststoffen und Elastomeren
Method details: Dach- und Dichtungsbahnsysteme aus Kunststoffen und Elastomeren.pdf
Generated by: SUSTAINUM Institut für zukunftsfähiges Wirtschaften Berlin eG
Registration number: EPD-MRC-20170174-IBB1-DE
Owner: Monier Roofing Components GmbH
Compliance: DIN EN 15804; ISO 14025
Review: Accredited third party review by Institut Bauen und Umwelt e. V.
Amounts: rows without a unit in brackets have none in this file; such an amount is in the reference unit of its flow, which a separate flow dataset defines
copyright: true
licenseType: Free of charge for all users and uses
accessRestrictions: None

## General comment
WrapTec ist ein universelles Verkleidungsprodukt für technisch isolierte Rohrsysteme. Es setzt sich zusammen aus zweilagigem Laminat bestehend aus Polyisobutylen (PIB), inklusive Farbpigmente und Stabilisatoren gegen UV-Belastung und Alterung.

## Technology and included processes
WrapTec wird in 3 Prozessschritten anwendungsfertig produziert: Halbzeugherstellung Alle Bestandteile werden in einem Kneter vermengt. Überschüsse aus vorhergehenden Produktionen und Randabschnitte werden als Eigenregenerat den übrigen Bestandteilen zugefügt. Anschließend wird die Knetmasse mit Hilfe eines Extruders in Folienform gebracht. Die Folie ist mit Farbpigmenten und UV-Stabilisatoren versetzt. Auftragslaminierung Auf die nun funktionsfähige WrapTec-Folie werden Verschweißkleber - vollflächig zum späteren Verschweißen überlappender Folien - und eine Release-Folie (ablösbare Schutzfolie für den Transport) aufgetragen. Konfektionierung Nach dem Randbeschnitt durchläuft die WrapTec-Folie eine Messerstation, um auf die gewünschten Konfektionierungen zugeschnitten zu werden. Anschließend werden die Folien über ein Wickelsystem aufgerollt.
Deklarierte Einheit:
Die Deklaration bezieht sich auf die Herstellung von 1 m2 Abdichtungsmaterial WrapTec. Es handelt sich um ein selbstklebendes und selbstverschweißendes Material, weshalb für die Abdichtung keine weiteren Auflasten benötigt werden.

## Technical purpose
WrapTec ist anwendbar als UV- und witterungsbeständiges, selbstverschweißendes Ummantelungsmaterial im Bereich technischer Isolierungen, wie bspw. vorgedämmten Rohrleitungen von Sanitär-/Heizungs-, Lüftungs- und Kälteleitungen sowie verfahrenstechnischen Anlagen.

## Reference product
- 1 m2 WrapTec: 1

## Inputs
- Erneuerbare Primärenergie als Energieträger (PERE) [MJ]: A1 4.93639, A2 0.0990051, A3 1.57581, C2 0.0100851, C3 1.98989, D -2.06173
- Erneuerbare Primärenergie zur stofflichen Nutzung (PERM) [MJ]: A1 1.782, A2 0, A3 0, C2 0, C3 -1.782, D 0
- Total erneuerbare Primärenergie (PERT) [MJ]: A1 6.71839, A2 0.0990051, A3 1.57581, C2 0.0100851, C3 0.207889, D -2.06173
- Nicht-erneuerbare Primärenergie als Energieträger (PENRE) [MJ]: A1 34.4523, A2 1.50099, A3 3.65642, C2 0.152901, C3 31.4064, D -10.9804
- Nicht-erneuerbare Primärenergie zur stofflichen Nutzung (PENRM) [MJ]: A1 30.294, A2 0, A3 0, C2 0, C3 -30.294, D 0
- Total nicht erneuerbare Primärenergie (PENRT) [MJ]: A1 64.7463, A2 1.50099, A3 3.65642, C2 0.152901, C3 1.11238, D -10.9804
- Einsatz von Sekundärstoffen (SM) [kg]: A1 0, A2 0, A3 0, C2 0, C3 0, D 0
- Erneuerbare Sekundärbrennstoffe (RSF) [MJ]: A1 0, A2 0, A3 0, C2 0, C3 0, D 0
- Nicht erneuerbare Sekundärbrennstoffe (NRSF) [MJ]: A1 0, A2 0, A3 0, C2 0, C3 0, D 0
- Einsatz von Süßwasserressourcen (FW) [m^3]: A1 0.0119401, A2 0.000115455, A3 0.00107014, C2 1.17574e-5, C3 0, D -0.00140276

## Outputs
- Gefährlicher Abfall zur Deponie (HWD) [kg]: A1 0.00196435, A2 9.46188e-8, A3 2.40023e-9, C2 9.63739e-9, C3 5.40024e-9, D -3.94443e-9
- Entsorgter nicht gefährlicher Abfall (NHWD) [kg]: A1 4.42002, A2 0.00827246, A3 1.70445, C2 0.000842591, C3 0.378711, D -2.23205
- Entsorgter radioaktiver Abfall (RWD) [kg]: A1 0.000801442, A2 1.72438e-6, A3 0.000336252, C2 1.75637e-7, C3 4.36678e-5, D -0.000439804
- Komponenten für die Wiederverwendung (CRU) [kg]: A1 0, A2 0, A3 0, C2 0, C3 0, D 0
- Stoffe zum Recycling (MFR) [kg]: A1 0, A2 0, A3 0, C2 0, C3 0, D 0
- Stoffe für die Energierückgewinnung (MER) [kg]: A1 0, A2 0, A3 0, C2 0, C3 0, D 0
- Exportierte elektrische Energie (EEE) [MJ]: A1 0, A2 0, A3 0, C2 0, C3 2.2, D 0
- Exportierte thermische Energie (EET) [MJ]: A1 0, A2 0, A3 0, C2 0, C3 5.81, D 0

## Impact indicators
- Globales Erwärmungspotenzial (GWP) [kg CO_(2)-Äq.]: A1 2.57462, A2 0.110314, A3 0.287649, C2 0.0112507, C3 2.35095, D -0.762293
- Abbau Potential der stratosphärischen Ozonschicht (ODP) [kg CFC11-Äq.]: A1 0.000340316, A2 1.39914e-14, A3 1.08669e-12, C2 1.42448e-15, C3 1.32513e-13, D -1.42416e-12
- Versauerungspotenzial von Boden und Wasser (AP) [kg SO_(2)-Äq.]: A1 0.00632014, A2 0.000467975, A3 0.000428845, C2 4.4302e-5, C3 0.000915245, D -0.000812992
- Eutrophierungspotenzial (EP) [kg PO_(4)^(3)-Äq.]: A1 0.000859909, A2 0.000115921, A3 6.85604e-5, C2 1.095e-5, C3 0.000173128, D -0.000128325
- Bildungspotential für troposphärisches Ozon (POCP) [kg Ethen-Äq.]: A1 0.00139075, A2 -0.000174026, A3 2.97236e-5, C2 -1.61479e-5, C3 5.61079e-5, D -8.49716e-5
- Potenzial für den abiotischen Abbau nicht fossiler Ressourcen (ADPE) [kg Sb-Äq.]: A1 4.86567e-6, A2 1.14674e-8, A3 1.45138e-7, C2 1.16803e-9, C3 2.03926e-7, D -2.07582e-7
- Potenzial für den abiotischen Abbau fossiler Brennstoffe (ADPF) [MJ]: A1 62.7662, A2 1.49667, A3 2.80865, C2 0.152449, C3 1.00226, D -9.87154

## Use advice
Gültigkeitsbereich:
Dieses Dokument bezieht sich auf WrapTec der Firma MONIER Roofing Components GmbH, hergestellt in Berlin, Deutschland. Die deklarierte Einheit bezieht sich auf 1 m2 Abdichtungsmaterial. Die Datenerhebung für die Herstellung des deklarierten Produktes erfolgte werksspezifisch mit aktuellen Jahresdaten von 2016. Der Deklarationsinhaber ist verantwortlich für die zugrunde liegenden Daten und deren Verifizierung.
Systemgrenze:
Die Ökobilanz betrachtet die Systemgrenzen "Wiege bis Werkstor - mit Optionen" und folgt dem modularen Aufbau nach /DIN EN 15804/. Die Ökobilanz berücksichtigt folgende Module:

A1-A3: Rohstoffversorgung, Transport, Herstellung
C2: Transport
C3: Abfallbehandlung
D: Wiederverwendungs-, Rückgewinnungs- oder Recyclingpotenzial

## Data sources
- GaBi Database (all versions)
- GaBi database SP29 2016
