# Rollladen Kunststoff

Dataset: ILCD process, EPD, generic dataset
Geography: DE
Reference year: 2021
Valid until: 2022
Classification: oekobau.dat: Komponenten von Fenstern und Vorhangfassaden / Füllungen / Opake Füllungen
Owner: Sphera Solutions GmbH
Compliance: EN 15804+A2
Review: Dependent internal review by Sphera Solutions GmbH; Independent external review by GaBi user forum
Amounts: rows without a unit in brackets have none in this file; such an amount is in the reference unit of its flow, which a separate flow dataset defines
copyright: true
licenseType: Free of charge for all users and uses
accessRestrictions: The license conditions as stated on https://www.oekobaudat.de/ apply.
accessRestrictions: Es gelten die Lizenzbedingungen wie sie auf https://www.oekobaudat.de/ genannt sind.

## General comment
Dieser Datensatz wurde nach dem European Standard EN 15804+A2 für Nachhaltiges Bauen modelliert. Ergebnisse werden in Modulen abgebildet, die den strukturierten Ausdruck von Ergebnissen über den gesamten Lebenszyklus zulassen.

## Geography
Der Datensatz bildet die länderspezifische Situation in Deutschland ab. Dabei werden Haupttechnologien, spezifische regionale Charakteristiken und ggf. Importstatistiken berücksichtigt.

## Time period
Jährlicher Durchschnitt

## Technology and included processes
Vordergrundsystem
Die Systemgrenzen umfassen die Herstellung und Entsorgung eines PVC- Rollladens. Dieser Datensatz basiert auf einem Fenster der Größe 148*123 cm und ist auf 1m² skaliert. Die Schienen sind aus Aluminium gefertigt und U-förmig. Der Rolladen wird mit Hilfe eines Polypropylenriemens von Hand bewegt. Das Rollladengehäuse ist aus Stahl (1,5 mm dick), der Rolladen selbt aus PVC. Transportprozesse für die Rohstoffe wurden berücksichtigt. Alle wichtigen Energie- und Stoffflüsse sind im System inbegriffen. Die Wirkungsbilanz der Produktionsanlagen und der Infrastruktur wurde im System nicht berücksichtigt.
Wenden Sie diesen Datensatz an, indem Sie die Fläche des Rolladens in m² berechnen und mit dem Ergebnis dieses Datensatzes multiplizieren.

In Modul C1 wird ein manueller Rückbau (lastenfrei) angenommen. Sammelverluste werden vernachlässigt.
Der Transport in Modul C2 zur Verwertungsanlage erfolgt mit einem LKW (50km).

Behandlung Metallkomponenten:
Es wird angenommen, dass alle Metalle das Ende der Abfalleigenschaft direkt nach dem Ausbau erreichen. Das heißt die Lasten für die Aufbereitung und die Gutschriften für die Substitution von Primärmaterial werden in Modul D ausgewiesen.
In Modul D sind die Lasten für die Sortierung, Umschmelzen, Schlackebehandlung, Deponierung von Reststoffen, Behandlung von Filterstäuben und Krätzebehandlung enthalten. Die Gutschriften werden für die Nettoschrottmenge (zurückgebaute Menge abzüglich ggfs. enthaltenes Sekundärmaterial, abzüglich Aufbereitungsverluste) für den durchschnittlich vorhandenen Materialmix (aus verschiedenen Legierungen) vergeben.

Kunststoffkomponten:
In Modul C3 wird die Zerkleinerung und thermische Behandlung (Verbrennung) des Materials berücksichtigt. Bei der Berechnung der Verbrennungsemissionen und Gutschriften wird der spezifische Heizwert des jeweiligen Materials sowie die Materialzusammensetzung berücksichtigt.
In Modul D erfolgen Gutschriften für die Substitution von Strom (deutscher Strommix) und thermischer Energie (aus Erdgas).

## Technical purpose
Dieses Produkt kann im Baubereich verwendet werden.

## Safety margin
10 %. Produktsystem weitgehend vollständig abgebildet. Gute technologische, zeitliche und geographische Repräsentativität.

## Reference product
- Rollladen Kunststoff: 1

## Inputs
- Erneuerbare Primärenergie als Energieträger (PERE) [MJ]: A1-A3 89.5292, C1 0.000350675, C2 0.0123445, C3 7.87157, D -29.8054
- Erneuerbare Primärenergie zur stofflichen Nutzung (PERM) [MJ]: A1-A3 0, C1 0, C2 0, C3 0, D 0
- Total erneuerbare Primärenergie (PERT) [MJ]: A1-A3 89.5292, C1 0.000350675, C2 0.0123445, C3 7.87157, D -29.8054
- Nicht-erneuerbare Primärenergie als Energieträger (PENRE) [MJ]: A1-A3 333.774, C1 0.00604215, C2 0.212697, C3 104.675, D -112.905
- Nicht-erneuerbare Primärenergie zur stofflichen Nutzung (PENRM) [MJ]: A1-A3 72, C1 0, C2 0, C3 -72, D 0
- Total nicht-erneuerbare Primärenergie (PENRT) [MJ]: A1-A3 405.774, C1 0.00604215, C2 0.212697, C3 32.6751, D -112.905
- Einsatz von Sekundärstoffen (SM) [kg]: A1-A3 0.266264, C1 0, C2 0, C3 0, D 0
- Erneuerbare Sekundärbrennstoffe (SF) [MJ]: A1-A3 0, C1 0, C2 0, C3 0, D 0
- Nicht erneuerbare Sekundärbrennstoffe (NRSF) [MJ]: A1-A3 0, C1 0, C2 0, C3 0, D 0
- Nettoeinsatz von Süßwasserressourcen (FW) [m3]: A1-A3 0.109446, C1 3.11663e-7, C2 1.09712e-5, C3 0.0244691, D -0.0479697

## Outputs
- Gefährlicher Abfall zur Deponie (HWD) [kg]: A1-A3 5.01651e-6, C1 2.52542e-13, C2 8.89004e-12, C3 5.43954e-9, D -5.13975e-9
- Entsorgter nicht gefährlicher Abfall (NHWD) [kg]: A1-A3 1.86803, C1 9.75341e-7, C2 3.43341e-5, C3 7.89875, D -1.1065
- Entsorgter radioaktiver Abfall (RWD) [kg]: A1-A3 0.0137523, C1 5.79823e-9, C2 2.0411e-7, C3 0.000947405, D -0.00575723
- Komponenten für die Wiederverwendung (CRU) [kg]: A1-A3 0, C1 0, C2 0, C3 0, D 0
- Stoffe zum Recycling (MFR) [kg]: A1-A3 0, C1 2.16, C2 0, C3 0, D 0
- Stoffe für die Energierückgewinnung (MER) [kg]: A1-A3 0, C1 0, C2 0, C3 4, D 0
- Exportierte elektrische Energie (EEE) [MJ]: A1-A3 0, C1 0, C2 0, C3 8.81035, D 0
- Exportierte thermische Energie (EET) [MJ]: A1-A3 0, C1 0, C2 0, C3 20.8164, D 0

## Impact indicators
- Globales Erwärmungspotenzial - total (GWP-total) [kg CO2 eq.]: A1-A3 23.437, C1 0.000452042, C2 0.0161566, C3 12.4326, D -9.09383
- Globales Erwärmungspotenzial - fossil (GWP-fossil) [kg CO2 eq.]: A1-A3 23.2784, C1 0.000449009, C2 0.0160463, C3 12.4246, D -9.06119
- Globales Erwärmungspotenzial - biogen (GWP-biogenic) [kg CO2 eq.]: A1-A3 0.132903, C1 1.06139e-7, C2 7.25129e-6, C3 0.00404828, D -0.0284203
- Globales Erwärmungspotenzial - luluc (GWP-luluc) [kg CO2 eq.]: A1-A3 0.0257798, C1 2.92748e-6, C2 0.000103054, C3 0.00398923, D -0.00421685
- Abbaupotenzial der stratosphärischen Ozonschicht (ODP) [kg CFC-11 eq.]: A1-A3 6.31771e-10, C1 1.16636e-19, C2 4.10583e-18, C3 3.17367e-14, D 1.23351e-12
- Versauerungspotenzial, kumulierte Überschreitung (AP) [Mole of H+ eq.]: A1-A3 0.0521675, C1 6.04537e-6, C2 4.5495e-5, C3 0.00354421, D -0.0253123
- Eutrophierungspotenzial - Süßwasser (EP-freshwater) [kg P eq.]: A1-A3 4.52593e-5, C1 9.37473e-10, C2 3.30011e-8, C3 4.58046e-6, D -7.29496e-6
- Eutrophierungspotenzial - Salzwasser (EP-marine) [kg N eq.]: A1-A3 0.0125935, C1 2.75026e-6, C2 2.09586e-5, C3 0.00115405, D -0.00474975
- Eutrophierungspotenzial - Land (EP-terrestrial) [Mole of N eq.]: A1-A3 0.136744, C1 3.02394e-5, C2 0.000234488, C3 0.0153291, D -0.0514614
- Bildungspotenzial für troposphärisches Ozon (POCP) [kg NMVOC eq.]: A1-A3 0.0483353, C1 8.23671e-6, C2 4.08697e-5, C3 0.00342166, D -0.0144044
- Potenzial für die Verknappung abiotischer Ressourcen nicht fossile Ressourcen (ADPE) [kg Sb eq.]: A1-A3 0.00015362, C1 3.96511e-11, C2 1.39581e-9, C3 4.25055e-7, D -1.03073e-6
- Potenzial für die Verknappung abiotischer Ressourcen fossile Brennstoffe (ADPF) [MJ]: A1-A3 412.607, C1 0.0060419, C2 0.212688, C3 25.47, D -112.646
- Wasser-Entzugspotenzial (Benutzer) (WDP) [m³ world equiv.]: A1-A3 -0.497574, C1 1.77198e-6, C2 6.23775e-5, C3 0.887407, D -0.260063

## Use advice
Der Datensatz repräsentiert ein Cradle to Gate Inventar. Er kann verwendet werden, um die Lieferkette des jeweiligen Produktes in einer repräsentativen Weise zu charakterisieren. Die Kombination mit einzelnen Einheitenprozessen und diesem Produkt ermöglicht die Erstellung von anwenderspezifischen (Produkt-) LCAs.

## Data sources
- Documentation of data quality management
- GaBi Database Edition 2021, CUP2021.01
- GaBi database (all versions)
