# Fixit 222 Aerogel Hochleistungsdämmputz

Dataset: ILCD process, EPD, specific dataset
Geography: CH
Reference year: 2021
Valid until: 2026
Classification: OEKOBAU.DAT: Mineralische Baustoffe / Mörtel und Beton / Putz und Putzmörtel
Classification: IBUCategories: 02 Bauprodukte / Mauerwerk und Mörtel / Mineralische Werkmörtel
Method details: Mineralische Werkmörtel.pdf
Generated by: Carbotech AG
Registration number: EPD-FIX-20210051-ICD2-DE
Owner: FIXIT TM Holding GmbH
Compliance: DIN EN 15804+A2; ISO 14025
Review: Accredited third party review by Institut Bauen und Umwelt e. V.
Amounts: rows without a unit in brackets have none in this file; such an amount is in the reference unit of its flow, which a separate flow dataset defines
copyright: true
licenseType: Free of charge for all users and uses
accessRestrictions: None

## General comment
Der Fixit 222 Aerogel Hochleistungsdämmputz ist ein innovativer Dämmputz: Durch die Verwendung von Aerogel-Granulat als dämmender Zuschlagstoff erreicht der Fixit 222 eine Wärmeleitfähigkeit, welche um ein Vielfaches niedriger ist als bei anderen marktüblichen Dämmputzen. Altbauten sowie historische und unter Denkmalschutz stehende Objekte können damit energetisch saniert werden, ohne dass die original Wandstruktur verloren geht. Rundungen und Vertiefungen können originalgetreu nachgebildet und Unebenheiten millimetergenau ausgefüllt werden.

Aerogele sind hochporöse Festkörper, deren Volumen aus bis zu 99,98 % Poren (Luft) besteht und gehören damit zu den leichtesten verfügbaren Feststoffen. Durch die extrem poröse Gefügestruktur werden die Luftmoleküle in den Poren eingeschlossen und die Wärmeübertragung auf ein Minimum reduziert. Das Rohmaterial zur Herstellung von Aerogel ist amorphes Siliziumdioxid, in der Baustoffkunde als Kaliwasserglas oder Silikat bekannt. Dieser rein mineralische Rohstoff bildet die Grundlage für die hohe Leistungsfähigkeit des Dämmstoffes.

## Technology and included processes
Der Wärmedämmputz wird in Mischwerken in folgenden Arbeitsschritten hergestellt: Füllen der Vorrats- bzw. Wägebehälter Förderung der Einsatzstoffe/des Mischgutes in den Mischer Mischen Förderung des Fertigproduktes Verpackung Verladung des Fertigproduktes und Auslieferung Die Rohstoffe – u. a. Kalk, Bindemittel, Leichtzuschläge, Hilfsstoffe, Zusatzmittel und -stoffe (siehe Grundstoffe) – werden im Herstellwerk in Silos oder Gebinden gelagert. Aus diesen werden die Rohstoffe entsprechend der jeweiligen Rezeptur gravimetrisch dosiert und intensiv miteinander vermischt. Anschließend wird das Mischgut abgepackt und als Werk-Trockenmörtel trocken in Gebinden ausgeliefert.
Deklarierte Einheit:
Diese Deklaration bezieht sich auf ein Kilogramm Fixit 222 Aerogel Hochleistungsdämmputz.

## Technical purpose
Fixit 222 ist ein ökologischer, wohnbaubiologischer Hochleistungsdämmputz für den Innen- und Außenbereich. Als Untergründe sind Backstein, Kalksandstein, Naturstein, Bruchsteinmauerwerke sowie rau-geschalter Beton geeignet. Der Untergrund muss sauber, trocken und tragfähig sein. Stark oder unterschiedlich saugende Untergründe benötigen vorgängig einen Anwurf.

## Reference product
- Fixit 222 Aerogel Hochleistungsdämmputz (): 1

## Inputs
- Erneuerbare Primärenergie als Energieträger (PERE) [MJ]: A1-A3 4.98, A4 0.0268, A5 0.0937, C2 0.000249, C4 0.00205, D 0
- Erneuerbare Primärenergie zur stofflichen Nutzung (PERM) [MJ]: A1-A3 0.34, A4 0, A5 0, C2 0, C4 0, D 0
- Total erneuerbare Primärenergie (PERT) [MJ]: A1-A3 5.31, A4 0.0268, A5 0.0937, C2 0.000249, C4 0.00205, D 0
- Nicht-erneuerbare Primärenergie als Energieträger (PENRE) [MJ]: A1-A3 58.79, A4 0.09, A5 0.27, C2 0.02, C4 0.17, D 0
- Nicht-erneuerbare Primärenergie zur stofflichen Nutzung (PENRM) [MJ]: A1-A3 0.41, A4 0, A5 0, C2 0, C4 0, D 0
- Total nicht erneuerbare Primärenergie (PENRT) [MJ]: A1-A3 59.2, A4 0.09, A5 0.27, C2 0.02, C4 0.17, D 0
- Einsatz von Sekundärstoffen (SM) [kg]: A1-A3 0, A4 0, A5 0, C2 0, C4 0, D 0
- Erneuerbare Sekundärbrennstoffe (RSF) [MJ]: A1-A3 0, A4 0, A5 0, C2 0, C4 0, D 0
- Nicht erneuerbare Sekundärbrennstoffe (NRSF) [MJ]: A1-A3 0, A4 0, A5 0, C2 0, C4 0, D 0
- Einsatz von Süßwasserressourcen (FW) [m^3]: A1-A3 7.37e-5, A4 0.000116, A5 0.00162, C2 4.7e-6, C4 0.000184, D 0

## Outputs
- Gefährlicher Abfall zur Deponie (HWD) [kg]: A1-A3 0.000125, A4 8.17e-8, A5 2.12e-7, C2 1.37e-8, C4 5.35e-8, D 0
- Entsorgter nicht gefährlicher Abfall (NHWD) [kg]: A1-A3 0.336, A4 0.00325, A5 0.00255, C2 0.00202, C4 1.1, D 0
- Entsorgter radioaktiver Abfall (RWD) [kg]: A1-A3 0.000108, A4 7.74e-7, A5 3.31e-6, C2 1.61e-7, C4 1.07e-6, D 0
- Komponenten für die Wiederverwendung (CRU) [kg]: A1-A3 0, A4 0, A5 0, C2 0, C4 0, D 0
- Stoffe zum Recycling (MFR) [kg]: A1-A3 0, A4 0, A5 0, C2 0, C4 0, D 0
- Stoffe für die Energierückgewinnung (MER) [kg]: A1-A3 0, A4 0, A5 0, C2 0, C4 0, D 0
- Exportierte elektrische Energie (EEE) [MJ]: A1-A3 0, A4 0, A5 0, C2 0, C4 0, D 0
- Exportierte thermische Energie (EET) [MJ]: A1-A3 0, A4 0, A5 0, C2 0, C4 0, D 0

## Impact indicators
- Globales Erwärmungspotenzial total (GWP-total) [kg CO_(2)-Äq.]: A1-A3 4.39, A4 0.0038, A5 0.0042, C2 0.00148, C4 0.00467, D 0
- Globales Erwärmungspotenzial fossil (GWP-fossil) [kg CO_(2)-Äq.]: A1-A3 4.36, A4 0.00379, A5 0.00405, C2 0.00148, C4 0.00467, D 0
- Globales Erwärmungspotenzial biogen (GWP-biogenic) [kg CO_(2)-Äq.]: A1-A3 0.0208, A4 4.5e-6, A5 0.000148, C2 4.94e-7, C4 4.03e-6, D 0
- Globales Erwärmungspotenzial luluc (GWP-luluc) [kg CO_(2)-Äq.]: A1-A3 0.00557, A4 3.23e-6, A5 4.38e-6, C2 3.75e-7, C4 7.66e-7, D 0
- Abbau Potential der stratosphärischen Ozonschicht (ODP) [kg CFC11-Äq.]: A1-A3 1.78e-6, A4 7.6e-10, A5 1.82e-9, C2 2.85e-10, C4 1.87e-9, D 0
- Versauerungspotenzial von Boden und Wasser (AP) [mol H^(+)-Äq.]: A1-A3 0.0178, A4 2.64e-5, A5 6.3e-5, C2 6.29e-6, C4 4.67e-5, D 0
- Eutrophierungspotenzial Süßwasser (EP-freshwater) [kg PO_(4)-Äq.]: A1-A3 0.000223, A4 1.04e-6, A5 5.59e-8, C2 1.17e-5, C4 3.15e-8, D 0
- Eutrophierungspotenzial Salzwasser (EP-marine) [kg N-Äq.]: A1-A3 0.00356, A4 8.69e-6, A5 3.88e-6, C2 1.86e-6, C4 1.69e-5, D 0
- Eutrophierungspotenzial Land (EP-terrestrial) [mol N-Äq.]: A1-A3 0.0451, A4 9.45e-5, A5 0.000239, C2 2.05e-5, C4 0.000189, D 0
- Bildungspotential für troposphärisches Ozon (POCP) [kg NMVOC-Äq.]: A1-A3 0.00982, A4 2.61e-5, A5 8.2e-6, C2 6.41e-6, C4 5.3e-5, D 0
- Potenzial für den abiotischen Abbau nicht fossiler Ressourcen (ADPE) [kg Sb-Äq.]: A1-A3 3.46008e-6, A4 1.09e-8, A5 2.39e-8, C2 2.72e-9, C4 4.92e-9, D 0
- Potenzial für den abiotischen Abbau fossiler Brennstoffe (ADPF) [MJ]: A1-A3 49.9777, A4 0.05, A5 0.04, C2 0.02, C4 0.15, D 0
- Wassernutzung (WDP) [m^(3) Welt-Äq. entzogen]: A1-A3 2.66175, A4 0.00105, A5 0.00395, C2 0.000138, C4 0.000606, D 0
- Auftreten von Krankheiten aufgrund von Feinstaubemissionen (PM) [Krankheitsfälle]
- Wirkung durch Exposition des Menschen mit U235 (IR) [kBq U235-Äq.]
- Toxizitätsvergleichseinheit für Ökosysteme (ETP-fw) [CTUe]
- Toxizitätsvergleichseinheit für Menschen (krebserregend) (HTP-c) [CTUh]
- Toxizitätsvergleichseinheit für Menschen (nicht krebserregend) (HTP-nc) [CTUh]
- Bodenqualitätsindex (SQP) [SQP]

## Use advice
Gültigkeitsbereich:
Produkt: Fixit 222 Aerogel Hochleistungsdämmputz

Werk: Fixit AG, Im Schachen 416, 5113 Holderbank, Schweiz

Standortländer: Albanien, Bosnien, Bulgarien, Deutschland, Italien, Kroatien, Litauen, Mazedonien, Montenegro, Österreich, Polen, Rumänien, Russland, Schweiz, Serbien, Slowakei, Slowenien, Tschechien, Ukraine
Systemgrenze:
Die Systemgrenze für die Ökobilanz umfasst den Lebensweg "von der Wiege bis Werktor mit Optionen". Diese umfassen die nachfolgend beschriebenen und in Grafik 2 dargestellten Prozesse (siehe auch Umfang deklarierter Module Systemgrenze Kapitel 5).

Die Module A1-A3 (Produktionsstadium) umfassen die Versorgung mit Rohstoffen und Hilfsstoffen (Bindemittel, Leichtzuschlag, Additive), die Verpackung, Transporte sowie Energieverbräuche zur Herstellung.

Das Modul A4 umfasst die Transporte vom Hersteller zum Installationsort und das Modul A5 die Montage des Dämmputzes auf der Baustelle sowie die dabei anfallende Entsorgung der Verpackungsabfälle. Für die Montage werden Wasser und Energie verwendet.

Das Modul C2 umfasst die Transporte für die Entsorgung und Modul C4 die Entsorgung des Endprodukts auf der Deponie.

Das Modul D umfasst das Wiederverwendungs-, Rückgewinnungs- oder Recyclingpotenzial des Produktes. Für eine Wieder- oder Weiterverwendung von Dämmputz mit Leichtzuschlag Aerogel fehlen Erfahrungswerte. Darum wurde im Modul D bei allen Indikatoren der Wert 0 angegeben.

Grafik 2: Inhaltliche Systemgrenze für die Ökobilanz von Fixit 222

Nicht berücksichtigt wurde die Staubentwicklung bei der Herstellung und Applikation des Hochleistungs-dämmputzes Fixit 222, da bei Einhaltung der arbeitsrechtlichen Vorschriften keine Gefährdung für die menschliche Gesundheit besteht. Weiter wurde der Aufwand für das Entfernen des Dämmputzes am Ende der Lebensdauer nicht erhoben, da er als vernachlässigbar klein angesehen wird. Bei einem vollständigen Rückbau des Gebäudes ist dieser Zusatzaufwand nahezu Null.

Ein Kalkputz wie Fixit 222 nimmt während eines längeren Härtungsprozesses Kohlendioxid (CO2) aus der Luft auf (Karbonatisierung). Dies reduziert den CO2-Fussabdruck des Dämmputzes Fixit 222. Da das Abbinden des Kalkhydrats unter Aufnahme von CO2 ein sehr langsamer Prozess ist, wird die zeitverzögerte Wirkung der Menge CO2, welche in diesem Prozess wieder aufgenommen wird, nicht ausgewiesen.

## Data sources
- ecoinvent database (all versions)
- ecoinvent 3.5 database
