# Natursteinplatte, weich, Innenboden, Dicke 20mm; 52 kg/m2

Dataset: ILCD process, EPD, generic dataset
Geography: DE
Reference year: 2021
Valid until: 2022
Classification: oekobau.dat: Mineralische Baustoffe / Steine und Elemente / Naturwerkstein
Owner: Sphera Solutions GmbH
Compliance: EN 15804+A2
Review: Dependent internal review by Sphera Solutions GmbH; Independent external review by GaBi user forum
Amounts: rows without a unit in brackets have none in this file; such an amount is in the reference unit of its flow, which a separate flow dataset defines
copyright: true
licenseType: Free of charge for all users and uses
accessRestrictions: The license conditions as stated on https://www.oekobaudat.de/ apply.
accessRestrictions: Es gelten die Lizenzbedingungen wie sie auf https://www.oekobaudat.de/ genannt sind.

## General comment
Dieser Datensatz wurde nach dem European Standard EN 15804+A2 für Nachhaltiges Bauen modelliert. Ergebnisse werden in Modulen abgebildet, die den strukturierten Ausdruck von Ergebnissen über den gesamten Lebenszyklus zulassen.

## Geography
Der Datensatz bildet die länderspezifische Situation in Deutschland ab. Dabei werden Haupttechnologien, spezifische regionale Charakteristiken und ggf. Importstatistiken berücksichtigt.

## Time period
Jährlicher Durchschnitt

## Technology and included processes
Die Systemgrenze bildet das fertige Produkt, 2 cm dicke Kalksteinplatten für den Innenbodenbereich.

Die Lebenszyklusanalyse von Naturwerksteinplatten für Anwendungen im Innenbodenbereich umfasst die Lebenswegabschnitte Gewinnung von Kalkstein und die weitere Bearbeitung (Gatter, Schleifstraße, Mehrblattsäge), sowie den Transport nach Deutschland (Modul A4). Zwischen Abbauort und Bearbeitungsort wurde eine mittlere Entfernung von 20 km festgelegt. Der Betrachtung liegt ein Herkunftsmix zu Grunde: Dabei stammen 50% der Natursteine aus China, 43% aus Europa (außer DE) und 7% aus Deutschland.

In der Entsorgungsphase wird in Modul C1 ein maschineller Rückbau (Bagger) bilanziert. Der Transport in Modul C2 zur Aufbereitungsanlage erfolgt mit einem LKW (50km). In Modul C3 wird das Material aufbereitet, eventuelle Bewehrung wird einer Senke (keine Lasten, keine Gutschriften) zugeführt. Es wurde ein Aufbereitungsverlust von 25% angenommen. Dieser Verlust wird einer Inertstoffdeponie innerhalb von Modul C3 zugeführt (durchschnittliche Deponieemissionen). In Modul D erfolgt eine Gutschrift für die Netto-Materialmenge (ohne Bewehrungsanteil und abzüglich Aufbereitungsverluste) für die Substitution von natürlichem Kies als Verfüllmaterial (z.B. im Straßen- oder Deponiebau).

## Technical purpose
Dieses Produkt kann im Baubereich verwendet werden.

## Safety margin
10 %. Produktsystem weitgehend vollständig abgebildet. Gute technologische, zeitliche und geographische Repräsentativität.

## Reference product
- Natursteinplatte, weich, Innenboden, Dicke 20mm: 1

## Inputs
- Erneuerbare Primärenergie als Energieträger (PERE) [MJ]: A1-A3 62.0812, A4 8.76941, C1 0.0119184, C2 0.104207, C3 0.630495, D -0.293792
- Erneuerbare Primärenergie zur stofflichen Nutzung (PERM) [MJ]: A1-A3 0, A4 0, C1 0, C2 0, C3 0, D 0
- Total erneuerbare Primärenergie (PERT) [MJ]: A1-A3 62.0812, A4 8.76941, C1 0.0119184, C2 0.104207, C3 0.630495, D -0.293792
- Nicht-erneuerbare Primärenergie als Energieträger (PENRE) [MJ]: A1-A3 190.227, A4 78.2801, C1 0.205354, C2 1.79549, C3 5.66422, D -1.07894
- Nicht-erneuerbare Primärenergie zur stofflichen Nutzung (PENRM) [MJ]: A1-A3 0, A4 0, C1 0, C2 0, C3 0, D 0
- Total nicht-erneuerbare Primärenergie (PENRT) [MJ]: A1-A3 190.227, A4 78.2801, C1 0.205354, C2 1.79549, C3 5.66422, D -1.07894
- Einsatz von Sekundärstoffen (SM) [kg]: A1-A3 0, A4 0, C1 0, C2 0, C3 0, D 0
- Erneuerbare Sekundärbrennstoffe (SF) [MJ]: A1-A3 0, A4 0, C1 0, C2 0, C3 0, D 0
- Nicht erneuerbare Sekundärbrennstoffe (NRSF) [MJ]: A1-A3 0, A4 0, C1 0, C2 0, C3 0, D 0
- Nettoeinsatz von Süßwasserressourcen (FW) [m3]: A1-A3 0.103188, A4 0.00370214, C1 1.05925e-5, C2 9.26142e-5, C3 0.00143263, D -0.000178097

## Outputs
- Gefährlicher Abfall zur Deponie (HWD) [kg]: A1-A3 3.36768e-8, A4 4.88695e-9, C1 8.58314e-12, C2 7.50458e-11, C3 4.63495e-10, D -1.73835e-10
- Entsorgter nicht gefährlicher Abfall (NHWD) [kg]: A1-A3 8.68706, A4 0.0153524, C1 3.31488e-5, C2 0.000289834, C3 13.8855, D -0.716486
- Entsorgter radioaktiver Abfall (RWD) [kg]: A1-A3 0.0128717, A4 0.000956909, C1 1.97064e-7, C2 1.72301e-6, C3 4.99453e-5, D -3.18202e-5
- Komponenten für die Wiederverwendung (CRU) [kg]: A1-A3 0, A4 0, C1 0, C2 0, C3 0, D 0
- Stoffe zum Recycling (MFR) [kg]: A1-A3 0, A4 0, C1 0, C2 0, C3 37.83, D 0
- Stoffe für die Energierückgewinnung (MER) [kg]: A1-A3 0, A4 0, C1 0, C2 0, C3 0, D 0
- Exportierte elektrische Energie (EEE) [MJ]: A1-A3 0, A4 0, C1 0, C2 0, C3 0, D 0
- Exportierte thermische Energie (EET) [MJ]: A1-A3 0, A4 0, C1 0, C2 0, C3 0, D 0

## Impact indicators
- Globales Erwärmungspotenzial - total (GWP-total) [kg CO2 eq.]: A1-A3 15.1267, A4 5.74301, C1 0.0153635, C2 0.136387, C3 0.358838, D -0.0822026
- Globales Erwärmungspotenzial - fossil (GWP-fossil) [kg CO2 eq.]: A1-A3 15.0495, A4 5.72142, C1 0.0152604, C2 0.135456, C3 0.362567, D -0.0817623
- Globales Erwärmungspotenzial - biogen (GWP-biogenic) [kg CO2 eq.]: A1-A3 0.0560724, A4 0.0158917, C1 3.60735e-6, C2 6.12122e-5, C3 -0.00518167, D -6.68405e-5
- Globales Erwärmungspotenzial - luluc (GWP-luluc) [kg CO2 eq.]: A1-A3 0.0211035, A4 0.00569324, C1 9.94962e-5, C2 0.000869935, C3 0.0014533, D -0.000373515
- Abbaupotenzial der stratosphärischen Ozonschicht (ODP) [kg CFC-11 eq.]: A1-A3 1.86036e-13, A4 3.652e-14, C1 3.96409e-18, C2 3.46596e-17, C3 1.50437e-15, D -1.05571e-15
- Versauerungspotenzial, kumulierte Überschreitung (AP) [Mole of H+ eq.]: A1-A3 0.0440837, A4 0.171388, C1 0.000205464, C2 0.000384049, C3 0.00291683, D -0.000270796
- Eutrophierungspotenzial - Süßwasser (EP-freshwater) [kg P eq.]: A1-A3 1.93038e-5, A4 5.78776e-6, C1 3.18618e-8, C2 2.78581e-7, C3 7.00937e-7, D -2.27508e-7
- Eutrophierungspotenzial - Salzwasser (EP-marine) [kg N eq.]: A1-A3 0.0101823, A4 0.0461646, C1 9.34729e-5, C2 0.000176923, C3 0.00109168, D -0.000105319
- Eutrophierungspotenzial - Land (EP-terrestrial) [Mole of N eq.]: A1-A3 0.110128, A4 0.505533, C1 0.00102775, C2 0.00197945, C3 0.0119961, D -0.00115943
- Bildungspotenzial für troposphärisches Ozon (POCP) [kg NMVOC eq.]: A1-A3 0.0297132, A4 0.127441, C1 0.00027994, C2 0.000345004, C3 0.00322104, D -0.000249103
- Potenzial für die Verknappung abiotischer Ressourcen nicht fossile Ressourcen (ADPE) [kg Sb eq.]: A1-A3 2.38966e-6, A4 6.11713e-7, C1 1.34762e-9, C2 1.17828e-8, C3 1.88136e-7, D -1.66985e-8
- Potenzial für die Verknappung abiotischer Ressourcen fossile Brennstoffe (ADPF) [MJ]: A1-A3 190.187, A4 78.1911, C1 0.205346, C2 1.79542, C3 5.66257, D -1.07873
- Wasser-Entzugspotenzial (Benutzer) (WDP) [m³ world equiv.]: A1-A3 3.53607, A4 0.0282351, C1 6.02241e-5, C2 0.000526564, C3 0.0481031, D -0.00199305

## Use advice
Der Datensatz repräsentiert ein Cradle to Gate Inventar. Er kann verwendet werden, um die Lieferkette des jeweiligen Produktes in einer repräsentativen Weise zu charakterisieren. Die Kombination mit einzelnen Einheitenprozessen und diesem Produkt ermöglicht die Erstellung von anwenderspezifischen (Produkt-) LCAs.

## Data sources
- DNV - persönliche Kommunikation zum Energieverbrauch, 2008
- Documentation of data quality management
- GaBi Database Edition 2021, CUP2021.01
- GaBi database (all versions)
