# Nutzung - 1 kWh Endenergie aus Gas Niedertemperatur (entspr. EnEV)

Dataset: ILCD process, EPD, generic dataset
Geography: DE
Reference year: 2021
Valid until: 2022
Classification: oekobau.dat: Gebäudetechnik / Nutzung / Nutzung Wärmeerzeuger (EnEV)
Owner: Sphera Solutions GmbH
Compliance: EN 15804+A2
Review: Dependent internal review by Sphera Solutions GmbH; Independent external review by GaBi user forum
Amounts: rows without a unit in brackets have none in this file; such an amount is in the reference unit of its flow, which a separate flow dataset defines
copyright: true
licenseType: Free of charge for all users and uses
accessRestrictions: The license conditions as stated on https://www.oekobaudat.de/ apply.
accessRestrictions: Es gelten die Lizenzbedingungen wie sie auf https://www.oekobaudat.de/ genannt sind.

## General comment
Dieser Datensatz wurde nach dem European Standard EN 15804+A2 für Nachhaltiges Bauen modelliert. Ergebnisse werden in Modulen abgebildet, die den strukturierten Ausdruck von Ergebnissen über den gesamten Lebenszyklus zulassen.

## Geography
Der Datensatz bildet die länderspezifische Situation in Deutschland ab. Dabei werden Haupttechnologien, spezifische regionale Charakteristiken und ggf. Importstatistiken berücksichtigt.

## Time period
Jährlicher Durchschnitt

## Technology and included processes
In diesem Datensatz ist die Erdgasgewinnung, Transporte und die Verbrennung des Erdgases inbegriffen. Da Endenergie gem. EnEV als Bezugsgröße vorgesehen ist, wurde eine Kesseleffizienz von 100% bilanziert, d.h. üblicherweise auftretende Anlagenverluste, sowie Hilfsenergie und Stromverbrauch in Bezug auf den Kesselbetrieb sind in diesem Datensatz nicht enthalten. Die Ökobilanz wird durch den Verbrennungsprozess dominiert.

## Technical purpose
Thermische Energie aus Erdgas wird für die Beheizung eines Gebäudes oder technische Prozesse (z.B. Trocknung) verwendet.

## Safety margin
0 %.

## Reference product
- Nutzung - 1 kWh Endenergie aus Gas Niedertemperatur (entspr. EnEV): 3.6

## Inputs
- Erneuerbare Primärenergie als Energieträger (PERE) [MJ]: B6 0.00949658
- Erneuerbare Primärenergie zur stofflichen Nutzung (PERM) [MJ]: B6 0
- Total erneuerbare Primärenergie (PERT) [MJ]: B6 0.00949658
- Nicht-erneuerbare Primärenergie als Energieträger (PENRE) [MJ]: B6 4.29953
- Nicht-erneuerbare Primärenergie zur stofflichen Nutzung (PENRM) [MJ]: B6 0
- Total nicht-erneuerbare Primärenergie (PENRT) [MJ]: B6 4.29953
- Einsatz von Sekundärstoffen (SM) [kg]: B6 0
- Erneuerbare Sekundärbrennstoffe (SF) [MJ]: B6 0
- Nicht erneuerbare Sekundärbrennstoffe (NRSF) [MJ]: B6 0
- Nettoeinsatz von Süßwasserressourcen (FW) [m3]: B6 1.34567e-5

## Outputs
- Gefährlicher Abfall zur Deponie (HWD) [kg]: B6 1.21733e-9
- Entsorgter nicht gefährlicher Abfall (NHWD) [kg]: B6 0.00087206
- Entsorgter radioaktiver Abfall (RWD) [kg]: B6 9.46816e-7
- Komponenten für die Wiederverwendung (CRU) [kg]: B6 0
- Stoffe zum Recycling (MFR) [kg]: B6 0
- Stoffe für die Energierückgewinnung (MER) [kg]: B6 0
- Exportierte elektrische Energie (EEE) [MJ]: B6 0
- Exportierte thermische Energie (EET) [MJ]: B6 0

## Impact indicators
- Globales Erwärmungspotenzial - total (GWP-total) [kg CO2 eq.]: B6 0.243173
- Globales Erwärmungspotenzial - fossil (GWP-fossil) [kg CO2 eq.]: B6 0.242308
- Globales Erwärmungspotenzial - biogen (GWP-biogenic) [kg CO2 eq.]: B6 0.000853919
- Globales Erwärmungspotenzial - luluc (GWP-luluc) [kg CO2 eq.]: B6 1.11637e-5
- Abbaupotenzial der stratosphärischen Ozonschicht (ODP) [kg CFC-11 eq.]: B6 1.7726e-17
- Versauerungspotenzial, kumulierte Überschreitung (AP) [Mole of H+ eq.]: B6 0.000121753
- Eutrophierungspotenzial - Süßwasser (EP-freshwater) [kg P eq.]: B6 2.41875e-8
- Eutrophierungspotenzial - Salzwasser (EP-marine) [kg N eq.]: B6 5.43534e-5
- Eutrophierungspotenzial - Land (EP-terrestrial) [Mole of N eq.]: B6 0.00059356
- Bildungspotenzial für troposphärisches Ozon (POCP) [kg NMVOC eq.]: B6 0.000156982
- Potenzial für die Verknappung abiotischer Ressourcen nicht fossile Ressourcen (ADPE) [kg Sb eq.]: B6 1.92605e-8
- Potenzial für die Verknappung abiotischer Ressourcen fossile Brennstoffe (ADPF) [MJ]: B6 4.29948
- Wasser-Entzugspotenzial (Benutzer) (WDP) [m³ world equiv.]: B6 0.000138474

## Use advice
Dieser Datensatz bezieht sich auf die Gewinnung von 1 kWh thermischer Energie aus Erdgas Niedertemperatur. Der Datensatz ist für die Verwendung von Endenergie gem. EnEV als Bezugsgröße vorgesehen. Bei der Berechnung der Endenergie gem. EnEV werden Anlagenverluste und Anlageneffizienz, sowie Hilfsenergie und Stromverbrauch bereits berücksichtigt, weshalb Sie in diesem Datensatz nicht einberechnet sind. Der Verbrennungsprozess ist entsprechend mit 100% Wirkungsgrad bilanziert. Zur Berechnung der Ökobilanzergebnisse auf Gebäudeebene müssen die Indikatorergebnisse mit dem Endenergiebedarf gem. EnEV multipliziert werden.
Anmerkung: die Brennwert Technologie weist höhere Methan Emissionen als die Niedertemperatur Technologie auf. Bei gleicher Effizienz ergibt sich daraus für die Niedertemperatur Technologie ein geringfügig niedrigeres Treibhauspotential im Vergleich zur Brennwert Technologie.

## Data sources
- DIN 2003
- DIN 2007
- PFEIFFER 2000
- GaBi database (all versions)
- Documentation of data quality management
- GaBi Database Edition 2021, CUP2021.01
