# Kunststoffteil aus laminiertem Polyesterharz (GFK, 30% Glasfaseranteil)

Dataset: ILCD process, EPD, generic dataset
Geography: DE
Reference year: 2018
Valid until: 2022
Classification: oekobau.dat: Kunststoffe / Profile / Kunststoffprofile hart
Owner: thinkstep
Compliance: DIN EN 15804
Review: Dependent internal review by thinkstep, IABP-GaBi, IBP-GaBi; Independent external review by GaBi user forum, GaBi bug forum, GaBi user community
Amounts: rows without a unit in brackets have none in this file; such an amount is in the reference unit of its flow, which a separate flow dataset defines
copyright: true

## General comment
Dieser Datensatz wurde nach dem European Standard EN 15804 für Nachhaltiges Bauen modelliert. Ergebnisse werden in Modulen abgebildet, die den strukturierten Ausdruck von Ergebnissen über den gesamten Lebenszyklus zulassen.

## Geography
Der Datensatz bildet die länderspezifische Situation in Deutschland ab. Dabei werden Haupttechnologien, spezifische regionale Charakteristiken und ggf. Importstatistiken berücksichtigt.

## Time period
Jährlicher Durchschnitt

## Technology and included processes
Für die Herstellung der GFK werden die Fasern lose oder
zu Geweben verbunden mit EP getränkt und gehärtet. Anschliessend kann eine weitere Lage Fasern aufgebracht, getränkt und gehärtet werden. Der
faserverstärkte Kunststoff wird so Schicht um Schicht aufgebaut. Dieser Aufbau
kann maschinell oder von Hand (Handlaminieren) erfolgen. Das Harz zeigt dabei signifikanten Einfluss auf die Ökobilanz. Die Herstellung von Formen zur Herstellung komplexer Geometrien wurde nicht berücksichtigt.

Hintergrundsystem:
Strom: Die Stromerzeugung wird entsprechend der länderspezifischen Randbedingungen modelliert. Die landesspezifische Analyse beinhaltet:
1.: Spezifische Kraftwerke der verschiedenen fossilen Energieträger und der Einsatz erneuerbarer Energien sind entsprechend der länderspezifischen Energieträgermixe modelliert. Die Analyse bezieht Stromimporte aus den Nachbarländern, Transmissions-und Verteilungsverluste und den Eigenverbrauch im Kraftwerk und bei der Verteilung bzw. Speicherung, z. B. durch Pumpspeicherwerke, ein.
2.: Die landes-/regionalspezifischen Technologiestandards sowie die Erzeugung in Elektrizitätskraftwerken und/oder in speziellen Kraftwerken mit Kraft-Wärme-Kopplung (KWK) sind berücksichtigt.
3.: Die länderspezifische Energieträgerbereitstellung (mit Anteil der Importe und/oder Eigenversorgung) einschließlich der Energieträger-Eigenschaften (z. B. Elementar- und Energiegehalte) werden berücksichtigt.
4.: Die Förderung, Produktion, Verarbeitung und Transportprozesse werden entsprechend der Situation im jeweiligen Stromerzeugerland modelliert. Die unterschiedlichen Produktions- und Verarbeitungsverfahren (Emissionen und Wirkungsgrade) in den verschiedenen Energieerzeugerländern werden einbezogen, z. B. Rohöl-Veredelungsverfahren oder Abfackel-Raten an den Ölplattformen.
Thermische Energie, Prozessdampf: Die Erzeugung von Dampf und thermischer Energie in Heizkraftwerken wird entsprechend der landesspezifischen Situation (Emissionsgrenzwerte, Energieträgerbasis) modelliert.
Der Wirkungsgrad für die thermische Energieerzeugung beträgt per Definition 100% des Energieträgereinsatzes. Für Prozessdampf liegt der Wirkungsgrad im Bereich von 85-95%. Die zur Heizenergie-Erzeugung verwendeten Energieträger werden entsprechend der nationalen Situation modelliert (siehe Kapitel Strom oben).
Transporte: Alle relevanten und bekannten Transportprozesse in Form von See- und Binnenschiffsverkehr sowie Bahn-, Lkw- und der Leitungstransport sind enthalten.
Energieträger: Die Energieträger werden entsprechend der spezifischen Versorgungslage modelliert (siehe Kapitel Strom oben).
Raffinerieprodukte: Diesel, Benzin, technische Gase, Heizöl, Schmierstoffe und Rückstände, wie Bitumen, werden mit einem parametrierten länderspezifische Raffineriemodell modelliert. Das Raffinerie-Modell bezieht die länderspezifischen Veredelungsverfahren (z. B. Emissionspegel, interner Energieverbrauch etc.) und das länderspezifische Produktspektrum ein, das sich je nach Land stark unterscheiden kann. Die Rohöl-Förderung wird gemäß der länderspezifischen Situation mit den jeweiligen Energieträger-Eigenschaften modelliert.

## Technical purpose
GFK wird unter anderem im Brückenbau, bei Fassadenkonstruktionen, Schachtabdeckungen oder Kabelkanälen verwendet. Wesentliche Eigenschaften sind: hohe Druck-, Schlag- und Tragfestigkeit, geringe Wärmeleitfähigkeit und Gewicht, sowie sehr gute chemische Beständigkeit.

## Safety margin
20 %. Produktsystem bis auf wenige Prozesse/Flüsse abgebildet. Technologische, zeitliche und geographische Repräsentativität teilweise gegeben.

## Reference product
- Kunststoffteil aus laminiertem Polyesterharz: 1

## Inputs
- Erneuerbare Primärenergie als Energieträger (PERE) [MJ]: A1-A3 4.55251, C1 0, C2 0.00152544, C3 0.202279, D -3.09269
- Erneuerbare Primärenergie zur stofflichen Nutzung (PERM) [MJ]: A1-A3 0, C1 0, C2 0, C3 0, D 0
- Total erneuerbare Primärenergie (PERT) [MJ]: A1-A3 4.55251, C1 0, C2 0.00152544, C3 0.202279, D -3.09269
- Nicht-erneuerbare Primärenergie als Energieträger (PENRE) [MJ]: A1-A3 84.5406, C1 0, C2 0.0262031, C3 0.758537, D -10.7945
- Nicht-erneuerbare Primärenergie zur stofflichen Nutzung (PENRM) [MJ]: A1-A3 0, C1 0, C2 0, C3 0, D 0
- Total nicht erneuerbare Primärenergie (PENRT) [MJ]: A1-A3 84.5406, C1 0, C2 0.0262031, C3 0.758537, D -10.7945
- Einsatz von Sekundärstoffen (SM) [kg]: A1-A3 0, C1 0, C2 0, C3 0, D 0
- Erneuerbare Sekundärbrennstoffe (RSF) [MJ]: A1-A3 0, C1 0, C2 0, C3 0, D 0
- Nicht erneuerbare Sekundärbrennstoffe (NRSF) [MJ]: A1-A3 0, C1 0, C2 0, C3 0, D 0
- Einsatz von Süßwasserressourcen (FW) [m3]: A1-A3 0.0136524, C1 0, C2 1.36616e-6, C3 0.00392232, D -0.00144262

## Outputs
- Gefährlicher Abfall zur Deponie (HWD) [kg]: A1-A3 2.68192e-8, C1 0, C2 9.79183e-10, C3 2.84004e-9, D -5.70948e-9
- Entsorgter nicht gefährlicher Abfall (NHWD) [kg]: A1-A3 0.142642, C1 0, C2 4.5991e-6, C3 0.166316, D -0.00508419
- Entsorgter radioaktiver Abfall (RWD) [kg]: A1-A3 0.000653767, C1 0, C2 2.75865e-8, C3 2.8891e-5, D -0.000373646
- Komponenten für die Wiederverwendung (CRU) [kg]: A1-A3 0, C1 0, C2 0, C3 0, D 0
- Stoffe zum Recycling (MFR) [kg]: A1-A3 0, C1 0, C2 0, C3 0, D 0
- Stoffe für die Energierückgewinnung (MER) [kg]: A1-A3 0, C1 0.84, C2 0, C3 0, D 0
- Exportierte elektrische Energie (EEE) [MJ]: A1-A3 0, C1 0, C2 0, C3 2.96562, D 0
- Exportierte thermische Energie (EET) [MJ]: A1-A3 0, C1 0, C2 0, C3 6.80884, D 0

## Impact indicators
- Globales Erwärmungspotenzial (GWP) [kg CO2 Äquiv.]: A1-A3 3.73108, C1 0, C2 0.00194954, C3 1.59357, D -0.737851
- Abbaupotenzial der stratosphärischen Ozonschicht (ODP) [kg R11 Äquiv.]: A1-A3 2.52427e-14, C1 0, C2 6.45307e-19, C3 1.12943e-15, D -1.71013e-14
- Versauerungspotential (AP) [kg SO2 Äquiv.]: A1-A3 0.00714906, C1 0, C2 3.93787e-6, C3 0.000178284, D -0.000623298
- Eutrophierungspotential (EP) [kg Phosphat Äquiv.]: A1-A3 0.000679417, C1 0, C2 9.3614e-7, C3 3.96864e-5, D -0.000118128
- Bildungspotenzial für troposphärisches Ozon (POCP) [kg Ethen Äquiv.]: A1-A3 0.000637975, C1 0, C2 -1.17978e-6, C3 1.65144e-5, D -6.34634e-5
- Potenzial für den abiotischen Abbau nicht fossiler Ressourcen (ADPE) [kg Sb Äquiv.]: A1-A3 5.49328e-7, C1 0, C2 1.64056e-10, C3 1.17344e-8, D -1.83531e-7
- Potenzial für den abiotischen Abbau fossiler Brennstoffe (ADPF) [MJ]: A1-A3 82.89, C1 0, C2 0.0261326, C3 0.685607, D -9.85125

## Use advice
Dieser Datensatz bezieht sich auf die Herstellung von 1 kg Kunststoffteil aus laminiertem Polyesterharz mit einem Glasfaseranteil von 30% (GFK). Die Rohdichte beträgt 1400 kg/m³. Der Datensatz kann näherungsweise für die Abschätzung von laminierten Teilen aus Polyesterharz mit einem höheren Faseranteil verwendet werden (worst-case Abschätzung). Für niedrigere Faseranteile kann der Datensatz nicht skaliert werden.

Der Datensatz repräsentiert ein Cradle to Gate Inventar. Er kann verwendet werden, um die Lieferkette des jeweiligen Produktes in einer repräsentativen Weise zu charakterisieren. Die Kombination mit einzelnen Einheitenprozessen und diesem Produkt ermöglicht die Erstellung von anwenderspezifischen (Produkt-) LCAs

## Data sources
- GaBi databases
- GaBi Database Edition 2020, SP40
- GaBi database (all versions)
