# Zellulose-Einblasdämmung STEICOfloc und STEICOfloc NB

Dataset: ILCD process, EPD, average dataset
Geography: RER
Reference year: 2021
Valid until: 2026
Classification: OEKOBAU.DAT: Dämmstoffe / Zellulosefaser / Zellulose-Einblas-Dämmstoff
Classification: IBUCategories: 02 Bauprodukte / Wärmedämmungsprodukte / Einblasdämmstoffe aus Zellulose- und Holzfasern
Method details: Einblasdämmstoffe aus Zellulose- und Holzfasern.pdf
Generated by: Thünen-Institut für Holzforschung
Registration number: EPD-STE-20210139-IBC1-DE
Owner: STEICO SE
Compliance: DIN EN 15804; ISO 14025
Review: Accredited third party review by Institut Bauen und Umwelt e. V.
Amounts: rows without a unit in brackets have none in this file; such an amount is in the reference unit of its flow, which a separate flow dataset defines
copyright: true
licenseType: Free of charge for all users and uses
accessRestrictions: None

## General comment
STEICOfloc ist eine lose Zellulose-Einblasdämmung

aus natürlicher Zellulosefaser und ist als STEICOfloc NB auch in einer borfreien Variante erhältlich.

Die Produkte dienen zur Dämmung von Hohlräumen aller Größen und Dicken bei schneller maschineller Verarbeitung, das Ergebnis ist fugen- und verschnittfrei. Ferner kann STEICOfloc auch offen aufgeblasen zur Dämmung der obersten Geschossdecke eingesetzt werden.

STEICO Einblasdämmung eignet sich sowohl für Einzelobjekte als auch für die Vorfertigung. Durch besonders lange Papierfasern kann bei vergleichsweise geringem Materialeinsatz eine dauerhafte Setzungssicherheit schon ab einer Rohdichte von 38 kg pro Kubikmeter erzielt werden.

## Technology and included processes
STEICOfloc / STEICOfloc NB wird aus sortiertem Altpapier mittels einer modernen Wirbelstrommühle in folgenden Schritten hergestellt: Rohstofflager und Wareneingangskontrolle Auflockern der gepressten Altpapierballen inkl. Mischung für hochwertige, homogene Qualität Visuelle Kontrolle der Qualität und Beseitigung von Verunreinigungen Grobe Vorzerkleinerung des Altpapiers im Schredder Wirbelstrommühle: Auffaserung des Rohmaterials zur hochwertigen Zellulosefaser Zusatz von Brandschutzmitteln – sowohl für Standardqualität (STEICOfloc) wie auch für die borfreie Variante (STEICOfloc NB) Vollautomatische Absackanlage Vollautomatische Palettierung Alle während der Produktion anfallenden Reststoffe werden intern einer energetischen Verwertung zugeführt. Systeme zur Gütesicherung: Qualitätsmanagementsystem nach ISO 9001 Umweltmanagementsystem nach ISO 14001 CE Kennzeichnung nach ETA-16/0141, MPA Nordrhein-Westfalen, D FSC Zertifikat CU-COC-841217 PEFC Zertifikat CU-PEFC-841217
Technische Daten:
Die folgenden Angaben beziehen sich auf das Produkt

STEICOfloc / STEICOfloc NB im Auslieferungszustand.
Deklarierte Einheit:
Die deklarierte Einheit ist 1 kg Einblasdämmstoff aus Zellulose. Die vorliegende EPD beschreibt einen produktionsmassengewichteten Durchschnitt von im Werk hergestellten Zellulose-Einblasdämmstoffen, die sich lediglich in der Zusammensetzung des Flammschutzmittels unterscheiden

Hinweis: für die Bilanzierung auf Gebäudeebene sind je nach Anwendungsfall unterschiedliche Dichten anzunehmen (s. 2.4 Technische Daten).

Es handelt sich gemäß des Punktes 5.2.1c aus PCR Teil A um eine „Deklaration eines durchschnittlichen Produkts aus einem Werk eines Herstellers“.

## Technical purpose
STEICOfloc / STEICOfloc NB eignet sich sowohl als Dämmstoff für die industrielle Vorfertigung (z. B. von kompletten Wandelementen) als auch für Sanierungsarbeiten von Neubau, Altbau, Fachwerk und Holzbau. Zur Erzeugung der Dämmschicht wird das Fasermaterial unter hohem Druck in die geschlossenen Gefache eingeblasen. Das Material passt sich dort exakt den begrenzenden Bauteilen an und füllt sämtliche Hohlräume vollständig aus. Auch Installationselemente in den Gefachen werden beim Einblasen ohne langwierige Handarbeit exakt umschlossen. Somit spielt es keine Rolle, ob die Gefache auf gängige Dämmstoffgrößen abgestimmt sind, mit STEICOfloc / STEICOfloc NB wird eine homogene und fugenfreie Füllung selbst bei kompliziertesten Konstruktionen erreicht.

Neben der Einblasdämmung lässt sich STEICOfloc / STEICOfloc NB auch als Aufblasdämmung verwenden. Das Aufblasverfahren kommt zum Einsatz, wenn STEICOfloc / STEICOfloc NB als freiliegender Wärmedämmstoff auf horizontalen, gewölbten oder mäßig geneigten Flächen zwischen Bindern oder Balken von Dachstühlen aufgeblasen wird.

## Reference product
- STEICOfloc und STEICOfloc NB (): 1

## Inputs
- Erneuerbare Primärenergie als Energieträger (PERE) [MJ]: A1 0.049737, A2 0.0305062, A3 0.334548, A5 0.012742, C2 0.00225642, C3 0.106689, D -2.34016
- Erneuerbare Primärenergie zur stofflichen Nutzung (PERM) [MJ]: A1 0, A2 0, A3 1.37836, A5 -1.37836, C2 0, C3 0, D 0
- Total erneuerbare Primärenergie (PERT) [MJ]: A1 0.049737, A2 0.0305062, A3 1.71291, A5 -1.36562, C2 0.00225642, C3 0.106689, D -2.34016
- Nicht-erneuerbare Primärenergie als Energieträger (PENRE) [MJ]: A1 0.786593, A2 0.543245, A3 1.99505, A5 0.668698, C2 0.0401815, C3 0.484326, D -9.24758
- Nicht-erneuerbare Primärenergie zur stofflichen Nutzung (PENRM) [MJ]: A1 0, A2 0, A3 0.6066, A5 -0.6066, C2 0, C3 0, D 0
- Total nicht erneuerbare Primärenergie (PENRT) [MJ]: A1 0.786593, A2 0.543245, A3 2.60165, A5 0.0620983, C2 0.0401815, C3 0.484326, D -9.24758
- Einsatz von Sekundärstoffen (SM) [kg]: A1 0.92, A2 0, A3 0, A5 0, C2 0, C3 0, D 0
- Erneuerbare Sekundärbrennstoffe (RSF) [MJ]: A1 0, A2 0, A3 0, A5 0, C2 0, C3 0, D 0
- Nicht erneuerbare Sekundärbrennstoffe (NRSF) [MJ]: A1 0, A2 0, A3 0, A5 0, C2 0, C3 0, D 0
- Einsatz von Süßwasserressourcen (FW) [m^3]: A1 0.000169769, A2 3.53241e-5, A3 0.00153001, A5 0.000543666, C2 2.61277e-6, C3 0.00412016, D -1.27671

## Outputs
- Gefährlicher Abfall zur Deponie (HWD) [kg]: A1 1.39005e-9, A2 2.52809e-8, A3 7.87691e-9, A5 2.08039e-10, C2 1.86992e-9, C3 7.60548e-10, D -4.86754e-9
- Entsorgter nicht gefährlicher Abfall (NHWD) [kg]: A1 0.0289204, A2 8.31372e-5, A3 0.00136966, A5 0.0053146, C2 6.1493e-6, C3 0.0298441, D -0.00437867
- Entsorgter radioaktiver Abfall (RWD) [kg]: A1 1.01068e-5, A2 6.72394e-7, A3 3.33402e-5, A5 2.02039e-6, C2 4.97341e-8, C3 1.54179e-5, D -0.000339411
- Komponenten für die Wiederverwendung (CRU) [kg]: A1 0, A2 0, A3 0, A5 0, C2 0, C3 0, D 0
- Stoffe zum Recycling (MFR) [kg]: A1 0, A2 0, A3 0, A5 0, C2 0, C3 0, D 0
- Stoffe für die Energierückgewinnung (MER) [kg]: A1 0, A2 0, A3 0, A5 0, C2 0, C3 0, D 0
- Exportierte elektrische Energie (EEE) [MJ]: A1 0, A2 0, A3 0, A5 0.314846, C2 0, C3 1.74622, D 0
- Exportierte thermische Energie (EET) [MJ]: A1 0, A2 0, A3 0, A5 0.68757, C2 0, C3 4.0723, D 0

## Impact indicators
- Globales Erwärmungspotenzial (GWP) [kg CO_(2)-Äq.]: A1 -1.4586, A2 0.0392312, A3 0.097456, A5 0.17651, C2 0.00290176, C3 1.55837, D -0.635554
- Abbau Potential der stratosphärischen Ozonschicht (ODP) [kg CFC11-Äq.]: A1 2.60556e-16, A2 6.5305e-18, A3 1.86946e-15, A5 6.88633e-17, C2 4.83033e-19, C3 6.02841e-16, D -1.33177e-14
- Versauerungspotenzial von Boden und Wasser (AP) [kg SO_(2)-Äq.]: A1 0.000348884, A2 0.000164376, A3 0.000428738, A5 3.19946e-5, C2 1.21582e-5, C3 0.000322279, D -0.000606488
- Eutrophierungspotenzial (EP) [kg PO_(4)^(3)-Äq.]: A1 4.90721e-5, A2 4.13517e-5, A3 6.2938e-5, A5 5.75253e-6, C2 3.0586e-6, C3 6.51626e-5, D -0.000108083
- Bildungspotential für troposphärisches Ozon (POCP) [kg Ethen-Äq.]: A1 1.892e-5, A2 -6.91261e-5, A3 0.000203503, A5 1.49822e-6, C2 -5.11296e-6, C3 1.97137e-5, D -5.46223e-5
- Potenzial für den abiotischen Abbau nicht fossiler Ressourcen (ADPE) [kg Sb-Äq.]: A1 2.8002e-5, A2 3.30344e-9, A3 5.16137e-8, A5 5.09157e-9, C2 2.44341e-10, C3 4.61884e-8, D -1.51641e-7
- Potenzial für den abiotischen Abbau fossiler Brennstoffe (ADPF) [MJ]: A1 0.759427, A2 0.541528, A3 2.51775, A5 0.0570003, C2 0.0400545, C3 0.445406, D -8.39082

## Use advice
Gültigkeitsbereich:
Diese Umwelt-Produktdeklaration gilt für die Zellulose-Einblasdämmung STEICOfloc und STEICOfloc NB, welche in folgendem Werk hergestellt wird:
STEICO Sp. z o.o.
ul. Przemysłowa 2
64700
Czarnków
Systemgrenze:
Der Deklarationstyp entspricht einer EPD „Wiege bis Werkstor – mit Optionen“. Inhalte sind das Stadium der Produktion, d. h. von der Bereitstellung der Rohstoffe bis zum Werkstor der Produktion („cradle-to-gate", Module A1 bis A3), sowie das Modul A5 und Teile des Endes des Lebensweges (Modul C2 und C3). Darüber hinaus erfolgt eine Betrachtung der potenziellen Nutzen und Lasten über den Lebensweg des Produktes hinaus (Modul D).

Das Modul A1 umfasst die Bereitstellung des Altpapiers sowie die Bereitstellung der Zusatzstoffe. Der Rohstoff Altpapier ist ein Sekundärmaterial und steht somit lastenfrei zur Verfügung. Die Transporte der Roh- und Zusatzstoffe werden in Modul A2 berücksichtigt. Modul A3 beinhaltet die Aufwendungen der Herstellung des Produktes, wie die Bereitstellung von Energie und Betriebsmitteln, sowie die Verpackung des Produktes.

In Modul A5 wird ausschließlich die Entsorgung der Produktverpackung abgedeckt, welche den Ausgang des enthaltenen biogenen Kohlenstoffs sowie der enthaltenen Primärenergie (PERM und PENRM) einschließt.

Modul C2 berücksichtigt den Transport zum Entsorger und in Modul C3 wird die thermische Verwertung des Produktes am Ende seines Lebenswegs bilanziert.

Modul D beinhaltet die daraus resultierenden potenziellen Nutzen und Lasten in Form einer Systemerweiterung.

## Data sources
- GaBi Database (all versions)
- GaBi database SP40 2020
