# Stahl Schmiedebauteil; steel forged part

Dataset: ILCD process, EPD, generic dataset
Geography: DE
Reference year: 2018
Valid until: 2022
Classification: oekobau.dat: Metalle / Stahl und Eisen / Guss- und Schmiedeteile aus Stahl und Eisen
Owner: thinkstep
Compliance: DIN EN 15804
Review: Dependent internal review by thinkstep, IABP-GaBi, IBP-GaBi; Independent external review by GaBi user forum, GaBi bug forum, GaBi user community
Amounts: rows without a unit in brackets have none in this file; such an amount is in the reference unit of its flow, which a separate flow dataset defines
copyright: true

## General comment
Dieser Datensatz wurde nach dem European Standard EN 15804 für Nachhaltiges Bauen modelliert. Ergebnisse werden in Modulen abgebildet, die den strukturierten Ausdruck von Ergebnissen über den gesamten Lebenszyklus zulassen.

## Geography
Der Datensatz bildet die länderspezifische Situation in Deutschland ab. Dabei werden Haupttechnologien, spezifische regionale Charakteristiken und ggf. Importstatistiken berücksichtigt.

## Time period
Jährlicher Durchschnitt

## Technology and included processes
Die Daten bilden die Stahlproduktion in Deutschland ab und basieren auf den Hauptproduktionsschritten, die auf einem integrierten Hütten-/Stahlwerk beruhen. Diese Produktionsschritte sowie die hauptsächlich vorgelagerten Produktionsschritte werden nachfolgend beschrieben. Die Hauptprimärprodukte sind Eisenerz, Pellets & Steinkohle. Der Eisenzerz und Pellets betreffende Import-Mix der deutschen Stahlherstellung stammt aus: Kanada 50 %, Brasilien 25 %, Australien 25 %. Der Import-Mix der deutschen Stahlindustrie bzgl. Steinkohle: 100 % Kanada. Der Eisenerz-Abbau wird detailliert in der entsprechenden Dokumentationsdatei erläutert (siehe unten stehenden Link). Die Vorbereitung des Eisenerzes beinhaltet hauptsächlich die Zerkleinerung. Der durchschnittliche Eisenanteil im Eisenerz beträgt 60 %. Pellets sind kleine kristallisierte Eisenerzkugeln. Der Pelletierungs-Prozess besteht aus Mahlen und Trocknen, Zusammenpressen und Härtung, gefolgt von Sieben und Transport. Die Beschaffung von Steinkohle wird in der entsprechenden Dokumentationsdatei erläutert (siehe unten stehenden Link.) Für jeden Teil wird der Transport nach Deutschland im Datensatz berücksichtigt. Der Transport umschließt alle notwendigen Transportmittel wie Schiffe und Züge, wo diese erforderlich sind. Der Koksofen erzeugt als Hauptprodukt Koks aus Steinkohle. Das primäre Nebenprodukt, das aus dieser Operation entsteht, ist Koksofengas, das als Energieträger in der Stahlproduktion genutzt wird. Weitere Nebenprodukte wie Teer, Benzol und Schwefel werden verkauft und sollten folglich aus dem System durch Zuordnung zum Nettoheizwert ausgeschlossen werden. In der Sinteranlage wird Sinterbeschickung erzeugt, die auf den Hauptinputs Koks, Eisenerz und Zusatzstoffe basiert. Das Sintern/Der Sinterprozess ist ein Anhäufungsvorgang, der bei hohen Temperaturen stattfindet. Das Rohmaterial (feines Eisenerz, Koksgrus, Zusatzstoffe) werden vermengt, wonach der Koksgrus entflammt wird). Das Ergebnis des Sinterns ist der sogenannte Sinterkuchen, der aufgebrochen, gesiebt und abgekühlt werden muss. Der Hochofen stellt ein geschlossenes System dar, in das kontinuierlich in den oberen Ofenschacht durch das Ladeeinrichtung eisenhaltige Materialien (Eisenzerzklumpen, Sinter und/oder Pellets), Zusatzstoffe (Schlackebildner wie z. B. Kalkstein) und Reduktionsmittel eingeführt werden. Heiße Luft, angereichert mit Sauerstoff und zusätzlichen Reduktionsmitteln (z.B. Kohlenstaub). Der Druckluftstrom reagiert mit den Reduktionsmitteln hauptsächlich Kohlenmonoxid, die wiederum reduziert Eisenoxide zu metallischem Eisen zu produzieren. Der Luftstoß reagiert mit den Reduktionsmitteln und produziert hauptsächlich Kohlenmonoxid, das wiederum Eisenoxide zu metallischem Eisen reduziert. Die wichtigsten Produkte des Hochofenbetriebs sind Roheisen, Hochofengas und Hochofenschlacke (Hochofenschlacke). Das Hochofen-Gas wird als Brennstoff zur Beheizung, vergleichbar mit dem Koksofengas, oder zur Stromerzeugung genutzt.
Das Ziel des Sauerstoffblasverfahrens ist es, die unerwünschten im metallischen Rohstoff enthaltenen Verunreinigungen zu verbrennen, d. h. zu oxidieren. Die wichtigsten Elemente, die so in Oxide umgewandelt werden, sind Kohlenstoff, Silizium, Mangan, Phosphor und Schwefel. Der Zweck dieses Oxidationsverfahrens ist es, den Kohlenstoffgehalt auf ein bestimmtes Niveau zu reduzieren, um den Inhalt der erwünschten Fremdelemente anzupassen und die unerwünschten Verunreinigungen weitestgehend zu entfernen. Die Stahlherstellung durch den Sauerstoffaufblaskonverter-Prozess ist ein unterbrochenes Verfahren, das folgende Schritte beinhaltet: Übertragung und Lagerung heißen Metalls, Vorbehandlung von Roheisen (Entschwefelung), Oxidation im Sauerstoffausblaskonverter (Entkohlung und Oxidation der Verunreinigungen) und sekundärmetallurgischen Behandlung (z. B. Vakuumbehandlung und Zugabe von Legierungselementen). Im Hauptschritt des Sauerstoffblasverfahrens speist das heiße Metall gemeinsam mit Stahlschrott den Konverter. Die wichtigsten Produkte des Wandlers sind der flüssige Stahl, das Konvertergas oder Sauerstoff-Ofengas und die Blasstahlkonverter-Schlacke. Das Gas wird als ebenfalls als Energieträger in der Stahlproduktion verwendet. Danach erfolgt das Stranggießen, wobei der flüssige Stahl in einem kontinuierlichen Strang gegossen wird. Der Output des kontinuierlichen Gießprozesses ist die Bramme. Die folgenden Funktionen sind zwei Walzverfahren: das Warmbandwalzwerk und das Kaltwalzwerk. Im Warmwalzwerk wird die Platte oberhalb der Rekristallisationstemperatur verformt. Die in diesem Verfahren erhaltenen Eigenschaften sind z. B. Festigkeit und Oberflächenqualität. Während des fortlaufenden Walzprozesses durchläuft das Material den Ofen und die Walzlinie. Im Ofen wird das Metall durch Erdgas vorgewärmt. Es besteht keine Notwendigkeit für eine zusätzliche Erwärmung, wenn die heißen Platten direkt in das Walzwerk geladen werden. Das Formen wird in verschiedenen Walzrahmen vorgenommen, bis die endgültige Form erreicht wird. Stahlschrott aus diesem Prozess wird direkt recycelt. Im Kaltwalzwerk wird das Material unterhalb der Rekristallisationstemperatur verformt. Dadurch werden eine verbesserte Oberflächenqualität, eine verbesserte Maßgenauigkeit sowie eine höhere Festigkeit erzielt. Die verschiedenen Verfahrensschritte sind: Beizen, die Walzlinie und der Wärmebehandlung. Das kaltgewalzte Blech wird zum Feuerverzinken weitergeleitet. Die Zinkbeschichtung wird durch Eintauchen des Stahlblechs in ein heißes Zinkbad bewerkstelligt. Während der Feuerverzinkung durchläuft das kalt gewalzte Stahlblech die folgenden Prozessschritte: Vorwärmofen (die organischen Verunreinigungen werden abgebrannt), Reduktionszone (die Folie wird erhitzt, um eine Rekristallisation auszulösen), Kühlung und Homogenisierung sowie Metallbad (Beschichtung der Folie) und Fertiggerüst.

Bei den Recyclingpropzessen dieses Datensatzes wurden 5% Verluste angenommen, die deponiert werden (s. Werte in Modul C4). Die restlichen 95% werden stofflich recycled (siehe Gutschriften in Modul D).

Hintergrundsystem:

Strom: Die Stromerzeugung wird entsprechend der länderspezifischen Randbedingungen modelliert. Die landesspezifische Analyse beinhaltet:
1.: Spezifische Kraftwerke der verschiedenen fossilen Energieträger und der Einsatz erneuerbarer Energien sind entsprechend der länderspezifischen Energieträgermixe modelliert. Die Analyse bezieht Stromimporte aus den Nachbarländern, Transmissions-und Verteilungsverluste und den Eigenverbrauch im Kraftwerk und bei der Verteilung bzw. Speicherung, z. B. durch Pumpspeicherwerke, ein.
2.: Die landes-/regionalspezifischen Technologiestandards sowie die Erzeugung in Elektrizitätskraftwerken und/oder in speziellen Kraftwerken mit Kraft-Wärme-Kopplung (KWK) sind berücksichtigt.
3.: Die länderspezifische Energieträgerbereitstellung (mit Anteil der Importe und/oder Eigenversorgung) einschließlich der Energieträger-Eigenschaften (z. B. Elementar- und Energiegehalte) werden berücksichtigt.
4.: Die Förderung, Produktion, Verarbeitung und Transportprozesse werden entsprechend der Situation im jeweiligen Stromerzeugerland modelliert. Die unterschiedlichen Produktions- und Verarbeitungsverfahren (Emissionen und Wirkungsgrade) in den verschiedenen Energieerzeugerländern werden einbezogen, z. B. Rohöl-Veredelungsverfahren oder Abfackel-Raten an den Ölplattformen.
Thermische Energie, Prozessdampf: Die Erzeugung von Dampf und thermischer Energie in Heizkraftwerken wird entsprechend der landesspezifischen Situation (Emissionsgrenzwerte, Energieträgerbasis) modelliert.
Der Wirkungsgrad für die thermische Energieerzeugung beträgt per Definition 100% des Energieträgereinsatzes. Für Prozessdampf liegt der Wirkungsgrad im Bereich von 85-95%. Die zur Heizenergie-Erzeugung verwendeten Energieträger werden entsprechend der nationalen Situation modelliert (siehe Kapitel Strom oben).
Transporte: Alle relevanten und bekannten Transportprozesse in Form von See- und Binnenschiffsverkehr sowie Bahn-, Lkw- und der Leitungstransport sind enthalten.
Energieträger: Die Energieträger werden entsprechend der spezifischen Versorgungslage modelliert (siehe Kapitel Strom oben).
Raffinerieprodukte: Diesel, Benzin, technische Gase, Heizöl, Schmierstoffe und Rückstände, wie Bitumen, werden mit einem parametrierten länderspezifische Raffineriemodell modelliert. Das Raffinerie-Modell bezieht die länderspezifischen Veredelungsverfahren (z. B. Emissionspegel, interner Energieverbrauch etc.) und das länderspezifische Produktspektrum ein, das sich je nach Land stark unterscheiden kann. Die Rohöl-Förderung wird gemäß der länderspezifischen Situation mit den jeweiligen Energieträger-Eigenschaften modelliert.
"

## Technical purpose
Dieses Produkt kann im Baubereich verwendet werden.

## Safety margin
20 %. Produktsystem bis auf wenige Prozesse/Flüsse abgebildet. Technologische, zeitliche und geographische Repräsentativität teilweise gegeben.

## Reference product
- Stahl Schmiedebauteil (St): 1

## Inputs
- Erneuerbare Primärenergie als Energieträger (PERE) [MJ]: A1-A3 4.11969, C1 0.000566453, C2 0.0021792, D 1.31074
- Erneuerbare Primärenergie zur stofflichen Nutzung (PERM) [MJ]: A1-A3 0, C1 0, C2 0, D 0
- Total erneuerbare Primärenergie (PERT) [MJ]: A1-A3 4.11969, C1 0.000566453, C2 0.0021792, D 1.31074
- Nicht-erneuerbare Primärenergie als Energieträger (PENRE) [MJ]: A1-A3 25.3985, C1 0.0097302, C2 0.037433, D -11.4874
- Nicht-erneuerbare Primärenergie zur stofflichen Nutzung (PENRM) [MJ]: A1-A3 0, C1 0, C2 0, D 0
- Total nicht erneuerbare Primärenergie (PENRT) [MJ]: A1-A3 25.3985, C1 0.0097302, C2 0.037433, D -11.4874
- Einsatz von Sekundärstoffen (SM) [kg]: A1-A3 0.2436, C1 0, C2 0, D 0
- Erneuerbare Sekundärbrennstoffe (RSF) [MJ]: A1-A3 0, C1 0, C2 0, D 0
- Nicht erneuerbare Sekundärbrennstoffe (NRSF) [MJ]: A1-A3 0, C1 0, C2 0, D 0
- Einsatz von Süßwasserressourcen (FW) [m3]: A1-A3 0.00468042, C1 5.07306e-7, C2 1.95166e-6, D -0.00103481

## Outputs
- Gefährlicher Abfall zur Deponie (HWD) [kg]: A1-A3 2.30589e-8, C1 3.63607e-10, C2 1.39883e-9, D -9.72927e-9
- Entsorgter nicht gefährlicher Abfall (NHWD) [kg]: A1-A3 0.0318935, C1 1.70782e-6, C2 6.57015e-6, D -0.0218772
- Entsorgter radioaktiver Abfall (RWD) [kg]: A1-A3 0.000499807, C1 1.02439e-8, C2 3.94093e-8, D 0.000208436
- Komponenten für die Wiederverwendung (CRU) [kg]: A1-A3 0, C1 0, C2 0, D 0
- Stoffe zum Recycling (MFR) [kg]: A1-A3 0, C1 1.2, C2 0, D 0
- Stoffe für die Energierückgewinnung (MER) [kg]: A1-A3 0, C1 0, C2 0, D 0
- Exportierte elektrische Energie (EEE) [MJ]: A1-A3 0, C1 0, C2 0, D 0
- Exportierte thermische Energie (EET) [MJ]: A1-A3 0, C1 0, C2 0, D 0

## Impact indicators
- Globales Erwärmungspotenzial (GWP) [kg CO2 Äquiv.]: A1-A3 2.80793, C1 0.000718871, C2 0.00278506, D -1.51902
- Abbaupotenzial der stratosphärischen Ozonschicht (ODP) [kg R11 Äquiv.]: A1-A3 2.04691e-14, C1 2.39627e-19, C2 9.21867e-19, D 9.33093e-15
- Versauerungspotential (AP) [kg SO2 Äquiv.]: A1-A3 0.00601155, C1 2.50738e-6, C2 5.62553e-6, D -0.00350387
- Eutrophierungspotential (EP) [kg Phosphat Äquiv.]: A1-A3 0.000599221, C1 5.91605e-7, C2 1.33734e-6, D -0.000291058
- Bildungspotenzial für troposphärisches Ozon (POCP) [kg Ethen Äquiv.]: A1-A3 0.000860494, C1 2.47755e-7, C2 -1.6854e-6, D -0.00045761
- Potenzial für den abiotischen Abbau nicht fossiler Ressourcen (ADPE) [kg Sb Äquiv.]: A1-A3 2.84651e-7, C1 6.09201e-11, C2 2.34365e-10, D 3.61548e-8
- Potenzial für den abiotischen Abbau fossiler Brennstoffe (ADPF) [MJ]: A1-A3 24.1386, C1 0.00970402, C2 0.0373323, D -12.0153

## Use advice
Der Datensatz repräsentiert ein Cradle to Gate Inventar. Er kann verwendet werden, um die Lieferkette des jeweiligen Produktes in einer repräsentativen Weise zu charakterisieren. Die Kombination mit einzelnen Einheitenprozessen und diesem Produkt ermöglicht die Erstellung von anwenderspezifischen (Produkt-) LCAs.

## Data sources
- GaBi Database Edition 2020, SP40
- GaBi database (all versions)
