# Kompaktleuchtstofflampe 18W (Vorschaltgerät extern); 1 piece

Dataset: ILCD process, EPD, generic dataset
Geography: DE
Reference year: 2021
Valid until: 2022
Classification: oekobau.dat: Gebäudetechnik / Elektro / Beleuchtung
Owner: Sphera Solutions GmbH
Compliance: EN 15804+A2
Review: Dependent internal review by Sphera Solutions GmbH; Independent external review by GaBi user forum
Amounts: rows without a unit in brackets have none in this file; such an amount is in the reference unit of its flow, which a separate flow dataset defines
copyright: true
licenseType: Free of charge for all users and uses
accessRestrictions: The license conditions as stated on https://www.oekobaudat.de/ apply.
accessRestrictions: Es gelten die Lizenzbedingungen wie sie auf https://www.oekobaudat.de/ genannt sind.

## General comment
Dieser Datensatz wurde nach dem European Standard EN 15804+A2 für Nachhaltiges Bauen modelliert. Ergebnisse werden in Modulen abgebildet, die den strukturierten Ausdruck von Ergebnissen über den gesamten Lebenszyklus zulassen.

## Geography
Der Datensatz bildet die länderspezifische Situation in Deutschland ab. Dabei werden Haupttechnologien, spezifische regionale Charakteristiken und ggf. Importstatistiken berücksichtigt.

## Time period
Jährlicher Durchschnitt

## Technology and included processes
Kompaktleuchtstofflampe (Niederdruck-Gasentladungslampe) bestehend aus einem mit Leuchtstoff beschichteten Glaskolben, der mit Quecksilberdampf und einem Gas (z.B. Argon) gefüllt ist und zwei eingeschmolzenen Elektroden. Durch Anlegen einer Spannung wird durch Entladung des Gas-Dampf-Gemischs eine Ultraviolettstrahlung erzeugt. Diese wird durch die Leuchtstoffbeschichtung in sichtbares Licht umgewandelt wird. Als Leuchtstoffe werden Halophosphate oder Drei-Banden-Leuchtstoffe verwendet. Gas-Entladungslampen werden mit Vorschaltgeräten betrieben, welche benötigt werden um den Strom durch die Lampe bei der Entladung zu begrenzen, der sonst zur Zerstörung der Lampe führen würde. Die Lebensdauer einer Leuchtstofflampe wird über ihre Nennlebensdauer in Betrieb angegeben und beträgt je nach Lampentyp und Typ des verwendeten Vorschaltgerätes ca. 7.000 bis 20.000 Betriebsstunden, siehe hierzu die Tabelle zur Nennlebensdauer.

Es wurde davon ausgegangen, dass große Geräte wie Heizkessel, Klima- und Lüftungsanlagen oder Fahrstühle zu 95% einem Recycling zugeführt werden. Für Rohre oder Kabel, die oft unterputzt sind wurde eine Recyclingrate von 90% angenommen. Die Recyclingquoten beziehen sich ausschließlich auf Metalle und Kunststoffe. Für mineralische Materialien wie Mineralwolle, Beton oder Keramik wurde eine Ablagerung auf einer Inertstoffdeponie angenommen. Es wurde angenommen das der Anteil an Metallen und Kunststoffen, der nicht einem Recycling zugeführt wird (5-10%) ebenfalls auf einer Inertstoffdeponie entsorgt wird (z.B. Kabelreste oder Rohrstücke im Bauschutt). Für die Kunststoffe wird davon ausgegangen, dass aufgrund der oft langen Lebensdauer und den verbundenen Verunreinigung nicht von einer stofflichen Verwertung ausgegangen werden kann und daher die Kunststoffe einer energetischen Verwertung in Müllverbrennungsanlagen (MVA) zugeführt werden. Für die Müllverbrennung wurde ein MVA-Modell mit durchschnittlichen europäischen Emissionswerten und Energieproduktion verwendet. In Abhängigkeit des zu verbrennenden Kunststoffes wurden unterschiedliche Prozesse mit den entsprechenden Elementarzusammensetzungen verwendet. Die Datensätze wurden in Zusammenarbeit mit der Confederation of European Waste-to-Energy Plants (CEWEP) erstellt und sind auf der Homepage der European Platform on LCA [EC 2008] verfügbar. Der aus der Kunststoffverbrennung erzeugte Strom sowie die erzeugte thermische Energie wurden mit dem europäischen Strom-bzw. Wärmemix gutgeschrieben. Die Gutschriften für das Recycling von Metallen oder der energetischen Verwertung von Kunststoffen, sowie die mit der Verwertung verbundenen Emissionen und Ressourcenverbräuche (Energie für Einschmelzen, Verbrennungsemissionen, Deponie) sind in den Datensätzen enthalten. Bei Materialen aus Eisen (Stahlbleche, Rohre, Grauguss) werden bei der Herstellung der Materialien bereits unterschiedliche Mengen an Stahlschrott eingesetzt. Diese Mengen wurden der recycelten Stahlmenge vor Zuführung in die Einschmelzung abgezogen, um keine Überwertung der Gutschriften zu erzeugen. Die Gutschrift wurde dann entsprechend mit primärem Stahl durchgeführt. Gutschriften für das Recycling von seltenen Erden oder Quecksilberemissionen aus Leuchtstofflampen konnten wegen fehlenden Daten nicht berücksichtigt werden. Es wurde davon ausgegangen, dass große Geräte wie Heizkessel, Klima- und Lüftungsanlagen oder Fahrstühle zu 95% einem Recycling zugeführt werden. Für Rohre oder Kabel, die oft unterputzt sind wurde eine Recyclingrate von 90% angenommen. Die Recyclingquoten beziehen sich ausschließlich auf Metalle und Kunststoffe. Für mineralische Materialien wie Mineralwolle, Beton oder Keramik wurde eine Ablagerung auf einer Inertstoffdeponie angenommen. Es wurde angenommen das der Anteil an Metallen und Kunststoffen, der nicht einem Recycling zugeführt wird (5-10%) ebenfalls auf einer Inertstoffdeponie entsorgt wird (z.B. Kabelreste oder Rohrstücke im Bauschutt). Für die Kunststoffe wird davon ausgegangen, dass aufgrund der oft langen Lebensdauer und den verbundenen Verunreinigung nicht von einer stofflichen Verwertung ausgegangen werden kann und daher die Kunststoffe einer energetischen Verwertung in Müllverbrennungsanlagen (MVA) zugeführt werden. Für die Müllverbrennung wurde ein MVA-Modell mit durchschnittlichen europäischen Emissionswerten und Energieproduktion verwendet. In Abhängigkeit des zu verbrennenden Kunststoffes wurden unterschiedliche Prozesse mit den entsprechenden Elementarzusammensetzungen verwendet. Die Datensätze wurden in Zusammenarbeit mit der Confederation of European Waste-to-Energy Plants (CEWEP) erstellt und sind auf der Homepage der European Platform on LCA [EC 2008] verfügbar. Der aus der Kunststoffverbrennung erzeugte Strom sowie die erzeugte thermische Energie wurden mit dem europäischen Strom-bzw. Wärmemix gutgeschrieben. Die Gutschriften für das Recycling von Metallen oder der energetischen Verwertung von Kunststoffen, sowie die mit der Verwertung verbundenen Emissionen und Ressourcenverbräuche (Energie für Einschmelzen, Verbrennungsemissionen, Deponie) sind in den Datensätzen enthalten. Bei Materialen aus Eisen (Stahlbleche, Rohre, Grauguss) werden bei der Herstellung der Materialien bereits unterschiedliche Mengen an Stahlschrott eingesetzt. Diese Mengen wurden der recycelten Stahlmenge vor Zuführung in die Einschmelzung abgezogen, um keine Überwertung der Gutschriften zu erzeugen. Die Gutschrift wurde dann entsprechend mit primärem Stahl durchgeführt. Gutschriften für das Recycling von seltenen Erden oder Quecksilberemissionen aus Leuchtstofflampen konnten wegen fehlenden Daten nicht berücksichtigt werden.

Hintergrundsystem:
Strom: Die Stromerzeugung wird entsprechend der länderspezifischen Randbedingungen modelliert. Die landesspezifische Analyse beinhaltet:
1.: Spezifische Kraftwerke der verschiedenen fossilen Energieträger und der Einsatz erneuerbarer Energien sind entsprechend der länderspezifischen Energieträgermixe modelliert. Die Analyse bezieht Stromimporte aus den Nachbarländern, Transmissions-und Verteilungsverluste und den Eigenverbrauch im Kraftwerk und bei der Verteilung bzw. Speicherung, z. B. durch Pumpspeicherwerke, ein.
2.: Die landes-/regionalspezifischen Technologiestandards sowie die Erzeugung in Elektrizitätskraftwerken und/oder in speziellen Kraftwerken mit Kraft-Wärme-Kopplung (KWK) sind berücksichtigt.
3.: Die länderspezifische Energieträgerbereitstellung (mit Anteil der Importe und/oder Eigenversorgung) einschließlich der Energieträger-Eigenschaften (z. B. Elementar- und Energiegehalte) werden berücksichtigt.
4.: Die Förderung, Produktion, Verarbeitung und Transportprozesse werden entsprechend der Situation im jeweiligen Stromerzeugerland modelliert. Die unterschiedlichen Produktions- und Verarbeitungsverfahren (Emissionen und Wirkungsgrade) in den verschiedenen Energieerzeugerländern werden einbezogen, z. B. Rohöl-Veredelungsverfahren oder Abfackel-Raten an den Ölplattformen.
Thermische Energie, Prozessdampf: Die Erzeugung von Dampf und thermischer Energie in Heizkraftwerken wird entsprechend der landesspezifischen Situation (Emissionsgrenzwerte, Energieträgerbasis) modelliert.
Der Wirkungsgrad für die thermische Energieerzeugung beträgt per Definition 100% des Energieträgereinsatzes. Für Prozessdampf liegt der Wirkungsgrad im Bereich von 85-95%. Die zur Heizenergie-Erzeugung verwendeten Energieträger werden entsprechend der nationalen Situation modelliert (siehe Kapitel Strom oben).
Transporte: Alle relevanten und bekannten Transportprozesse in Form von See- und Binnenschiffsverkehr sowie Bahn-, Lkw- und der Leitungstransport sind enthalten.
Energieträger: Die Energieträger werden entsprechend der spezifischen Versorgungslage modelliert (siehe Kapitel Strom oben).
Raffinerieprodukte: Diesel, Benzin, technische Gase, Heizöl, Schmierstoffe und Rückstände, wie Bitumen, werden mit einem parametrierten länderspezifische Raffineriemodell modelliert. Das Raffinerie-Modell bezieht die länderspezifischen Veredelungsverfahren (z. B. Emissionspegel, interner Energieverbrauch etc.) und das länderspezifische Produktspektrum ein, das sich je nach Land stark unterscheiden kann. Die Rohöl-Förderung wird gemäß der länderspezifischen Situation mit den jeweiligen Energieträger-Eigenschaften modelliert.

## Technical purpose
Dieses Produkt kann im Baubereich verwendet werden.

## Safety margin
20 %. Produktsystem bis auf wenige Prozesse/Flüsse abgebildet. Technologische, zeitliche und geographische Repräsentativität teilweise gegeben.

## Reference product
- Kompaktleuchtstofflampe 18W (Vorschaltgerät extern): 1

## Inputs
- Erneuerbare Primärenergie als Energieträger (PERE) [MJ]: A1-A3 0.701736, C2 0.000292268, C3 0.00359018, C4 -6.32718e-5, D -0.0524481
- Erneuerbare Primärenergie zur stofflichen Nutzung (PERM) [MJ]: A1-A3 0, C2 0, C3 0, C4 0, D 0
- Total erneuerbare Primärenergie (PERT) [MJ]: A1-A3 0.701736, C2 0.000292268, C3 0.00359018, C4 -6.32718e-5, D -0.0524481
- Nicht-erneuerbare Primärenergie als Energieträger (PENRE) [MJ]: A1-A3 4.68497, C2 0.0044978, C3 0.0127335, C4 0.0096266, D -0.161421
- Nicht-erneuerbare Primärenergie zur stofflichen Nutzung (PENRM) [MJ]: A1-A3 0, C2 0, C3 0, C4 0, D 0
- Total nicht-erneuerbare Primärenergie (PENRT) [MJ]: A1-A3 4.68497, C2 0.0044978, C3 0.0127335, C4 0.0096266, D -0.161421
- Einsatz von Sekundärstoffen (SM) [kg]: A1-A3 0.000957437, C2 0, C3 0, C4 0, D 0
- Erneuerbare Sekundärbrennstoffe (SF) [MJ]: A1-A3 0, C2 0, C3 0, C4 0, D 0
- Nicht erneuerbare Sekundärbrennstoffe (NRSF) [MJ]: A1-A3 0, C2 0, C3 0, C4 0, D 0
- Nettoeinsatz von Süßwasserressourcen (FW) [m3]: A1-A3 0.00298475, C2 2.42338e-7, C3 6.70586e-5, C4 1.8742e-6, D -2.06902e-5

## Outputs
- Gefährlicher Abfall zur Deponie (HWD) [kg]: A1-A3 8.61814e-10, C2 2.03401e-13, C3 2.73179e-12, C4 6.60593e-13, D -5.38813e-11
- Entsorgter nicht gefährlicher Abfall (NHWD) [kg]: A1-A3 0.00832359, C2 7.52934e-7, C3 0.00285112, C4 0.0467549, D -5.66422e-5
- Entsorgter radioaktiver Abfall (RWD) [kg]: A1-A3 9.60657e-5, C2 7.87466e-9, C3 4.34189e-7, C4 -3.94903e-8, D -5.60959e-6
- Komponenten für die Wiederverwendung (CRU) [kg]: A1-A3 0, C2 0, C3 0, C4 0, D 0
- Stoffe zum Recycling (MFR) [kg]: A1-A3 0, C2 0, C3 0, C4 0, D 0
- Stoffe für die Energierückgewinnung (MER) [kg]: A1-A3 0, C2 0, C3 0, C4 0, D 0
- Exportierte elektrische Energie (EEE) [MJ]: A1-A3 0, C2 0, C3 0.042366, C4 0, D 0
- Exportierte thermische Energie (EET) [MJ]: A1-A3 0, C2 0, C3 0.0972692, C4 0, D 0

## Impact indicators
- Globales Erwärmungspotenzial - total (GWP-total) [kg CO2 eq.]: A1-A3 0.305002, C2 0.000337093, C3 0.0274354, C4 0.00430142, D -0.0107278
- Globales Erwärmungspotenzial - fossil (GWP-fossil) [kg CO2 eq.]: A1-A3 0.303456, C2 0.000334747, C3 0.0274311, C4 0.000952203, D -0.0106073
- Globales Erwärmungspotenzial - biogen (GWP-biogenic) [kg CO2 eq.]: A1-A3 0.00129903, C2 1.76418e-7, C3 2.65572e-6, C4 0.00334754, D -0.000105628
- Globales Erwärmungspotenzial - luluc (GWP-luluc) [kg CO2 eq.]: A1-A3 0.000246621, C2 2.17004e-6, C3 1.67215e-6, C4 1.67978e-6, D -1.49352e-5
- Abbaupotenzial der stratosphärischen Ozonschicht (ODP) [kg CFC-11 eq.]: A1-A3 2.51674e-15, C2 2.32315e-19, C3 1.454e-17, C4 -2.16776e-18, D -2.28342e-16
- Versauerungspotenzial, kumulierte Überschreitung (AP) [Mole of H+ eq.]: A1-A3 0.00144313, C2 2.73758e-6, C3 4.73762e-6, C4 5.56436e-6, D -1.29259e-5
- Eutrophierungspotenzial - Süßwasser (EP-freshwater) [kg P eq.]: A1-A3 5.82918e-7, C2 7.07071e-10, C3 2.11821e-9, C4 8.82813e-8, D -2.45244e-8
- Eutrophierungspotenzial - Salzwasser (EP-marine) [kg N eq.]: A1-A3 0.000296388, C2 1.37469e-6, C3 1.06667e-6, C4 2.12481e-6, D -4.15741e-6
- Eutrophierungspotenzial - Land (EP-terrestrial) [Mole of N eq.]: A1-A3 0.00340354, C2 1.51722e-5, C3 2.18706e-5, C4 1.66241e-5, D -4.43316e-5
- Bildungspotenzial für troposphärisches Ozon (POCP) [kg NMVOC eq.]: A1-A3 0.000840383, C2 2.56988e-6, C3 2.97234e-6, C4 5.8327e-6, D -1.11912e-5
- Potenzial für die Verknappung abiotischer Ressourcen nicht fossile Ressourcen (ADPE) [kg Sb eq.]: A1-A3 8.59899e-6, C2 3.09721e-11, C3 1.98306e-10, C4 2.8397e-12, D -4.97151e-8
- Potenzial für die Verknappung abiotischer Ressourcen fossile Brennstoffe (ADPF) [MJ]: A1-A3 4.66978, C2 0.0044976, C3 0.0127305, C4 0.00962207, D -0.161348
- Wasser-Entzugspotenzial (Benutzer) (WDP) [m³ world equiv.]: A1-A3 0.0643056, C2 1.38174e-6, C3 0.00280661, C4 8.10013e-5, D -0.000143728

## Use advice
Der Datensatz repräsentiert ein Cradle to Gate Inventar. Er kann verwendet werden, um die Lieferkette des jeweiligen Produktes in einer repräsentativen Weise zu charakterisieren. Die Kombination mit einzelnen Einheitenprozessen und diesem Produkt ermöglicht die Erstellung von anwenderspezifischen (Produkt-) LCAs.

## Data sources
- VAN TICHELEN 2007
- LEWY (2007)
- ZVEI 2005
- KROBAN 2007
- BORN 2006
- FRANZ 2005
- MCGILL 2005
- VAN DEN HOEK 2005
- Documentation of data quality management
- GaBi Database Edition 2021, CUP2021.01
- GaBi database (all versions)
