# Keramische Fliesen und Platten

Dataset: ILCD process, EPD, average dataset
Geography: DE
Reference year: 2016
Valid until: 2022
Classification: OEKOBAU.DAT: Mineralische Baustoffe / Steine und Elemente / Fliesen und Platten
Classification: IBUCategories: 02 Bauprodukte / Innen-, Außenwand und Deckenbekleidungen / Keramische Fliesen und Platten
Method details: Keramische Fliesen und Platten.pdf
Generated by: Sphera Solutions GmbH
Registration number: EPD-BKF-20160002-IBE2-DE
Owner: Bundesverband Keramische Fliesen e. V.
Compliance: DIN EN 15804; ISO 14025
Review: Accredited third party review by Institut Bauen und Umwelt e. V.
Amounts: rows without a unit in brackets have none in this file; such an amount is in the reference unit of its flow, which a separate flow dataset defines
copyright: true
licenseType: Free of charge for all users and uses
accessRestrictions: None

## General comment
Keramische Fliesen und Platten werden durch Strangpressen oder Trockenpressen oder andere Verfahren geformt, anschließend getrocknet und dann einfach oder zweifach gebrannt, um die gewünschten und geforderten Eigenschaften zu entwickeln.

Die hier betrachteten Produkte erfassen Wand- und Bodenfliesen in sämtlichen Formaten, Oberflächen (z.B. glasiert bzw. vergütet und unglasiert) und Farben sowie alle definierten Klassifizierungs- und Bewertungsgruppen. Die übliche Eingruppierung keramischer Fliesen in Steingut, Steinzeug, Feinsteinzeug und Spaltplatten hat sich aus dem Sprachgebrauch entwickelt. Steingut ist poröser

und hat eine höhere Wasseraufnahmefähigkeit. Es wird glasiert und überwiegend im Innenbereich eingesetzt. Steinzeug sowie Feinsteinzeug nehmen dagegen wesentlich weniger Wasser auf. Dies macht sie frostbeständiger und auch als Bodenbelag

besonders strapazierfähig. Bei Spaltplatten, also bei stranggepressten Produkten verhält es sich ähnlich.

## Technology and included processes
Die hier betrachteten Produkte umfassen Wand- und Bodenfliesen in sämtlichen Formaten, Oberflächen (z. B. glasiert bzw. vergütet und unglasiert) und Farben sowie alle definierten Klassifizierungs- und Bewertungsgruppen. Herstellung: Der Herstellungsprozess für keramische Fliesen und Platten gliedert sich in verschiedene Verfahrensschritte wie die Aufbereitung der Ausgangsstoffe, die Formgebung, die Trocknung, falls notwendig Glasieren, und das Brennen der Fliesen- und Plattenrohlinge. Als keramische Rohstoffe dienen hauptsächlich Ton, Kaolin, Quarz und Feldspat. Die Ausgangsmaterialien werden zunächst zerkleinert und gemahlen, nach Rezept verwogen, im Mischer mit Wasser versetzt und homogenisiert (keramische Masse). Bei der Formgebung werden zwei verschiedene Verfahren unterschieden. Im so genannten Trockenpress-Verfahren wird die Rohstoffmasse als Granulat in die zukünftige Fliesenform gepresst; bei der Strangpressung wird die breiig aufgearbeitete Rohstoffmasse durch Formgebungsschablonen gepresst. Die geformten Rohlinge werden sodann gegebenenfalls getrocknet und mit oder ohne eine Glasur gebrannt. Nach dem Brand werden die Fliesen versandfertig sortiert und verpackt. Rohstoffe: Die keramischen Fliesen und Platten werden aus einem Rohstoffgemenge hergestellt, das aus folgenden wesentlichen Bestandteilen besteht: Tone ca. 50%, Feldspate ca. 25 %, Kaolin ca. 7 %, Kalkstein ca. 3%, Sand ca. 3 % und Glasuren/Vergütung ca. 4 % .
Technische Daten:
Das folgende Kapitel enthält Angaben über die Leistung der Produkte in Bezug auf deren wesentliche Merkmale gemäß EN 14411, soweit sie in der Leistungserklärung enthalten und spezifiziert sind. Da keine spezifischen Werte für das in dieser EPD deklarierte durchschnittliche Produkt angegeben werden können, werden nachfolgend die Anforderungen entsprechend definierter Produktklasse ausgewiesen.

1. Wasseraufnahme:
Die Klassifizierung keramischer Fliesen und Platten erfolgt im Hinblick auf die Wasseraufnahme und Formgebung in Gruppen I bis III. Wasseraufnahme als Massenanteil je nach Gruppe > 0,5% bis < 10%, gemessen nach /DIN EN ISO 10545-3/

2. Bruchlast (Anforderungen nach /DIN EN 14411/):

sind abhängig vom Einsatz der Fliesen und der Klassifizierungsgruppe
- Bruchlast bei Fliesendicke ≥ 7,5mm: min. 600 – min. 1.300 N
- Bruchlast bei Fliesendicke < 7,5 mm: min. 200 – min. 600 N
3. Biegefestigkeit (Anforderungen nach /DIN EN 14411/):

sind abhängig vom Einsatz der Fliesen und der Klassifizierungsgruppe:
- Biegefestigkeit: min. 8 – min. 30 N/mm²
4. Wiederstand gegen Oberflächenverschleiß

EN ISO 10454-7 (PEI Test): Abriebklassen II, III, IV und V
5. Frost-Tauwechselbeständigkeit

EN ISO 10545-12 soweit angegeben zutreffend

6. Rutschhemmende Eigenschaften

nach Angaben
Deklarierte Einheit:
Die Deklaration bezieht sich auf die Herstellung von 1 m² durchschnittlicher Fliesen und Platten. Umrechnungsfaktoren sind der Tabelle zu entnehmen.

## Technical purpose
Keramische Fliesen und Platten werden überwiegend als Wand- und Bodenbeläge im Innen- wie im Außenbereich eingesetzt. Neben ihrer Verwendung in Wohnbereichen wie z. B. im Bad, in der Küche, in Fluren und Dielen sowie in Wohn- und Schlafzimmer, Balkonen und Terrassen werden sie u.a. wegen der Kombination von Design und Robustheit in gewerblichen und industriellen Bereichen, in öffentlichen Bauten, in Schwimmbädern und Fassaden usw. eingesetzt.

## Scenarios
- S1: 100% stoffliche Verwertung
- S2: 100% Deponie

## Reference product
- 1 m² durchschnittliche Fliese (18,65 kg/m²): 1

## Inputs
- Erneuerbare Primärenergie als Energieträger (PERE) [MJ]: A1-A3 17.568, A4 0.267, A5 0.663, B1 0, B2 0.00668, B3 0, B4 0, B5 0, B6 0, B7 0, C1 0.0104, C2 0.0177, C3 (S1) 0.0674, C3 (S2) 0, C4 (S1) 0, C4 (S2) 0, D (S1) -0.211, D (S2) -0.0968
- Erneuerbare Primärenergie zur stofflichen Nutzung (PERM) [MJ]: A1-A3 0.66, A4 0, A5 -0.66, B1 0, B2 0, B3 0, B4 0, B5 0, B6 0, B7 0, C1 0, C2 0, C3 (S1) 0, C3 (S2) 0, C4 (S1) 0, C4 (S2) 0, D (S1) 0, D (S2) 0
- Total erneuerbare Primärenergie (PERT) [MJ]: A1-A3 18.228, A4 0.267, A5 0.003, B1 0, B2 0.00668, B3 0, B4 0, B5 0, B6 0, B7 0, C1 0.0104, C2 0.0177, C3 (S1) 0.0674, C3 (S2) 0, C4 (S1) 0, C4 (S2) 0.402, D (S1) -0.211, D (S2) -0.0968
- Nicht-erneuerbare Primärenergie als Energieträger (PENRE) [MJ]: A1-A3 219.88, A4 3.5, A5 0.405, B1 0, B2 0.0436, B3 0, B4 0, B5 0, B6 0, B7 0, C1 0.137, C2 0.232, C3 (S1) 0.959, C3 (S2) 0, C4 (S1) 0, C4 (S2) 0, D (S1) -1.38, D (S2) -0.749
- Nicht-erneuerbare Primärenergie zur stofflichen Nutzung (PENRM) [MJ]: A1-A3 0.38, A4 0, A5 -0.38, B1 0, B2 0, B3 0, B4 0, B5 0, B6 0, B7 0, C1 0, C2 0, C3 (S1) 0, C3 (S2) 0, C4 (S1) 0, C4 (S2) 0, D (S1) 0, D (S2) 0
- Total nicht erneuerbare Primärenergie (PENRT) [MJ]: A1-A3 220.26, A4 3.5, A5 0.0248, B1 0, B2 0.0436, B3 0, B4 0, B5 0, B6 0, B7 0, C1 0.137, C2 0.232, C3 (S1) 0.959, C3 (S2) 0, C4 (S1) 0, C4 (S2) 4.09, D (S1) -1.38, D (S2) -0.749
- Einsatz von Sekundärstoffen (SM) [kg]: A1-A3 0.10512, A4 0, A5 0, B1 0, B2 0, B3 0, B4 0, B5 0, B6 0, B7 0, C1 0, C2 0, C3 (S1) 0, C3 (S2) 0, C4 (S1) 0, C4 (S2) 0, D (S1) 18.55, D (S2) 0
- Erneuerbare Sekundärbrennstoffe (RSF) [MJ]: A1-A3 0, A4 0, A5 0, B1 0, B2 0, B3 0, B4 0, B5 0, B6 0, B7 0, C1 0, C2 0, C3 (S1) 0, C3 (S2) 0, C4 (S1) 0, C4 (S2) 0, D (S1) 0, D (S2) 0
- Nicht erneuerbare Sekundärbrennstoffe (NRSF) [MJ]: A1-A3 0, A4 0, A5 0, B1 0, B2 0, B3 0, B4 0, B5 0, B6 0, B7 0, C1 0, C2 0, C3 (S1) 0, C3 (S2) 0, C4 (S1) 0, C4 (S2) 0, D (S1) 0, D (S2) 0
- Einsatz von Süßwasserressourcen (FW) [m^3]: A1-A3 0.032735, A4 0.00015, A5 0.00026, B1 0, B2 1.11e-5, B3 0, B4 0, B5 0, B6 0, B7 0, C1 6.03e-6, C2 1.02e-5, C3 (S1) 0.000239, C3 (S2) 0, C4 (S1) 0, C4 (S2) 0.000774, D (S1) -0.000227, D (S2) -0.000102

## Outputs
- Gefährlicher Abfall zur Deponie (HWD) [kg]: A1-A3 0.00012942, A4 2.82e-6, A5 1.33e-8, B1 0, B2 7.6e-9, B3 0, B4 0, B5 0, B6 0, B7 0, C1 1.1e-7, C2 1.87e-7, C3 (S1) 5.22e-7, C3 (S2) 0, C4 (S1) 0, C4 (S2) 1.27e-6, D (S1) -8.27e-7, D (S2) -3.72e-7
- Entsorgter nicht gefährlicher Abfall (NHWD) [kg]: A1-A3 0.416, A4 0.000874, A5 0.000196, B1 0, B2 3.48e-5, B3 0, B4 0, B5 0, B6 0, B7 0, C1 3.42e-5, C2 5.79e-5, C3 (S1) 0.000513, C3 (S2) 0, C4 (S1) 0, C4 (S2) 18.7, D (S1) -0.754, D (S2) -0.000286
- Entsorgter radioaktiver Abfall (RWD) [kg]: A1-A3 0.0051541, A4 4.65e-6, A5 9.87e-7, B1 0, B2 7.24e-7, B3 0, B4 0, B5 0, B6 0, B7 0, C1 1.82e-7, C2 3.08e-7, C3 (S1) 1.07e-5, C3 (S2) 0, C4 (S1) 0, C4 (S2) 6.5e-5, D (S1) -6.85e-5, D (S2) -3.64e-5
- Komponenten für die Wiederverwendung (CRU) [kg]: A1-A3 0, A4 0, A5 0, B1 0, B2 0, B3 0, B4 0, B5 0, B6 0, B7 0, C1 0, C2 0, C3 (S1) 0, C3 (S2) 0, C4 (S1) 0, C4 (S2) 0, D (S1) 0, D (S2) 0
- Stoffe zum Recycling (MFR) [kg]: A1-A3 0, A4 0, A5 0, B1 0, B2 0, B3 0, B4 0, B5 0, B6 0, B7 0, C1 0, C2 0, C3 (S1) 18.65, C3 (S2) 0, C4 (S1) 0, C4 (S2) 0, D (S1) 0, D (S2) 0
- Stoffe für die Energierückgewinnung (MER) [kg]: A1-A3 0, A4 0, A5 0, B1 0, B2 0, B3 0, B4 0, B5 0, B6 0, B7 0, C1 0, C2 0, C3 (S1) 0, C3 (S2) 0, C4 (S1) 0, C4 (S2) 0, D (S1) 0, D (S2) 0
- Exportierte elektrische Energie (EEE) [MJ]: A1-A3 0, A4 0, A5 0.151, B1 0, B2 0, B3 0, B4 0, B5 0, B6 0, B7 0, C1 0, C2 0, C3 (S1) 0, C3 (S2) 0, C4 (S1) 0, C4 (S2) 0, D (S1) 0, D (S2) 0
- Exportierte thermische Energie (EET) [MJ]: A1-A3 0, A4 0, A5 0.371, B1 0, B2 0, B3 0, B4 0, B5 0, B6 0, B7 0, C1 0, C2 0, C3 (S1) 0, C3 (S2) 0, C4 (S1) 0, C4 (S2) 0, D (S1) 0, D (S2) 0

## Impact indicators
- Globales Erwärmungspotenzial (GWP) [kg CO_(2)-Äq.]: A1-A3 12.939, A4 0.256, A5 0.109, B1 0, B2 0.001184, B3 0, B4 0, B5 0, B6 0, B7 0, C1 0.0101, C2 0.017, C3 (S1) 0.0493, C3 (S2) 0, C4 (S1) 0, C4 (S2) 0.301, D (S1) -0.096, D (S2) -0.05
- Abbau Potential der stratosphärischen Ozonschicht (ODP) [kg CFC11-Äq.]: A1-A3 5.6568e-10, A4 3.2e-13, A5 7e-14, B1 0, B2 6.68e-14, B3 0, B4 0, B5 0, B6 0, B7 0, C1 1.2e-14, C2 2.1e-14, C3 (S1) 7.7e-13, C3 (S2) 0, C4 (S1) 0, C4 (S2) 4.81e-12, D (S1) -4.9e-12, D (S2) -2.6e-12
- Versauerungspotenzial von Boden und Wasser (AP) [kg SO_(2)-Äq.]: A1-A3 0.024192, A4 0.00065, A5 1.1e-5, B1 0, B2 4.72e-6, B3 0, B4 0, B5 0, B6 0, B7 0, C1 3.9e-5, C2 4.3e-5, C3 (S1) 0.00035, C3 (S2) 0, C4 (S1) 0, C4 (S2) 0.00183, D (S1) -0.00028, D (S2) -6e-5
- Eutrophierungspotenzial (EP) [kg PO_(4)^(3)-Äq.]: A1-A3 0.0026892, A4 0.00018, A5 2.4e-6, B1 0, B2 1.63e-6, B3 0, B4 0, B5 0, B6 0, B7 0, C1 1.1e-5, C2 1.2e-5, C3 (S1) 8.7e-5, C3 (S2) 0, C4 (S1) 0, C4 (S2) 0.00025, D (S1) -5.3e-5, D (S2) -8.2e-6
- Bildungspotential für troposphärisches Ozon (POCP) [kg Ethen-Äq.]: A1-A3 0.0021046, A4 -0.00019, A5 5.2e-7, B1 0, B2 1.46e-6, B3 0, B4 0, B5 0, B6 0, B7 0, C1 4.4e-6, C2 -1.2e-5, C3 (S1) 5e-5, C3 (S2) 0, C4 (S1) 0, C4 (S2) 0.00017, D (S1) -3.1e-5, D (S2) -6.2e-6
- Potenzial für den abiotischen Abbau nicht fossiler Ressourcen (ADPE) [kg Sb-Äq.]: A1-A3 0.00011729, A4 1.3e-8, A5 1e-9, B1 0, B2 9.84e-10, B3 0, B4 0, B5 0, B6 0, B7 0, C1 5.2e-10, C2 8.8e-10, C3 (S1) 8.4e-8, C3 (S2) 0, C4 (S1) 0, C4 (S2) 1.1e-7, D (S1) -1.8e-8, D (S2) -7.4e-9
- Potenzial für den abiotischen Abbau fossiler Brennstoffe (ADPF) [MJ]: A1-A3 207.28, A4 3.49, A5 0.022, B1 0, B2 0.0416, B3 0, B4 0, B5 0, B6 0, B7 0, C1 0.137, C2 0.231, C3 (S1) 0.932, C3 (S2) 0, C4 (S1) 0, C4 (S2) 3.93, D (S1) -1.21, D (S2) -0.658

## Use advice
Gültigkeitsbereich:
Dieses Dokument bezieht sich auf keramische Fliesen und Platten des Bundesverbands Keramische Fliesen e. V.

Die Ökobilanzdaten wurden im Jahr 2014 in Mitgliedswerken des Verbands erfasst. Die Ökobilanz ist repräsentativ für 9 Firmen und 11 Werke des Verbandes, die insgesamt rund 70 % des gesamten inländischen Produktionsvolumens herstellen.
Systemgrenze:
Die folgenden Lebenszyklusphasen werden berücksichtigt: Produktstadium, Stadium der Errichtung des Bauwerks, Nutzungsstadium, Entsorgungsstadium, Gutschriften und Lasten außerhalb der Systemgrenzen.

Die Systemgrenzen der EPD folgen dem modularen Ansatz der /EN 15804/. Nachfolgend werden die deklarierten Module kurz beschrieben.

Art der EPD: „Wiege bis zur Bahre“.

Module A1 bis A3 umfassen die Herstellungsphase:
A1, Rohstoffgewinnung und –verarbeitung und ggf. Verarbeitungsprozesse von als Input dienenden Sekundärstoffen, (z. B. Recyclingprozesse),
A2, Transport zum Hersteller,
A3, Herstellung.

Die Daten zu Energie-, Material- und Abfallflüssen werden in einer Datensammlung in den Werken abgefragt.

Die mögliche Verwertung von Produktabfall, der während der Produktion anfällt, wird zugunsten eines konservativen Berechnungsansatzes zu Null alloziert. Er hat keinen nennenswerten Marktwert, verursacht aber auch keine Abnahmekosten und ist demnach als Nebenprodukt anzusehen. Die Einbindung von biogenem CO2 in den Holzpaletten wird einbezogen. Betrachtet wird ausschließlich der Anfall von defekten Paletten, die tatsächlich entsorgt werden. Das eingesetzte Papier bzw. der Karton besteht hauptsächlich aus Recyclingfasern mit einem technisch bedingten geringen Primärfaseranteil. Entsorgtes Papier/Karton erhält deshalb keine Gutschrift, z. B. bei der Energienutzung während der thermischen Verwertung.

Modul A4 beinhaltet den Transport zum Kunden bzw. zur Baustelle. Diese Daten werden ebenfalls in den Werken erhoben und beziehen sich auf die inländischen Transporte.

Modul A5 enthält die Montageaufwendungen incl. der Verpackungsentsorgung. In der vorliegende EPD wird ausschließlich der Einfluss der Verpackungsentsorgung aus Kunststoff und Papier incl. Transport der Verpackung zur Entsorgung bewertet. Für die Verpackungen (Ausnahme Papier/Karton) wird eine thermische Behandlung in einer Anlage mit R1<0,6 angenommen. Die Lasten aus dem Verbrennungsprozess werden in Modul A5 deklariert, die resultierenden Gutschriften in Modul D.

Auf die Bilanzierung des Materialaufwandes für Fliesenkleber und Fugenmörtel sowie der Verschnitte wird verzichtet, da je nach Anwendung große Unterschiede im Aufkommen bestehen. Der Materialaufwand für Fliesenkleber und Fugenmörtel für eine typische Standardanwendung wird in der Deklaration ausgewiesen, fließt jedoch nicht in die Ökobilanz ein.

Modul B1 betrifft die Nutzung der Fliesen hinsichtlich der Emissionen in die Umwelt. Das Modul ist deklariert. Bei der Verwendung von Fliesen sind keine gesundheitsgefährdenden Innenraumemissionen zu erwarten.

Modul B2 beinhaltet die Reinigungsaufwendungen mittels Wasser und Reinigungsmittel. Ein typischer Reinigungsturnus ist getrennt für Boden- und Wandfliesen in der EPD angegeben. In der Ökobilanz wird die Umweltwirkung für den jährlichen Reinigungsaufwand von 1 m² Wandfliesen ausgewiesen. Wird der Betrag durch 4 dividiert (4 mal Reinigung Wandfliesen pro Jahr) und dann mit der Anzahl der Reinigungsdurchgänge pro Jahr für Bodenfliesen multipliziert, ist dem Planer die Berechnung der Gesamtwirkung der Reinigung auch von Bodenfliesen möglich.

Module B3 bis B5 betreffen die Reparatur, den Ersatz und den kompletten Austausch des Fliesenbodens. Diese Module werden in der Studie betrachtet und in der EPD deklariert. Bei sachgerechtem Einbau ist keine Reparatur, Ersatz oder Austausch notwendig.

Die Module B6 und B7 werden in der Studie betrachtet und in der EPD deklariert. Hier gibt es keine Umweltwirkungen, da das Produkt funktionell weder Wasser noch Strom beansprucht. Der Aufwand für die Reinigung ist in B2 deklariert.

Die C-Module und das Modul D beziehen sich auf die Bewertung der Entsorgung der Fliesen nach der Nutzung. Hier werden zwei Maximal-Szenarien (jeweils 100%) für die Berechnung zugrunde gelegt. EoL-Szenario 1 bezieht sich auf die stoffliche Verwertung als mineralischer Füllstoff in der Bauindustrie. EoL-Szenario 2 beschreibt die Entsorgung auf der Bauschuttdeponie.

Einzelheiten zu den Nachnutzungs-Modulen:

Modul C1 beinhaltet den Aufwand für den Rückbau, vornehmlich den Dieselverbrauch der Abbruchmaschinen.

Modul C2 schließt den Transport zur Deponie bzw. zur Verwertung ein.

Modul C3 umfasst die Baustoffaufbereitung zur späteren Verwendung als mineralisches Schüttgut.

Modul C4 umfasst die Abfallentsorgung, d.h. die Entsorgung auf der Bauschuttdeponie.

Modul D beinhaltet die Gutschrift für ersparte Aufwendungen, d. h. die Einsparung von Primärmaterial und Primärenergie durch die Nutzung von Recyclingschotter sowie durch die thermische Nutzung der Verpackung.

Einflüsse von Abfällen werden in den Modulen berücksichtigt, in denen diese anfallen.

In der Herstellung benötigte Maschinen, Anlagen und Infrastruktur werden vernachlässigt.

## Data sources
- GaBi Database (all versions)
- GaBi database SP27 2015
