# CLIMAFLEX® STABIL / EXENTROFLEX® COMPACT aus NMC NATUREFOAM®

Dataset: ILCD process, EPD, average dataset
Geography: BE
Reference year: 2017
Valid until: 2022
Classification: OEKOBAU.DAT: Dämmstoffe / Polyethylen / Schaum
Classification: IBUCategories: 02 Bauprodukte / Wärmedämmungsprodukte / Dämmstoffe aus Schaumkunststoffen
Method details: Dämmstoffe aus Schaumkunststoffen.pdf
Registration number: EPD-NMC-20170102-IBD3-DE
Owner: NMC S.A.
Compliance: DIN EN 15804; ISO 14025
Review: Accredited third party review by Institut Bauen und Umwelt e. V.
Amounts: rows without a unit in brackets have none in this file; such an amount is in the reference unit of its flow, which a separate flow dataset defines
copyright: true

## General comment
CLIMAFLEX® STABIL / EXZENTROFLEX® COMPACT aus NMC NATUREFOAM® ist die im Profibereich eingesetzte, auf Polyethylen basierende Rohrisolierung aus geschlossenzelligem Schaumstoff mit einer robusten PE-Schutzschicht zur dauerhaften Energieeinsparung und Veremeidung von Kondensation. CLIMAFLEX® STABIL NMC NATUREFOAM® hält Lösungen bereit, die alle notwendigen Richtlinien für jede Einbauart befolgen. EXZENTROFLEX® COMPACT NMC NATUREFOAM® mit der rechteckigen Form und dem kompakten Design wird auf dem Boden eingesetzt.

Für die Vermarktung von Produkten in der Europäischen Union und der EFTA (Schweiz ausgenommen) gilt die Verordnung (EU) Nr. 305/2011 (Bauprodukteverordnung). Das Produkt benötigt eine Leistungserklärung (DoP), die die EN 14313: 2015 - Wärmedämmstoffe für die technische Gebäudeausrüstung und für betriebstechnische Anlagen in der Industrie werkmäßig hergestellte Produkte aus Polyethylenschaum (PEF) sowie die CE‑Kennzeichnung berücksichtigt. Es gelten für die Anwendung und den Gebrauch die jeweiligen nationalen Vorschriften.

## Technology and included processes
Der Herstellungsprozess besteht aus einer kontinuierlichen Extrusion. Feste Thermoplast-Pellets werden einem Aufschmelzbereich zugeführt, wo das Harz geschmolzen wird, um eine flüssige Thermoplastmasse zu bilden. Die Thermoplastmasse wird dann in einen Mischbereich gefördert, wo die Thermoplastmasse gründlich mit einem Treibmittel unter Druck gemischt wird. Anschließend wird die Mischung aus Thermoplast-Harz und Treibmittel durch eine Druckgussform, die der Thermoplastmasse eine Form verleiht, in einen Bereich mit niedrigerem Druck wie Luftdruck gepresst. Das Treibmittel bläst sich auf und bildet die Schaumstoffzellen. Der Thermokunststoffschaum wird durch einen im Hauptstrom befindlichen Wasserkühler abgekühlt. Die als „Haut“ bezeichnete Schutzschicht wird durch Co‑Extrusion aufgetragen. Die Haut besteht aus festen Pellets mit Thermoplast-Harz und einigen Zusatzstoffen, die mit einem Extruder um den Schaum aufgetragen wird. Es gibt in diesem Fall kein Schaummittel. Die Druckgussform wird um den nackten Schaumstoff positioniert und hinterlässt eine dünne (± 0,1 mm) PE-Schicht auf dem Schaumstoff. Nach dem Prozess werden die Profile auf die vorgegebenen Maße zugeschnitten. Qualitätssicherung: Die Herstellung ist nach ISO 9001 für das Qualitätsmanagement zertifiziert. Das Produkt entspricht dem Produktstandard EN 14313 und verfügt über eine Leistungserklärung nach der CPR: DOP Nr. W1PEF300; W1PEF400 (siehe www.nmc.eu/dop).
Deklarierte Einheit:
Die Deklaration bezieht sich auf 1 m³ produzierte Rohrisolierung. Zur LCA-Berechnung wird, da das Produkt Schaum ist und Toleranzen hat, davon ausgegangen, dass die deklarierte Dichte den Durchschnitt in der Produktkategorien darstellt. Die Wärmeleitzahl (Lambda-Wert) und der R-Wert je 25 mm Stärke des Produkts sind unten als Zusatzinformation und als Hilfe für die Installateure angegeben.

## Technical purpose
CLIMAFLEX® STABIL aus NMC NATUREFOAM® wird für die Isolierung von Heizungs- und Sanitärrohren verwendet. EXZENTROFLEX® COMPACT aus NMC NATUREFOAM® wird auf Böden eingesetzt.

Polyethylenschaum ist ein kostengünstiges Material mit guten Isoliereigenschaften.
Produkte aus PE-Schaum haben ein hervorragendes Preis-Leistungsverhältnis.
Wärmedämmung und Schallschutz in Frisch- und Abwasser- sowie Heizungsanlagen

## Reference product
- CLIMAFLEX® STABIL / EXZENTROFLEX® COMPACT aus NMC NATUREFOAM®/M³: 1

## Inputs
- Erneuerbare Primärenergie als Energieträger (PERE) [MJ]: A1-A3 2494.29, A4 4.89254, A5 0, C2 0.198352, C3 0, C4 3.20407, D 0
- Erneuerbare Primärenergie zur stofflichen Nutzung (PERM) [MJ]: A1-A3 987.966, A4 0, A5 0, C2 0, C3 0, C4 -987.966, D 0
- Total erneuerbare Primärenergie (PERT) [MJ]: A1-A3 3482.25, A4 4.89254, A5 0, C2 0.198352, C3 0, C4 3.20407, D 0
- Nicht-erneuerbare Primärenergie als Energieträger (PENRE) [MJ]: A1-A3 1138.8, A4 95.2613, A5 0, C2 3.86206, C3 0, C4 43.7261, D 0
- Nicht-erneuerbare Primärenergie zur stofflichen Nutzung (PENRM) [MJ]: A1-A3 101.66, A4 0, A5 0, C2 0, C3 0, C4 -101.66, D 0
- Total nicht erneuerbare Primärenergie (PENRT) [MJ]: A1-A3 1240.45, A4 95.2613, A5 0, C2 3.86206, C3 0, C4 43.7261, D 0
- Einsatz von Sekundärstoffen (SM) [kg]: A1-A3 19.5, A4 0, A5 0, C2 0, C3 0, C4 0, D 0
- Erneuerbare Sekundärbrennstoffe (RSF) [MJ]: A1-A3 0, A4 0, A5 0, C2 0, C3 0, C4 0, D 0
- Nicht erneuerbare Sekundärbrennstoffe (NRSF) [MJ]: A1-A3 0, A4 0, A5 0, C2 0, C3 0, C4 0, D 0
- Einsatz von Süßwasserressourcen (FW) [m^3]: A1-A3 0.3799, A4 0.00905294, A5 0, C2 0.000367022, C3 0, C4 0.000104672, D 0

## Outputs
- Gefährlicher Abfall zur Deponie (HWD) [kg]: A1-A3 0.000627942, A4 4.96785e-6, A5 0, C2 2.01405e-7, C3 0, C4 1.69068e-7, D 0
- Entsorgter nicht gefährlicher Abfall (NHWD) [kg]: A1-A3 10.6045, A4 0.0075415, A5 0, C2 0.000305745, C3 0, C4 40.8433, D 0
- Entsorgter radioaktiver Abfall (RWD) [kg]: A1-A3 0.167998, A4 0.000196919, A5 0, C2 7.98344e-6, C3 0, C4 0.000662312, D 0
- Komponenten für die Wiederverwendung (CRU) [kg]: A1-A3 0, A4 0, A5 0, C2 0, C3 0, C4 0, D 0
- Stoffe zum Recycling (MFR) [kg]: A1-A3 0, A4 0, A5 0, C2 0, C3 0, C4 0, D 0
- Stoffe für die Energierückgewinnung (MER) [kg]: A1-A3 0, A4 0, A5 0, C2 0, C3 0, C4 0, D 0
- Exportierte elektrische Energie (EEE) [MJ]: A1-A3 0, A4 0, A5 0, C2 0, C3 0, C4 0, D 0
- Exportierte thermische Energie (EET) [MJ]: A1-A3 0, A4 0, A5 0, C2 0, C3 0, C4 0, D 0

## Impact indicators
- Globales Erwärmungspotenzial (GWP) [kg CO_(2)-Äq.]: A1-A3 -21.0775, A4 6.86868, A5 0, C2 0.278315, C3 0, C4 2.9328, D 0
- Abbau Potential der stratosphärischen Ozonschicht (ODP) [kg CFC11-Äq.]: A1-A3 1.03965e-7, A4 5.58914e-12, A5 0, C2 2.26593e-13, C3 0, C4 7.20169e-12, D 0
- Versauerungspotenzial von Boden und Wasser (AP) [kg SO_(2)-Äq.]: A1-A3 1.22354, A4 0.0325327, A5 0, C2 0.00122357, C3 0, C4 0.00810258, D 0
- Eutrophierungspotenzial (EP) [kg PO_(4)^(3)-Äq.]: A1-A3 0.863831, A4 0.00816222, A5 0, C2 0.000305723, C3 0, C4 0.00803134, D 0
- Bildungspotential für troposphärisches Ozon (POCP) [kg Ethen-Äq.]: A1-A3 0.244499, A4 -0.0134232, A5 0, C2 -0.000496855, C3 0, C4 0.000924248, D 0
- Potenzial für den abiotischen Abbau nicht fossiler Ressourcen (ADPE) [kg Sb-Äq.]: A1-A3 0.0470466, A4 6.21043e-7, A5 0, C2 2.51781e-8, C3 0, C4 6.06872e-7, D 0
- Potenzial für den abiotischen Abbau fossiler Brennstoffe (ADPF) [MJ]: A1-A3 712.09, A4 94.7599, A5 0, C2 3.84173, C3 0, C4 42.0438, D 0

## Use advice
Gültigkeitsbereich:
Produktlinie

CLIMAFLEX®STABIL/ EXZENTROFLEX®COMPACT

aus NMC NATUREFOAM®

Wärmedämmstoffe für die technische Gebäudeausrüstung und für betriebstechnische Anlagen in der Industrie aus auf Polyethylen basierender Rohrisolierung aus geschlossenzelligem Schaumstoff mit einer robusten Schutzschicht (PEF) gemäß EN 14313. Diese Deklaration ist eine Umwelt-Produktdeklaration gemäß ISO 14025 und beschreibt die Umweltwirkungen des in Belgien hergestellten Produktes. Der einzige Unterschied zwischen CLIMAFLEX® STABIL aus NMC NATUREFOAM® und EXZENTROFLEX® COMPACT aus NMC NATURE- FOAM® besteht in der Form, chemisch sind sie identisch.

CLIMAFLEX® STABIL aus NMC NATUREFOAM® ist kreisförmig, während EXZENTROFLEX® COMPACT NMC NATUREFOAM® rechteckig ist, sodass sie sich besser für die Isolierung von Heizungsrohren auf einem Betonfußboden eignen.Bei diesem Dokument handelt es sich um eine vom Englischen ins Deutsche übersetzte Umwelt-Produktdeklaration. Grundlage ist die englische Ursprungsversion EPD-NMC-20170102-IBD3-EN. Der Verifizierer hat keinen Einfluss auf die Qualität der Übersetzung.
Systemgrenze:
Die Datenerfassung bezieht sich auf die Jahresproduktion von 2016.

Modul A1 bis A3: Die LCA-Berechnung umfasst die Produktion der Rohstoffe, deren Transport zum Werk, das Mischen der Rohstoffe nach den entsprechenden Rezepturen, die Herstellung des Schaums und die Verpackung für den Versand. Die gesamte Produktion findet ausschließlich in Eynatten, Belgien statt.

Modul A4: Transport des Endprodukts zum Anwendungsort. Der durchschnittliche Transportweg wurde anhand eines gewichteten Wertes für die wichtigen NMC-Kunden berechnet, die mehr als 50 % des Absatzes in 2016 ausgemacht haben. Die Kapazitätsauslastung nach Volumen beträgt 100 %. In Anbetracht der geringen Produktdichte wurde jedoch die Kapazitätsauslastung nach Masse auf 10 % angenommen.

Modul A5: Die Produkte können bündig installiert werden; verbleibende Reststücke können in anderen Rohrbereichen verwendet werden. Die Berechnungen berücksichtigen keine Verluste durch Verschnitt. Der als Verpackung verwendete Karton wird einem Recyclingprozess zugeführt. Es wird angenommen, dass der verwendete Karton aus Altpapier hergestellt wurde. Somit werden die Umweltlasten für das Altpapierrecycling bereits in der Herstellungsphase A1-A3 berücksichtigt. Der Wert für die Umweltwirkungen in Modul A5 wird damit mit „0“ deklariert.

Modul B1-B7: Die Dämmstoffe bedürfen während ihrer Nutzung keiner Wartung, keinem Austausch oder Sanierung. Die Informationsmodule B1 – B7 werden nicht deklariert. Die Verwendung von Dämmstoffen hat Einfluss auf den Energieverbrauch des gesamten Heiz- und Kühlsystems. Dieser Aspekt wird in dieser Produktdeklaration nicht mit eingebezogen.

Modul C1: Der Rückbau erfolgt manuell. Daher sind damit keine Umweltlasten verbunden. Das Informationsmodul C1 wird nicht deklariert.

Modul C2: Für den Transport im End-of-Life Szenario wird eine durchschnittliche Entfernung von 100 km bis zur Deponie angenommen.

Modul C3: Mit dem gewählten End-of-life-Szenario von 100% Deponierung ist keine Vorbehandlung der Abfälle verbunden. Modul C3 wird nicht deklariert.

Modul C4: Die Umweltlasten für das Szenario der Deponierung werden in C4 deklariert. Das Produkt enthält Rohstoffe aus nachwachsenden Ressourcen. Bei der Berechnung der Umweltlasten für die Herstellung des Produkts wird die Aufnahme von CO2 aus der Atmosphäre berücksichtigt. Die Auswirkungen von (Bio-)Kunstoffen auf einer Deponie in den nächsten 100 Jahren kann heute nicht vollständig vorhergesehen werden. In dieser Deklaration wird angenommen, dass das eingebundene CO2 in der festen Matrix eingebunden verbleibt.

Modul D: Das End-of-life-Szenario des Verpackungsmaterials und des Produkts führt zu keinen Nutzen für das nachfolgende System. Recycling von Karton ist ein quasi geschlossener Kreislauf mit dem Herstellungsprozess. Das Produkt wird deponiert; Energie- oder Materialgewinne können nicht angenommen werden.

## Data sources
- CLIMAFLEX® STABIL / EXENTROFLEX® COMPACT aus NMC NATUREFOAM®.pdf
- GaBi Database (all versions)
- GaBi database SP29 2016
