# Zement (CEM III 42,5); CEM III 42.5

Dataset: ILCD process, EPD, generic dataset
Geography: DE
Reference year: 2021
Valid until: 2022
Classification: oekobau.dat: Mineralische Baustoffe / Bindemittel / Zement
Owner: Sphera Solutions GmbH
Compliance: EN 15804+A2
Review: Dependent internal review by Sphera Solutions GmbH; Independent external review by GaBi user forum
Amounts: rows without a unit in brackets have none in this file; such an amount is in the reference unit of its flow, which a separate flow dataset defines
copyright: true
licenseType: Free of charge for all users and uses
accessRestrictions: The license conditions as stated on https://www.oekobaudat.de/ apply.
accessRestrictions: Es gelten die Lizenzbedingungen wie sie auf https://www.oekobaudat.de/ genannt sind.

## General comment
Dieser Datensatz wurde nach dem European Standard EN 15804+A2 für Nachhaltiges Bauen modelliert. Ergebnisse werden in Modulen abgebildet, die den strukturierten Ausdruck von Ergebnissen über den gesamten Lebenszyklus zulassen.

## Geography
Der Datensatz bildet die länderspezifische Situation in Deutschland ab. Dabei werden Haupttechnologien, spezifische regionale Charakteristiken und ggf. Importstatistiken berücksichtigt.

## Time period
Jährlicher Durchschnitt

## Technology and included processes
Die wichtigsten Prozesse in der Zementherstellung bestehen aus der Rohstoffgewinnung, Produktion von Klinker und dem Zementschleifen. Die Extraktion der wichtigsten Rohstoffe aus dem Steinbruch erfolgt in der Regel in der unmittelbaren Umgebung der Zementwerke. Portlandzement (CEM I) setzt sich hauptsächlich aus fein gemahlenem Klinker Zement und einer kleineren Menge gemahlenen Materialien zusammen. Andere Zementarten können auch Bestandteile wie Hüttensand (CEM III), natürliche Puzzolan wie Trass (CEM IV), Flugasche, Ölschiefer Ausbrennungen oder Kalkstein beinhalten. Der wichtigste Baustoff ist das Hochofenzement (CEM III). Die Gerinnung wird mit Hilfe von Nebenbestandteilen, wie Calciumsulfat gesteuert, um eine optimale Verarbeitung in der Betonherstellung zu ermöglichen. Klinker Zement besteht aus einem Gemisch von verschiedenen Vorprodukten, hauptsächlich aus Calciumoxid, Siliziumdioxid, Aluminiumoxid und Eisenoxid. Kalkstein, Kreide und Ton (oder deren natürlich vorkommenden Mischungen von Kalkstein, Mergel) bieten diese chemischen Bestandteile. Das Rohmaterial wird auf etwa 1450°C in einem Drehrohrofen bis zum Sintern erhitzt. Neue Bindungen werden aus dem Ursprungsmaterial erzeugt, diese sind bekannt als die Klinkerphasen. Dies sind spezielle Calciumsilikate und Calciumaluminate welche dem Zement seine charakteristischen Eigenschaft des Aushärtens in Gegenwart von Wasser geben.
Sekundärbrennstoffe wurden nach dem Verursacherprinzip modelliert, d.h. die Umweltlasten der Herstellung der Sekundärbrennstoffe werden dem vorausgehenden Produktsystem zugerechnet, die Emissionen bei der Verwendung der Sekundärbrennstoffe trägt das Produktsystem in dem der Sekundärbrennstoff verwendet wird.

Hintergrundsystem:
Strom: Die Stromerzeugung wird entsprechend der länderspezifischen Randbedingungen modelliert. Die landesspezifische Analyse beinhaltet:
1.: Spezifische Kraftwerke der verschiedenen fossilen Energieträger und der Einsatz erneuerbarer Energien sind entsprechend der länderspezifischen Energieträgermixe modelliert. Die Analyse bezieht Stromimporte aus den Nachbarländern, Transmissions-und Verteilungsverluste und den Eigenverbrauch im Kraftwerk und bei der Verteilung bzw. Speicherung, z. B. durch Pumpspeicherwerke, ein.
2.: Die landes-/regionalspezifischen Technologiestandards sowie die Erzeugung in Elektrizitätskraftwerken und/oder in speziellen Kraftwerken mit Kraft-Wärme-Kopplung (KWK) sind berücksichtigt.
3.: Die länderspezifische Energieträgerbereitstellung (mit Anteil der Importe und/oder Eigenversorgung) einschließlich der Energieträger-Eigenschaften (z. B. Elementar- und Energiegehalte) werden berücksichtigt.
4.: Die Förderung, Produktion, Verarbeitung und Transportprozesse werden entsprechend der Situation im jeweiligen Stromerzeugerland modelliert. Die unterschiedlichen Produktions- und Verarbeitungsverfahren (Emissionen und Wirkungsgrade) in den verschiedenen Energieerzeugerländern werden einbezogen, z. B. Rohöl-Veredelungsverfahren oder Abfackel-Raten an den Ölplattformen.
Thermische Energie, Prozessdampf: Die Erzeugung von Dampf und thermischer Energie in Heizkraftwerken wird entsprechend der landesspezifischen Situation (Emissionsgrenzwerte, Energieträgerbasis) modelliert.
Der Wirkungsgrad für die thermische Energieerzeugung beträgt per Definition 100% des Energieträgereinsatzes. Für Prozessdampf liegt der Wirkungsgrad im Bereich von 85-95%. Die zur Heizenergie-Erzeugung verwendeten Energieträger werden entsprechend der nationalen Situation modelliert (siehe Kapitel Strom oben).
Transporte: Alle relevanten und bekannten Transportprozesse in Form von See- und Binnenschiffsverkehr sowie Bahn-, Lkw- und der Leitungstransport sind enthalten.
Energieträger: Die Energieträger werden entsprechend der spezifischen Versorgungslage modelliert (siehe Kapitel Strom oben).
Raffinerieprodukte: Diesel, Benzin, technische Gase, Heizöl, Schmierstoffe und Rückstände, wie Bitumen, werden mit einem parametrierten länderspezifische Raffineriemodell modelliert. Das Raffinerie-Modell bezieht die länderspezifischen Veredelungsverfahren (z. B. Emissionspegel, interner Energieverbrauch etc.) und das länderspezifische Produktspektrum ein, das sich je nach Land stark unterscheiden kann. Die Rohöl-Förderung wird gemäß der länderspezifischen Situation mit den jeweiligen Energieträger-Eigenschaften modelliert.

## Technical purpose
Dieses Produkt kann im Baubereich verwendet werden.

## Safety margin
20 %. Produktsystem bis auf wenige Prozesse/Flüsse abgebildet. Technologische, zeitliche und geographische Repräsentativität teilweise gegeben.

## Reference product
- Zement (CEM III 42,5): 1

## Inputs
- Erneuerbare Primärenergie als Energieträger (PERE) [MJ]: A1-A3 0.748501
- Erneuerbare Primärenergie zur stofflichen Nutzung (PERM) [MJ]: A1-A3 0
- Total erneuerbare Primärenergie (PERT) [MJ]: A1-A3 0.748501
- Nicht-erneuerbare Primärenergie als Energieträger (PENRE) [MJ]: A1-A3 1.33718
- Nicht-erneuerbare Primärenergie zur stofflichen Nutzung (PENRM) [MJ]: A1-A3 0
- Total nicht-erneuerbare Primärenergie (PENRT) [MJ]: A1-A3 1.33718
- Einsatz von Sekundärstoffen (SM) [kg]: A1-A3 0
- Erneuerbare Sekundärbrennstoffe (SF) [MJ]: A1-A3 0.0513024
- Nicht erneuerbare Sekundärbrennstoffe (NRSF) [MJ]: A1-A3 0.942812
- Nettoeinsatz von Süßwasserressourcen (FW) [m3]: A1-A3 0.000365572

## Outputs
- Gefährlicher Abfall zur Deponie (HWD) [kg]: A1-A3 3.99802e-10
- Entsorgter nicht gefährlicher Abfall (NHWD) [kg]: A1-A3 0.00185482
- Entsorgter radioaktiver Abfall (RWD) [kg]: A1-A3 8.02044e-5
- Komponenten für die Wiederverwendung (CRU) [kg]: A1-A3 0
- Stoffe zum Recycling (MFR) [kg]: A1-A3 0
- Stoffe für die Energierückgewinnung (MER) [kg]: A1-A3 0
- Exportierte elektrische Energie (EEE) [MJ]: A1-A3 0
- Exportierte thermische Energie (EET) [MJ]: A1-A3 0

## Impact indicators
- Globales Erwärmungspotenzial - total (GWP-total) [kg CO2 eq.]: A1-A3 0.386244
- Globales Erwärmungspotenzial - fossil (GWP-fossil) [kg CO2 eq.]: A1-A3 0.385084
- Globales Erwärmungspotenzial - biogen (GWP-biogenic) [kg CO2 eq.]: A1-A3 0.000904742
- Globales Erwärmungspotenzial - luluc (GWP-luluc) [kg CO2 eq.]: A1-A3 0.000255501
- Abbaupotenzial der stratosphärischen Ozonschicht (ODP) [kg CFC-11 eq.]: A1-A3 3.24793e-15
- Versauerungspotenzial, kumulierte Überschreitung (AP) [Mole of H+ eq.]: A1-A3 0.000395851
- Eutrophierungspotenzial - Süßwasser (EP-freshwater) [kg P eq.]: A1-A3 3.53898e-7
- Eutrophierungspotenzial - Salzwasser (EP-marine) [kg N eq.]: A1-A3 0.000137559
- Eutrophierungspotenzial - Land (EP-terrestrial) [Mole of N eq.]: A1-A3 0.0014914
- Bildungspotenzial für troposphärisches Ozon (POCP) [kg NMVOC eq.]: A1-A3 0.000402409
- Potenzial für die Verknappung abiotischer Ressourcen nicht fossile Ressourcen (ADPE) [kg Sb eq.]: A1-A3 3.94987e-8
- Potenzial für die Verknappung abiotischer Ressourcen fossile Brennstoffe (ADPF) [MJ]: A1-A3 1.33683
- Wasser-Entzugspotenzial (Benutzer) (WDP) [m³ world equiv.]: A1-A3 0.00465291

## Use advice
Der Datensatz repräsentiert ein Cradle to Gate Inventar. Er kann verwendet werden, um die Lieferkette des jeweiligen Produktes in einer repräsentativen Weise zu charakterisieren. Die Kombination mit einzelnen Einheitenprozessen und diesem Produkt ermöglicht die Erstellung von anwenderspezifischen (Produkt-) LCAs.

## Data sources
- Umweltdaten der deutschen Zementindustrie 2015
- Ökologische Bilanzierung von Baustoffen und Gebäuden, 2000
- AUB-Zertifkat Trasswerke Meurin: Zement (Zertifikat-Nr.: Z.MEU200), 2000
- Environmental statement 2001: Wietersdorfer & Peggauer Zementwerke GmbH, Peggau, 2001
- Ökobilanzen im Brückenbau, 1999
- Documentation of data quality management
- GaBi Database Edition 2021, CUP2021.01
- GaBi database (all versions)
