# Dachziegel (inklusive Zubehör)

Dataset: ILCD process, EPD, average dataset
Geography: DE
Reference year: 2021
Valid until: 2026
Classification: OEKOBAU.DAT: Mineralische Baustoffe / Steine und Elemente / Dachziegel
Classification: IBUCategories: 02 Bauprodukte / Bedachungen / Dachziegel
Method details: Dachziegel.pdf
Generated by: Life Cycle Engineering Experts GmbH
Registration number: EPD-BDZ-20210268-IBG2-DE
Owner: Bundesverband der Deutschen Ziegelindustrie e.V.
Compliance: DIN EN 15804+A2; ISO 14025
Review: Accredited third party review by Institut Bauen und Umwelt e. V.
Amounts: rows without a unit in brackets have none in this file; such an amount is in the reference unit of its flow, which a separate flow dataset defines
copyright: true
licenseType: Free of charge for all users and uses
accessRestrictions: None

## General comment
Es werden Tondachziegel inkl. des keramischen Zubehörs der Mitglieder des Bundesverbandes der

Deutschen Ziegelindustrie e. V. bilanziert. Es handelt sich um Flächenziegel, Formziegel und Zubehör (auch für die Fassade geeignet).

Die verschiedenen Produkte unterscheiden sich lediglich in Form und Farbe (Engobe, Glasur). Die maßgebliche Zusammensetzung, d. h. der Ton­ und Lehmanteil, ist weitgehend einheitlich.

Für das Inverkehrbringen des Produkts in der EU/EFTA (mit Ausnahme der Schweiz) gilt die Verordnung (EU) Nr. 305/2011(CPR). Das Produkt benötigt eine Leistungserklärung unter Berücksichtigung der DIN EN 1304:2013­08 ­

Dachziegel und Formziegel- Begriffe und

Produktanforderungen und die CE- Kennzeichnung. Für die Verwendung gelten die jeweiligen nationalen Bestimmungen, in Deutschland die Fachregeln des Deutschen Dachdeckerhandwerks sowie die Herstellerangaben

## Technology and included processes
Grubenbetrieb Die Hauptbestandteile (Lehm und Ton) werden im Tagebaubetrieb abgebaut. Der Abbau erfolgt nach Abziehen des Oberbodens und ggf. Bearbeitung von archäologischen Fundstellen in der Regel mit Löffelbaggern. Der Transport wird je nach Straßenverhältnissen mit geeigneten Lkw durchgeführt. Bei kurzen Entfernungen können Bandstraßen zum Einsatz kommen. Wenn die Gruben erschöpft sind, werden sie entsprechend den Vorlagen des Naturschutzes rekultiviert und ggf. der vorherigen Nutzung wieder zugeführt. Rohstoffaufbereitung Die einzelnen Rohstoffkomponenten werden beprobt und im Labor auf ihre keramischen Eigenschaften und ihre mineralogischen und chemischen Zusammensetzungen hin analysiert. In der Aufbereitung werden die Komponenten entsprechend ihrer keramischen Eigenschaften zur Betriebsmasse vereint, homogenisiert und gelagert. Formgebung Die Betriebsmasse wird in Strangpressen unter Vakuum zu Batzen verpresst, die anschließend in Revolver­ oder Drehtischpressen mittels Gipsformen zur Ziegelform verpresst werden. Biberschwanzziegel werden nur stranggezogen. Verschiedene Parameter wie Pressenvakuum, Batzeneigenschaften (Feuchte, Plastizität und Gewicht) werden regelmäßig kontrolliert. Überschüssige Betriebsmasse und fehlerhafte Pressungen werden vollständig in den Massekreislauf zurückgeführt. Trocknung Das Trocknen dient als Vorbereitung des plastischen Dachziegels für den darauffolgenden Brennvorgang und erfolgt je nach Modell über 1 – 2 Tage bei ca. 60 – 120 °C. Aufgrund des Schwindungsverhaltens reagiert das keramische Material sehr empfindlich und muss deshalb unter definierten Bedingungen getrocknet werden. Verschiedene Trocknungsparameter sowie die Restfeuchte werden ständig kontrolliert. Aussortierte getrocknete Ziegel (Trockenbruch) werden in der Rohstoffaufbereitung wieder der Betriebsmasse zugeführt. Farbgebung Nach Bedarf werden auf die getrockneten Dachziegel Engoben oder Glasuren aufgetragen. Die Dichte der Engoben/Glasuren sowie die Auftragsstärke werden regelmäßig kontrolliert. Anfallende Reste und das Waschwasser werden aufbereitet und dem Rohstoffkreislauf zugeführt. Brennen Die Ziegel werden in Tunnel­ und Herdwagenöfen unter Verwendung von Erdgas bei ca. 1000 – 1200 °C gebrannt. Die Brenndauer inkl. Aufheiz­ und Abkühlphase beträgt ca. 1 –2 Tage. Durch den Brand erhalten die Ziegel ihre keramischen Eigenschaften, die sie langlebig und beständig machen. Hydrophobierung Zur Verringerung der Wasseraufnahmefähigkeit werden manche Ziegel vor dem Verpacken in einem Tauchbad oberflächlich hydrophobiert. Qualitätskontrolle Die geforderten keramischen Qualitätseigenschaften nach EN 1304 und die einzuhaltenden Produktmaße werden in der werkseigenen Produktionskontrolle (WPK) regelmäßig intern kontrolliert und zusätzlich mindestens jährlich extern überwacht.
Deklarierte Einheit:
Die Deklaration bezieht sich auf die Herstellung von 1 m² Dachziegel (40 kg/m²)

## Technical purpose
Tondachziegel werden zum Eindecken von geneigten Dächern oder zur Verkleidung von Fassaden verwendet.

## Scenarios
- S1: 1

## Reference product
- Dachziegel (inklusive Zubehör) (): 1

## Inputs
- Erneuerbare Primärenergie als Energieträger (PERE) [MJ]: A1-A3 35.55, A4 0.605, A5 1.41, C1 0, C2 0.0505, C3 0.158, C4 0.0653, D (S0) -2.47, D (S1) -0.612
- Erneuerbare Primärenergie zur stofflichen Nutzung (PERM) [MJ]: A1-A3 1.4, A4 0, A5 -1.4, C1 0, C2 0, C3 0, C4 0, D (S0) 0, D (S1) 0
- Total erneuerbare Primärenergie (PERT) [MJ]: A1-A3 36.95, A4 0.605, A5 0.0126, C1 0, C2 0.0505, C3 0.158, C4 0.0653, D (S0) -2.47, D (S1) -0.612
- Nicht-erneuerbare Primärenergie als Energieträger (PENRE) [MJ]: A1-A3 195.66, A4 10.4, A5 0.0595, C1 0, C2 0.867, C3 1.88, C4 0.498, D (S0) -79.6, D (S1) -2.23
- Nicht-erneuerbare Primärenergie zur stofflichen Nutzung (PENRM) [MJ]: A1-A3 0.88, A4 0, A5 -0.88, C1 0, C2 0, C3 0, C4 0, D (S0) 0, D (S1) 0
- Total nicht erneuerbare Primärenergie (PENRT) [MJ]: A1-A3 196.54, A4 10.4, A5 -0.82, C1 0, C2 0.867, C3 1.88, C4 0.498, D (S0) -79.6, D (S1) -2.23
- Einsatz von Sekundärstoffen (SM) [kg]: A1-A3 0.32, A4 0, A5 0, C1 0, C2 0, C3 0, C4 0, D (S0) 37.5, D (S1) 0
- Erneuerbare Sekundärbrennstoffe (RSF) [MJ]: A1-A3 0, A4 0, A5 0, C1 0, C2 0, C3 0, C4 0, D (S0) 0, D (S1) 0
- Nicht erneuerbare Sekundärbrennstoffe (NRSF) [MJ]: A1-A3 0, A4 0, A5 0, C1 0, C2 0, C3 0, C4 0, D (S0) 0, D (S1) 0
- Einsatz von Süßwasserressourcen (FW) [m^3]: A1-A3 0.0216, A4 0.000542, A5 0.000658, C1 0, C2 4.52e-5, C3 0.000493, C4 0.000125, D (S0) -0.00177, D (S1) -0.000334

## Outputs
- Gefährlicher Abfall zur Deponie (HWD) [kg]: A1-A3 3.364e-7, A4 3.89e-7, A5 7.88e-11, C1 0, C2 3.24e-8, C3 3.96e-8, C4 7.59e-9, D (S0) -1.56e-7, D (S1) -1.2e-9
- Entsorgter nicht gefährlicher Abfall (NHWD) [kg]: A1-A3 0.111353, A4 0.00183, A5 0.00319, C1 0, C2 0.000152, C3 0.000567, C4 2.5, D (S0) -0.0222, D (S1) -0.0011
- Entsorgter radioaktiver Abfall (RWD) [kg]: A1-A3 0.00305218, A4 1.09e-5, A5 2.33e-6, C1 0, C2 9.12e-7, C3 1.51e-5, C4 5.58e-6, D (S0) -0.000347, D (S1) -8.88e-5
- Komponenten für die Wiederverwendung (CRU) [kg]: A1-A3 0, A4 0, A5 0, C1 0, C2 0, C3 0, C4 0, D (S0) 0, D (S1) 0
- Stoffe zum Recycling (MFR) [kg]: A1-A3 0, A4 0, A5 0, C1 0, C2 0, C3 40, C4 0, D (S0) 0, D (S1) 0
- Stoffe für die Energierückgewinnung (MER) [kg]: A1-A3 0, A4 0, A5 0, C1 0, C2 0, C3 0, C4 0, D (S0) 0, D (S1) 0
- Exportierte elektrische Energie (EEE) [MJ]: A1-A3 0, A4 0, A5 0.448, C1 0, C2 0, C3 0, C4 0, D (S0) 0, D (S1) 0
- Exportierte thermische Energie (EET) [MJ]: A1-A3 0, A4 0, A5 0.886, C1 0, C2 0, C3 0, C4 0, D (S0) 0, D (S1) 0

## Impact indicators
- Globales Erwärmungspotenzial total (GWP-total) [kg CO_(2)-Äq.]: A1-A3 12.329, A4 0.787, A5 0.261, C1 0, C2 0.0656, C3 0.1, C4 0.041, D (S0) -6.06, D (S1) -0.158
- Globales Erwärmungspotenzial fossil (GWP-fossil) [kg CO_(2)-Äq.]: A1-A3 12.427, A4 0.783, A5 0.138, C1 0, C2 0.0653, C3 0.0998, C4 0.038, D (S0) -6.04, D (S1) -0.157
- Globales Erwärmungspotenzial biogen (GWP-biogenic) [kg CO_(2)-Äq.]: A1-A3 -0.107778, A4 0.000315, A5 0.123, C1 0, C2 2.62e-5, C3 0.000191, C4 0.00301, D (S0) -0.0129, D (S1) -0.000687
- Globales Erwärmungspotenzial luluc (GWP-luluc) [kg CO_(2)-Äq.]: A1-A3 0.008034, A4 0.00328, A5 4.52e-6, C1 0, C2 0.000273, C3 0.000368, C4 0.000109, D (S0) -0.0021, D (S1) -0.000218
- Abbau Potential der stratosphärischen Ozonschicht (ODP) [kg CFC11-Äq.]: A1-A3 1.06024e-12, A4 1.92e-16, A5 4.97e-17, C1 0, C2 1.6e-17, C3 4.25e-16, C4 1.42e-16, D (S0) -9.48e-15, D (S1) -2.61e-15
- Versauerungspotenzial von Boden und Wasser (AP) [mol H^(+)-Äq.]: A1-A3 0.012783, A4 0.000727, A5 5.45e-5, C1 0, C2 6.06e-5, C3 0.000938, C4 0.000272, D (S0) -0.00935, D (S1) -0.000178
- Eutrophierungspotenzial Süßwasser (EP-freshwater) [kg PO_(4)-Äq.]: A1-A3 1.7093e-5, A4 1.7e-6, A5 8.42e-9, C1 0, C2 1.42e-7, C3 2.39e-7, C4 6.54e-8, D (S0) -3.28e-6, D (S1) -3.56e-7
- Eutrophierungspotenzial Salzwasser (EP-marine) [kg N-Äq.]: A1-A3 0.004588, A4 0.000226, A5 1.66e-5, C1 0, C2 1.88e-5, C3 0.000462, C4 7e-5, D (S0) -0.00378, D (S1) -5.75e-5
- Eutrophierungspotenzial Land (EP-terrestrial) [mol N-Äq.]: A1-A3 0.04936, A4 0.00274, A5 0.000251, C1 0, C2 0.000229, C3 0.00508, C4 0.00077, D (S0) -0.0417, D (S1) -0.000612
- Bildungspotential für troposphärisches Ozon (POCP) [kg NMVOC-Äq.]: A1-A3 0.012964, A4 0.000598, A5 4.43e-5, C1 0, C2 4.98e-5, C3 0.00134, C4 0.000212, D (S0) -0.011, D (S1) -0.000153
- Potenzial für den abiotischen Abbau nicht fossiler Ressourcen (ADPE) [kg Sb-Äq.]: A1-A3 1.78601e-6, A4 6.5e-8, A5 7.18e-10, C1 0, C2 5.42e-9, C3 1.1e-7, C4 3.42e-9, D (S0) -3.17e-7, D (S1) -3.62e-8
- Potenzial für den abiotischen Abbau fossiler Brennstoffe (ADPF) [MJ]: A1-A3 195.66, A4 10.4, A5 0.0595, C1 0, C2 0.867, C3 1.88, C4 0.498, D (S0) -79.6, D (S1) -2.23
- Wassernutzung (WDP) [m^(3) Welt-Äq. entzogen]: A1-A3 0.43239, A4 0.00337, A5 0.028, C1 0, C2 0.000281, C3 0.0169, C4 0.00396, D (S0) -0.0501, D (S1) -0.00193
- Auftreten von Krankheiten aufgrund von Feinstaubemissionen (PM) [Krankheitsfälle]
- Wirkung durch Exposition des Menschen mit U235 (IR) [kBq U235-Äq.]
- Toxizitätsvergleichseinheit für Ökosysteme (ETP-fw) [CTUe]
- Toxizitätsvergleichseinheit für Menschen (krebserregend) (HTP-c) [CTUh]
- Toxizitätsvergleichseinheit für Menschen (nicht krebserregend) (HTP-nc) [CTUh]
- Bodenqualitätsindex (SQP) [SQP]

## Use advice
Gültigkeitsbereich:
Die Anwendung dieses Dokumentes ist auf Dachziegel beschränkt, die von Mitgliedsunternehmen des Bundesverbandes der Deutschen Ziegelindustrie e.V. hergestellt werden. Für diese Deklaration wurden von

8 Mitgliedsunternehmen und insgesamt 20 Produktionsstandorten Daten aus dem Jahr 2020 zur Verfügung gestellt. Diese Mitglieder repräsentieren nach Anzahl rund 85 % der im Bundesverband zusammengeschlossenen Hersteller von Dachziegeln. Das Produktionsvolumen dieser Firmen liegt ­ nach Produktionsmenge- ­bei ca. 85 % des deutschen Marktes
Systemgrenze:
Typ der EPD: Wiege bis zum Werkstor - ­mit Optionen. Die Ökobilanz berücksichtigt die Rohstoffgewinnung, die Rohstofftransporte und die eigentliche Produktherstellung inklusive der Verpackungsmaterialien (Module A1 – A3). Der Transport zur Baustelle (Modul A4) sowie die Behandlung der Verpackungsmaterialien in Müllverbrennungsanlagen nach dem Einbau des Produktes (Modul A5) sind ebenfalls Teil der Systemgrenzen. Nach Ablauf der Nutzungsdauer wird das Produkt händisch rückgebaut (Modul C1). Nach dem Transport des rückgebauten Produktes (Modul C2) ist für rund 6 % der Dachziegel eine Deponierung auf einer Inertstoffdeponie vorgesehen (Modul C4), 94

% können weiterverwertet werden. Gutschriften infolge des Recyclings von Ziegelbruch sind in Modul D deklariert. Gutschriften für Strom und thermische Energie infolge der thermischen Verwertung der Verpackung innerhalb des Moduls A5 werden

ebenfalls in Modul D/1 berücksichtigt.

## Data sources
- GaBi Database (all versions)
- GaBi database SP40 2020
