# Lacksysteme Holzfassade halb-pigmentiert (Lasursystem); 1 kg

Dataset: ILCD process, EPD, generic dataset
Geography: DE
Reference year: 2021
Valid until: 2022
Classification: oekobau.dat: Beschichtungen / Lacke und Lasuren / Lacksysteme Holzfassade
Owner: Sphera Solutions GmbH
Compliance: EN 15804+A2
Review: Dependent internal review by Sphera Solutions GmbH; Independent external review by GaBi user forum
Amounts: rows without a unit in brackets have none in this file; such an amount is in the reference unit of its flow, which a separate flow dataset defines
copyright: true
licenseType: Free of charge for all users and uses
accessRestrictions: The license conditions as stated on https://www.oekobaudat.de/ apply.
accessRestrictions: Es gelten die Lizenzbedingungen wie sie auf https://www.oekobaudat.de/ genannt sind.

## General comment
Dieser Datensatz wurde nach dem European Standard EN 15804+A2 für Nachhaltiges Bauen modelliert. Ergebnisse werden in Modulen abgebildet, die den strukturierten Ausdruck von Ergebnissen über den gesamten Lebenszyklus zulassen.

## Geography
Der Datensatz bildet die länderspezifische Situation in Deutschland ab. Dabei werden Haupttechnologien, spezifische regionale Charakteristiken und ggf. Importstatistiken berücksichtigt.

## Time period
Jährlicher Durchschnitt

## Technology and included processes
Farben und Lackstoffe bestehen in der Regel aus zwei bis drei Komponenten: Feststoffgehalt, organischen Lösungsmitteln und Wasser. Der Feststoffgehalt enthält das Bindemittel, Füllstoffe, Zusatzstoffe/Additive und - abhängig vom Lacksystem - Härter und/oder Pigmente. Die Menge der Komponenten variiert je nach Hersteller. In diesem Fall entspricht das Mischungsverhältnis 38,5 % Wasser, 1,5 % Lösemittel und 60 % Feststoffe.
Die Produktion kann wie folgt zusammengefasst werden: In den Pigmentanteilen werden Zusatzstoffe und Lösungsmittel gemischt und anschließend in einer Perle oder einem Perlsandmühle gemahlen. Die letzte Beimischung (Lösungsmittel und/oder Wasser sowie Zusatzstoffe) werden in einen Rührer gegeben werden, bevor die Mischung die Endfiltration und Abfüllstation erreicht.

Die Lebenszyklusanalyse von 1 kg Lacksysteme Holzfassade halb-pigmentiert (Lasursystem) umfasst die Lebenszyklusphasen cradle to gate mit Optionen, d.h. Herstellung von Roh- und Hilfsstoffen, sowie die Produktion einschließlich Verpackung, die Verarbeitung auf der Baustelle (Lösemittel-Emissionen) und Entsorgung. Die Beschichtung (Streichen) von Häusern und Teilen von Häusern wie Fenster, Parkett usw. wird in der Regel auf der Baustelle von Hand und ohne Abluftbehandlung durchgeführt.

Die Emissionen durch das Aufbringen der Beschichtung wurden durch Modellieren aller NMVOCs im Beschichtungsmaterial als NMVOC-Emissionen in die Luft angenommen und in Modul A5 ausgewiesen. Der Transport ist nicht im Umfang enthalten und sollte vom Nutzer des Datensatzes einzeln modelliert werden.

In Modul C1 wird ein manueller Rückbau (lastenfrei) angenommen. Sammelverluste werden vernachlässigt.
Der Transport in Modul C2 zur Verwertungsanlage erfolgt mit einem LKW (50km).
In Modul C3 wird die Zerkleinerung und thermische Behandlung (Verbrennung) des Materials berücksichtigt. Bei der Berechnung der Verbrennungsemissionen und Gutschriften wird der spezifische Heizwert des jeweiligen Materials sowie die Materialzusammensetzung berücksichtigt.
In Modul D erfolgen Gutschriften für die Substitution von Strom (deutscher Strommix) und thermischer Energie (aus Erdgas).

## Technical purpose
Dieses Produkt kann im Baubereich verwendet werden.

## Safety margin
10 %. Produktsystem weitgehend vollständig abgebildet. Gute technologische, zeitliche und geographische Repräsentativität.

## Reference product
- Lacksysteme Holzfassade halb-pigmentiert (Lasursystem): 1

## Inputs
- Erneuerbare Primärenergie als Energieträger (PERE) [MJ]: A1-A3 4.37389, A5 0.0016894, C2 0.00200398, C3 0.190378, D -1.11379
- Erneuerbare Primärenergie zur stofflichen Nutzung (PERM) [MJ]: A1-A3 0, A5 0, C2 0, C3 0, D 0
- Total erneuerbare Primärenergie (PERT) [MJ]: A1-A3 4.37389, A5 0.0016894, C2 0.00200398, C3 0.190378, D -1.11379
- Nicht-erneuerbare Primärenergie als Energieträger (PENRE) [MJ]: A1-A3 55.8758, A5 0.00688931, C2 0.0345287, C3 8.91392, D -3.57563
- Nicht-erneuerbare Primärenergie zur stofflichen Nutzung (PENRM) [MJ]: A1-A3 7.5, A5 0, C2 0, C3 -7.5, D 0
- Total nicht-erneuerbare Primärenergie (PENRT) [MJ]: A1-A3 63.3758, A5 0.00688931, C2 0.0345287, C3 1.41392, D -3.57563
- Einsatz von Sekundärstoffen (SM) [kg]: A1-A3 0, A5 0, C2 0, C3 0, D 0
- Erneuerbare Sekundärbrennstoffe (SF) [MJ]: A1-A3 0, A5 0, C2 0, C3 0, D 0
- Nicht erneuerbare Sekundärbrennstoffe (NRSF) [MJ]: A1-A3 0, A5 0, C2 0, C3 0, D 0
- Nettoeinsatz von Süßwasserressourcen (FW) [m3]: A1-A3 0.020121, A5 4.84175e-5, C2 1.78104e-6, C3 0.00377239, D -0.000415014

## Outputs
- Gefährlicher Abfall zur Deponie (HWD) [kg]: A1-A3 1.06314e-8, A5 1.66508e-12, C2 1.44319e-12, C3 1.48298e-10, D -1.22348e-9
- Entsorgter nicht gefährlicher Abfall (NHWD) [kg]: A1-A3 0.0410585, A5 0.000781675, C2 5.57372e-6, C3 0.103935, D -0.00182568
- Entsorgter radioaktiver Abfall (RWD) [kg]: A1-A3 0.000535329, A5 2.1032e-7, C2 3.31348e-8, C3 2.28076e-5, D -0.000119786
- Komponenten für die Wiederverwendung (CRU) [kg]: A1-A3 0, A5 0, C2 0, C3 0, D 0
- Stoffe zum Recycling (MFR) [kg]: A1-A3 0, A5 0, C2 0, C3 0, D 0
- Stoffe für die Energierückgewinnung (MER) [kg]: A1-A3 0, A5 0, C2 0, C3 1, D 0
- Exportierte elektrische Energie (EEE) [MJ]: A1-A3 0, A5 0.0138593, C2 0, C3 0.803549, D 0
- Exportierte thermische Energie (EET) [MJ]: A1-A3 0, A5 0.0326213, C2 0, C3 2.10485, D 0

## Impact indicators
- Globales Erwärmungspotenzial - total (GWP-total) [kg CO2 eq.]: A1-A3 2.80625, A5 0.0116035, C2 0.00262283, C3 0.841761, D -0.227869
- Globales Erwärmungspotenzial - fossil (GWP-fossil) [kg CO2 eq.]: A1-A3 2.76477, A5 0.00584431, C2 0.00260492, C3 0.841316, D -0.225431
- Globales Erwärmungspotenzial - biogen (GWP-biogenic) [kg CO2 eq.]: A1-A3 0.0394014, A5 0.00575872, C2 1.17716e-6, C3 0.000338559, D -0.00212905
- Globales Erwärmungspotenzial - luluc (GWP-luluc) [kg CO2 eq.]: A1-A3 0.00207196, A5 4.80534e-7, C2 1.67295e-5, C3 0.000106188, D -0.000308248
- Abbaupotenzial der stratosphärischen Ozonschicht (ODP) [kg CFC-11 eq.]: A1-A3 1.68875e-14, A5 7.35446e-18, C2 6.66532e-19, C3 7.63469e-16, D -4.86078e-15
- Versauerungspotenzial, kumulierte Überschreitung (AP) [Mole of H+ eq.]: A1-A3 0.0040294, A5 6.34569e-6, C2 7.38555e-6, C3 0.000235074, D -0.000224894
- Eutrophierungspotenzial - Süßwasser (EP-freshwater) [kg P eq.]: A1-A3 1.36361e-5, A5 1.2246e-9, C2 5.35732e-9, C3 2.67224e-7, D -5.13218e-7
- Eutrophierungspotenzial - Salzwasser (EP-marine) [kg N eq.]: A1-A3 0.00131523, A5 2.54707e-6, C2 3.40237e-6, C3 7.90703e-5, D -8.36218e-5
- Eutrophierungspotenzial - Land (EP-terrestrial) [Mole of N eq.]: A1-A3 0.014163, A5 3.22244e-5, C2 3.80663e-5, C3 0.00113396, D -0.00089268
- Bildungspotenzial für troposphärisches Ozon (POCP) [kg NMVOC eq.]: A1-A3 0.0040673, A5 0.0250272, C2 6.6347e-6, C3 0.000209173, D -0.000220099
- Potenzial für die Verknappung abiotischer Ressourcen nicht fossile Ressourcen (ADPE) [kg Sb eq.]: A1-A3 6.64853e-7, A5 7.32847e-11, C2 2.26592e-10, C3 1.07553e-8, D -6.69217e-8
- Potenzial für die Verknappung abiotischer Ressourcen fossile Brennstoffe (ADPF) [MJ]: A1-A3 64.1141, A5 0.00690412, C2 0.0345273, C3 0.663754, D -3.57515
- Wasser-Entzugspotenzial (Benutzer) (WDP) [m³ world equiv.]: A1-A3 0.296263, A5 0.00205995, C2 1.01262e-5, C3 0.158307, D -0.00252325

## Use advice
Der Datensatz repräsentiert ein Cradle to Gate Inventar. Er kann verwendet werden, um die Lieferkette des jeweiligen Produktes in einer repräsentativen Weise zu charakterisieren. Die Kombination mit einzelnen Einheitenprozessen und diesem Produkt ermöglicht die Erstellung von anwenderspezifischen (Produkt-) LCAs.

## Data sources
- WEFAM-Projektbericht, 2008
- Roempp Lexikon - Lacke und Druckfarben, 1997
- Paints, Coatings and Solvents, 1998
- Ökologische Bilanzierung von Baustoffen und Gebäuden, 2000
- Lackformulierung und Lackrezeptur
- Lackrohstoffkunde
- Farben und Lacke
- Documentation of data quality management
- GaBi Database Edition 2021, CUP2021.01
- GaBi database (all versions)
