# Fugendichtungsbänder PE/PP-Folie; PE/PP film

Dataset: ILCD process, EPD, generic dataset
Geography: DE
Reference year: 2018
Valid until: 2022
Classification: oekobau.dat: Komponenten von Fenstern und Vorhangfassaden / Dichtungskomponenten / -materialien / Fugendichtungsbänder
Owner: thinkstep
Compliance: DIN EN 15804
Review: Dependent internal review by thinkstep, IABP-GaBi, IBP-GaBi; Independent external review by GaBi user forum, GaBi bug forum, GaBi user community
Amounts: rows without a unit in brackets have none in this file; such an amount is in the reference unit of its flow, which a separate flow dataset defines
copyright: true

## General comment
Dieser Datensatz wurde nach dem European Standard EN 15804 für Nachhaltiges Bauen modelliert. Ergebnisse werden in Modulen abgebildet, die den strukturierten Ausdruck von Ergebnissen über den gesamten Lebenszyklus zulassen.

## Geography
Der Datensatz bildet die länderspezifische Situation in Deutschland ab. Dabei werden Haupttechnologien, spezifische regionale Charakteristiken und ggf. Importstatistiken berücksichtigt.

## Time period
Jährlicher Durchschnitt

## Technology and included processes
Die Ökobilanz von Fugendichtungsbändern aus Polyethylen (PE) beinhaltet maßgeblich die Herstellung des Kunststoffs. Die Systemgrenze bildet das verkaufsfertige Produkt.
Herstellung von Polyethylen: Als Ausgangsstoff für die Herstellung von PE dient Erdöl. Es gibt verschiedene Verfahren der Polymerisation. Hier analysiert wird die Herstellung von Weich-Polyethylen (PE-LD; low density). Zuerst wird der Ausgangsstoff Ethylen durch Cracking von Naphtha oder Ölgas in einem Steamcracker extrahiert. PE-LD wird typischerweise in einem Hochdruck-Verfahren hergestellt. Um die extrem hohen Drücke zu erzeugen, ist aufwändige und ausgereifte Verfahrenstechnik notwendig. Informationen zu Details dieses Verfahrens werden von den Herstellern geheim gehalten und sind nur schwer verfügbar. Der Aufbau der dickwandigen Rohre und Druckbehälter unterscheidet sich stark von Niederdruck-Behältern, die beim Niederdruck-Verfahren verwendet werden. Der Strapazierfähigkeit von Komponenten, wie Pumpen, Kompressoren und Dichtungen muss angesichts der hohen Drücke besondere Aufmerksamkeit gelten. Im ersten Kompressionsschritt wird das Ethylen mit etwa 5 MPa in das System eingespeist und auf 25 MPa verdichtet. Nach der ersten Phase der Verdichtung und der Zugabe von recyceltem Ethylen, wird der Druck auf 150 bis 350 MPa erhöht. Das Druckniveau wird durch ein Kontrollventil am Reaktorausgang ständig kontrolliert. Das polymerisierte Gemisch wird anschließend durch einen Wärmetauscher geführt und abgekühlt. Nachgeschaltet wird ein Pellet-Extruder. Danach wird das Polymerkörnung in einem Separator unter Druckverhältnissen von 25-30 MPa von Monomerresten befreit. Dieser Druckbereich stellt einen Kompromiss zwischen effektiver Separierung und Energieeffizienz dar. Die extrahierten Monomere können nach Kühlung und weiterer Separierung recycelt werden. Die restlichen im Roh-Kunststoff verbliebenen Monomere laufen nochmals durch Niederdruck-Separatoren, werden dort entfernt und als Recycling-Ethylen der ersten Kompressionsstufe wieder zugeführt. Das durch den Pelett-Extruder erzeugte Polymergranulat wird anschließend getrocknet, zwischengelagert und auf Qualität überprüft.
Zur Folienherstellung wird danach das Granulat auf einen Kalander gegeben, der typischerweise auf 3 oder 4 gegenläufigen Rollen besteht. Die Spurweite beträgt dabei 0,1 bis 0,5 mm. Es fallen bis zu 4% Kunststoffabfall an.
Transporte vom Werk zum Einbauort sind nicht berücksichtigt und sollten nach Bedarf nachträglich einbezogen werden.

Hintergrundsystem:
Strom: Die Stromerzeugung wird entsprechend der länderspezifischen Randbedingungen modelliert. Die landesspezifische Analyse beinhaltet:
1.: Spezifische Kraftwerke der verschiedenen fossilen Energieträger und der Einsatz erneuerbarer Energien sind entsprechend der länderspezifischen Energieträgermixe modelliert. Die Analyse bezieht Stromimporte aus den Nachbarländern, Transmissions-und Verteilungsverluste und den Eigenverbrauch im Kraftwerk und bei der Verteilung bzw. Speicherung, z. B. durch Pumpspeicherwerke, ein.
2.: Die landes-/regionalspezifischen Technologiestandards sowie die Erzeugung in Elektrizitätskraftwerken und/oder in speziellen Kraftwerken mit Kraft-Wärme-Kopplung (KWK) sind berücksichtigt.
3.: Die länderspezifische Energieträgerbereitstellung (mit Anteil der Importe und/oder Eigenversorgung) einschließlich der Energieträger-Eigenschaften (z. B. Elementar- und Energiegehalte) werden berücksichtigt.
4.: Die Förderung, Produktion, Verarbeitung und Transportprozesse werden entsprechend der Situation im jeweiligen Stromerzeugerland modelliert. Die unterschiedlichen Produktions- und Verarbeitungsverfahren (Emissionen und Wirkungsgrade) in den verschiedenen Energieerzeugerländern werden einbezogen, z. B. Rohöl-Veredelungsverfahren oder Abfackel-Raten an den Ölplattformen.
Thermische Energie, Prozessdampf: Die Erzeugung von Dampf und thermischer Energie in Heizkraftwerken wird entsprechend der landesspezifischen Situation (Emissionsgrenzwerte, Energieträgerbasis) modelliert.
Der Wirkungsgrad für die thermische Energieerzeugung beträgt per Definition 100% des Energieträgereinsatzes. Für Prozessdampf liegt der Wirkungsgrad im Bereich von 85-95%. Die zur Heizenergie-Erzeugung verwendeten Energieträger werden entsprechend der nationalen Situation modelliert (siehe Kapitel Strom oben).
Transporte: Alle relevanten und bekannten Transportprozesse in Form von See- und Binnenschiffsverkehr sowie Bahn-, Lkw- und der Leitungstransport sind enthalten.
Energieträger: Die Energieträger werden entsprechend der spezifischen Versorgungslage modelliert (siehe Kapitel Strom oben).
Raffinerieprodukte: Diesel, Benzin, technische Gase, Heizöl, Schmierstoffe und Rückstände, wie Bitumen, werden mit einem parametrierten länderspezifische Raffineriemodell modelliert. Das Raffinerie-Modell bezieht die länderspezifischen Veredelungsverfahren (z. B. Emissionspegel, interner Energieverbrauch etc.) und das länderspezifische Produktspektrum ein, das sich je nach Land stark unterscheiden kann. Die Rohöl-Förderung wird gemäß der länderspezifischen Situation mit den jeweiligen Energieträger-Eigenschaften modelliert.

## Technical purpose
Dieses Produkt kann im Baubereich verwendet werden.

## Safety margin
20 %. Produktsystem bis auf wenige Prozesse/Flüsse abgebildet. Technologische, zeitliche und geographische Repräsentativität teilweise gegeben.

## Reference product
- Fugendichtungsband (PE/PP): 1

## Inputs
- Erneuerbare Primärenergie als Energieträger (PERE) [MJ]: A1-A3 5.59486, C1 0, C2 0.0021792, C3 0.124881, D -7.13767
- Erneuerbare Primärenergie zur stofflichen Nutzung (PERM) [MJ]: A1-A3 0, C1 0, C2 0, C3 0, D 0
- Total erneuerbare Primärenergie (PERT) [MJ]: A1-A3 5.59486, C1 0, C2 0.0021792, C3 0.124881, D -7.13767
- Nicht-erneuerbare Primärenergie als Energieträger (PENRE) [MJ]: A1-A3 31.3022, C1 0, C2 0.037433, C3 55.8075, D -24.9575
- Nicht-erneuerbare Primärenergie zur stofflichen Nutzung (PENRM) [MJ]: A1-A3 55.2, C1 0, C2 0, C3 -55.2, D 0
- Total nicht erneuerbare Primärenergie (PENRT) [MJ]: A1-A3 86.5022, C1 0, C2 0.037433, C3 0.607465, D -24.9575
- Einsatz von Sekundärstoffen (SM) [kg]: A1-A3 0, C1 0, C2 0, C3 0, D 0
- Erneuerbare Sekundärbrennstoffe (RSF) [MJ]: A1-A3 0, C1 0, C2 0, C3 0, D 0
- Nicht erneuerbare Sekundärbrennstoffe (NRSF) [MJ]: A1-A3 0, C1 0, C2 0, C3 0, D 0
- Einsatz von Süßwasserressourcen (FW) [m3]: A1-A3 0.0104548, C1 0, C2 1.95166e-6, C3 0.00810531, D -0.00332953

## Outputs
- Gefährlicher Abfall zur Deponie (HWD) [kg]: A1-A3 3.16694e-8, C1 0, C2 1.39883e-9, C3 4.71041e-10, D -1.31954e-8
- Entsorgter nicht gefährlicher Abfall (NHWD) [kg]: A1-A3 0.0260473, C1 0, C2 6.57015e-6, C3 0.0152098, D -0.0117447
- Entsorgter radioaktiver Abfall (RWD) [kg]: A1-A3 0.00078183, C1 0, C2 3.94093e-8, C3 1.81109e-5, D -0.000862341
- Komponenten für die Wiederverwendung (CRU) [kg]: A1-A3 0, C1 0, C2 0, C3 0, D 0
- Stoffe zum Recycling (MFR) [kg]: A1-A3 0, C1 0, C2 0, C3 0, D 0
- Stoffe für die Energierückgewinnung (MER) [kg]: A1-A3 0, C1 1.2, C2 0, C3 0, D 0
- Exportierte elektrische Energie (EEE) [MJ]: A1-A3 0, C1 0, C2 0, C3 6.84433, D 0
- Exportierte thermische Energie (EET) [MJ]: A1-A3 0, C1 0, C2 0, C3 15.7635, D 0

## Impact indicators
- Globales Erwärmungspotenzial (GWP) [kg CO2 Äquiv.]: A1-A3 2.39578, C1 0, C2 0.00278506, C3 3.76848, D -1.70559
- Abbaupotenzial der stratosphärischen Ozonschicht (ODP) [kg R11 Äquiv.]: A1-A3 3.12267e-14, C1 0, C2 9.21867e-19, C3 7.07202e-16, D -3.94681e-14
- Versauerungspotential (AP) [kg SO2 Äquiv.]: A1-A3 0.00292014, C1 0, C2 5.62553e-6, C3 0.000340372, D -0.0014399
- Eutrophierungspotential (EP) [kg Phosphat Äquiv.]: A1-A3 0.000410959, C1 0, C2 1.33734e-6, C3 7.67259e-5, D -0.000272864
- Bildungspotenzial für troposphärisches Ozon (POCP) [kg Ethen Äquiv.]: A1-A3 0.000528642, C1 0, C2 -1.6854e-6, C3 2.4915e-5, D -0.000146668
- Potenzial für den abiotischen Abbau nicht fossiler Ressourcen (ADPE) [kg Sb Äquiv.]: A1-A3 5.17231e-7, C1 0, C2 2.34365e-10, C3 7.59378e-9, D -4.23728e-7
- Potenzial für den abiotischen Abbau fossiler Brennstoffe (ADPF) [MJ]: A1-A3 84.5282, C1 0, C2 0.0373323, C3 0.561749, D -22.7806

## Use advice
Der Datensatz repräsentiert ein Cradle to Gate Inventar. Er kann verwendet werden, um die Lieferkette des jeweiligen Produktes in einer repräsentativen Weise zu charakterisieren. Die Kombination mit einzelnen Einheitenprozessen und diesem Produkt ermöglicht die Erstellung von anwenderspezifischen (Produkt-) LCAs.

## Data sources
- GaBi Database Edition 2020, SP40
- GaBi database (all versions)
