# CLIMAFLEX® aus NMC NATUREFOAM®

Dataset: ILCD process, EPD, average dataset
Geography: BE
Reference year: 2017
Valid until: 2022
Classification: OEKOBAU.DAT: Dämmstoffe / Polyethylen / Schaum
Classification: IBUCategories: 02 Bauprodukte / Wärmedämmungsprodukte / Dämmstoffe aus Schaumkunststoffen
Method details: Dämmstoffe aus Schaumkunststoffen.pdf
Registration number: EPD-NMC-20170078-IBD3-DE
Owner: NMC S.A.
Compliance: DIN EN 15804; ISO 14025
Review: Accredited third party review by Institut Bauen und Umwelt e. V.
Amounts: rows without a unit in brackets have none in this file; such an amount is in the reference unit of its flow, which a separate flow dataset defines
copyright: true

## General comment
CLIMAFLEX® aus NMC NATUREFOAM® ist eine im Profibereich eingesetzte, auf Bio-Polyethylen basierende Rohrisolierung aus geschlossenzelligem Schaumstoff zur dauerhaften Energieeinsparung und Vermeidung von Kondensation. CLIMAFLEX® aus NMC NATUREFOAM® hält Lösungen bereit, die alle notwendigen Richtlinien und Normen für jede Einbauart befolgt.

Es sind Produkte mit Selbstklebestreifen (XT‑Sortiment) erhältlich. Diese Variante mit Selbstklebestreifen ist in den Berechnungen nicht erfasst.

## Technology and included processes
Der Herstellungsprozess besteht aus einer kontinuierlichen Extrusion. Feste Thermoplast-Pellets werden einem Aufschmelzbereich zugeführt, wo das Harz geschmolzen wird, um eine flüssige Thermoplastmasse zu bilden. Die Thermoplastmasse wird dann in einen Mischbereich gefördert, wo es gründlich mit einem Treibmittel unter Druck gemischt wird. Anschließend wird die Mischung aus Thermoplast-Harz und Treibmittel durch eine Druckgussform, die der Thermoplastmasse eine Form verleiht, in einen Bereich mit niedrigerem Druck (d. h. Luftdruck) gepresst. Das Treibmittel bläst sich auf und bildet die Schaumstoffzellen. Der Thermokunststoffschaum wird durch einen im Hauptstrom befindlichen Wasserkühler abgekühlt. Nach dem Wasserkühler werden die Profile auf die vorgegebenen Maße zugeschnitten. Qualitätssicherung Die Herstellung ist nach ISO 9001 für das Qualitätsmanagement zertifiziert und das Produkt ist für die CE-Kennzeichnung nach der Bauprodukteverordnung (CE‑Konformitätsbescheinigung Nr. 0749-CPR-BC1-571-4133-0001-01 und 0749-CPR-BC1-571-4133-0002-01) zertifiziert.
Technische Daten:
Es gelten die Leistungsdaten des Produkts gemäß Leistungserklärung im Hinblick auf die wesentlichen Eigenschaften gemäß EN 14313.
Deklarierte Einheit:
Diese Deklaration bezieht sich auf 1 m³ produzierte Rohrisolierung. Zur LCA-Berechnung wird, da das Produkt Schaum ist und Toleranzen hat, davon ausgegangen, dass die deklarierte Dichte der Durchschnitt der schlechtesten Fälle in den Produktkategorien ist.
Die Wärmeleitzahl (Lambda-Wert) und der R-Wert je 25 mm Stärke des Produkts sind unten als Zusatzinformation und als Hilfe für die Installateure angegeben.

## Technical purpose
CLIMAFLEX® aus NMC NATUREFOAM® isoliert Rohrleitungen in betriebstechnischen Anlagen der Industrie und für die technische Gebäudeausrüstung.

Polyethylenschaum ist ein kostengünstiges Material mit guten Isoliereigenschaften.
Produkte aus PE-Schaum haben ein gutes Preis-Leistungsverhältnis.
Polyethylenschaum lässt eine Steuerung der Kondensation in Frisch- und Abwasseranlagen zu.

## Reference product
- CLIMAFLEX® /M3: 1

## Inputs
- Erneuerbare Primärenergie als Energieträger (PERE) [MJ]: A1-A3 1366.93, A4 2.98175, A5 0, C2 0.131209, C3 0, C4 2.11948, D 0
- Erneuerbare Primärenergie zur stofflichen Nutzung (PERM) [MJ]: A1-A3 667.236, A4 0, A5 0, C2 0, C3 0, C4 -667.236, D 0
- Total erneuerbare Primärenergie (PERT) [MJ]: A1-A3 2034.17, A4 2.98175, A5 0, C2 0.131209, C3 0, C4 2.11948, D 0
- Nicht-erneuerbare Primärenergie als Energieträger (PENRE) [MJ]: A1-A3 951.432, A4 58.0567, A5 0, C2 2.55473, C3 0, C4 28.9246, D 0
- Nicht-erneuerbare Primärenergie zur stofflichen Nutzung (PENRM) [MJ]: A1-A3 248.483, A4 0, A5 0, C2 0, C3 0, C4 -248.483, D 0
- Total nicht erneuerbare Primärenergie (PENRT) [MJ]: A1-A3 1199.91, A4 58.0567, A5 0, C2 2.55473, C3 0, C4 28.9246, D 0
- Einsatz von Sekundärstoffen (SM) [kg]: A1-A3 9.88, A4 0, A5 0, C2 0, C3 0, C4 0, D 0
- Erneuerbare Sekundärbrennstoffe (RSF) [MJ]: A1-A3 0, A4 0, A5 0, C2 0, C3 0, C4 0, D 0
- Nicht erneuerbare Sekundärbrennstoffe (NRSF) [MJ]: A1-A3 0, A4 0, A5 0, C2 0, C3 0, C4 0, D 0
- Einsatz von Süßwasserressourcen (FW) [m^3]: A1-A3 0.293471, A4 0.00551729, A5 0, C2 0.000242783, C3 0, C4 6.92402e-5, D 0

## Outputs
- Gefährlicher Abfall zur Deponie (HWD) [kg]: A1-A3 0.00028657, A4 3.02764e-6, A5 0, C2 1.33229e-7, C3 0, C4 1.11838e-7, D 0
- Entsorgter nicht gefährlicher Abfall (NHWD) [kg]: A1-A3 7.39325, A4 0.00459614, A5 0, C2 0.000202249, C3 0, C4 27.0177, D 0
- Entsorgter radioaktiver Abfall (RWD) [kg]: A1-A3 0.0935605, A4 0.000120012, A5 0, C2 5.28101e-6, C3 0, C4 0.000438117, D 0
- Komponenten für die Wiederverwendung (CRU) [kg]: A1-A3 0, A4 0, A5 0, C2 0, C3 0, C4 0, D 0
- Stoffe zum Recycling (MFR) [kg]: A1-A3 0, A4 0, A5 0, C2 0, C3 0, C4 0, D 0
- Stoffe für die Energierückgewinnung (MER) [kg]: A1-A3 0, A4 0, A5 0, C2 0, C3 0, C4 0, D 0
- Exportierte elektrische Energie (EEE) [MJ]: A1-A3 0, A4 0, A5 0, C2 0, C3 0, C4 0, D 0
- Exportierte thermische Energie (EET) [MJ]: A1-A3 0, A4 0, A5 0, C2 0, C3 0, C4 0, D 0

## Impact indicators
- Globales Erwärmungspotenzial (GWP) [kg CO_(2)-Äq.]: A1-A3 -4.908, A4 4.1861, A5 0, C2 0.184104, C3 0, C4 1.94004, D 0
- Abbau Potential der stratosphärischen Ozonschicht (ODP) [kg CFC11-Äq.]: A1-A3 6.90969e-8, A4 3.40628e-12, A5 0, C2 1.4989e-13, C3 0, C4 4.76388e-12, D 0
- Versauerungspotenzial von Boden und Wasser (AP) [kg SO_(2)-Äq.]: A1-A3 0.817856, A4 0.019827, A5 0, C2 0.000809384, C3 0, C4 0.00535982, D 0
- Eutrophierungspotenzial (EP) [kg PO_(4)^(3)-Äq.]: A1-A3 0.557765, A4 0.00497444, A5 0, C2 0.000202234, C3 0, C4 0.0053127, D 0
- Bildungspotential für troposphärisches Ozon (POCP) [kg Ethen-Äq.]: A1-A3 0.161627, A4 -0.00818075, A5 0, C2 -0.000328667, C3 0, C4 0.000611386, D 0
- Potenzial für den abiotischen Abbau nicht fossiler Ressourcen (ADPE) [kg Sb-Äq.]: A1-A3 0.038741, A4 3.78493e-7, A5 0, C2 1.66552e-8, C3 0, C4 4.01443e-7, D 0
- Potenzial für den abiotischen Abbau fossiler Brennstoffe (ADPF) [MJ]: A1-A3 713.923, A4 57.7512, A5 0, C2 2.54129, C3 0, C4 27.8118, D 0

## Use advice
Gültigkeitsbereich:
Produktlinie CLIMAFLEX® aus NMC NATUREFOAM®
Wärmedämmstoffe für die technische Gebäudeausrüstung und für betriebstechnische Anlagen in der Industrie aus Polyethylenschaum (PEF) gemäß EN 14313. Diese Deklaration ist eine Umwelt-Produktdeklaration gemäß ISO 14025 und beschreibt die Umweltwirkungen des in Belgien hergestellten Produktes.
Bei diesem Dokument handelt es sich um eine vom Deutschen ins Englische übersetzte Umwelt-Produktdeklaration. Grundlage ist die englische Ursprungsversion EPD-NMC-20170078-IBD3-EN. Der Verifizierer hat keinen Einfluss auf die Qualität der Übersetzung.
Systemgrenze:
Die Datenerfassung bezieht sich auf die Jahresproduktion von 2016.

Modul A1 bis A3: Die LCA-Berechnung umfasst die Produktion der Rohstoffe, deren Transport zum Werk, das Mischen der Rohstoffe nach den entsprechenden Rezepturen, die Herstellung des Schaums und die Verpackung für den Versand. Die gesamte Produktion findet ausschließlich in Eynatten, Belgien statt.

Modul A4: Transport des Endprodukts zum Anwendungsort. Der durchschnittliche Transportweg wurde anhand eines gewichteten Wertes für die wichtigen NMC-Kunden berechnet, die mehr als 50 % des Absatzes in 2016 ausgemacht haben. Die Kapazitätsauslastung nach Volumen beträgt 100 %. In Anbetracht der geringen Produktdichte wurde jedoch die Kapazitätsauslastung nach Masse auf 10 % angenommen.

Modul A5: Die Produkte können bündig installiert werden; verbleibende Reststücke können in anderen Rohrbereichen verwendet werden. Die Berechnungen berücksichtigen keine Verluste durch Verschnitt. Der als Verpackung verwendete Karton wird einem Recyclingprozess zugeführt. Es wird angenommen, dass der verwendete Karton aus Altpapier hergestellt wurde. Somit werden die Umweltlasten für das Altpapierrecycling bereits in der Herstellungsphase A1-A3 berücksichtigt. Der Wert für die Umweltwirkungen in Modul A5 wird damit mit „0“ deklariert.

Modul B1-B7: Die Dämmstoffe bedürfen während ihrer Nutzung keiner Wartung, keinem Austausch oder Sanierung. Die Informationsmodule B1 – B7 werden nicht deklariert. Die Verwendung von Dämmstoffen hat Einfluss auf den Energieverbrauch des gesamten Heiz- und Kühlsystems. Dieser Aspekt wird in dieser Produktdeklaration nicht mit eingebezogen.

Modul C1: Der Rückbau erfolgt manuell. Daher sind damit keine Umweltlasten verbunden. Das Informationsmodul C1 wird nicht deklariert.

Modul C2: Für den Transport im End-of-Life Szenario wird eine durchschnittliche Entfernung von 100 km bis zur Deponie angenommen.

Modul C3: Mit dem gewählten End-of-life-Szenario von 100% Deponierung ist keine Vorbehandlung der Abfälle verbunden. Modul C3 wird nicht deklariert.

Modul C4: Die Umweltlasten für das Szenario der Deponierung werden in C4 deklariert. Das Produkt enthält Rohstoffe aus nachwachsenden Ressourcen. Bei der Berechnung der Umweltlasten für die Herstellung des Produkts wird die Aufnahme von CO2 aus der Atmosphäre berücksichtigt. Die Auswirkungen von (Bio-)Kunstoffen auf einer Deponie in den nächsten 100 Jahren kann heute nicht vollständig vorhergesehen werden. In dieser Deklaration wird angenommen, dass das eingebundene CO2 in der festen Matrix eingebunden verbleibt.

Modul D: Das End-of-life-Szenario des Verpackungsmaterials und des Produkts führt zu keinen Nutzen für das nachfolgende System. Recycling von Karton ist ein quasi geschlossener Kreislauf mit dem Herstellungsprozess. Das Produkt wird deponiert; Energie- oder Materialgewinne können nicht angenommen werden.

## Data sources
- CLIMAFLEX® aus NMC NATUREFOAM®.pdf
- GaBi Database (all versions)
- GaBi database SP29 2016
