# Zementestrich

Dataset: ILCD process, EPD, generic dataset
Geography: DE
Reference year: 2021
Valid until: 2022
Classification: oekobau.dat: Mineralische Baustoffe / Mörtel und Beton / Estrich trocken
Owner: Sphera Solutions GmbH
Compliance: EN 15804+A2
Review: Dependent internal review by Sphera Solutions GmbH; Independent external review by GaBi user forum
Amounts: rows without a unit in brackets have none in this file; such an amount is in the reference unit of its flow, which a separate flow dataset defines
copyright: true
licenseType: Free of charge for all users and uses
accessRestrictions: The license conditions as stated on https://www.oekobaudat.de/ apply.
accessRestrictions: Es gelten die Lizenzbedingungen wie sie auf https://www.oekobaudat.de/ genannt sind.

## General comment
Dieser Datensatz wurde nach dem European Standard EN 15804+A2 für Nachhaltiges Bauen modelliert. Ergebnisse werden in Modulen abgebildet, die den strukturierten Ausdruck von Ergebnissen über den gesamten Lebenszyklus zulassen.

## Geography
Der Datensatz bildet die länderspezifische Situation in Deutschland ab. Dabei werden Haupttechnologien, spezifische regionale Charakteristiken und ggf. Importstatistiken berücksichtigt.

## Time period
Jährlicher Durchschnitt

## Technology and included processes
Für die Herstellung von Zementestrich werden Gesteinskörnungen mit Bindemitteln (Zement) und Wasser gemischt. Der Zementeinsatz zeigt signifikanten Einfluss auf die Ökobilanz.

In der Entsorgungsphase wird ein manueller Rückbau (lastenfrei) in Modul C1 angenommen. Der Transport in Modul C2 zur Deponie erfolgt mit einem LKW (50km). In C3 wird, sofern relevant, eine Verpackung mit PE-Folie berücksichtigt (z.B. bei Mineralfaserprodukten, 0,0125 kg Folie je kg entsorgtes Material). In Modul C4 werden dem Produkt entsprechende, durchschnittliche Deponieemissionen (Bezugsraum Deutschland) ausgewiesen. Die Nutzung von Deponiegas wird nicht berücksichtigt.

## Technical purpose
Zementestrich wird wird als Ausgleichs- und Tragschicht im Bodenaufbau verwendet. Er wird als Trocken- oder Frischmörtel auf die Baustelle geliefert. Es bestehen verschiedenste Einbaumöglichkeiten und Ausführungsvarianten (z.B. "Heizestrich", oder "schwimmender Estrich").

## Safety margin
10 %. Produktsystem weitgehend vollständig abgebildet. Gute technologische, zeitliche und geographische Repräsentativität.

## Reference product
- Zementestrich: 1

## Inputs
- Erneuerbare Primärenergie als Energieträger (PERE) [MJ]: A1-A3 0.297848, C2 0.00250352, C4 0.0298181
- Erneuerbare Primärenergie zur stofflichen Nutzung (PERM) [MJ]: A1-A3 0, C2 0, C4 0
- Total erneuerbare Primärenergie (PERT) [MJ]: A1-A3 0.297848, C2 0.00250352, C4 0.0298181
- Nicht-erneuerbare Primärenergie als Energieträger (PENRE) [MJ]: A1-A3 1.16714, C2 0.0431358, C4 0.220791
- Nicht-erneuerbare Primärenergie zur stofflichen Nutzung (PENRM) [MJ]: A1-A3 0, C2 0, C4 0
- Total nicht-erneuerbare Primärenergie (PENRT) [MJ]: A1-A3 1.16714, C2 0.0431358, C4 0.220791
- Einsatz von Sekundärstoffen (SM) [kg]: A1-A3 0, C2 0, C4 0
- Erneuerbare Sekundärbrennstoffe (SF) [MJ]: A1-A3 0, C2 0, C4 0
- Nicht erneuerbare Sekundärbrennstoffe (NRSF) [MJ]: A1-A3 0, C2 0, C4 0
- Nettoeinsatz von Süßwasserressourcen (FW) [m3]: A1-A3 0.000219728, C2 2.22501e-6, C4 5.43855e-5

## Outputs
- Gefährlicher Abfall zur Deponie (HWD) [kg]: A1-A3 5.96944e-7, C2 1.80294e-12, C4 2.34898e-11
- Entsorgter nicht gefährlicher Abfall (NHWD) [kg]: A1-A3 0.0315436, C2 6.9631e-6, C4 1.10108
- Entsorgter radioaktiver Abfall (RWD) [kg]: A1-A3 3.92535e-5, C2 4.13944e-8, C4 2.27928e-6
- Komponenten für die Wiederverwendung (CRU) [kg]: A1-A3 0, C2 0, C4 0
- Stoffe zum Recycling (MFR) [kg]: A1-A3 0, C2 0, C4 0
- Stoffe für die Energierückgewinnung (MER) [kg]: A1-A3 0, C2 0, C4 0
- Exportierte elektrische Energie (EEE) [MJ]: A1-A3 0, C2 0, C4 0
- Exportierte thermische Energie (EET) [MJ]: A1-A3 0, C2 0, C4 0

## Impact indicators
- Globales Erwärmungspotenzial - total (GWP-total) [kg CO2 eq.]: A1-A3 0.182318, C2 0.00328302, C4 0.0162553
- Globales Erwärmungspotenzial - fossil (GWP-fossil) [kg CO2 eq.]: A1-A3 0.181436, C2 0.00326065, C4 0.0166455
- Globales Erwärmungspotenzial - biogen (GWP-biogenic) [kg CO2 eq.]: A1-A3 0.00077897, C2 1.47059e-6, C4 -0.000439177
- Globales Erwärmungspotenzial - luluc (GWP-luluc) [kg CO2 eq.]: A1-A3 0.000103053, C2 2.08997e-5, C4 4.89387e-5
- Abbaupotenzial der stratosphärischen Ozonschicht (ODP) [kg CFC-11 eq.]: A1-A3 3.21379e-14, C2 8.3268e-19, C4 6.53135e-17
- Versauerungspotenzial, kumulierte Überschreitung (AP) [Mole of H+ eq.]: A1-A3 0.000195443, C2 1.02241e-5, C4 0.000118483
- Eutrophierungspotenzial - Süßwasser (EP-freshwater) [kg P eq.]: A1-A3 1.4741e-7, C2 6.69276e-9, C4 2.80155e-8
- Eutrophierungspotenzial - Salzwasser (EP-marine) [kg N eq.]: A1-A3 7.10996e-5, C2 4.77293e-6, C4 3.07591e-5
- Eutrophierungspotenzial - Land (EP-terrestrial) [Mole of N eq.]: A1-A3 0.000769263, C2 5.32938e-5, C4 0.00033794
- Bildungspotenzial für troposphärisches Ozon (POCP) [kg NMVOC eq.]: A1-A3 0.000194254, C2 9.20431e-6, C4 9.32028e-5
- Potenzial für die Verknappung abiotischer Ressourcen nicht fossile Ressourcen (ADPE) [kg Sb eq.]: A1-A3 1.68329e-8, C2 2.83075e-10, C4 1.57775e-9
- Potenzial für die Verknappung abiotischer Ressourcen fossile Brennstoffe (ADPF) [MJ]: A1-A3 1.16696, C2 0.043134, C4 0.220674
- Wasser-Entzugspotenzial (Benutzer) (WDP) [m³ world equiv.]: A1-A3 0.00445215, C2 1.26504e-5, C4 0.00178142

## Use advice
Dieser Datensatz bezieht sich auf die Herstellung von 1 kg Zementestrich (Trockenmörtel). Die Trockenrohdichte beträgt 2400 kg/m³. Wärmeleitfähigkeit 1,4 W/mK, Druckfestigkeit 12 - 60 N/mm², je nach Aufbau. Der Datensatz kann näherungsweise für die Abschätzung von Trockenrohdichten von 2200 - 2600 kg verwendet werden. Auch die Abschätzung von Frischmörtel ist möglich, wenn der Wassergehalt (Massenanteil Wasser) bei der Massenermittlung abgezogen wird. Je kg Mörtel werden i.d.R. etwa 0,3 kg Wasser beigemischt.

Der Datensatz repräsentiert ein Cradle to Gate Inventar. Er kann verwendet werden, um die Lieferkette des jeweiligen Produktes in einer repräsentativen Weise zu charakterisieren. Die Kombination mit einzelnen Einheitenprozessen und diesem Produkt ermöglicht die Erstellung von anwenderspezifischen (Produkt-) LCAs

## Data sources
- GaBi databases
- Documentation of data quality management
- GaBi Database Edition 2021, CUP2021.01
- GaBi database (all versions)
