# EGGER OSB-Platten

Dataset: ILCD process, EPD, average dataset
Geography: RER
Reference year: 2018
Valid until: 2023
Classification: OEKOBAU.DAT: Holz / Holzwerkstoffe / OSB-Platte
Classification: IBUCategories: 02 Bauprodukte / Holzwerkstoffe / Holzwerkstoffe
Method details: Holzwerkstoffe.pdf
Generated by: Daxner & Merl GmbH
Registration number: EPD-EGG-20180107-IBD1-DE
Owner: Fritz EGGER GmbH & Co. OG
Compliance: DIN EN 15804; ISO 14025
Review: Accredited third party review by Institut Bauen und Umwelt e. V.
Amounts: rows without a unit in brackets have none in this file; such an amount is in the reference unit of its flow, which a separate flow dataset defines
copyright: true
licenseType: Free of charge for all users and uses
accessRestrictions: None

## General comment
EGGER OSB-Platten (Oriented Strand Board) sind kunstharzgebundene, dreischichtig aufgebaute Holzwerkstoffplatten aus orientiert gestreuten Strands (Mikrofurnieren) gemäß /EN 300/ „Platten aus langen, schlanken, ausgerichteten Spänen (OSB)“. Die Orientierung der Mittelschicht erfolgt dabei im 90°-Winkel zu den Deckschichten. Es wird überwiegend Nadelholz (Fichte, Kiefer) sowie bis zu 30% Laubholz eingesetzt.
Für das Inverkehrbringen des Produkts in der

EU/EFTA (mit Ausnahme der Schweiz) gilt die Bauproduktenverordnung /CPR (EU) Nr. 305/2011/. In Verbindung mit der Leistungserklärung nach

/EN 13986/:2004+ A1:2015:

· EGGER OSB 2 / OSB 3 / OSB 3 E0 / OSB 4 TOP / OSB/3 FSC

· EGGER Ergo Board

· EGGER Roofing Board,

Für die Verwendung gelten die jeweiligen nationalen Bestimmungen

· EGGER OS’Brace® (H2 / H3.1)

· EGGER OS’Floor™(H2)

· EGGER OSB3 JAS TOP

## Technology and included processes
1) Entrindung der Stämme 2) Zerspanung des Rundholzes zu „Strands“ (Mikro- furniere), separat für Deckschicht und Mittelschicht 3) Trocknung der Strands auf ca. 3-4 % Restfeuchte 4) Siebung der Strandfraktion von Deck- und Mittelschicht 5) Beleimung der Deck- und Mittelschicht mit Harzen 6) Streuung und Orientierung der Strands auf dem Formband 7) Verpressen der gestreuten Matte in einer konti- nuierlich arbeitenden Durchlaufpresse 8) Aufteilen und Besäumen des OSB-Stranges zu Rohplattenformaten 9) Abkühlen der Rohplattenformate im Kühlsternwender 10) Aufstapeln zu Großstapeln 11) Aufschneiden und Kantenbearbeitung der Roh- platten, Paketbildung und Verpackung mit Kartonage, teilweise zusätzlich PE-Folien und Stahlbändern
Technische Daten:
Für EGGER OSB-Platten mit CE-Kennzeichnung nach /EN 13986/ liegen Leistungserklärungen (DoP)mit den maßgebenden Daten vor unter: www.egger.com .

Des Weiteren gelten die nationalen Bestimmungen
nach /JAS Standard/ Structural Panels für EGGER OSB 3 JAS TOP und nach /AS/NZS 1604/ für EGGER OS’Brace® H2/H3.1 und EGGER OS’Floor™ H2.
Deklarierte Einheit:
Die vorliegende Umweltproduktdeklaration bezieht sich auf eine deklarierte Einheit von 1 m³ EGGER OSB-Produkten mit einer durchschnittlichen Rohdichte von 607 kg/m³ und einer Auslieferungsfeuchte von etwa 5 %.

## Technical purpose
EGGER OSB Platten werden im Bauwesen in nicht tragenden oder tragenden und aussteifenden Bauteilen Dach, Wand, Decke gemäß /EN 1995-1-1/ in den Nutzungsklassen 1 und 2 (Feuchtbereich; unter Dach) eingesetzt. Des Weiteren können OSB-Platten für nichttragende Anwendungen im Innenausbau, Trockenbau, Messe- und Ladenbau bzw. als Holzverpackung und Betonschalung eingesetzt werden.

## Reference product
- OSB-Platte (): 1

## Inputs
- Erneuerbare Primärenergie als Energieträger (PERE) [MJ]: A1-A3 3297.53, C3 0, D -2240
- Erneuerbare Primärenergie zur stofflichen Nutzung (PERM) [MJ]: A1-A3 9702.47, C3 -9702.47, D 0
- Total erneuerbare Primärenergie (PERT) [MJ]: A1-A3 13000, C3 36.6, D -2240
- Nicht-erneuerbare Primärenergie als Energieträger (PENRE) [MJ]: A1-A3 3479.18, C3 0, D -9710
- Nicht-erneuerbare Primärenergie zur stofflichen Nutzung (PENRM) [MJ]: A1-A3 920.821, C3 -920.821, D 0
- Total nicht erneuerbare Primärenergie (PENRT) [MJ]: A1-A3 4400, C3 97.6, D -9710
- Einsatz von Sekundärstoffen (SM) [kg]: A1-A3 0, C3 0, D 0
- Erneuerbare Sekundärbrennstoffe (RSF) [MJ]: A1-A3 27.9, C3 0, D 9702.47
- Nicht erneuerbare Sekundärbrennstoffe (NRSF) [MJ]: A1-A3 0, C3 0, D 920.821
- Einsatz von Süßwasserressourcen (FW) [m^3]: A1-A3 0.67, C3 0.0499, D -2.27

## Outputs
- Gefährlicher Abfall zur Deponie (HWD) [kg]: A1-A3 0.000202, C3 4.57e-8, D -3.5e-6
- Entsorgter nicht gefährlicher Abfall (NHWD) [kg]: A1-A3 0.986, C3 0.0687, D 0.225
- Entsorgter radioaktiver Abfall (RWD) [kg]: A1-A3 0.0483, C3 0.0161, D -0.988
- Komponenten für die Wiederverwendung (CRU) [kg]: A1-A3 0, C3 0, D 0
- Stoffe zum Recycling (MFR) [kg]: A1-A3 0, C3 0, D 0
- Stoffe für die Energierückgewinnung (MER) [kg]: A1-A3 0, C3 606.705, D 0
- Exportierte elektrische Energie (EEE) [MJ]: A1-A3 0, C3 0, D 0
- Exportierte thermische Energie (EET) [MJ]: A1-A3 0, C3 0, D 0

## Impact indicators
- Globales Erwärmungspotenzial (GWP) [kg CO_(2)-Äq.]: A1-A3 -753, C3 967, D -549
- Abbau Potential der stratosphärischen Ozonschicht (ODP) [kg CFC11-Äq.]: A1-A3 9.43e-11, C3 2.37e-11, D -1.45e-9
- Versauerungspotenzial von Boden und Wasser (AP) [kg SO_(2)-Äq.]: A1-A3 0.919, C3 0.0139, D -0.0386
- Eutrophierungspotenzial (EP) [kg PO_(4)^(3)-Äq.]: A1-A3 0.219, C3 0.00138, D 0.00241
- Bildungspotential für troposphärisches Ozon (POCP) [kg Ethen-Äq.]: A1-A3 0.522, C3 0.000949, D 0.109
- Potenzial für den abiotischen Abbau nicht fossiler Ressourcen (ADPE) [kg Sb-Äq.]: A1-A3 8.25e-5, C3 2.72e-6, D -0.000175
- Potenzial für den abiotischen Abbau fossiler Brennstoffe (ADPF) [MJ]: A1-A3 4280, C3 56.9, D -7220

## Use advice
Gültigkeitsbereich:
Dieses Dokument bezieht sich auf OSB-Platten für das Bauwesen, welche in folgenden Werken der Gruppe hergestellt werden:

Egger Holzwerkstoffe Wismar GmbH & Co. KG, Am Haffeld 1, 23970 Wismar, Deutschland

SC Egger Romania SRL, Str. Austriei 2, 725400 Radauti, jud. Suceava, Rumänien
Systemgrenze:
Die Ökobilanz der durchschnittlichen EGGER OSB-Platten beinhaltet eine cradle-to-gate (Wiege bis zum Werkstor) Betrachtung der auftretenden Umweltwirkungen mit Optionen. Die folgenden Lebenszyklusphasen werden in der Analyse berücksichtigt:

Modul A1-A3 | Produktstadium

Das Produktstadium beinhaltet die Aufwendungen der Rohstoffversorgung (Rundholz, Herstellung des Leimsystems, Hilfsstoffe, etc.) sowie der damit verbundenen Transporte bezogen auf die Produktionsstandorte in Wismar und Radauti. Innerhalb der Werksgrenzen werden der Holzplatz, die Strand-Aufbereitung, OSB-Produktion, Platten-Endfertigung bis zum Lager bzw. Versand betrachtet. Die Bereitstellung thermischer und elektrischer Energie erfolgt bei beiden Standorten über werkseigene Biomassekraftwerke. Darüber hinaus produziert der Standort in Radauti das für die OSB-Platten eingesetzte Leimsystem selbst. Somit wurde die Leimproduktion in Form von spezifisch erhobenen Vordergrunddaten abgebildet.

Modul C3 | Abfallbehandlung

Das Modul C3 deklariert die biogenen Kohlendioxid-Emissionen in der energetischen Verwertung am Lebensende des Produktes. Darüber hinaus wird das Hacken nach Ausbau der Produkte betrachtet.

Modul D | Gutschriften und Lasten außerhalb der Systemgrenzen

In Modul D wird die energetische Verwertung des Produktes am Lebensende inklusive entsprechenden energetischen Substitutionspotentialen in Form eines europäischen Durchschnittsszenarios beschrieben.

## Data sources
- GaBi Database (all versions)
- GaBi database SP36 2018
