# WDVS Verklebung und Beschichtung Leichtputz mineralisch; mineral light plaster

Dataset: ILCD process, EPD, generic dataset
Geography: DE
Reference year: 2021
Valid until: 2022
Classification: oekobau.dat: Dämmstoffe / Wärmedämmverbundsystem / Wärmedämmverbundsystem
Owner: Sphera Solutions GmbH
Compliance: EN 15804+A2
Review: Dependent internal review by Sphera Solutions GmbH; Independent external review by GaBi user forum
Amounts: rows without a unit in brackets have none in this file; such an amount is in the reference unit of its flow, which a separate flow dataset defines
copyright: true
licenseType: Free of charge for all users and uses
accessRestrictions: The license conditions as stated on https://www.oekobaudat.de/ apply.
accessRestrictions: Es gelten die Lizenzbedingungen wie sie auf https://www.oekobaudat.de/ genannt sind.

## General comment
Dieser Datensatz wurde nach dem European Standard EN 15804+A2 für Nachhaltiges Bauen modelliert. Ergebnisse werden in Modulen abgebildet, die den strukturierten Ausdruck von Ergebnissen über den gesamten Lebenszyklus zulassen.

## Geography
Der Datensatz bildet die länderspezifische Situation in Deutschland ab. Dabei werden Haupttechnologien, spezifische regionale Charakteristiken und ggf. Importstatistiken berücksichtigt.

## Time period
Jährlicher Durchschnitt

## Technology and included processes
Bei dem WDVS handelt es sich um ein Außenwand-Dämmsystem. Das Dämmmaterial und das Wandmaterial sind nicht im Prozess berücksichtigt. Das System weist folgende Spezifikationen auf: Außenwand-Dämmsystem (Mineralischer Leichtputz Kalk-Zement: Kleber (mineralisch) 4,0 kg/m2, Glasfasergewebe 0,18 kg/m2, Armierung (leicht, mineralisch) 4,0 kg/m2, Leichtputz (Kalk-Zement) 3,0 kg/m2, Dispersionsfarbe 0,22 kg/m2. Dieser Datensatz umfasst die Lebenswegabschnitte cradle to gate, d.h. die Herstellung von Vorprodukten und Verpackungen ist berücksichtigt.

In der Entsorgungsphase wird ein manueller Rückbau (lastenfrei) in Modul C1 angenommen. Der Transport in Modul C2 zur Deponie erfolgt mit einem LKW (50km). In C3 wird, sofern relevant, eine Verpackung mit PE-Folie berücksichtigt (z.B. bei Mineralfaserprodukten, 0,0125 kg Folie je kg entsorgtes Material). In Modul C4 werden dem Produkt entsprechende, durchschnittliche Deponieemissionen (Bezugsraum Deutschland) ausgewiesen. Die Nutzung von Deponiegas wird nicht berücksichtigt.

## Technical purpose
Dieses Produkt kann im Baubereich verwendet werden.

## Safety margin
10 %. Produktsystem weitgehend vollständig abgebildet. Gute technologische, zeitliche und geographische Repräsentativität.

## Reference product
- WDVS Verklebung und Beschichtung Leichtputz mineralisch: 1

## Inputs
- Erneuerbare Primärenergie als Energieträger (PERE) [MJ]: A1-A3 11.2862, C2 0.0280895, C3 0, C4 0.33456
- Erneuerbare Primärenergie zur stofflichen Nutzung (PERM) [MJ]: A1-A3 0, C2 0, C3 0, C4 0
- Total erneuerbare Primärenergie (PERT) [MJ]: A1-A3 11.2862, C2 0.0280895, C3 0, C4 0.33456
- Nicht-erneuerbare Primärenergie als Energieträger (PENRE) [MJ]: A1-A3 33.2705, C2 0.483984, C3 17.6, C4 2.47727
- Nicht-erneuerbare Primärenergie zur stofflichen Nutzung (PENRM) [MJ]: A1-A3 16, C2 0, C3 -16, C4 0
- Total nicht-erneuerbare Primärenergie (PENRT) [MJ]: A1-A3 49.2705, C2 0.483984, C3 1.6, C4 2.47727
- Einsatz von Sekundärstoffen (SM) [kg]: A1-A3 0, C2 0, C3 0, C4 0
- Erneuerbare Sekundärbrennstoffe (SF) [MJ]: A1-A3 0.304376, C2 0, C3 0, C4 0
- Nicht erneuerbare Sekundärbrennstoffe (NRSF) [MJ]: A1-A3 5.59368, C2 0, C3 0, C4 0
- Nettoeinsatz von Süßwasserressourcen (FW) [m3]: A1-A3 0.019658, C2 2.49646e-5, C3 0, C4 0.000610206

## Outputs
- Gefährlicher Abfall zur Deponie (HWD) [kg]: A1-A3 3.01351e-8, C2 2.0229e-11, C3 0, C4 2.63556e-10
- Entsorgter nicht gefährlicher Abfall (NHWD) [kg]: A1-A3 0.240307, C2 7.8126e-5, C3 0, C4 12.3541
- Entsorgter radioaktiver Abfall (RWD) [kg]: A1-A3 0.000947877, C2 4.64446e-7, C3 0, C4 2.55735e-5
- Komponenten für die Wiederverwendung (CRU) [kg]: A1-A3 0, C2 0, C3 0, C4 0
- Stoffe zum Recycling (MFR) [kg]: A1-A3 0, C2 0, C3 0, C4 0
- Stoffe für die Energierückgewinnung (MER) [kg]: A1-A3 0, C2 0, C3 0, C4 0
- Exportierte elektrische Energie (EEE) [MJ]: A1-A3 0, C2 0, C3 0, C4 0
- Exportierte thermische Energie (EET) [MJ]: A1-A3 0, C2 0, C3 0, C4 0

## Impact indicators
- Globales Erwärmungspotenzial - total (GWP-total) [kg CO2 eq.]: A1-A3 4.87665, C2 0.0368355, C3 0.13, C4 0.182384
- Globales Erwärmungspotenzial - fossil (GWP-fossil) [kg CO2 eq.]: A1-A3 5.00491, C2 0.0365845, C3 0, C4 0.186763
- Globales Erwärmungspotenzial - biogen (GWP-biogenic) [kg CO2 eq.]: A1-A3 -0.133283, C2 1.65e-5, C3 0.13, C4 -0.00492757
- Globales Erwärmungspotenzial - luluc (GWP-luluc) [kg CO2 eq.]: A1-A3 0.0050142, C2 0.000234495, C3 0, C4 0.000549092
- Abbaupotenzial der stratosphärischen Ozonschicht (ODP) [kg CFC-11 eq.]: A1-A3 9.47818e-13, C2 9.34267e-18, C3 0, C4 7.32818e-16
- Versauerungspotenzial, kumulierte Überschreitung (AP) [Mole of H+ eq.]: A1-A3 0.010252, C2 0.000114715, C3 0, C4 0.00132938
- Eutrophierungspotenzial - Süßwasser (EP-freshwater) [kg P eq.]: A1-A3 2.68307e-5, C2 7.50928e-8, C3 0, C4 3.14334e-7
- Eutrophierungspotenzial - Salzwasser (EP-marine) [kg N eq.]: A1-A3 0.00302191, C2 5.35523e-5, C3 0, C4 0.000345117
- Eutrophierungspotenzial - Land (EP-terrestrial) [Mole of N eq.]: A1-A3 0.0340496, C2 0.000597956, C3 0, C4 0.00379169
- Bildungspotenzial für troposphärisches Ozon (POCP) [kg NMVOC eq.]: A1-A3 0.0080285, C2 0.000103272, C3 0, C4 0.00104574
- Potenzial für die Verknappung abiotischer Ressourcen nicht fossile Ressourcen (ADPE) [kg Sb eq.]: A1-A3 1.74131e-5, C2 3.1761e-9, C3 0, C4 1.77023e-8
- Potenzial für die Verknappung abiotischer Ressourcen fossile Brennstoffe (ADPF) [MJ]: A1-A3 50.8517, C2 0.483963, C3 0, C4 2.47596
- Wasser-Entzugspotenzial (Benutzer) (WDP) [m³ world equiv.]: A1-A3 0.443144, C2 0.000141938, C3 0, C4 0.0199875

## Use advice
Der Datensatz repräsentiert ein Cradle to Gate Inventar. Er kann verwendet werden, um die Lieferkette des jeweiligen Produktes in einer repräsentativen Weise zu charakterisieren. Die Kombination mit einzelnen Einheitenprozessen und diesem Produkt ermöglicht die Erstellung von anwenderspezifischen (Produkt-) LCAs.

## Data sources
- Technische Systeminfo 4, Wärmedämmverbundsysteme zum Thema Ökobilanz, 1999
- Documentation of data quality management
- GaBi Database Edition 2021, CUP2021.01
- GaBi database (all versions)
