# Schüco AWS 120 CC.SI+ Fenstersystem Rahmenprofil (ohne Dreifachverglasung); 59,6 kg/m²

Dataset: ILCD process, EPD, specific dataset
Geography: AT
Reference year: 2020
Valid until: 2025
Classification: OEKOBAU.DAT: Komponenten von Fenstern und Vorhangfassaden / Rahmen / Profile / Aluminium thermisch getrennt
Synonyms: Fenster, Profil
Method details: PKR Bau EPD GmbH PKR-Code: 2.21.1 Stand 07.06.2019 "Fenster Tueren Glasfassadenelemente"
Generated by: IBO Institut für Baubiologie und Bauökologie
Registration number: BAU-EPD-ALUKÖNIGSTAHL-2020-1-ECOINVENT-ADS-ADUP
Owner: AluKönigStahl GmbH
Compliance: EN 15804; ISO 14025
Review: Independent external review by Bau EPD GmbH
Amounts: rows without a unit in brackets have none in this file; such an amount is in the reference unit of its flow, which a separate flow dataset defines
copyright: true
licenseType: Free of charge for all users and uses
accessRestrictions: Keine

## General comment
Aluminium-Rahmenprofil für Fenster (konzipiert für Dreifachverglasung) im Format 1,23 x 1,48 m².
Als funktionale Einheit wurde ein (virtueller) m² Rahmen festgelegt. Es handelt sich dabei nicht um die Menge
Rahmen pro m² Produkt, sondern um 1 m² Verglasung bzw. um einen (virtuellen) m² Rahmen, d.h. ein beispielsweise 10 cm breiter und 1 m langer Rahmen wird mit dem Faktor 10 auf 1 m² Rahmen umgerechnet.

## Time period
Die Sachbilanzdaten repräsentieren die Produktion der betrachteten
Schüco Fenstersysteme in Österreich zum Zeitpunkt der
Deklarationserstellung im Jahr 2020

## Technology and included processes
Rahmenprofil aus Aluminium für Fenster (konzipiert für Dreifach-Verglasung im Format 1,23 x 1,48 m².
Als funktionale Einheit wurde ein (virtueller m² Rahmen) festgelegt.

## Technical purpose
Die Produkte kommen im ein- und mehrgeschossigen Wohnbau und in Nichtwohngebäuden im Innen- und Außenbereich zur Anwendung.

## Scenarios
- Recycling: 100% Recycling

## Reference product
- Schüco AWS 120 CC.SI+ Fenstersystem Rahmenprofil (ohne Dreifachverglasung): 1

## Inputs
- Erneuerbare Primärenergie als Energieträger (PERE) / Uso de energía primaria renovable excluyendo los recursos de energía primaria renovable utilizada como materia prima (PERE) [MJ]: C1 (Recycling) 0.275009, C2 (Recycling) 0.277044, C3 (Recycling) 0.472017, C4 (Recycling) 0, D (Recycling) -1055.8, A1-A3 773.311, A4 0.939944, A5 0.15363
- Erneuerbare Primärenergie zur stofflichen Nutzung (PERM) / Uso de energía primaria renovable utilizada como materia prima (PERM) [MJ]: C1 (Recycling) 0, C2 (Recycling) 0, C3 (Recycling) 0, C4 (Recycling) 0, D (Recycling) 0, A1-A3 0, A4 0, A5 0
- Total erneuerbare Primärenergie (PERT) / Uso total de la energía primaria renovable (energía primaria y recursos de energía primaria renovable utilizada como materia prima) (PERT) [MJ]: C1 (Recycling) 0.275009, C2 (Recycling) 0.277044, C3 (Recycling) 0.472017, C4 (Recycling) 0, D (Recycling) -1055.8, A1-A3 773.311, A4 0.939944, A5 0.15363
- Nicht-erneuerbare Primärenergie als Energieträger (PENRE) / Uso de energía primaria no renovable, excluyendo los recursos de energía primaria no renovable utilizada como materia prima (PENRE) [MJ]: C1 (Recycling) 49.1399, C2 (Recycling) 27.8149, C3 (Recycling) 17.7125, C4 (Recycling) 0, D (Recycling) -2397.85, A1-A3 7246.77, A4 94.3692, A5 3.18608
- Nicht-erneuerbare Primärenergie zur stofflichen Nutzung (PENRM) / Uso de la energía primaria no renovable utilizada como materia prima (PENRM) [MJ]: C1 (Recycling) 0, C2 (Recycling) 0, C3 (Recycling) 0, C4 (Recycling) 0, D (Recycling) 0, A1-A3 742.524, A4 0, A5 0
- Total nicht erneuerbare Primärenergie (PENRT) / Uso total de la energía primaria no renovable (energía primaria y recursos de energía primaria renovable utilizada como materia prima) (PENRT) [MJ]: C1 (Recycling) 49.1399, C2 (Recycling) 27.8149, C3 (Recycling) 17.7125, C4 (Recycling) 0, D (Recycling) -2397.85, A1-A3 7989.29, A4 94.3692, A5 3.18608
- Einsatz von Sekundärstoffen (SM) / Uso de materiales secundarios (SM) [kg]: C1 (Recycling) 0, C2 (Recycling) 0, C3 (Recycling) 0, C4 (Recycling) 0, D (Recycling) 0, A1-A3 17.8193, A4 0, A5 0
- Erneuerbare Sekundärbrennstoffe (RSF) / Uso de combustibles secundarios renovables (RSF) [MJ]: C1 (Recycling) 0, C2 (Recycling) 0, C3 (Recycling) 0, C4 (Recycling) 0, D (Recycling) 0, A1-A3 0, A4 0, A5 0
- Nicht erneuerbare Sekundärbrennstoffe (NRSF) / Uso de combustibles secundarios no renovables (NRSF) [MJ]: C1 (Recycling) 0, C2 (Recycling) 0, C3 (Recycling) 0, C4 (Recycling) 0, D (Recycling) 0, A1-A3 0, A4 0, A5 0
- Einsatz von Süßwasserressourcen (FW) / Uso neto de recursos de agua dulce (FW) [m3]

## Outputs
- Gefährlicher Abfall zur Deponie (HWD) / Residuos peligrosos eliminados (HWD) [kg]: C1 (Recycling) 2.1913e-5, C2 (Recycling) 1.74722e-5, C3 (Recycling) 5.81715e-5, C4 (Recycling) 0, D (Recycling) 0.183542, A1-A3 0.185248, A4 5.9279e-5, A5 3.22307e-6
- Entsorgter nicht gefährlicher Abfall (NHWD) / Residuos no peligrosos eliminados (NHWD) [kg]: C1 (Recycling) 0.0535698, C2 (Recycling) 1.29924, C3 (Recycling) 2.0186, C4 (Recycling) 0, D (Recycling) -51.4729, A1-A3 96.5423, A4 4.408, A5 0.0269807
- Entsorgter radioaktiver Abfall (RWD) / Residuos radiactivos eliminados (RWD) [kg]: C1 (Recycling) 0.000681443, C2 (Recycling) 0.000375266, C3 (Recycling) 8.20211e-5, C4 (Recycling) 0, D (Recycling) -0.0267889, A1-A3 0.0325874, A4 0.00127319, A5 2.22654e-5
- Komponenten für die Wiederverwendung (CRU) / Componentes para su reutilización (CRU) [kg]: C1 (Recycling) 0, C2 (Recycling) 0, C3 (Recycling) 0, C4 (Recycling) 0, D (Recycling) 0, A1-A3 0, A4 0, A5 0
- Stoffe zum Recycling (MFR) / Materiales para el reciclaje (MFR) [kg]: C1 (Recycling) 0, C2 (Recycling) 0, C3 (Recycling) 45.0419, C4 (Recycling) 0, D (Recycling) -45.0419, A1-A3 0, A4 0, A5 0
- Stoffe für die Energierückgewinnung (MER) / Materiales para valorización energética (recuperación de energía) (MER) [kg]: C1 (Recycling) 0, C2 (Recycling) 0, C3 (Recycling) 25.7124, C4 (Recycling) 0, D (Recycling) -25.7124, A1-A3 0, A4 0, A5 0
- Exportierte elektrische Energie (EEE) / Energía exportada electrica (EEE) [MJ]: C1 (Recycling) 0, C2 (Recycling) 0, C3 (Recycling) 42.0764, C4 (Recycling) 0, D (Recycling) -42.0764, A1-A3 0, A4 0, A5 0
- Exportierte thermische Energie (EET) / Energía exportada termal (EET) [MJ]: C1 (Recycling) 0, C2 (Recycling) 0, C3 (Recycling) 371.262, C4 (Recycling) 0, D (Recycling) -371.262, A1-A3 0, A4 0, A5 0

## Impact indicators
- Globales Erwärmungspotenzial (GWP) / Potencial de calentamiento global (GWP) [kg CO2-Äqv.]: C1 (Recycling) 3.35631, C2 (Recycling) 1.78733, C3 (Recycling) 73.6362, C4 (Recycling) 0, D (Recycling) -180.743, A1-A3 637.41, A4 6.06428, A5 0.276076
- Abbau Potential der stratosphärischen Ozonschicht (ODP) / Potencial de agotamiento de la capa de ozono estratosférico (ODP) [kg R11 eq.]: C1 (Recycling) 6.09544e-7, C2 (Recycling) 3.33725e-7, C3 (Recycling) 1.9274e-7, C4 (Recycling) 0, D (Recycling) -1.56136e-5, A1-A3 3.08215e-5, A4 1.13225e-6, A5 2.47594e-8
- Versauerungspotenzial von Boden und Wasser (AP) / Potencial de acidificación del suelo y de los recursos de agua (AP) [kg SO2-Äqv.]: C1 (Recycling) 0.0255086, C2 (Recycling) 0.00914068, C3 (Recycling) 0.0168333, C4 (Recycling) 0, D (Recycling) -1.23763, A1-A3 3.40313, A4 0.0310121, A5 0.00245969
- Eutrophierungspotenzial (EP) / Potencial de eutrofización (EP) [kg Phosphat-Äqv.]: C1 (Recycling) 0.00593998, C2 (Recycling) 0.00220924, C3 (Recycling) 0.0116954, C4 (Recycling) 0, D (Recycling) -0.43327, A1-A3 1.13579, A4 0.00749541, A5 0.000360568
- Bildungspotential für troposphärisches Ozon (POCP) / Potencial de formación de ozono troposférico (POCP) [kg Ethen-Äqv.]: C1 (Recycling) 0.00310197, C2 (Recycling) 0.00100337, C3 (Recycling) 0.000518913, C4 (Recycling) 0, D (Recycling) -0.126572, A1-A3 0.326733, A4 0.00340418, A5 0.000120849
- Potenzial für den abiotischen Abbau nicht fossiler Ressourcen (ADPE) / Potencial de agotamiento de recursos abióticos para recursos no fósiles (ADPE) [kg Sb-Äqv.]: C1 (Recycling) 1.1335e-6, C2 (Recycling) 5.36509e-6, C3 (Recycling) 2.02111e-6, C4 (Recycling) 0, D (Recycling) -0.00400653, A1-A3 0.0210653, A4 1.82024e-5, A5 1.42113e-6
- Potenzial für den abiotischen Abbau fossiler Brennstoffe (ADPF) / Potencial de agotamiento de recursos abióticos para recursos fósiles (ADPF) [MJ]: C1 (Recycling) 48.6857, C2 (Recycling) 27.3753, C3 (Recycling) 17.2319, C4 (Recycling) 0, D (Recycling) -1612.58, A1-A3 7240.13, A4 92.8778, A5 3.00788

## Data sources
- ecoinvent 3.5 database
- ecoinvent database (general)
- Software: SimaPro 9.0
