# Tür - Hörmann KG Freisen - Stahl-Objekttür T30; 38.44 kg/m²

Dataset: ILCD process, EPD, specific dataset
Geography: DE
Reference year: 2019
Valid until: 2025
Classification: Komponenten von Fenstern und Vorhangfassaden / Türen und Tore / Stahl
Classification: OEKOBAU.DAT: Komponenten von Fenstern und Vorhangfassaden / Türen und Tore / Stahl
Synonyms: Stahl-Objekttüren; T30; H3-1 OD; H 3 OD; H 3 G; H 3 VM; RS 55; D 65 OD; D 65; H 3-1 OD; H3 OD; H3 G; H3 VM; D65 OD, D65
Method details: EPD Stahl-Objekttüren; Produktkategorieregeln Teil A; Produktkategorieregeln Teil B – für Türen und Tore
Owner: Hörmann KG Freisen
Compliance: EN 15804
Review: Independent external review by Patrick Wortner
Amounts: rows without a unit in brackets have none in this file; such an amount is in the reference unit of its flow, which a separate flow dataset defines
copyright: true

## General comment
A1-A3 sowie Module A4, A5, B1, B2, B3, B4, B6, B7, C1, C2, C3, C4, D. Das Umweltprofil beinhaltet die Aufwendungen für die Lebenszyklus-Stadien cradle to gate mit Optionen (Modul A1-A3). Die Herstellung der Verpackung wurde innerhalb der Module A1-A3 berücksichtigt.

## Geography
Dieser Datensatz repräsentiert die Situation des Unternehmens Hörmann KG Freisen in 66629 Freisen im Hinblick auf die wichtigsten Technologien und die gesetzlichen Rahmenbedingungen.

## Time period
jährlicher Durchschnitt

## Technology and included processes
Die Ökobilanzergebnisse umfassen die Lebenszyklusstadien der Herstellung der Vorprodukte bis hin zur Rohstoffgewinnung und Verarbeitungsprozesse von als Input dienenden Sekundärstoffen (z.B. Recyclingprozesse), deren Transporte zum Werk sowie die Produktion selbst, einschließlich der Bereitstellung von allen Hilfs- und Betriebsstoffen, Energie, sowie die vollständige Abfallbehandlung oder die Deponierung der Restabfälle während des Stadiums der Produktion. Die Module A1, A2 und A3 sind hier als ein aggregiertes Modul A1-A3 ausgewiesen. Falls für diesen Datensatz weitere Module berechnet wurden, sind diese separat zu finden und können für eine Betrachtung des gesamten Lebenszyklus zusammengeführt werden.

## Technical purpose
Stahl-Objekttüren für den Objektbau, für Innen- und Außenanwendung.

## Reference product
- Tür - Hörmann KG Freisen - Stahl-Objekttür T30: 1

## Inputs
- Einsatz von Süßwasserressourcen (FW) [m3]: A1-A3 0.113, A4 0.000633, A5 0.0216, B1 0, B2 0.125, B3 0, B4 0, B6 0, B7 0, C1 0, C2 0.000215, C3 0.00335, C4 -0.00692, D -0.0381
- Nicht-erneuerbare Primärenergie als Energieträger (PENRE) [MJ]: A1-A3 959, A4 0, A5 0, B1 0, B2 0, B3 0, B4 0, B6 0, B7 0, C1 0, C2 0, C3 0, C4 0, D 0
- Nicht-erneuerbare Primärenergie zur stofflichen Nutzung (PENRM) [MJ]: A1-A3 10.8, A4 0, A5 -0.68, B1 0, B2 0, B3 0, B4 0, B6 0, B7 0, C1 0, C2 0, C3 -9.23, C4 -0.49, D 0
- Nicht erneuerbare Sekundärbrennstoffe (NRSF) [MJ]: A1-A3 1.13e-28, A4 0, A5 0, B1 0, B2 0, B3 0, B4 0, B6 0, B7 0, C1 0, C2 0, C3 0, C4 0, D 0
- Erneuerbare Primärenergie als Energieträger (PERE) [MJ]: A1-A3 170, A4 0, A5 78.16, B1 0, B2 0, B3 0, B4 0, B6 0, B7 0, C1 0, C2 0, C3 0, C4 0, D 0
- Erneuerbare Primärenergie zur stofflichen Nutzung (PERM) [MJ]: A1-A3 77.8, A4 0, A5 -77.8, B1 0, B2 0, B3 0, B4 0, B6 0, B7 0, C1 0, C2 0, C3 0, C4 0, D 0
- Erneuerbare Sekundärbrennstoffe (RSF) [MJ]: A1-A3 7.45e-30, A4 0, A5 0, B1 0, B2 0, B3 0, B4 0, B6 0, B7 0, C1 0, C2 0, C3 0, C4 0, D 0
- Einsatz von Sekundärstoffen (SM) [kg]: A1-A3 0, A4 0, A5 0, B1 0, B2 0, B3 0, B4 0, B6 0, B7 0, C1 0, C2 0, C3 0, C4 0, D 0
- Total nicht erneuerbare Primärenergie (PENRT) [MJ]: A1-A3 959, A4 12.1, A5 1.92, B1 0, B2 13.1, B3 0, B4 0, B6 0, B7 0, C1 0, C2 4.13, C3 1.15, C4 -79.6, D -411
- Total erneuerbare Primärenergie (PERT) [MJ]: A1-A3 170, A4 0.707, A5 0.357, B1 0, B2 0.176, B3 0, B4 0, B6 0, B7 0, C1 0, C2 0.24, C3 0.598, C4 9.48, D -29

## Outputs
- Komponenten für die Wiederverwendung (CRU) [kg]: A1-A3 0, A4 0, A5 0, B1 0, B2 0, B3 0, B4 0, B6 0, B7 0, C1 0, C2 0, C3 0, C4 0, D 0
- Exportierte elektrische Energie (EEE) [MJ]: A1-A3 0, A4 0, A5 12.9, B1 0, B2 0, B3 0, B4 0, B6 0, B7 0, C1 0, C2 0, C3 3.01, C4 0, D 0
- Exportierte thermische Energie (EET) [MJ]: A1-A3 0, A4 0, A5 23.1, B1 0, B2 0, B3 0, B4 0, B6 0, B7 0, C1 0, C2 0, C3 5.35, C4 0, D 0
- Gefährlicher Abfall zur Deponie (HWD) [kg]: A1-A3 1.03e-6, A4 4.54e-7, A5 1.39e-9, B1 0, B2 1.79e-9, B3 0, B4 0, B6 0, B7 0, C1 0, C2 1.54e-7, C3 7.77e-10, C4 -4.44e-8, D -2.8e-7
- Stoffe für die Energierückgewinnung (MER) [kg]: A1-A3 0, A4 0, A5 0, B1 0, B2 0, B3 0, B4 0, B6 0, B7 0, C1 0, C2 0, C3 0, C4 0, D 0
- Stoffe zum Recycling (MFR) [kg]: A1-A3 0, A4 0, A5 0.05, B1 0, B2 0, B3 0, B4 0, B6 0, B7 0, C1 0, C2 0, C3 30.1, C4 0, D 0
- Entsorgter nicht gefährlicher Abfall (NHWD) [kg]: A1-A3 2.94, A4 0.00213, A5 0.068, B1 0, B2 0.0371, B3 0, B4 0, B6 0, B7 0, C1 0, C2 0.000724, C3 0.00634, C4 7.91, D -0.471
- Entsorgter radioaktiver Abfall (RWD) [kg]: A1-A3 0.00974, A4 1.28e-5, A5 0.00011, B1 0, B2 5.77e-5, B3 0, B4 0, B6 0, B7 0, C1 0, C2 4.34e-6, C3 9.22e-5, C4 0.00149, D -0.00663

## Impact indicators
- Potenzial für den abiotischen Abbau nicht fossiler Ressourcen (ADPE) [kg Sb eq.]: A1-A3 0.00172, A4 8.34e-8, A5 8.53e-8, B1 0, B2 3.83e-8, B3 0, B4 0, B6 0, B7 0, C1 0, C2 2.83e-8, C3 3.99e-8, C4 6.95e-7, D -1.64e-5
- Potenzial für den abiotischen Abbau fossiler Brennstoffe (ADPF) [MJ]: A1-A3 932, A4 12.1, A5 1.64, B1 0, B2 12.9, B3 0, B4 0, B6 0, B7 0, C1 0, C2 4.11, C3 0.92, C4 -83.4, D -394
- Versauerungspotenzial von Boden und Wasser (AP) [kg SO2 eq.]: A1-A3 0.23, A4 0.00363, A5 0.000872, B1 0, B2 0.000806, B3 0, B4 0, B6 0, B7 0, C1 0, C2 0.00122, C3 0.000195, C4 -0.02, D -0.09
- Eutrophierungspotenzial (EP) [kg (PO4)3- eq.]: A1-A3 0.0227, A4 0.000915, A5 0.000185, B1 0, B2 7.48e-5, B3 0, B4 0, B6 0, B7 0, C1 0, C2 0.000306, C3 3.82e-5, C4 -0.00206, D -0.00901
- Globales Erwärmungspotenzial (GWP) [kg CO2 eq.]: A1-A3 86.7, A4 0.9, A5 8.89, B1 0, B2 0.27, B3 0, B4 0, B6 0, B7 0, C1 0, C2 0.3, C3 1.49, C4 -10.6, D -42.6
- Abbau Potential der stratosphärischen Ozonschicht (ODP) [kg CFC 11 eq.]: A1-A3 6.61e-7, A4 2.99e-16, A5 1.45e-15, B1 0, B2 6.55e-16, B3 0, B4 0, B6 0, B7 0, C1 0, C2 1.02e-16, C3 3.36e-15, C4 6.66e-14, D -1.75e-12
- Bildungspotential für troposphärisches Ozon (POCP) [kg C2H2 eq.]: A1-A3 0.0273, A4 -0.00142, A5 7.1e-5, B1 0, B2 0.000118, B3 0, B4 0, B6 0, B7 0, C1 0, C2 -0.000475, C3 1.67e-5, C4 -0.00318, D -0.0126

## Use advice
Dieser Datensatz beinhaltet die Ergebnisse für die Module A1-A3 sowie die Module A4, A5, B1, B2, B3, B4, B6, B7, C1, C2, C3, C4, D gemäß EN 15804. Ein Vergleich mit anderen Produkten ist nur mit einer vergleichbaren Anwendung im Gebäude zulässig. Grundsätzlich ist eine Gegenüberstellung oder die Bewertung von EPD Daten nur möglich, wenn alle zu vergleichenden Datensätze nach EN 15804 erstellt wurden und der Gebäudekontext, bzw. die produktspezifischen Leistungsmerkmale berücksichtigt werden.

## Review details
Die angewendete LCI Methode ist in Übereinstimmung mit ISO 14040 und 14044. Die Dokumentation enthält alle relevanten Informationen im Hinblick auf die Datenqualität und den Umfang der Anwendung der jeweiligen LCI Ergebnisse bzw. der Datensätze. Der Datensatz repräsentiert den Stand der Technik bezogen auf die funktionelle Einheit.

## Data sources
- GaBi database (general)
