# Außenliegender Sonnenschutz - MHZ Hachtel GmbH & Co. KG - Metallbehang und Fesnter- / Fassadenmarkise

Dataset: ILCD process, EPD, specific dataset
Geography: RER
Reference year: 2019
Valid until: 2025
Classification: OEKOBAU.DAT: Komponenten von Fenstern und Vorhangfassaden / Zubehör für Fenster, Fassaden, Türen und Tore / Sonnenschutzsysteme
Synonyms: Sonnenschutzsystem; Sonnenschutzanlage; Metallbehänge; Fenstermarkise; Edelstahl-Fassadenmarkise; Profilrohr-Fassadenmarkise; s_onro; Rollladen Vorbaukasten; Rollladen Aufsatzkastenelement; Rollladen Schachtelement; Behang; Kasettenmarkise; Hülsenmarkise; Tragrohrmarkise; Sichtschutzfächer; Sonnenschutzbehang; Außenrollo
Method details: Produktkategorieregeln Teil A; Produktkategorieregeln Teil B – für Sonnenschutz und Abschlüsse (auch Verdunklungssysteme); EPD Außenliegender Sonnenschutz
Owner: MHZ Hachtel GmbH & Co. KG
Compliance: EN 15804
Review: Independent external review by Susanne Volz
Amounts: rows without a unit in brackets have none in this file; such an amount is in the reference unit of its flow, which a separate flow dataset defines
copyright: true

## General comment
A1-A3 sowie Module A4, A5, B2, B3, B4, B6, B7, C1, C2, C3, C4, D. Das Umweltprofil beinhaltet die Aufwendungen für die Lebenszyklus-Stadien cradle to gate mit Optionen (Modul A1-A3). Die Herstellung der Verpackung wurde innerhalb der Module A1-A3 berücksichtigt.

## Geography
Dieser Datensatz repräsentiert die Situation des Unternehmens MHZ Hachtel GmbH & Co. KG in 70771 Leinfelden-Echterdingen im Hinblick auf die wichtigsten Technologien und die gesetzlichen Rahmenbedingungen.

## Time period
jährlicher Durchschnitt

## Technology and included processes
Die Ökobilanzergebnisse umfassen die Lebenszyklusstadien der Herstellung der Vorprodukte bis hin zur Rohstoffgewinnung und Verarbeitungsprozesse von als Input dienenden Sekundärstoffen (z.B. Recyclingprozesse), deren Transporte zum Werk sowie die Produktion selbst, einschließlich der Bereitstellung von allen Hilfs- und Betriebsstoffen, Energie, sowie die vollständige Abfallbehandlung oder die Deponierung der Restabfälle während des Stadiums der Produktion. Die Module A1, A2 und A3 sind hier als ein aggregiertes Modul A1-A3 ausgewiesen. Falls für diesen Datensatz weitere Module berechnet wurden, sind diese separat zu finden und können für eine Betrachtung des gesamten Lebenszyklus zusammengeführt werden.

## Technical purpose
Sonnenschutzanlagen für Außenanwendung.

## Reference product
- Außenliegender Sonnenschutz - MHZ Hachtel GmbH & Co. KG - Metallbehang und Fesnter- / Fassadenmarkise: 1

## Inputs
- Einsatz von Süßwasserressourcen (FW) / Uso neto de recursos de agua dulce (FW) [m3]: A1-A3 1.55, A4 0.00104, A5 0.0157, B2 0.00502, B3 0.03, B4 1.09, B6 1.16, B7 0, C1 0.00128, C2 0.000151, C3 0.00441, C4 5.94e-5, D -0.48
- Nicht-erneuerbare Primärenergie als Energieträger (PENRE) / Uso de energía primaria no renovable, excluyendo los recursos de energía primaria no renovable utilizada como materia prima (PENRE) [MJ]: A1-A3 1888.86, A4 16.04, A5 9.2, B2 0.19, B3 610.4, B4 1389.95, B6 2260.04, B7 0, C1 2.51, C2 2.32, C3 7.42, C4 0.56, D -536.96
- Nicht-erneuerbare Primärenergie zur stofflichen Nutzung (PENRM) / Uso de la energía primaria no renovable utilizada como materia prima (PENRM) [MJ]: A1-A3 7.38, A4 0, A5 -0.84, B2 0, B3 0, B4 2.22e-16, B6 0, B7 0, C1 0, C2 0, C3 -6.22, C4 -0.33, D 0
- Nicht erneuerbare Sekundärbrennstoffe (NRSF) / Uso de combustibles secundarios no renovables (NRSF) [MJ]: A1-A3 0, A4 0, A5 0, B2 0, B3 0, B4 0, B6 0, B7 0, C1 0, C2 0, C3 0, C4 0, D 0
- Erneuerbare Primärenergie als Energieträger (PERE) / Uso de energía primaria renovable excluyendo los recursos de energía primaria renovable utilizada como materia prima (PERE) [MJ]: A1-A3 1077.6, A4 0.9, A5 48.83, B2 0.00433, B3 25.78, B4 932.94, B6 1001.54, B7 0, C1 1.11, C2 0.13, C3 0.48, C4 0.0308, D -196.15
- Erneuerbare Primärenergie zur stofflichen Nutzung (PERM) / Uso de energía primaria renovable utilizada como materia prima (PERM) [MJ]: A1-A3 45.46, A4 0, A5 -45.46, B2 0, B3 0, B4 0, B6 0, B7 0, C1 0, C2 0, C3 0, C4 0, D 0
- Erneuerbare Sekundärbrennstoffe (RSF) / Uso de combustibles secundarios renovables (RSF) [MJ]: A1-A3 0, A4 0, A5 0, B2 0, B3 0, B4 0, B6 0, B7 0, C1 0, C2 0, C3 0, C4 0, D 0
- Einsatz von Sekundärstoffen (SM) / Uso de materiales secundarios (SM) [kg]: A1-A3 0.3, A4 0, A5 0, B2 0, B3 0.61, B4 0.3, B6 0, B7 0, C1 0, C2 0, C3 0, C4 0, D 0
- Total nicht erneuerbare Primärenergie (PENRT) / Uso total de la energía primaria no renovable (energía primaria y recursos de energía primaria renovable utilizada como materia prima) (PENRT) [MJ]: A1-A3 1896.24, A4 16.04, A5 8.37, B2 0.19, B3 610.4, B4 1389.95, B6 2260.04, B7 0, C1 2.51, C2 2.32, C3 1.2, C4 0.24, D -536.96
- Total erneuerbare Primärenergie (PERT) / Uso total de la energía primaria renovable (energía primaria y recursos de energía primaria renovable utilizada como materia prima) (PERT) [MJ]: A1-A3 1123.06, A4 0.9, A5 3.37, B2 0.00433, B3 25.78, B4 932.94, B6 1001.54, B7 0, C1 1.11, C2 0.13, C3 0.48, C4 0.0308, D -196.15

## Outputs
- Komponenten für die Wiederverwendung (CRU) / Componentes para su reutilización (CRU) [kg]: A1-A3 0, A4 0, A5 0, B2 0, B3 0, B4 0, B6 0, B7 0, C1 0, C2 0, C3 0, C4 0, D 0
- Exportierte elektrische Energie (EEE) / Energía exportada electrica (EEE) [MJ]: A1-A3 21.24, A4 0, A5 6.37, B2 0, B3 3.85, B4 31.46, B6 0, B7 0, C1 0, C2 0, C3 3.86, C4 0, D 0
- Exportierte thermische Energie (EET) / Energía exportada termal (EET) [MJ]: A1-A3 45.18, A4 0, A5 11.54, B2 0, B3 6.84, B4 63.57, B6 0, B7 0, C1 0, C2 0, C3 6.85, C4 0, D 0
- Gefährlicher Abfall zur Deponie (HWD) / Residuos peligrosos eliminados (HWD) [kg]: A1-A3 5.48e-6, A4 7.46e-7, A5 4.81e-9, B2 6.05e-11, B3 6.36e-8, B4 6.04e-6, B6 9.35e-7, B7 0, C1 1.04e-9, C2 1.08e-7, C3 5.56e-10, C4 3.59e-9, D -3.06e-7
- Stoffe für die Energierückgewinnung (MER) / Materiales para valorización energética (recuperación de energía) (MER) [kg]: A1-A3 0, A4 0, A5 0, B2 0, B3 0, B4 0, B6 0, B7 0, C1 0, C2 0, C3 0, C4 0, D 0
- Stoffe zum Recycling (MFR) / Materiales para el reciclaje (MFR) [kg]: A1-A3 10.5, A4 0, A5 0, B2 0, B3 2.03, B4 21.49, B6 0, B7 0, C1 0, C2 0, C3 11, C4 0, D 0
- Entsorgter nicht gefährlicher Abfall (NHWD) / Residuos no peligrosos eliminados (NHWD) [kg]: A1-A3 25.67, A4 0.00245, A5 0.13, B2 0.00156, B3 0.16, B4 17.49, B6 1.6, B7 0, C1 0.00178, C2 0.000354, C3 0.00785, C4 1.18, D -9.5
- Entsorgter radioaktiver Abfall (RWD) / Residuos radiactivos eliminados (RWD) [kg]: A1-A3 0.0613, A4 1.98e-5, A5 0.00114, B2 8.94e-7, B3 0.00315, B4 0.0345, B6 0.34, B7 0, C1 0.000381, C2 2.87e-6, C3 0.000162, C4 2.68e-6, D -0.0285

## Impact indicators
- Potenzial für den abiotischen Abbau nicht fossiler Ressourcen (ADPE) / Potencial de agotamiento de recursos abióticos para recursos no fósiles (ADPE) [kg Sb eq.]: A1-A3 -0.00014, A4 9.75e-8, A5 2.12e-7, B2 1.79e-9, B3 0.000199, B4 -0.000156, B6 4.21e-5, B7 0, C1 4.67e-8, C2 1.41e-8, C3 2.82e-8, C4 6.21e-9, D -1.56e-5
- Potenzial für den abiotischen Abbau fossiler Brennstoffe (ADPF) / Potencial de agotamiento de recursos abióticos para recursos fósiles (ADPF) [MJ]: A1-A3 1541.18, A4 15.99, A5 5.49, B2 0.19, B3 202.57, B4 1102.78, B6 1396.85, B7 0, C1 1.55, C2 2.31, C3 0.79, C4 0.23, D -464.76
- Versauerungspotenzial von Boden und Wasser (AP) / Potencial de acidificación del suelo y de los recursos de agua (AP) [kg SO2 eq.]: A1-A3 0.49, A4 0.00289, A5 0.00165, B2 7.9e-6, B3 0.04, B4 0.33, B6 0.26, B7 0, C1 0.000294, C2 0.000501, C3 0.000227, C4 0.000103, D -0.17
- Eutrophierungspotenzial (EP) / Potencial de eutrofización (EP) [kg (PO4)3- eq.]: A1-A3 0.0358, A4 0.000702, A5 0.000251, B2 1.42e-6, B3 0.00655, B4 0.0266, B6 0.0293, B7 0, C1 3.25e-5, C2 0.000123, C3 3.71e-5, C4 1.16e-5, D -0.0103
- Globales Erwärmungspotenzial (GWP) / Potencial de calentamiento global (GWP) [kg CO2 eq.]: A1-A3 116.77, A4 1.17, A5 4.55, B2 0.00648, B3 17.27, B4 81.18, B6 126.05, B7 0, C1 0.14, C2 0.17, C3 1.86, C4 0.0161, D -43.49
- Abbau Potential der stratosphärischen Ozonschicht (ODP) / Potencial de agotamiento de la capa de ozono estratosférico (ODP) [kg CFC 11 eq.]: A1-A3 9.88e-7, A4 1.93e-16, A5 1.28e-14, B2 2.1e-17, B3 6.58e-7, B4 9.88e-7, B6 3.77e-12, B7 0, C1 4.18e-15, C2 2.78e-17, C3 1.81e-15, C4 8.87e-17, D -1e-13
- Bildungspotential für troposphärisches Ozon (POCP) / Potencial de formación de ozono troposférico (POCP) [kg C2H2 eq.]: A1-A3 0.0306, A4 -0.000949, A5 0.000114, B2 1.75e-6, B3 0.00439, B4 0.0189, B6 0.0188, B7 0, C1 2.09e-5, C2 -0.000135, C3 1.99e-5, C4 7.77e-6, D -0.0108

## Use advice
Dieser Datensatz beinhaltet die Ergebnisse für die Module A1-A3 sowie die Module A4, A5, B2, B3, B4, B6, B7, C1, C2, C3, C4, D gemäß EN 15804.
Ein Vergleich mit anderen Produkten ist nur mit einer vergleichbaren Anwendung im Gebäude zulässig. Grundsätzlich ist eine Gegenüberstellung oder die Bewertung von EPD Daten nur möglich, wenn alle zu vergleichenden Datensätze nach EN 15804 erstellt wurden und der Gebäudekontext, bzw. die produktspezifischen Leistungsmerkmale berücksichtigt werden.

## Review details
Die angewendete LCI Methode ist in Übereinstimmung mit ISO 14040 und 14044. Die Dokumentation enthält alle relevanten Informationen im Hinblick auf die Datenqualität und den Umfang der Anwendung der jeweiligen LCI Ergebnisse bzw. der Datensätze. Der Datensatz repräsentiert den Stand der Technik bezogen auf die funktionelle Einheit.

## Data sources
- GaBi database (general)
