# Kraftpapier; 1 kg

Dataset: ILCD process, EPD, generic dataset
Geography: DE
Reference year: 2018
Valid until: 2022
Classification: oekobau.dat: Kunststoffe / Folien und Vliese / Baupappen
Owner: thinkstep
Compliance: DIN EN 15804
Review: Dependent internal review by thinkstep, IABP-GaBi, IBP-GaBi; Independent external review by GaBi user forum, GaBi bug forum, GaBi user community
Amounts: rows without a unit in brackets have none in this file; such an amount is in the reference unit of its flow, which a separate flow dataset defines
copyright: true

## General comment
Dieser Datensatz wurde nach dem European Standard EN 15804 für Nachhaltiges Bauen modelliert. Ergebnisse werden in Modulen abgebildet, die den strukturierten Ausdruck von Ergebnissen über den gesamten Lebenszyklus zulassen.

## Geography
Der Datensatz bildet die länderspezifische Situation in Deutschland ab. Dabei werden Haupttechnologien, spezifische regionale Charakteristiken und ggf. Importstatistiken berücksichtigt.

## Time period
Jährlicher Durchschnitt

## Technology and included processes
Kraftpapiere und Zellstoff wird üblicherweise aus Weichhölzern, wie Kiefer, Fichte oder Birke, hergestellt. Neben Primärmaterial kommen auch Hackschnitzel aus unbehandeltem Altholz, Sägespäne oder recycelter Zellstoff zum Einsatz.
Holz selbst besteht aus Zellulose, Hemizellulose und Lignin. Im Unterschied zu Zellulose ist Lignin für die Papierherstellung hinderlich und muss entfernt werden. Das Holz wird geerntet, entrindet und zu Hackschnitzeln verarbeitet. Die Hackschnitzel werden mit aufschließenden Chemikalien versetzt und erhitzt. Nach und nach löst sich das gesamte Lignin, ein Großteil der Hemizellulose und etwas Zellulose. Den verbleibenden Zellulosefasern wird die Flüssigkeit entzogen. Reiner Zellstoff ist extrahiert und kann nun weiter verarbeitet werden.
Das häufigste Verfahren zur Zellstoffherstellung ist das Sulphatverfahren, auch Kraftaufschluss genannt. Um das Lignin und die Hemizellulose zu lösen, werden u.a. Natriumsulfid, Natronlauge und Natriumsulfat eingesetzt. Dieses Chemikalien-Gemisch wird als Weißlauge bezeichnet. Das Sulphatverfahren erfolgt bei Temperaturen zwischen 165 und 175°C und kann schubweise als Batch-Prozess oder fortlaufend gefahren werden. Das angehängte Bild verdeutlicht den Aufschlussvorgang während der Zellstoffextraktion. Nach der Zellstoffextraktion wird der Zellstoff gewaschen, verbleibende feste Bestandteile von Borkenresten werden gefiltert. Abschließend erfolgt die Trocknung. Die ausgewaschenen Aufschluss-Chemikalien können teilweise recycelt werden. Als wertvolle Nebenprodukte entstehen außerdem Zucker und Alkalilignin. Die entstandene Lauge mit gelöstem Lignin wird Schwarzlauge genannt. Sie weist einen hohen Heizwert auf und wird üblicherweise zur Energieerzeugung im Werk genutzt.

Das Flächengewicht kann zwischen 40-135 g/m2 betragen

Hintergrundsystem:
Strom: Die Stromerzeugung wird entsprechend der länderspezifischen Randbedingungen modelliert. Die landesspezifische Analyse beinhaltet:
1.: Spezifische Kraftwerke der verschiedenen fossilen Energieträger und der Einsatz erneuerbarer Energien sind entsprechend der länderspezifischen Energieträgermixe modelliert. Die Analyse bezieht Stromimporte aus den Nachbarländern, Transmissions-und Verteilungsverluste und den Eigenverbrauch im Kraftwerk und bei der Verteilung bzw. Speicherung, z. B. durch Pumpspeicherwerke, ein.
2.: Die landes-/regionalspezifischen Technologiestandards sowie die Erzeugung in Elektrizitätskraftwerken und/oder in speziellen Kraftwerken mit Kraft-Wärme-Kopplung (KWK) sind berücksichtigt.
3.: Die länderspezifische Energieträgerbereitstellung (mit Anteil der Importe und/oder Eigenversorgung) einschließlich der Energieträger-Eigenschaften (z. B. Elementar- und Energiegehalte) werden berücksichtigt.
4.: Die Förderung, Produktion, Verarbeitung und Transportprozesse werden entsprechend der Situation im jeweiligen Stromerzeugerland modelliert. Die unterschiedlichen Produktions- und Verarbeitungsverfahren (Emissionen und Wirkungsgrade) in den verschiedenen Energieerzeugerländern werden einbezogen, z. B. Rohöl-Veredelungsverfahren oder Abfackel-Raten an den Ölplattformen.
Thermische Energie, Prozessdampf: Die Erzeugung von Dampf und thermischer Energie in Heizkraftwerken wird entsprechend der landesspezifischen Situation (Emissionsgrenzwerte, Energieträgerbasis) modelliert.
Der Wirkungsgrad für die thermische Energieerzeugung beträgt per Definition 100% des Energieträgereinsatzes. Für Prozessdampf liegt der Wirkungsgrad im Bereich von 85-95%. Die zur Heizenergie-Erzeugung verwendeten Energieträger werden entsprechend der nationalen Situation modelliert (siehe Kapitel Strom oben).
Transporte: Alle relevanten und bekannten Transportprozesse in Form von See- und Binnenschiffsverkehr sowie Bahn-, Lkw- und der Leitungstransport sind enthalten.
Energieträger: Die Energieträger werden entsprechend der spezifischen Versorgungslage modelliert (siehe Kapitel Strom oben).
Raffinerieprodukte: Diesel, Benzin, technische Gase, Heizöl, Schmierstoffe und Rückstände, wie Bitumen, werden mit einem parametrierten länderspezifische Raffineriemodell modelliert. Das Raffinerie-Modell bezieht die länderspezifischen Veredelungsverfahren (z. B. Emissionspegel, interner Energieverbrauch etc.) und das länderspezifische Produktspektrum ein, das sich je nach Land stark unterscheiden kann. Die Rohöl-Förderung wird gemäß der länderspezifischen Situation mit den jeweiligen Energieträger-Eigenschaften modelliert.

## Technical purpose
Dieses Produkt kann im Baubereich verwendet werden.

## Safety margin
20 %. Produktsystem bis auf wenige Prozesse/Flüsse abgebildet. Technologische, zeitliche und geographische Repräsentativität teilweise gegeben.

## Reference product
- Kraftpapier m2: 1

## Inputs
- Erneuerbare Primärenergie als Energieträger (PERE) [MJ]: A1-A3 1.3807, C1 0, C2 0.000174336, C3 1.44106, D -0.178458
- Erneuerbare Primärenergie zur stofflichen Nutzung (PERM) [MJ]: A1-A3 1.44, C1 0, C2 0, C3 -1.44, D 0
- Total erneuerbare Primärenergie (PERT) [MJ]: A1-A3 2.8207, C1 0, C2 0.000174336, C3 0.0010551, D -0.178458
- Nicht-erneuerbare Primärenergie als Energieträger (PENRE) [MJ]: A1-A3 0.588798, C1 0, C2 0.00299464, C3 0.0018345, D -0.623425
- Nicht-erneuerbare Primärenergie zur stofflichen Nutzung (PENRM) [MJ]: A1-A3 0, C1 0, C2 0, C3 0, D 0
- Total nicht erneuerbare Primärenergie (PENRT) [MJ]: A1-A3 0.588798, C1 0, C2 0.00299464, C3 0.0018345, D -0.623425
- Einsatz von Sekundärstoffen (SM) [kg]: A1-A3 0, C1 0, C2 0, C3 0, D 0
- Erneuerbare Sekundärbrennstoffe (RSF) [MJ]: A1-A3 0, C1 0, C2 0, C3 0, D 0
- Nicht erneuerbare Sekundärbrennstoffe (NRSF) [MJ]: A1-A3 0, C1 0, C2 0, C3 0, D 0
- Einsatz von Süßwasserressourcen (FW) [m3]: A1-A3 0.000489942, C1 0, C2 1.56133e-7, C3 5.71204e-7, D 0.000206333

## Outputs
- Gefährlicher Abfall zur Deponie (HWD) [kg]: A1-A3 3.65283e-8, C1 0, C2 1.11907e-10, C3 1.23371e-12, D -3.20688e-10
- Entsorgter nicht gefährlicher Abfall (NHWD) [kg]: A1-A3 0.00110589, C1 0, C2 5.25612e-7, C3 1.41189e-6, D 0.000522235
- Entsorgter radioaktiver Abfall (RWD) [kg]: A1-A3 3.33952e-5, C1 0, C2 3.15274e-9, C3 1.53343e-7, D -2.14103e-5
- Komponenten für die Wiederverwendung (CRU) [kg]: A1-A3 0, C1 0, C2 0, C3 0, D 0
- Stoffe zum Recycling (MFR) [kg]: A1-A3 0, C1 0, C2 0, C3 0, D 0
- Stoffe für die Energierückgewinnung (MER) [kg]: A1-A3 0, C1 0.096, C2 0, C3 0, D 0
- Exportierte elektrische Energie (EEE) [MJ]: A1-A3 0, C1 0, C2 0, C3 0, D 0.147522
- Exportierte thermische Energie (EET) [MJ]: A1-A3 0, C1 0, C2 0, C3 0, D 0.345857

## Impact indicators
- Globales Erwärmungspotenzial (GWP) [kg CO2 Äquiv.]: A1-A3 -0.0897286, C1 0, C2 0.000222805, C3 0.162065, D -0.0579045
- Abbaupotenzial der stratosphärischen Ozonschicht (ODP) [kg R11 Äquiv.]: A1-A3 1.41413e-12, C1 0, C2 7.37493e-20, C3 6.02162e-18, D -9.85912e-16
- Versauerungspotential (AP) [kg SO2 Äquiv.]: A1-A3 0.000162882, C1 0, C2 4.50042e-7, C3 1.7236e-7, D -2.33715e-5
- Eutrophierungspotential (EP) [kg Phosphat Äquiv.]: A1-A3 5.04105e-5, C1 0, C2 1.06987e-7, C3 3.40427e-8, D -3.9364e-6
- Bildungspotenzial für troposphärisches Ozon (POCP) [kg Ethen Äquiv.]: A1-A3 2.11647e-5, C1 0, C2 -1.34832e-7, C3 1.41925e-8, D -2.85541e-6
- Potenzial für den abiotischen Abbau nicht fossiler Ressourcen (ADPE) [kg Sb Äquiv.]: A1-A3 2.0483e-8, C1 0, C2 1.87492e-11, C3 5.63079e-11, D -1.06052e-8
- Potenzial für den abiotischen Abbau fossiler Brennstoffe (ADPF) [MJ]: A1-A3 0.50467, C1 0, C2 0.00298658, C3 0.00144744, D -0.569375

## Use advice
Der Datensatz repräsentiert ein Cradle to Gate Inventar. Er kann verwendet werden, um die Lieferkette des jeweiligen Produktes in einer repräsentativen Weise zu charakterisieren. Die Kombination mit einzelnen Einheitenprozessen und diesem Produkt ermöglicht die Erstellung von anwenderspezifischen (Produkt-) LCAs.

## Data sources
- GaBi Database Edition 2020, SP40
- GaBi database (all versions)
