# Fliesenkleber; Tile adhesive

Dataset: ILCD process, EPD, generic dataset
Geography: DE
Reference year: 2021
Valid until: 2022
Classification: oekobau.dat: Mineralische Baustoffe / Mörtel und Beton / Kleber und Klebemörtel
Owner: Sphera Solutions GmbH
Compliance: EN 15804+A2
Review: Dependent internal review by Sphera Solutions GmbH; Independent external review by GaBi user forum
Amounts: rows without a unit in brackets have none in this file; such an amount is in the reference unit of its flow, which a separate flow dataset defines
copyright: true
licenseType: Free of charge for all users and uses
accessRestrictions: The license conditions as stated on https://www.oekobaudat.de/ apply.
accessRestrictions: Es gelten die Lizenzbedingungen wie sie auf https://www.oekobaudat.de/ genannt sind.

## General comment
Dieser Datensatz wurde nach dem European Standard EN 15804+A2 für Nachhaltiges Bauen modelliert. Ergebnisse werden in Modulen abgebildet, die den strukturierten Ausdruck von Ergebnissen über den gesamten Lebenszyklus zulassen.

## Geography
Der Datensatz bildet die länderspezifische Situation in Deutschland ab. Dabei werden Haupttechnologien, spezifische regionale Charakteristiken und ggf. Importstatistiken berücksichtigt.

## Time period
Jährlicher Durchschnitt

## Technology and included processes
Die Modellierung von Fliesenkleber erfolgte entsprechend einer repräsentativen Rezeptur. Hauptbestandteile sind hierbei Sand, Zement und Trass kalk. Die Systemgrenze bildet das fertige Produkt am Werkstor. Transporte vom Werk zur Baustelle sind nicht berücksichtigt und müssen bei Systembetrachtungen eingerechnet werden.
Das Modul A5 enthält die Umweltlasten aus der thermischen Verwertung der Verpackung, das Modul D die Gutschriften aus der themischen Verwertung der Verpackung.

In der Entsorgungsphase wird ein manueller Rückbau (lastenfrei) in Modul C1 angenommen. Der Transport in Modul C2 zur Deponie erfolgt mit einem LKW (50km). In C3 wird, sofern relevant, eine Verpackung mit PE-Folie berücksichtigt (z.B. bei Mineralfaserprodukten, 0,0125 kg Folie je kg entsorgtes Material). In Modul C4 werden dem Produkt entsprechende, durchschnittliche Deponieemissionen (Bezugsraum Deutschland) ausgewiesen. Die Nutzung von Deponiegas wird nicht berücksichtigt.

## Technical purpose
Dieses Produkt kann im Baubereich verwendet werden.

## Safety margin
20 %. Produktsystem bis auf wenige Prozesse/Flüsse abgebildet. Technologische, zeitliche und geographische Repräsentativität teilweise gegeben.

## Reference product
- Fliesenkleber: 1

## Inputs
- Erneuerbare Primärenergie als Energieträger (PERE) [MJ]: A1-A3 0.593219, A5 0.000489839, C2 0.00273112, C4 0.0325289, D -0.0115189
- Erneuerbare Primärenergie zur stofflichen Nutzung (PERM) [MJ]: A1-A3 0, A5 0, C2 0, C4 0, D 0
- Total erneuerbare Primärenergie (PERT) [MJ]: A1-A3 0.593219, A5 0.000489839, C2 0.00273112, C4 0.0325289, D -0.0115189
- Nicht-erneuerbare Primärenergie als Energieträger (PENRE) [MJ]: A1-A3 1.46086, A5 0.00213519, C2 0.0470572, C4 0.240862, D -0.0355916
- Nicht-erneuerbare Primärenergie zur stofflichen Nutzung (PENRM) [MJ]: A1-A3 0, A5 0, C2 0, C4 0, D 0
- Total nicht-erneuerbare Primärenergie (PENRT) [MJ]: A1-A3 1.46086, A5 0.00213519, C2 0.0470572, C4 0.240862, D -0.0355916
- Einsatz von Sekundärstoffen (SM) [kg]: A1-A3 0, A5 0, C2 0, C4 0, D 0
- Erneuerbare Sekundärbrennstoffe (SF) [MJ]: A1-A3 0, A5 0, C2 0, C4 0, D 0
- Nicht erneuerbare Sekundärbrennstoffe (NRSF) [MJ]: A1-A3 0, A5 0, C2 0, C4 0, D 0
- Nettoeinsatz von Süßwasserressourcen (FW) [m3]: A1-A3 0.000397961, A5 2.13519e-5, C2 2.42728e-6, C4 5.93297e-5, D -4.28865e-6

## Outputs
- Gefährlicher Abfall zur Deponie (HWD) [kg]: A1-A3 3.92826e-10, A5 4.76395e-13, C2 1.96684e-12, C4 2.56252e-11, D -1.22586e-11
- Entsorgter nicht gefährlicher Abfall (NHWD) [kg]: A1-A3 0.0359689, A5 6.77501e-5, C2 7.59611e-6, C4 1.20118, D -1.83195e-5
- Entsorgter radioaktiver Abfall (RWD) [kg]: A1-A3 4.52962e-5, A5 6.01323e-8, C2 4.51576e-8, C4 2.48649e-6, D -1.23885e-6
- Komponenten für die Wiederverwendung (CRU) [kg]: A1-A3 0, A5 0, C2 0, C4 0, D 0
- Stoffe zum Recycling (MFR) [kg]: A1-A3 0, A5 0, C2 0, C4 0, D 0
- Stoffe für die Energierückgewinnung (MER) [kg]: A1-A3 0, A5 0, C2 0, C4 0, D 0
- Exportierte elektrische Energie (EEE) [MJ]: A1-A3 0, A5 0.00922494, C2 0, C4 0, D 0
- Exportierte thermische Energie (EET) [MJ]: A1-A3 0, A5 0.021583, C2 0, C4 0, D 0

## Impact indicators
- Globales Erwärmungspotenzial - total (GWP-total) [kg CO2 eq.]: A1-A3 0.351229, A5 0.00746182, C2 0.00358134, C4 0.017773, D -0.00227936
- Globales Erwärmungspotenzial - fossil (GWP-fossil) [kg CO2 eq.]: A1-A3 0.354116, A5 0.000721484, C2 0.00355707, C4 0.0181588, D -0.00225248
- Globales Erwärmungspotenzial - biogen (GWP-biogenic) [kg CO2 eq.]: A1-A3 -0.00309458, A5 0.00674017, C2 1.47059e-6, C4 -0.000439177, D -2.36942e-5
- Globales Erwärmungspotenzial - luluc (GWP-luluc) [kg CO2 eq.]: A1-A3 0.000207564, A5 1.65399e-7, C2 2.27997e-5, C4 5.33877e-5, D -3.1851e-6
- Abbaupotenzial der stratosphärischen Ozonschicht (ODP) [kg CFC-11 eq.]: A1-A3 6.32601e-15, A5 2.01195e-18, C2 9.08378e-19, C4 7.12511e-17, D -5.02784e-17
- Versauerungspotenzial, kumulierte Überschreitung (AP) [Mole of H+ eq.]: A1-A3 0.000423786, A5 1.67526e-6, C2 1.11536e-5, C4 0.000129255, D -2.27647e-6
- Eutrophierungspotenzial - Süßwasser (EP-freshwater) [kg P eq.]: A1-A3 4.76752e-7, A5 2.82045e-10, C2 7.30119e-9, C4 3.05624e-8, D -5.30121e-9
- Eutrophierungspotenzial - Salzwasser (EP-marine) [kg N eq.]: A1-A3 0.00015403, A5 4.70856e-7, C2 5.20684e-6, C4 3.35553e-5, D -8.42197e-7
- Eutrophierungspotenzial - Land (EP-terrestrial) [Mole of N eq.]: A1-A3 0.00166738, A5 7.98073e-6, C2 5.81387e-5, C4 0.000368662, D -8.98218e-6
- Bildungspotenzial für troposphärisches Ozon (POCP) [kg NMVOC eq.]: A1-A3 0.000445435, A5 1.2355e-6, C2 1.00411e-5, C4 0.000101676, D -2.21163e-6
- Potenzial für die Verknappung abiotischer Ressourcen nicht fossile Ressourcen (ADPE) [kg Sb eq.]: A1-A3 2.15995e-8, A5 2.88109e-11, C2 3.08809e-10, C4 1.72118e-9, D -6.86035e-10
- Potenzial für die Verknappung abiotischer Ressourcen fossile Brennstoffe (ADPF) [MJ]: A1-A3 1.46059, A5 0.00213466, C2 0.0470553, C4 0.240735, D -0.0355867
- Wasser-Entzugspotenzial (Benutzer) (WDP) [m³ world equiv.]: A1-A3 0.0104247, A5 0.000907267, C2 1.38005e-5, C4 0.00194337, D -2.6056e-5

## Use advice
Der Datensatz repräsentiert ein Cradle to Gate Inventar. Er kann verwendet werden, um die Lieferkette des jeweiligen Produktes in einer repräsentativen Weise zu charakterisieren. Die Kombination mit einzelnen Einheitenprozessen und diesem Produkt ermöglicht die Erstellung von anwenderspezifischen (Produkt-) LCAs.

## Data sources
- Ökologische Bilanzierung von Baustoffen und Gebäuden, 2000
- Documentation of data quality management
- GaBi Database Edition 2021, CUP2021.01
- GaBi database (all versions)
