# Einblasdämmung Mineralwolle; 50kg/m3

Dataset: ILCD process, EPD, generic dataset
Geography: DE
Reference year: 2021
Valid until: 2022
Classification: oekobau.dat: Dämmstoffe / Mineralwolle / Mineralwolle
Owner: Sphera Solutions GmbH
Compliance: EN 15804+A2
Review: Dependent internal review by Sphera Solutions GmbH; Independent external review by GaBi user forum
Amounts: rows without a unit in brackets have none in this file; such an amount is in the reference unit of its flow, which a separate flow dataset defines
copyright: true
licenseType: Free of charge for all users and uses
accessRestrictions: The license conditions as stated on https://www.oekobaudat.de/ apply.
accessRestrictions: Es gelten die Lizenzbedingungen wie sie auf https://www.oekobaudat.de/ genannt sind.

## General comment
Dieser Datensatz wurde nach dem European Standard EN 15804+A2 für Nachhaltiges Bauen modelliert. Ergebnisse werden in Modulen abgebildet, die den strukturierten Ausdruck von Ergebnissen über den gesamten Lebenszyklus zulassen.

## Geography
Der Datensatz bildet die länderspezifische Situation in Deutschland ab. Dabei werden Haupttechnologien, spezifische regionale Charakteristiken und ggf. Importstatistiken berücksichtigt.

## Time period
Jährlicher Durchschnitt

## Technology and included processes
Vordergrundsystem:
Die Systemgrenze umfasst die Herstellung von Mineralwolle Einblasdämmung für die Verwendung in Wand und Dach mit einer Wärmeleitfähigkeit von 0.038W/m*K. Das Dämmmaterial wird in das Dach oder die Wand mithilfe von Einblasgeräten eingeblasen. Mineralwolle wird aus Sedimentgestein oder Felsformationen (größtenteils Basalt) und verschiedenen Recyclingmaterialien hergestellt. Das Material wird in Öfen bei 1400-1500 ° C aufgeschmolzen und gelangt anschließend in schnelldrehende Laufrollen. Die Fasern werden dann in die entsprechende Größe zurechtgeschnitten und verpackt. Transportprozesse für die Rohstoffe wurden berücksichtigt. Alle wichtigen Energie- und Stoffflüsse sind im System inbegriffen.

In der Entsorgungsphase wird ein manueller Rückbau (lastenfrei) in Modul C1 angenommen. Der Transport in Modul C2 zur Deponie erfolgt mit einem LKW (50km). In C3 wird, sofern relevant, eine Verpackung mit PE-Folie berücksichtigt (z.B. bei Mineralfaserprodukten, 0,0125 kg Folie je kg entsorgtes Material). In Modul C4 werden dem Produkt entsprechende, durchschnittliche Deponieemissionen (Bezugsraum Deutschland) ausgewiesen. Die Nutzung von Deponiegas wird nicht berücksichtigt.

## Technical purpose
Dieses Produkt kann im Baubereich verwendet werden.

## Safety margin
0 %. Produktsystem weitgehend vollständig abgebildet. Gute technologische, zeitliche und geographische Repräsentativität.

## Reference product
- Einblasdämmung Mineralwolle: 1

## Inputs
- Erneuerbare Primärenergie als Energieträger (PERE) [MJ]: A1-A3 186.675, C2 0.113797, C3 2.16459, C4 1.37231
- Erneuerbare Primärenergie zur stofflichen Nutzung (PERM) [MJ]: A1-A3 0, C2 0, C3 0, C4 0
- Total erneuerbare Primärenergie (PERT) [MJ]: A1-A3 186.675, C2 0.113797, C3 2.16459, C4 1.37231
- Nicht-erneuerbare Primärenergie als Energieträger (PENRE) [MJ]: A1-A3 881.967, C2 1.96072, C3 46.1492, C4 10.1614
- Nicht-erneuerbare Primärenergie zur stofflichen Nutzung (PENRM) [MJ]: A1-A3 0, C2 0, C3 0, C4 0
- Total nicht-erneuerbare Primärenergie (PENRT) [MJ]: A1-A3 881.967, C2 1.96072, C3 46.1492, C4 10.1614
- Einsatz von Sekundärstoffen (SM) [kg]: A1-A3 0, C2 0, C3 0, C4 0
- Erneuerbare Sekundärbrennstoffe (SF) [MJ]: A1-A3 0, C2 0, C3 0, C4 0
- Nicht erneuerbare Sekundärbrennstoffe (NRSF) [MJ]: A1-A3 0, C2 0, C3 0, C4 0
- Nettoeinsatz von Süßwasserressourcen (FW) [m3]: A1-A3 0.229947, C2 0.000101137, C3 0.00517626, C4 0.00250297

## Outputs
- Gefährlicher Abfall zur Deponie (HWD) [kg]: A1-A3 2.83792e-7, C2 8.19517e-11, C3 4.78884e-9, C4 1.08106e-9
- Entsorgter nicht gefährlicher Abfall (NHWD) [kg]: A1-A3 7.38583, C2 0.000316505, C3 0.0137327, C4 50.6748
- Entsorgter radioaktiver Abfall (RWD) [kg]: A1-A3 0.0200474, C2 1.88157e-6, C3 0.000359016, C4 0.000104899
- Komponenten für die Wiederverwendung (CRU) [kg]: A1-A3 0, C2 0, C3 0, C4 0
- Stoffe zum Recycling (MFR) [kg]: A1-A3 0, C2 0, C3 0, C4 0
- Stoffe für die Energierückgewinnung (MER) [kg]: A1-A3 0, C2 0, C3 0, C4 0
- Exportierte elektrische Energie (EEE) [MJ]: A1-A3 13.4121, C2 0, C3 0, C4 0
- Exportierte thermische Energie (EET) [MJ]: A1-A3 31.1824, C2 0, C3 0, C4 0

## Impact indicators
- Globales Erwärmungspotenzial - total (GWP-total) [kg CO2 eq.]: A1-A3 63.072, C2 0.149235, C3 1.30062, C4 0.746091
- Globales Erwärmungspotenzial - fossil (GWP-fossil) [kg CO2 eq.]: A1-A3 56.6465, C2 0.148211, C3 1.28993, C4 0.766072
- Globales Erwärmungspotenzial - biogen (GWP-biogenic) [kg CO2 eq.]: A1-A3 6.3718, C2 7.35296e-5, C3 0.00987654, C4 -0.0222334
- Globales Erwärmungspotenzial - luluc (GWP-luluc) [kg CO2 eq.]: A1-A3 0.0537755, C2 0.000949988, C3 0.000813893, C4 0.00225229
- Abbaupotenzial der stratosphärischen Ozonschicht (ODP) [kg CFC-11 eq.]: A1-A3 8.10323e-13, C2 3.78491e-17, C3 8.45325e-15, C4 3.00591e-15
- Versauerungspotenzial, kumulierte Überschreitung (AP) [Mole of H+ eq.]: A1-A3 0.363984, C2 0.000464733, C3 0.00213398, C4 0.00545293
- Eutrophierungspotenzial - Süßwasser (EP-freshwater) [kg P eq.]: A1-A3 0.000102618, C2 3.04216e-7, C3 1.88969e-6, C4 1.28935e-6
- Eutrophierungspotenzial - Salzwasser (EP-marine) [kg N eq.]: A1-A3 0.0345506, C2 0.000216951, C3 0.000593946, C4 0.00141562
- Eutrophierungspotenzial - Land (EP-terrestrial) [Mole of N eq.]: A1-A3 1.62255, C2 0.00242245, C3 0.00630205, C4 0.0155529
- Bildungspotenzial für troposphärisches Ozon (POCP) [kg NMVOC eq.]: A1-A3 0.0693224, C2 0.000418378, C3 0.00253293, C4 0.00428945
- Potenzial für die Verknappung abiotischer Ressourcen nicht fossile Ressourcen (ADPE) [kg Sb eq.]: A1-A3 1.36831e-5, C2 1.28671e-8, C3 2.25072e-7, C4 7.26122e-8
- Potenzial für die Verknappung abiotischer Ressourcen fossile Brennstoffe (ADPF) [MJ]: A1-A3 881.883, C2 1.96064, C3 46.1171, C4 10.156
- Wasser-Entzugspotenzial (Benutzer) (WDP) [m³ world equiv.]: A1-A3 8.08328, C2 0.000575019, C3 0.0937989, C4 0.0819858

## Use advice
Der Datensatz repräsentiert ein Cradle to Gate Inventar. Er kann verwendet werden, um die Lieferkette des jeweiligen Produktes in einer repräsentativen Weise zu charakterisieren. Die Kombination mit einzelnen Einheitenprozessen und diesem Produkt ermöglicht die Erstellung von anwenderspezifischen (Produkt-) LCAs.

## Data sources
- Documentation of data quality management
- GaBi Database Edition 2021, CUP2021.01
- GaBi database (all versions)
