# Kältekautschuk Plus S3 Platte

Dataset: ILCD process, EPD, average dataset
Geography: DE
Reference year: 2021
Valid until: 2024
Classification: OEKOBAU.DAT: Dämmstoffe / Kautschuk / Schaum
Classification: IBUCategories: 02 Bauprodukte / Wärmedämmungsprodukte / Dämmstoffe aus Schaumkunststoffen
Method details: Dämmstoffe aus Schaumkunststoffen.pdf
Generated by: GreenDelta GmbH
Registration number: EPD-AWU-20210056-IBC1-DE
Owner: Adolf Würth GmbH & Co. KG
Compliance: DIN EN 15804; ISO 14025
Review: Accredited third party review by Institut Bauen und Umwelt e. V.
Amounts: rows without a unit in brackets have none in this file; such an amount is in the reference unit of its flow, which a separate flow dataset defines
copyright: true
licenseType: Free of charge for all users and uses
accessRestrictions: None

## General comment
Kältekautschuk Plus S3 Platte ist eine flexible, geschlossenzellige Kautschukdämmung aus flexiblem Elastomerschaum (FEF), die Kondensation verhindert und Energieverluste reduziert. Durch die Einbindung einer Wasserdampfbarriere in die Dämmzellstruktur kann Kältekautschuk Plus die Wasserdampfmigration effektiv verhindern und eine hervorragende Leistung über die gesamte Lebensdauer des Systems bieten. Diese EPD umfasst die Kältekautschuk Plus-Produktfamilie, einschließlich Kältekautschuk Plus S3 Platte, -Wickel und -Platten.

Für das Anbieten des Produkts auf dem Markt in der

EU/EFTA (mit Ausnahme der Schweiz)

gilt die Regelung (EU) Nr. 305/2011 (CPR). Das

Produkt benötigt eine Leistungserklärung im Rahmen der EN 14304:2009 und der CE-Markierung. Für die Anwendung und Nutzung gelten die jeweiligen nationalen Bestimmungen.

## Technology and included processes
Nach der Anlieferung werden die Rohstoffe in einem Lager aufbewahrt und kurz darauf in der Produktion eingesetzt. Der erste Schritt bei der Herstellung von Kältekautschuk Plus S3 Platte ist das Mischen der Rohstoffe in einem Kneter und das Ausrollen der resultierenden Mischung, die dann in Platten geschnitten wird. Die flachen Platten werden durch einen industriellen Kühler geführt und abgekühlt. Die abgekühlten Platten werden granuliert und das Granulat wird bei Raumtemperatur kurz gelagert, bevor es in die Verarbeitungsanlage eintritt. In einem nächsten Schritt werden die verschiedenen Granulate in einer Verarbeitungsanlage gemischt. Die entstehende Kautschukmischung wird extrudiert und auf einem Förderband durch einen industriellen Ofen zum Aufschäumen transportiert. Nach dem Aufschäumen werden die Endlosplatten durch einen industriellen Kühler geführt, auf dem ein kontinuierlicher Längsschnitt angewendet wird, um die Platten auf die richtige Breite zu schneiden. Falls zutreffend, wird eine Klebeschicht auf einer Seite der Platten aufgetragen. Schließlich wird die Endlosbahn durch einen Traversenschnitt in Platten verschiedener Größen geschnitten. Für die Verpackung werden Karton, Polyethylenfolie, Polypropylenfolie und Holzpaletten verwendet.
Deklarierte Einheit:
Die deklarierte Einheit ist 1 m³ des Dämmstoffs Kältekautschuk Plus S3 Platte für die technische Gebäudeausrüstung und Industrieanlagen einschließlich Verpackungsmaterial. Die deklarierte Einheit bezieht sich auf das Produkt, wie es die Anlage verlässt. Die Rohdichte ist die durchschnittliche Dichte aller deklarierten Produkte, gewichtet mit der Produktionsmenge.

## Technical purpose
Kältekautschuk Plus S3 Platte wird für Klimaanlagen, Kühlsysteme, Kühlwasser, Heizungs- und Warmwasserleitungen sowie Luftverteilungsleitungen benutzt. Neben der Verhinderung von Kondensation und der Energieeinsparung erfüllt Kältekautschuk Plus S3 Platte auch eine akustische Funktion, indem es Schall absorbiert und Vibrationen der Kanalwände dämpft. Durch die serienmäßige antimikrobielle Beständigkeit und einen geschlossenzelligen Kautschuk der Brandschutzklasse B, der völlig staub- und faserfrei ist, kann Kältekautschuk Plus S3 Platte in allen öffentlichen, geschäftlichen oder industriellen Gebäuden eingesetzt werden, ohne die Gesundheit oder die Luftqualität zu schädigen. Die Anwendung im Außenbereich benötigt einen UV-Schutz.

## Reference product
- Dämmstoff Kältekautschuk Plus S3 Platte (): 1

## Inputs
- Erneuerbare Primärenergie als Energieträger (PERE) [MJ]: A1-A3 547.167, A4 0.565, A5 5.01537, C2 0.110493, C4 0, D -193.935
- Erneuerbare Primärenergie zur stofflichen Nutzung (PERM) [MJ]: A1-A3 53.4553, A4 0.0393, A5 4.44528e-5, C2 0.00766113, C4 0.00242749, D -40.1885
- Total erneuerbare Primärenergie (PERT) [MJ]: A1-A3 600.623, A4 0.606, A5 5.01541, C2 0.118154, C4 0.00242749, D -234.121
- Nicht-erneuerbare Primärenergie als Energieträger (PENRE) [MJ]: A1-A3 1131.05, A4 48, A5 44.1172, C2 9.35072, C4 28.7545, D -49.8944
- Nicht-erneuerbare Primärenergie zur stofflichen Nutzung (PENRM) [MJ]: A1-A3 3905.29, A4 0, A5 0, C2 0, C4 0, D 0
- Total nicht erneuerbare Primärenergie (PENRT) [MJ]: A1-A3 5036.68, A4 48, A5 44.1172, C2 9.35092, C4 28.7545, D -49.8992
- Einsatz von Sekundärstoffen (SM) [kg]: A1-A3 1.87697, A4 0.0114, A5 0, C2 0.00221613, C4 0, D -0.0586466
- Erneuerbare Sekundärbrennstoffe (RSF) [MJ]: A1-A3 5.20151e-6, A4 0, A5 4.18591e-22, C2 0, C4 0, D 0
- Nicht erneuerbare Sekundärbrennstoffe (NRSF) [MJ]: A1-A3 0, A4 0, A5 0.123168, C2 0, C4 0, D 0
- Einsatz von Süßwasserressourcen (FW) [m^3]: A1-A3 5.89237, A4 0.00755, A5 0.0386422, C2 0.00146762, C4 0.273834, D -0.0232426

## Outputs
- Gefährlicher Abfall zur Deponie (HWD) [kg]: A1-A3 0.0621506, A4 0.00124, A5 8.15953e-8, C2 0.000242215, C4 0, D -0.0017033
- Entsorgter nicht gefährlicher Abfall (NHWD) [kg]: A1-A3 116.531, A4 2.2, A5 2.87219, C2 0.42945, C4 4.21145, D -0.772485
- Entsorgter radioaktiver Abfall (RWD) [kg]: A1-A3 0.0265766, A4 0.00032, A5 0.000597274, C2 6.22982e-5, C4 0.00160058, D -0.000232058
- Komponenten für die Wiederverwendung (CRU) [kg]: A1-A3 0, A4 0, A5 13.7, C2 0, C4 0, D 0
- Stoffe zum Recycling (MFR) [kg]: A1-A3 0.000413083, A4 2.64e-5, A5 0, C2 5.13529e-6, C4 0, D 0
- Stoffe für die Energierückgewinnung (MER) [kg]: A1-A3 1.76047e-11, A4 1.12e-12, A5 2.70814, C2 2.18855e-13, C4 49.95, D 0
- Exportierte elektrische Energie (EEE) [MJ]: A1-A3 0, A4 0, A5 14.286, C2 0, C4 180.731, D 0
- Exportierte thermische Energie (EET) [MJ]: A1-A3 0, A4 0, A5 46.9877, C2 0, C4 584.728, D 0

## Impact indicators
- Globales Erwärmungspotenzial (GWP) [kg CO_(2)-Äq.]: A1-A3 277.614, A4 3.1, A5 10.8778, C2 0.604402, C4 113.767, D -3.91595
- Abbau Potential der stratosphärischen Ozonschicht (ODP) [kg CFC11-Äq.]: A1-A3 4.99925e-5, A4 5.65e-7, A5 1.09359e-14, C2 1.09898e-7, C4 0, D -2.23109e-7
- Versauerungspotenzial von Boden und Wasser (AP) [kg SO_(2)-Äq.]: A1-A3 1.48757, A4 0.0123, A5 0.00333452, C2 0.00240214, C4 0.0177901, D -0.0165684
- Eutrophierungspotenzial (EP) [kg PO_(4)^(3)-Äq.]: A1-A3 1.46261, A4 0.00282, A5 0.000488623, C2 0.000550129, C4 0.00427665, D -0.00747452
- Bildungspotential für troposphärisches Ozon (POCP) [kg Ethen-Äq.]: A1-A3 0.0633713, A4 0.000524, A5 0.000347981, C2 0.000101651, C4 0.000998049, D -0.00129128
- Potenzial für den abiotischen Abbau nicht fossiler Ressourcen (ADPE) [kg Sb-Äq.]: A1-A3 0.0122291, A4 9.24e-6, A5 1.52682e-6, C2 1.80462e-6, C4 0, D -1.554e-5
- Potenzial für den abiotischen Abbau fossiler Brennstoffe (ADPF) [MJ]: A1-A3 4786.26, A4 47.4, A5 42.5795, C2 9.22554, C4 24.2794, D -46.7757

## Use advice
Gültigkeitsbereich:
Produktlinie Kältekautschuk Plus S3 Platte.

Wärmedämmstoff aus flexiblem Elastomer-Schaum fzur Dämmung von technischen Gabäudeausrüstungen und Industrieanlagen.

Die EPD wurde nach den Anforderungen der PCR Teil A in Bezug auf EN 15804+A1:2013 und PCR Teil B: Anforderungen an die EPD für Dämmstoffe aus Schaumkunststoffen durchgeführt.

Diese EPD basiert auf der durchschnittlichen Produktion von Kältekautschuk Plus S3 Platte aus sechs verschiedenen Varianten, welche in Deutschland produziert werden.
Systemgrenze:
Die Systemgrenzen der EPD folgen dem Aufbau der /EN 15804/ (Abschnitt 6.2.1). Nur die Deklaration der Produktphasen-Module A1 bis A3 ist für die Einhaltung der EN15804 verpflichtend. Die Deklaration der Module anderer Lebenszyklusphasen ist optional. Ressourcen aus der Ökosphäre und Technosphäre treten auf Stufe A1 in das System ein und verlassen das System auf Stufe C4. Die folgenden Lebenszyklusphasen werden berücksichtigt:

Modul A1: Die Systemgrenzen betreffen die Rohstoffgewinnung und -versorgung von der Wiege bis zum Werksgelände und werden durch generische Hintergrunddatensätze dargestellt.

Modul A2: Der Transport der Rohstoffe vom Werksgelände zum Herstellungsort wird durch generische Hintergrunddatensätze dargestellt. Die Transportentfernungen wurden vom Hersteller zur Verfügung gestellt.

Modul A3: Die Herstellung enthält herstellerspezifische Material- und Energiedaten, die durch generische Datensätze dargestellt werden. Maschinen sowie Gebäude zur Herstellung der deklarierten Einheit sind vernachlässigt. Im Durchschnitt werden für die Herstellung von 1m³ Kältekautschuk Plus S3 Platte 0,49 kWh Strom und 2,65 kWh Erdgas benötigt. Diese Daten wurden von der Adolf Würth GmbH & Co KG mitgeteilt. Dieses Modul enthält auch die Verpackung mit Plastik und Kartons sowie Holzpaletten. Der gespeicherte biogene Kohlenstoff wird im Ergebnisabschnitt deklariert.

Modul A4: Der Transport von Kältekautschuk Plus S3 Platte vom Werksgelände zum Montagestandort ist durch generische Hintergrunddaten dargestellt. Die Transportdistanzen wurden auf Basis von durchschnittlichen Transportdaten vom Hersteller erstellt.

Modul A5: Die Montage kann manuell und ohne den Einsatz von elektrischen Geräten durchgeführt werden. Für die Montage von Kältekautschuk Plus S3 Platte wird nur Klebstoff benötigt. Das Verpackungsmaterial von Modul A3 wird hier entsorgt: Plastikverpackungen werden verbrannt, Kartons und die Holzpalette werden wiederverwendet.

Modul C2: Die Produkte, die zu entsorgen sind, werden zur Entsorgungsanlage transportiert.

Modul C4: Der Abfall wird nach den Vorgaben der Abfallrahmenrichtlinie der Europäischen Union behandelt.

Modul D: Potenzielle Auswirkungen und Vorteile der energetischen Wiederverwertung und des Recyclings sind beschrieben.

## Data sources
- GaBi Database (all versions)
- GaBi database SP30 2016
