# StoVentec Glass

Dataset: ILCD process, EPD, specific dataset
Geography: RER
Reference year: 2021
Valid until: 2025
Classification: OEKOBAU.DAT: Komposite / Systembauteile / Aussenwände
Classification: IBUCategories: 02 Bauprodukte / Fassaden / Vorhangfassaden
Method details: Vorhangfassaden.pdf
Generated by: Sphera Solutions GmbH
Registration number: EPD-STO-20200208-CBA1-DE
Owner: Sto SE & Co. KGaA
Compliance: DIN EN 15804; ISO 14025
Review: Accredited third party review by Institut Bauen und Umwelt e. V.
Amounts: rows without a unit in brackets have none in this file; such an amount is in the reference unit of its flow, which a separate flow dataset defines
copyright: true
licenseType: Free of charge for all users and uses
accessRestrictions: None

## General comment
Sto SE & Co. KGaA ist ein international führender Hersteller von Produkten und Systemen für Gebäudebeschichtungen mit mehr als 5.500 Mitarbeitern. Der Umsatz 2019 betrug 1,39 Milliarden Euro. Zum Kernsortiment gehören Fassadensysteme in Form von Wärmedämm-Verbundsystemen (WDVS) sowie vorgehängten hinterlüfteten Fassadensystemen (VHF). Sto Scandinavia AB operiert in Nordeuropa (Schweden, Norwegen, Dänemark und Finnland) als vollständige Tochtergesellschaft von Sto SE & Co KGaA. Die geschäftlichen Aktivitäten umfassen die Entwicklung, Produktion und Vermarktung sowie den Vertrieb von Produkten, Systemen und Lösungen für Fassaden, Beton, Innenräume und Böden.

Produktbeschreibung/Produktdefinition

Das Produkt StoVentec Glass ist ein Verbundwerkstoff-Fassadenelement aus gehärtetem, emailliertem Glas, das mit einer leichten Trägerplatte (aus Blähglasgranulat) verklebt ist und auf der Rückseite über ein integriertes Plattentragprofil verfügt. Das Fassadenelement wird in vorgehängten Fassadensystemen mit fugenbetontem Design verwendet.

Das Produkt StoVentec Glass bietet mit unterschiedlichen Formaten, Formen, Glasarten und Glasoberflächen eine große Bandbreite verschiedener Gestaltungsmöglichkeiten. Die vorgefertigten Fassadenelemente können vor Ort einfach und witterungsunabhängig montiert werden.

Diese Umwelt-Produktdeklaration umfasst ausschließlich das Fassadenelement an sich sowie das Agraffenprofil zum Einhängen in die Unterkonstruktion/Wand, nicht jedoch die Dämmung sowie die für das vorgehängte Fassadensystem verwendete Unterkonstruktion.

Für die Verwendung des Produkts gelten die jeweiligen nationalen Bestimmungen am Ort der Verwendung, in Deutschland zum Beispiel die Bauordnungen der Länder, und die nationalen technischen Bestimmungen aufgrund dieser Vorschriften.

## Technology and included processes
This dataset represents one squaremeter (1 m²) StoVentec Glass ventilated facade system (31,8 kg/m²). The composition of the system is: 6 mm toughened Glass (15 kg/m²) Silicone based adhesive (3 kg/m²) 20 mm StoVentec Carrier Board (10 kg/m²) Sto-Board Carrier Profile (1.8 kg/m²) Sto-Agrafe Profile (2 kg/m²) For further details see the EPD document.
Deklarierte Einheit:
Die Deklaration bezieht sich auf 1 m² Fassadensystem StoVentec Glass mit einer Oberflächenmasse von 31,80 kg/m² und einer Dicke von 30 mm ohne Agraffenprofile und 62 mm mit Agraffenprofilen.

## Technical purpose
Das deklarierte Produkt StoVentec Glass wird als fugenbetonte Fassadenplatte in vorgehängten hinterlüfteten Fassadensystemen (VHF) verwendet. Für die Verarbeitung und Verwendung gelten die jeweiligen nationalen Bestimmungen. In Deutschland ist dies beispielsweise die Allgemeine bauaufsichtliche Zulassung Z-10.3-720 des Deutschen Instituts für Bautechnik (DiBt), Berlin.

## Reference product
- StoVentec Glass (): 1

## Inputs
- Erneuerbare Primärenergie als Energieträger (PERE) [MJ]: A1-A3 400.621, A4 0.167501, A5 22.4, C1 0, C2 0.0837507, C4 2.04, D -174
- Erneuerbare Primärenergie zur stofflichen Nutzung (PERM) [MJ]: A1-A3 23.3374, A4 0, A5 -22, C1 0, C2 0, C4 -1.31, D 0
- Total erneuerbare Primärenergie (PERT) [MJ]: A1-A3 423.958, A4 0.167501, A5 0.384, C1 0, C2 0.0837507, C4 0.73, D -174
- Nicht-erneuerbare Primärenergie als Energieträger (PENRE) [MJ]: A1-A3 1274.98, A4 2.98281, A5 15.6, C1 0, C2 1.4914, C4 90.5, D -385
- Nicht-erneuerbare Primärenergie zur stofflichen Nutzung (PENRM) [MJ]: A1-A3 99.154, A4 0, A5 -14.2, C1 0, C2 0, C4 -84.9, D 0
- Total nicht erneuerbare Primärenergie (PENRT) [MJ]: A1-A3 1374.13, A4 2.98281, A5 1.41, C1 0, C2 1.4914, C4 5.58, D -385
- Einsatz von Sekundärstoffen (SM) [kg]: A1-A3 8.45094, A4 0, A5 0, C1 0, C2 0, C4 0, D 0
- Erneuerbare Sekundärbrennstoffe (RSF) [MJ]: A1-A3 0, A4 0, A5 0, C1 0, C2 0, C4 0, D 0
- Nicht erneuerbare Sekundärbrennstoffe (NRSF) [MJ]: A1-A3 0, A4 0, A5 0, C1 0, C2 0, C4 0, D 0
- Einsatz von Süßwasserressourcen (FW) [m^3]: A1-A3 0.748426, A4 0.000193955, A5 0.0116, C1 0, C2 9.69776e-5, C4 0.0014055, D -0.44

## Outputs
- Gefährlicher Abfall zur Deponie (HWD) [kg]: A1-A3 6.18914e-6, A4 1.3881e-7, A5 8.45e-10, C1 0, C2 6.94052e-8, C4 8.49708e-8, D -1.56e-7
- Entsorgter nicht gefährlicher Abfall (NHWD) [kg]: A1-A3 18.2033, A4 0.000456484, A5 0.0313, C1 0, C2 0.000228242, C4 28.0277, D -8.17
- Entsorgter radioaktiver Abfall (RWD) [kg]: A1-A3 0.0501864, A4 3.69193e-6, A5 0.000125, C1 0, C2 1.84596e-6, C4 6.34458e-5, D -0.0239
- Komponenten für die Wiederverwendung (CRU) [kg]: A1-A3 0, A4 0, A5 0, C1 0, C2 0, C4 0, D 0
- Stoffe zum Recycling (MFR) [kg]: A1-A3 0, A4 0, A5 0, C1 3.8, C2 0, C4 0, D 0
- Stoffe für die Energierückgewinnung (MER) [kg]: A1-A3 0, A4 0, A5 0, C1 0, C2 0, C4 0, D 0
- Exportierte elektrische Energie (EEE) [MJ]: A1-A3 0, A4 0, A5 7.6, C1 0, C2 0, C4 0, D 0
- Exportierte thermische Energie (EET) [MJ]: A1-A3 0, A4 0, A5 13.6, C1 0, C2 0, C4 0, D 0

## Impact indicators
- Globales Erwärmungspotenzial (GWP) [kg CO_(2)-Äq.]: A1-A3 92.807, A4 0.219612, A5 4.98, C1 0, C2 0.109806, C4 0.381637, D -30
- Abbau Potential der stratosphärischen Ozonschicht (ODP) [kg CFC11-Äq.]: A1-A3 8.5216e-12, A4 3.58572e-17, A5 1.5e-15, C1 0, C2 1.79286e-17, C4 2.09982e-15, D -5.98e-14
- Versauerungspotenzial von Boden und Wasser (AP) [kg SO_(2)-Äq.]: A1-A3 0.373457, A4 0.000171504, A5 0.000467, C1 0, C2 8.57522e-5, C4 0.00242658, D -0.128
- Eutrophierungspotenzial (EP) [kg PO_(4)^(3)-Äq.]: A1-A3 0.0349467, A4 3.15761e-5, A5 9.64e-5, C1 0, C2 1.5788e-5, C4 0.000272921, D -0.00642
- Bildungspotential für troposphärisches Ozon (POCP) [kg Ethen-Äq.]: A1-A3 0.00512412, A4 -7.76817e-7, A5 4.02e-5, C1 0, C2 -3.88409e-7, C4 0.000183996, D -0.00713
- Potenzial für den abiotischen Abbau nicht fossiler Ressourcen (ADPE) [kg Sb-Äq.]: A1-A3 0.000837787, A4 1.60705e-8, A5 1.7e-8, C1 0, C2 8.03524e-9, C4 3.85342e-8, D -3.74e-6
- Potenzial für den abiotischen Abbau fossiler Brennstoffe (ADPF) [MJ]: A1-A3 1247.22, A4 2.97338, A5 1.09, C1 0, C2 1.48669, C4 5.41504, D -324

## Use advice
Gültigkeitsbereich:
Diese Deklaration bezieht sich ausschließlich auf das hinterlüftete Fassadensystem StoVentec Glass und umfasst keine Daten für die Unterkonstruktion und Dämmung.

Die Produktkomponenten werden von Sto SE & Co. KGaA (Produktionsstandorte in Lauingen, Deutschland) und von externen Lieferanten hergestellt. Anschließend werden die Systemkomponenten zum Lager in Schweden transportiert, wo das System kommissioniert, verpackt und ausgeliefert wird.
Systemgrenze:
Cradle to gate - mit Optionen

Beschreibung der Systemgrenzen:

Modul A1 bis A3:

Dieses Modul berücksichtigt die Herstellung der Systemkomponenten (z. B. Trägerplatte, Befestigungen, Putz usw.), ihren Transport zur Baustelle in Schweden sowie die Herstellung/Zusammenstellung der Komponenten des Fassadensystems. Auch die Auswirkungen für die Herstellung des Verpackungsmaterials wurden berücksichtigt.

Modul A4:

Dieses Modul berücksichtigt eine Transportstrecke von 100 km per Lkw zur Baustelle. Die Transportstrecke kann projektspezifisch angepasst werden.

Modul A5:

Verwertung und Entsorgung des Verpackungsmaterials. Gutschriften für potenziell vermiedene Strom- und Wärmeenergieerzeugung werden im Modul D deklariert und betreffen nur den Anteil der neuen Materialien.

Ein durchschnittlicher Stromverbrauch für die Montage wird berücksichtigt.

Montageverluste wurden nicht berücksichtigt, da solche Verluste in hohem Maße von der jeweiligen Gebäudegeometrie und weiteren standortspezifischen Faktoren abhängig sind. Schätzwerte für Montageverluste können anhand der Ergebnisse aus der Ökobilanz für die Herstellung und Entsorgung beispielsweise mittels Skalierung bestimmt werden.

Modul C1 bis C4:

C1: Manueller Rückbau, keine Umweltlasten.

C2: 50 km Lkw-Transport zur Abfallaufbereitung (je nach Gebäude anpassbar).

C3: Keine zusätzliche Abfallbehandlung, keine Umweltlasten.

C4: Deklariert wird das europäische Szenario für durchschnittliche Emissionen bei der Deponierung.

Modul D:

Gutschriften und Lasten für Metallkomponenten und vermiedene Lasten aus der Verpackungsverwertung.

## Data sources
- GaBi Database (all versions)
- GaBi database SP38 2019
