# EGGER Eurodekor - beschichtete Spanplatten

Dataset: ILCD process, EPD, average dataset
Geography: DE
Reference year: 2021
Valid until: 2026
Classification: OEKOBAU.DAT: Holz / Holzwerkstoffe / Spanplatten
Classification: IBUCategories: 02 Bauprodukte / Holzwerkstoffe / Holzwerkstoffe
Method details: Holzwerkstoffe.pdf
Generated by: Daxner & Merl GmbH
Registration number: EPD-EGG-20200251-IBC1-DE
Owner: Fritz EGGER GmbH & Co. OG
Compliance: DIN EN 15804+A2; ISO 14025
Review: Accredited third party review by Institut Bauen und Umwelt e. V.
Amounts: rows without a unit in brackets have none in this file; such an amount is in the reference unit of its flow, which a separate flow dataset defines
copyright: true
licenseType: Free of charge for all users and uses
accessRestrictions: None

## General comment
Beschichtete Spanplatten (Eurodekor) sind plattenförmige Holzwerkstoffe gemäß

EN 312:2010-09, Spanplatten Anforderungen und
EN 14322:2017-03, Holzwerkstoffe ― Melaminbeschichtete Platten zur Verwendung im Innenbereich ― Definition, Anforderungen und Klassifizierung.Die dekorative Zeichnung einer melaminharzbeschichteten Spanplatte wird mittels eines bedruckten Dekorpapiers erreicht. Bei der Verpressung kann man der Oberfläche gleichzeitig eine entsprechende Haptik verleihen.

Die Plattentypen werden in der Anwendung nach zwei Kriterien unterschieden: nach tragenden und nichttragenden Elementen und nach der Verwendung im trockenen oder feuchten Bereich:

P1: Platten für allgemeine Zwecke zur Verwendung im Trockenbereich

P2: Platten für Inneneinrichtungen (einschließlich Möbel) zur Verwendung im Trockenbereich

P3: Platten für nicht tragende Zwecke zur Verwendung im Feuchtbereich

P4: Platten für tragende Zwecke zur Verwendung im Trockenbereich

P5: Platten für tragende Zwecke zur Verwendung im Feuchtbereich

P6: Hochbelastbare Platten für tragende Zwecke zur Verwendung im Trockenbereich

Die in der Norm beschriebene Anwendungsklasse P7

wird von EGGER nicht produziert.

Das betrachtete durchschnittliche Produkt weist eine Dicke von 17,6 mm auf. Dies wurde über die produzierten Gesamtmengen im Werk Brilon nach Volumenanteil berechnet. Miteinbezogen wurden die

hergestellten Mengen all jener Platten über 8 mm Dicke. Die Herstellung von Platten von 8 mm und dünner fällt in die Kategorie Dünnspanplatte und wird in dieser Studie nicht deklariert.

Betrachtet wird die durchschnittliche Leimflotte über alle Plattentypen. Die Produktionsbedingungen des Standortes Brilon sind vergleichbar mit jenen der anderen Werke. Sie entsprechen den in allen Standorten eingesetzten Technologien und Standards.

## Technology and included processes
Herstellung der Rohplatten (EGGER Eurospan): 1. Holzaufbereitung - Rundholzzerspanung - Hackschnitzelaufbereitung - Restholzaufbereitung 2. Trocknung der Späne auf ca. 2-3 % Restfeuchte 3. Sortierung der Späne 4. Beleimung der Späne 5. Streuung der beleimten Späne auf ein Formband 6. Verpressen des Spänekuchens in einer kontinuierlich arbeitenden Heißpresse (ContiRoll) 7. Formatierung der Rohplatten 8. Auskühlen der Rohplatten in Sternkühlwendern 9. Schleifen der Ober- und Unterseite 10. Abstapelung zu Großstapeln. Alle während der Produktion anfallenden Reste (Besäum-, Schneid- und Fräsreste) werden erneut dem Produktionsprozess zugeführt. Herstellung der Imprägnate für die Beschichtung: 1. Abwicklung der Rohpapiere 2. Aufnahme von Imprägnierharz (MUF) in der Anlage 3. Trocknung des imprägnierten Papiers in beheizten Trocknern 4. Formatierung des endlosen Papiers mittels Querschneider 5. Abstapelung der formatierten Bögen auf Paletten Beschichtung der Spanplatten (EGGER Eurodekor): 1. Legung der Imprägnate auf die Ober- und Unterseite der Rohplatte 2. Verpressung der Platte in der Heißpresse mit verschieden strukturierten Pressblechen 3. Qualitätssortierung und Abstapelung 4. Klimatisierungsphase von bis zu 14 Tagen Alle während der Beschichtung anfallenden Reste werden werksintern einer thermischen Verwertung zugeführt. Das Qualitätsmanagementsystem ist nach den Anforderungen der ISO 9001 implementiert und zertifiziert.
Technische Daten:
Die technischen Anforderungen an Spanplatten in den von EGGER produzierten Anwendungsklassen P1-P6 sind in der Norm EN 312:2010 festgelegt. Weitere Definitionen, Anforderungen und Klassifizierungen melaminbeschichteter Platten zur Verwendung im Innenbereich wie Oberflächeneigenschaften und Maßtoleranzen liefert die Norm EN 14322:2017-03. Detaillierte Angaben sind den technischen Datenblättern zu entnehmen.
Deklarierte Einheit:
Die vorliegende Umwelt-Produktdeklaration bezieht sich auf eine deklarierte Einheit von 1 m² EGGER Eurodekor beschichtete Spanplatte mit einer mittleren Dichte von 11,57 kg/m² und einer Auslieferungsfeuchte von etwa 6 %.

## Technical purpose
Das Einsatzgebiet der melaminharzbeschichteten

Spanplatte EGGER Eurodekor liegt überwiegend im

dekorativen Innenausbau sowie im Möbelbau. Sie wird

in Wohn- und Objekteinrichtungen eingesetzt. Die EGGER Eurodekor E1E05 TSCA P2 CE und die EGGER Eurodekor JP F 0,3 (F****) werden speziell für Möbel und Innenausbau mit erhöhten Anforderungen an niedrige Formaldehydemissionen verwendet. Für

erhöhten Brandschutz gibt es die EGGER Eurodekor Flammex E1E05 P2 CE.

## Reference product
- Eurodekor beschichtete Spanplatte: 1

## Inputs
- Erneuerbare Primärenergie als Energieträger (PERE) [MJ]: A1-A3 100.23, C1 0, C2 0.0280758, C3 180.597, C4 0, D -43.2881
- Erneuerbare Primärenergie zur stofflichen Nutzung (PERM) [MJ]: A1-A3 183.595, C1 0, C2 0, C3 -179.83, C4 0, D 0
- Total erneuerbare Primärenergie (PERT) [MJ]: A1-A3 283.825, C1 0, C2 0.0280758, C3 0.766923, C4 0, D -43.2881
- Nicht-erneuerbare Primärenergie als Energieträger (PENRE) [MJ]: A1-A3 62.9785, C1 0, C2 0.487514, C3 21.5966, C4 0, D -171.938
- Nicht-erneuerbare Primärenergie zur stofflichen Nutzung (PENRM) [MJ]: A1-A3 19.8737, C1 0, C2 0, C3 -19.8647, C4 0, D 0
- Total nicht erneuerbare Primärenergie (PENRT) [MJ]: A1-A3 82.8522, C1 0, C2 0.487514, C3 1.73187, C4 0, D -171.938
- Einsatz von Sekundärstoffen (SM) [kg]: A1-A3 4.75069, C1 0, C2 0, C3 0, C4 0, D 0
- Erneuerbare Sekundärbrennstoffe (RSF) [MJ]: A1-A3 12.0028, C1 0, C2 0, C3 0, C4 0, D 169.166
- Nicht erneuerbare Sekundärbrennstoffe (NRSF) [MJ]: A1-A3 0, C1 0, C2 0, C3 0, C4 0, D 18.6868
- Einsatz von Süßwasserressourcen (FW) [m^3]: A1-A3 0.0147848, C1 0, C2 3.27178e-5, C3 0.000886761, C4 0, D -0.0350095

## Outputs
- Gefährlicher Abfall zur Deponie (HWD) [kg]: A1-A3 2.67587e-6, C1 0, C2 2.25434e-8, C3 7.16461e-10, C4 0, D -5.81898e-8
- Entsorgter nicht gefährlicher Abfall (NHWD) [kg]: A1-A3 0.0874207, C1 0, C2 7.72672e-5, C3 0.00122786, C4 0, D 0.00628585
- Entsorgter radioaktiver Abfall (RWD) [kg]: A1-A3 0.00158677, C1 0, C2 8.98535e-7, C3 0.000262599, C4 0, D -0.0148
- Komponenten für die Wiederverwendung (CRU) [kg]: A1-A3 0, C1 0, C2 0, C3 0, C4 0, D 0
- Stoffe zum Recycling (MFR) [kg]: A1-A3 0, C1 0, C2 0, C3 0, C4 0, D 0
- Stoffe für die Energierückgewinnung (MER) [kg]: A1-A3 0, C1 0, C2 0, C3 12.2249, C4 0, D 0
- Exportierte elektrische Energie (EEE) [MJ]: A1-A3 0, C1 0, C2 0, C3 0, C4 0, D 0
- Exportierte thermische Energie (EET) [MJ]: A1-A3 0, C1 0, C2 0, C3 0, C4 0, D 0

## Impact indicators
- Globales Erwärmungspotenzial total (GWP-total) [kg CO_(2)-Äq.]: A1-A3 -13.7667, C1 0, C2 0.0368361, C3 17.9051, C4 0, D -8.83214
- Globales Erwärmungspotenzial fossil (GWP-fossil) [kg CO_(2)-Äq.]: A1-A3 3.92791, C1 0, C2 0.0366027, C3 0.0984514, C4 0, D -8.79893
- Globales Erwärmungspotenzial biogen (GWP-biogenic) [kg CO_(2)-Äq.]: A1-A3 -17.7003, C1 0, C2 -6.10951e-5, C3 17.8065, C4 0, D -0.0250786
- Globales Erwärmungspotenzial luluc (GWP-luluc) [kg CO_(2)-Äq.]: A1-A3 0.00565814, C1 0, C2 0.000294581, C3 0.000142639, C4 0, D -0.00812752
- Abbau Potential der stratosphärischen Ozonschicht (ODP) [kg CFC11-Äq.]: A1-A3 1.2544e-11, C1 0, C2 6.67937e-18, C3 2.16509e-15, C4 0, D -1.21928e-13
- Versauerungspotenzial von Boden und Wasser (AP) [mol H^(+)-Äq.]: A1-A3 0.0100288, C1 0, C2 0.000123689, C3 0.000217367, C4 0, D 0.00669616
- Eutrophierungspotenzial Süßwasser (EP-freshwater) [kg PO_(4)-Äq.]: A1-A3 1.14266e-5, C1 0, C2 1.10849e-7, C3 2.62964e-7, C4 0, D -1.49336e-5
- Eutrophierungspotenzial Salzwasser (EP-marine) [kg N-Äq.]: A1-A3 0.00395137, C1 0, C2 5.58003e-5, C3 4.82764e-5, C4 0, D 0.00169822
- Eutrophierungspotenzial Land (EP-terrestrial) [mol N-Äq.]: A1-A3 0.035384, C1 0, C2 0.000623324, C3 0.000507203, C4 0, D 0.0201829
- Bildungspotential für troposphärisches Ozon (POCP) [kg NMVOC-Äq.]: A1-A3 0.0079642, C1 0, C2 0.00010963, C3 0.000132301, C4 0, D 0.00717292
- Potenzial für den abiotischen Abbau nicht fossiler Ressourcen (ADPE) [kg Sb-Äq.]: A1-A3 2.73522e-6, C1 0, C2 2.94282e-9, C3 2.8491e-8, C4 0, D -1.83322e-6
- Potenzial für den abiotischen Abbau fossiler Brennstoffe (ADPF) [MJ]: A1-A3 82.8313, C1 0, C2 0.485567, C3 1.73152, C4 0, D -171.917
- Wassernutzung (WDP) [m^(3) Welt-Äq. entzogen]: A1-A3 0.198831, C1 0, C2 0.000354871, C3 0.0214536, C4 0, D -0.562659
- Auftreten von Krankheiten aufgrund von Feinstaubemissionen (PM) [Krankheitsfälle]: A1-A3 9.91102e-8, C1 0, C2 6.98876e-10, C3 1.82306e-9, C4 0, D -3.62169e-8
- Wirkung durch Exposition des Menschen mit U235 (IR) [kBq U235-Äq.]: A1-A3 0.16692, C1 0, C2 0.000132556, C3 0.0430837, C4 0, D -2.42808
- Toxizitätsvergleichseinheit für Ökosysteme (ETP-fw) [CTUe]: A1-A3 19.8416, C1 0, C2 0.363299, C3 0.741033, C4 0, D -42.108
- Toxizitätsvergleichseinheit für Menschen (krebserregend) (HTP-c) [CTUh]: A1-A3 2.69077e-9, C1 0, C2 7.50888e-12, C3 2.04626e-11, C4 0, D -1.66534e-10
- Toxizitätsvergleichseinheit für Menschen (nicht krebserregend) (HTP-nc) [CTUh]: A1-A3 3.80513e-8, C1 0, C2 4.32665e-10, C3 7.53927e-10, C4 0, D 4.86746e-8
- Bodenqualitätsindex (SQP) [SQP]: A1-A3 487.175, C1 0, C2 0.17044, C3 0.551082, C4 0, D -31.6173

## Use advice
Gültigkeitsbereich:
Dieses Dokument bezieht sich auf beschichtete Spanplatten EGGER Eurodekor, produziert mit einer durchschnittlichen Leimflotte am Standort Brilon, Deutschland.

Die Produktionsbedingungen in Brilon sind vergleichbar mit jenen der anderen Werke. Sie entsprechen den in allen Standorten eingesetzten Technologien und Standards.
Systemgrenze:
Die Ökobilanz der durchschnittlichen EGGER Eurodekor beschichteten Spanplatte beinhaltet eine cradle-to-gate Betrachtung (Wiege bis zum Werkstor) der auftretenden Umweltwirkungen mit den Modulen C1-C4 und Modul D (A1-A3,+C,+D). Die folgenden Lebenszyklusphasen werden in der Analyse berücksichtigt:

Modul A1–A3 | Produktionsstadium

Das Produktionsstadium beinhaltet die Aufwendungen der Rohstoffversorgung (Rundholz, Altholz, Sägespäne, Leimsystem, Hilfsstoffe, etc.) sowie der damit verbundenen Transporte zum Produktionsstandort in Brilon. Innerhalb der Werksgrenzen werden der Holzplatz, die Nassspanaufbereitung, Trocknung, Beleimung, Streuung, das Pressen, die Schleifstraße bis zum Lager und der Versand berücksichtigt. Die Eurodekor Produkte werden darüber hinaus durch das Aufbringen einer Imprägnierung in den Kurztaktpressen veredelt und anschließend verpackt. Die Bereitstellung von thermischer und elektrischer Energie, Druckluft und Wasser erfolgt durch zentrale Versorger am Standort Brilon. Der Großteil der eingesetzten elektrischen Energie wird vom deutschen Stromnetz bezogen. Im eigenen Biomasse-Kraftwerk wird sowohl internes Restholz als auch extern bezogenes Altholz verwertet. Die Systemgrenze für in der Produktion verwendetes Altholz wird nach dem Sortieren und Hacken gesetzt. Dabei wird angenommen, dass das Ende der Abfalleigenschaft erreicht ist. Hier gilt die nach EN 15804 definierte Systemgrenze für Sekundärrohstoffe.

Modul C1 | Rückbau / Abriss

Für die Eurodekor beschichtete Spanplatte wurde ein manueller Ausbau angenommen. Die damit verbundenen Aufwände sind vernachlässigbar, wodurch keine Umweltwirkungen aus dem Rückbau der Produkte deklariert werden.

Modul C2 | Transport zur Abfallbehandlung

Modul C2 beinhaltet den Transport zur Abfallbehandlung. Dazu wird der Transport via LKW über 50 km Transportdistanz als repräsentatives Szenario angesetzt.

Modul C3 | Abfallbehandlung

In Modul C3 wird das Hacken nach Ausbau der Produkte betrachtet. Die Holzprodukte und mit ihnen die materialinhärenten Eigenschaften verlassen das Produktsystem als Sekundärbrennstoff in Modul C3.

Modul C4 | Beseitigung

Das angesetzte Szenario deklariert die energetische Verwertung der Holzprodukte, wodurch keine Umweltauswirkungen aus der Abfallbehandlung der Produkte in C4 zu erwarten sind.

Modul D | Gutschriften und Lasten außerhalb der Systemgrenze

In Modul D wird die energetische Verwertung des Produktes am Lebensende inklusive der entsprechenden energetischen Substitutionspotenziale in Form eines europäischen Durchschnittsszenarios beschrieben.

## Data sources
- GaBi Database (all versions)
- GaBi database SP40 2020
