# Mehrschichtparkett

Dataset: ILCD process, EPD, average dataset
Geography: AT
Reference year: 2017
Valid until: 2022
Classification: OEKOBAU.DAT: Holz / Holzböden / Parkett
Classification: IBUCategories: 02 Bauprodukte / Produkte aus Bauholz / Vollholzprodukte
Method details: Vollholzprodukte.pdf
Registration number: EPD-PAR-20170076-IBC1-DE
Owner: Parador GmbH
Compliance: DIN EN 15804; ISO 14025
Review: Accredited third party review by Institut Bauen und Umwelt e. V.
Amounts: rows without a unit in brackets have none in this file; such an amount is in the reference unit of its flow, which a separate flow dataset defines
copyright: true

## General comment
Parador Mehrschichtparkettböden sind Holzfußböden mit einer Edelholz-Deckschicht. Die für die Herstellung dieser Böden benötigten Materialien wie Schnittholz, Hobelware, Friese, Furnier oder bereits fertige Deckschichten werden zunächst getrennt hergestellt. Hierfür kommen überwiegend heimische Holzarten zum Einsatz. Tropenhölzer werden aus ökologischen Gründen nicht verwendet. Je nach Produktvariante besteht die Deckschicht aus einer einzelnen Lamelle (Landhausdiele) oder aus mehreren Lamellen (Schiffsboden). Die einzelnen Materialien werden miteinander verleimt. Nach einer Klimatisierungszeit durchlaufen die Rohlinge eine Oberflächenbehandlung und werden entsprechend der Produktformate mit einem Längs- und Querprofil versehen und verpackt.

Für das erstmalige Inverkehrbringen dieser Produkte in der EU gilt die /Verordnung (EU) Nr. 995/2010/ (European Timber Regulation). Des Weiteren gilt für das Inverkehrbringen in der EU/EFTA (mit Ausnahme der Schweiz) die /Verordnung (EU) Nr. 305/2011/ (CPR). Die Produkte haben eine Leistungserklärung (Declaration of Performance) und sind unter Berücksichtigung der harmonisierten Norm /EN 14342:2013/ „Holzfußböden und Parkett – Eigenschaften, Bewertung der Konformität und Kennzeichnung“, CE-gekennzeichnet.

## Technology and included processes
Nutzschicht, Mittellage und der Gegenzug werden in einem Arbeitsschritt in einer Presse unter Angabe eines Leims miteinander verpresst. Nach dem Verpressen werden die einzelnen Rohdielen einer Oberflächenbehandlung unterzogen (bis auf unbehandelte Endprodukte) und mit einem Längs- und Querprofil versehen. Nach der Qualitätskontrolle der einzelnen Mehrschichtparkettelemente werden diese in Halbschalen-Kartons abgepackt und in PE-Schrumpffolie verpackt. Diese einzelnen Verpackungseinheiten werden entsprechend der unterschiedlichen Formate auf Paletten gestapelt und im Lager für die nachfolgende Auslieferung bereitgestellt. Alle Prozesse werden im Rahmen der werkseigenen Factory Production Control (FPC) kontinuierlich überprüft und dokumentiert.
Technische Daten:
Wesentliche Merkmale und Leistung gemäß Leistungserklärung und zugrunde liegender harmonisierter Produktnorm /EN 14342:2013/
Deklarierte Einheit:
Die Deklarierte Einheit ist ein Quadratmeter (1 m²) Mehrschichtparkett inkl. Verpackungsmaterialien.

Für die gegenständige Deklaration wurde der Produktmix einer durchschnittlichen Jahresproduktion bestehend aus Landhausdielen und Schiffsboden-parkett herangezogen. Die im Durchschnitt enthaltenen Varianten unterscheiden sich in Bezug auf die Holzart und Behandlung der Nutzschicht sowie die Maße.

Die Durchschnittsbildung erfolgte auf Basis der effektiv hergestellten Mengen in m² und kg.

## Technical purpose
Mehrschichtparkettböden sind Bodenbeläge nach der /EN 13489/, für eine private und gewerbliche Nutzung im Innenbereich, die entweder auf Estrich oder bestehenden anderen Unterböden wie Holz oder Fliesen in Verbindung mit geeigneten Unterlagen (Dämmunterlagen) schwimmend verlegt oder aber vollflächig auf dem Estrich verklebt werden. Die Verlegung ist gemäß der Verlegeanleitung, den Regeln des Fachs und dem Stand der Technik durchzuführen.

Für die Verwendung gelten die jeweiligen nationalen Bestimmungen.

## Reference product
- Quadratmeter (1 m²) Mehrschichtparkett: 1

## Inputs
- Erneuerbare Primärenergie als Energieträger (PERE) [MJ]: A1-A3 240.791, A4 0.16658, A5 2.20492, C2 0.033366, C3 112.974, D -21.747
- Erneuerbare Primärenergie zur stofflichen Nutzung (PERM) [MJ]: A1-A3 190.459, A4 0, A5 -2.19434, C2 0, C3 -112.861, D 0
- Total erneuerbare Primärenergie (PERT) [MJ]: A1-A3 431.25, A4 0.16658, A5 0.01058, C2 0.033366, C3 0.11344, D -21.747
- Nicht-erneuerbare Primärenergie als Energieträger (PENRE) [MJ]: A1-A3 69.8662, A4 4.5532, A5 1.2669, C2 0.66506, C3 4.6088, D -85.02
- Nicht-erneuerbare Primärenergie zur stofflichen Nutzung (PENRM) [MJ]: A1-A3 1.81979, A4 0, A5 -1.17305, C2 0, C3 0, D 0
- Total nicht erneuerbare Primärenergie (PENRT) [MJ]: A1-A3 71.686, A4 4.5532, A5 0.093852, C2 0.66506, C3 4.6088, D -85.02
- Einsatz von Sekundärstoffen (SM) [kg]: A1-A3 0.0958, A4 0, A5 0, C2 0, C3 0, D 0
- Erneuerbare Sekundärbrennstoffe (RSF) [MJ]: A1-A3 14.7, A4 0, A5 0, C2 0, C3 0, D 45.14
- Nicht erneuerbare Sekundärbrennstoffe (NRSF) [MJ]: A1-A3 0, A4 0, A5 0, C2 0, C3 0, D 0
- Einsatz von Süßwasserressourcen (FW) [m^3]: A1-A3 0.046722, A4 0.00032834, A5 0.00079436, C2 6.1795e-5, C3 0.029924, D -0.006671

## Outputs
- Gefährlicher Abfall zur Deponie (HWD) [kg]: A1-A3 3.2202e-6, A4 1.8249e-7, A5 9.5277e-10, C2 3.4917e-8, D -3.3295e-8
- Entsorgter nicht gefährlicher Abfall (NHWD) [kg]: A1-A3 0.081866, A4 0.00027047, A5 0.004321, C2 5.0835e-5, D -0.037912
- Entsorgter radioaktiver Abfall (RWD) [kg]: A1-A3 0.0026543, A4 6.0683e-6, A5 4.7297e-6, C2 9.0721e-7, C3 0.00025646, D -0.0016558
- Komponenten für die Wiederverwendung (CRU) [kg]: A1-A3 0, A4 0, A5 0, C2 0, C3 0, D 0
- Stoffe zum Recycling (MFR) [kg]: A1-A3 0, A4 0, A5 0, C2 0, C3 0.820275, D 0
- Stoffe für die Energierückgewinnung (MER) [kg]: A1-A3 2.63798, A4 0, A5 0, C2 0, C3 0, D 0
- Exportierte elektrische Energie (EEE) [MJ]: A1-A3 5.32395, A4 0, A5 0.4319, C2 0, C3 13.577, D 0
- Exportierte thermische Energie (EET) [MJ]: A1-A3 1.89999, A4 0, A5 1.042, C2 0, C3 41.68, D 0

## Impact indicators
- Globales Erwärmungspotenzial (GWP) [kg CO_(2)-Äq.]: A1-A3 -10.35, A4 0.33851, A5 0.30125, C2 0.047975, C3 11.714, D -1.6659
- Abbau Potential der stratosphärischen Ozonschicht (ODP) [kg CFC11-Äq.]: A1-A3 1.6533e-8, A4 1.5055e-13, A5 7.0226e-11, C2 1.6099e-14, C3 2.0466e-8, D 6.6599e-9
- Versauerungspotenzial von Boden und Wasser (AP) [kg SO_(2)-Äq.]: A1-A3 0.017283, A4 0.0036987, A5 5.4077e-5, C2 0.00029433, C3 0.0043825, D -0.0057606
- Eutrophierungspotenzial (EP) [kg PO_(4)^(3)-Äq.]: A1-A3 0.0037274, A4 0.00053038, A5 1.0666e-5, C2 7.4676e-5, C3 0.0010008, D -0.00089673
- Bildungspotential für troposphärisches Ozon (POCP) [kg Ethen-Äq.]: A1-A3 0.0062409, A4 -0.00028035, A5 1.1689e-7, C2 -0.00013101, C3 0.00027251, D -0.00083696
- Potenzial für den abiotischen Abbau nicht fossiler Ressourcen (ADPE) [kg Sb-Äq.]: A1-A3 2.7703e-6, A4 1.7689e-8, A5 2.4862e-9, C2 3.8579e-9, C3 -3.5134e-7, D -1.564e-6
- Potenzial für den abiotischen Abbau fossiler Brennstoffe (ADPF) [MJ]: A1-A3 64.426, A4 4.5377, A5 0.081271, C2 0.66274, C3 3.7077, D -80.876

## Use advice
Gültigkeitsbereich:
Die vorliegende EPD bezieht sich auf Herstellung, Transport, Installation und Entsorgung eines durchschnittlichen Quadratmeters Mehrschichtparkett von Parador. Die technischen Eigenschaften werden in Kapitel 2.3 dargestellt. Produktionsstandort des Produkts ist Güssing in Österreich. Der Versand erfolgt vom Standort Coesfeld in Deutschland.
Systemgrenze:
Typ der EPD: Wiege bis Werkstor mit Optionen.

Module A1-3, A4 und A5

Das Produktstadium (A1-3) beginnt mit der Berücksichtigung der Produktion der notwendigen Rohstoffe und Energien inklusive aller entsprechenden Vorketten sowie der tatsächlichen Beschaffungstransporte. Interne Transporte per LKW und Bahn zwischen dem österreichischen Produktionsstandort (Güssing) und dem Hauptsitz in Deutschland (Coesfeld) sind ebenfalls Teil der Module A1-A3.

Weiterhin wurde die gesamte Herstellungsphase abgebildet, inkl. der Behandlung von Produktionsabfällen bis zum Erreichen des End-of-Waste Status (EoW). Ferner wurden sowohl die Distributionstransporte ab Coesfeld / DE (A4) als auch der bei der Installation (A5) entstehende Verpackungsabfall berücksichtigt. Produktverluste sowie Strom verbrauchende Werkzeuge, Hilfsstoffe, und Installationsmaterialen wurden in A5 hingegen nicht berücksichtigt.

Module C2-3

Die Module beinhalten die Umweltwirkungen für die Behandlung der Abfallfraktionen bis zum Erreichen des End-of-Waste Status (EoW) inklusive der zugehörigen Transporte am Ende des Produktlebenswegs.

Modul D

Ausweisung der Lasten und Nutzen des Produktesaußerhalb der Systemgrenze. Diese bestehen aus Energie-Gutschriften aus der thermischen Verwertung (C3) in Form vom durchschnittlichen österreichischen Strommix bzw. thermischer Energie aus Erdgas.

## Data sources
- Mehrschichtparkett.pdf
- GaBi Database (all versions)
- GaBi database SP27 2015
