# HENSOTHERM® 410 KS / 420 KS / 421 KS / 461 KS / 471 KS und RENITHERM® PMA 600 HD / 1200 HD

Dataset: ILCD process, EPD, average dataset
Geography: GLO
Reference year: 2019
Valid until: 2024
Classification: OEKOBAU.DAT: Beschichtungen / Brandschutz / Innen- und Außenbeschichtungen
Classification: IBUCategories: 02 Bauprodukte / Bauklebstoffe und Beschichtungen / Beschichtungen mit organischen Bindemitteln
Method details: Beschichtungen mit organischen Bindemitteln.pdf
Registration number: EPD-RHG-20190097-IAC1-DE
Owner: Rudolf Hensel GmbH
Compliance: DIN EN 15804; ISO 14025
Review: Accredited third party review by Institut Bauen und Umwelt e. V.
Amounts: rows without a unit in brackets have none in this file; such an amount is in the reference unit of its flow, which a separate flow dataset defines
copyright: true

## General comment
HENSOTHERM® 410 KS / 420 KS / 421 KS / 461 KS / 471 KS und RENITHERM® PMA 600 HD / 1200 HD sind intumeszierende Brandschutzbeschichtungen auf Wasserbasis - Es handelt sich um werkseitig hergestellte Dispersionsbeschichtungen mit organischen Bindemitteln, Wasser, mineralischen Füllstoffen, Pigmenten und Zusatzstoffen. Die Beschichtungen sind als emissionsarm eingestuft und enthalten keine Borate, Weichmacher, Halogene, Formaldehyde und Alkylphenolethoxylate (APEO).

Die Brandschutzbeschichtungen gehören der "Green Product Linie" der Rudolf Hensel GmbH an.

## Technology and included processes
Die Herstellung von HENSOTHERM® 410 KS / 420 KS / 421 KS / 461 KS / 471 KS und RENITHERM® PMA 600 HD / 1200 HD erfolgt in einer vollautomatisch gesteuerten Dispergieranlage. Die Dosierung der flüssigen Rohstoffe erfolgt weitgehend automatisch, Pulver werden manuell dosiert. Die zur Herstellung benötigten Vorprodukte werden nach einer Eingangskontrolle zur Verfügung gestellt. Nach Herstellung der Chargen wird eine werkseigene Qualitätskontrolle durchgeführt. Diese umfasst lack-technische und brandschutztechnische Qualitätsmerkmale. Neben der werkseigenen Kontrolle findet in regemäßigen Abständen eine offizielle Fremdüberwachung statt.
Technische Daten:
HENSOTHERM® 410 KS / 420 KS / 421 KS / 461 KS und 471 KS und RENITHERM® PMA 600 HD / 1200 HD enthalten keine gefährlichen Stoffe über den Grenzwerten nach /REACH Verordnung Anhang XVII/ und der /ECHA-Kandidatenliste/ für besonders besorgniserregende Stoffe.
Deklarierte Einheit:
Die deklarierte Einheit ist ein Brandschutzmittel der Rudolf Hensel GmbH mit der Bezeichnung HENSOTHERM® 410 KS / 420 KS / 421 KS / 461 KS / 471 KS oder RENITHERM® PMA 600 HD / 1200 HD mit Verpackung. Das berechnete Gewicht ist ein Kilogramm des Brandschutzmittels. Die Verpackung ist zusätzlich in der Berechnung enthalten. Folgende Tabelle zeigt die Daten der deklarierten Einheit.

## Technical purpose
Brandschutz von Stahlbauteilen mit H- und I-Profil (Stützen und Träger) und Hohlprofilen für eine Feuerwiderstandsdauer bis 180 Minuten nach /EN13501-2/ und für Designtemperaturen von 350°C bis 750°C.

Die Produkte sind für verzinkte Oberflächen geeignet.

Im Allgemeinen besteht das komplette Beschichtungssystem aus einer geeigneten korrosionsschützenden Grundierung, der Brandschutzbeschichtung und bei Bedarf aus einem geeigneten Überzugslack. Grundierungen und Überzugslacke sind nicht Bestandteil dieser EPD.

Europäisch Technische Bewertung nach /EAD 350402-00-1106/:
HENSOTHERM® 410 KS hat einen Anwendungsschwerpunkt für Feuerwiderstandszeiten von 30−60 Minuten, HENSOTHERM® 420 KS und HENSOTHERM® 421 KS decken vornehmlich den Bereich von 90−120 Minuten ab.

Zulassung nach Warrington Certifire Ltd. - /TS15/, Intumescent Coatings for Steelwork:
HENSOTHERM® 461 KS hat einen Anwendungsschwerpunkt für Feuerwiderstandszeiten von 30−60 Minuten, HENSOTHERM® 471 deckt vornehmlich den Bereich von 90−180 Minuten ab. RENITHERM® PMA 600 HD ist eine Zulassungsübertragung von HENSOTHERM® 461 KS und RENITHERM® PMA 1200 HD ist eine Zulassungsübertragung von HENSOTHERM® 471 KS.

Alle zuvor genannten Brandschutzbeschichtungen werden hauptsächlich im Innenbereich und in offenen Gebäuden angewendet. Sie sind nicht auf Bauteilen anzuwenden, die ständig Nässe oder längere Zeit aggressiven Gasen ausgesetzt sind.

## Reference product
- HENSOTHERM® 410 KS / 420 KS / 421 KS / 461 KS / 471 KS und RENITHERM® PMA 600 HD / 1200 HD [1 kg]: 1

## Inputs
- Erneuerbare Primärenergie als Energieträger (PERE) [MJ]: A1-A3 2.34425
- Erneuerbare Primärenergie zur stofflichen Nutzung (PERM) [MJ]: A1-A3 0
- Total erneuerbare Primärenergie (PERT) [MJ]: A1-A3 2.34425
- Nicht-erneuerbare Primärenergie als Energieträger (PENRE) [MJ]: A1-A3 23.65
- Nicht-erneuerbare Primärenergie zur stofflichen Nutzung (PENRM) [MJ]: A1-A3 12.12
- Total nicht erneuerbare Primärenergie (PENRT) [MJ]: A1-A3 35.771
- Einsatz von Sekundärstoffen (SM) [kg]: A1-A3 0
- Erneuerbare Sekundärbrennstoffe (RSF) [MJ]: A1-A3 0
- Nicht erneuerbare Sekundärbrennstoffe (NRSF) [MJ]: A1-A3 0
- Einsatz von Süßwasserressourcen (FW) [m^3]: A1-A3 31.9783

## Outputs
- Gefährlicher Abfall zur Deponie (HWD) [kg]: A1-A3 2.91966e-8
- Entsorgter nicht gefährlicher Abfall (NHWD) [kg]: A1-A3 0.00561102
- Entsorgter radioaktiver Abfall (RWD) [kg]: A1-A3 0.000276118
- Komponenten für die Wiederverwendung (CRU) [kg]: A1-A3 0
- Stoffe zum Recycling (MFR) [kg]: A1-A3 0
- Stoffe für die Energierückgewinnung (MER) [kg]: A1-A3 0
- Exportierte elektrische Energie (EEE) [MJ]: A1-A3 0
- Exportierte thermische Energie (EET) [MJ]: A1-A3 0

## Impact indicators
- Globales Erwärmungspotenzial (GWP) [kg CO_(2)-Äq.]: A1-A3 1.81302
- Abbau Potential der stratosphärischen Ozonschicht (ODP) [kg CFC11-Äq.]: A1-A3 1.0702e-7
- Versauerungspotenzial von Boden und Wasser (AP) [kg SO_(2)-Äq.]: A1-A3 0.0201458
- Eutrophierungspotenzial (EP) [kg PO_(4)^(3)-Äq.]: A1-A3 0.00328143
- Bildungspotential für troposphärisches Ozon (POCP) [kg Ethen-Äq.]: A1-A3 0.000969366
- Potenzial für den abiotischen Abbau nicht fossiler Ressourcen (ADPE) [kg Sb-Äq.]: A1-A3 8.1343e-6
- Potenzial für den abiotischen Abbau fossiler Brennstoffe (ADPF) [MJ]: A1-A3 33.5613

## Use advice
Gültigkeitsbereich:
Dieses Dokument bezieht sich auf HENSOTHERM® 410 KS / 420 KS / 421 KS / 461 KS / 471 KS und RENITHERM® PMA 600 HD / 1200 HD. Für die Erstellung der Ökobilanz wurden spezifische Daten aus dem Herstellerwerk - Börnsen der Firma Rudolf Hensel GmbH erhoben. Es werden Daten aus dem Jahr 2018 zu Grunde gelegt, welche dem Jahresdurchschnitt entsprechen.
Systemgrenze:
Typ der EPD: Wiege bis Werkstor. Folgende Informationsmodule werden in dieser Studie als Systemgrenze definiert:
A1-A3 Produktstadium:

• A1, Rohstoffgewinnung,

• A2, Transport zum Hersteller,

• A3, Herstellung

Um die Indikatoren und Umweltwirkungen der deklarierten Einheit genau zu erfassen, werden insgesamt drei Informationsmodule betrachtet. Die Informationsmodule A1 bis A3 beschreiben die Materialbereitstellung, den Transport zur Produktionsstätte, sowie den Produktionsprozess des Produkts selbst. Alle Vorprodukte werden hauptsächlich aus Deutschland bezogen. Der Transport erfolgt ausschließlich mittels LKW. Das folgende Ablaufdiagramm veranschaulicht den hier zu Grunde liegenden Produktionsprozess.

Abbildung: Flussdiagramm des Produktionsprozesses

## Data sources
- HENSOTHERM® 410 KS / 420 KS / 421 KS / 461 KS / 471 KS und RENITHERM® PMA 600 HD / 1200 HD.pdf
- GaBi Database (all versions)
- GaBi database SP37 2019
