# Fassaden - heroal-Johann Henkenjohann GmbH & Co. KG - C50

Dataset: ILCD process, EPD, template dataset
Geography: DE
Reference year: 2019
Valid until: 2026
Classification: OEKOBAU.DAT: Komponenten von Fenstern und Vorhangfassaden / Fassaden / Vorhangfassade - Pfosten-Riegel-Fassaden
Synonyms: Aluminium-Fassadensysteme; Aluminiumfassade; Brandschutzfassade; C50 FP; C50 PH; C50 HI; C50; C50 ID
Method details: Produktkategorieregeln Teil A; Produktkategorieregeln Teil B – für Fassaden und Dächer aus Glas und Kunststoff; EPD heroal Fassaden
Owner: heroal-Johann Henkenjohann GmbH & Co. KG
Compliance: EN 15804
Review: Independent external review by Patrick Wortner
Amounts: rows without a unit in brackets have none in this file; such an amount is in the reference unit of its flow, which a separate flow dataset defines
copyright: true

## General comment
Aluminiumfassaden mit Ansichtsbreiten von 50 mm; Bautiefe 28 mm bis 260 mm.

Dieser Datensatz beinhaltet die Ergebnisse für die Module A1-A3 sowie die Module B2, B3, B4, B5, B6, B7, C1, C2, C3, C4, und D gemäß EN 15804. Das Umweltprofil beinhaltet die Aufwendungen für die Lebenszyklus-Stadien cradle to gate mit Optionen. Die Herstellung der Verpackung wurde innerhalb der Module A1-A3 berücksichtigt.

## Geography
Dieser Datensatz repräsentiert die Situation von Unternehmen, die Produkte entsprechend den Systemen von heroal-Johann Henkenjohann GmbH & Co. KG produzieren, im Hinblick auf die wichtigsten Technologien und die gesetzlichen Rahmenbedingungen.

## Time period
jährlicher Durchschnitt

## Technology and included processes
Die Ökobilanzergebnisse umfassen die Lebenszyklusstadien der Herstellung der Vorprodukte bis hin zur Rohstoffgewinnung und Verarbeitungsprozesse von als Input dienenden Sekundärstoffen (z.B. Recyclingprozesse), deren Transporte zum Werk sowie die Produktion selbst, einschließlich der Bereitstellung von allen Hilfs- und Betriebsstoffen, Energie, sowie die vollständige Abfallbehandlung oder die Deponierung der Restabfälle während des Stadiums der Produktion. Die Module A1, A2 und A3 sind hier als ein aggregiertes Modul A1-A3 ausgewiesen. Falls für diesen Datensatz weitere Module berechnet wurden, sind diese separat zu finden und können für eine Betrachtung des gesamten Lebenszyklus zusammengeführt werden.

## Technical purpose
Fassadensystem aus Aluminium für alle Gebäudeklassen.

## Reference product
- Fassaden - heroal-Johann Henkenjohann GmbH & Co. KG - C50: 1

## Inputs
- Frischwasserverbrauch (FW) [m3]: A1-A3 0.96, A4 0.00582, A5 0.005, B2 0.28, B3 0.0179, B4 0, B5 0, B6 0, B7 0, C1 0.00349, C2 0.001, C3 0.00699, C4 0.0011, D -0.58
- Nicht-erneuerbare Primärenergie als Energieträger (PENRE) [MJ]: A1-A3 3660, A4 91.3, A5 8.27, B2 1480, B3 2160, B4 0, B5 3237.79, B6 0, B7 0, C1 7.78, C2 15.7, C3 21.22, C4 5.52, D -760
- Nicht-erneuerbare Primärenergie zur stofflichen Nutzung (PENRM) [MJ]: A1-A3 24.5, A4 0, A5 -1.06, B2 0, B3 0, B4 0, B5 0, B6 0, B7 0, C1 0, C2 0, C3 -19.87, C4 -1.05, D 0
- Verbrauch nicht erneuerbarer Sekundärbrennstoffe (NRSF) [MJ]: A1-A3 0, A4 0, A5 0, B2 0, B3 0, B4 0, B5 0, B6 0, B7 0, C1 0, C2 0, C3 0, C4 0, D 0
- Erneuerbare Primärenergie als Energieträger (PERE) [MJ]: A1-A3 981, A4 5.09, A5 4.06, B2 21.1, B3 462, B4 0, B5 777.73, B6 0, B7 0, C1 3.58, C2 0.88, C3 0.53, C4 0.6, D -237
- Erneuerbare Primärenergie zur stofflichen Nutzung (PERM) [MJ]: A1-A3 2.55, A4 0, A5 -0.77, B2 0, B3 0, B4 0, B5 1.78, B6 0, B7 0, C1 0, C2 0, C3 0, C4 0, D 0
- Erneuerbare Sekundärbrennstoffe (RSF) [MJ]: A1-A3 0, A4 0, A5 0, B2 0, B3 0, B4 0, B5 0, B6 0, B7 0, C1 0, C2 0, C3 0, C4 0, D 0
- Einsatz von Sekundärstoffen (SM) [kg]: A1-A3 7.88, A4 0, A5 0, B2 0, B3 7.38, B4 0, B5 7.88, B6 0, B7 0, C1 0, C2 0, C3 0, C4 0, D 0
- Total nicht erneuerbare Primärenergie (PENRT) [MJ]: A1-A3 3690, A4 91.3, A5 7.21, B2 1480, B3 2160, B4 0, B5 3245.81, B6 0, B7 0, C1 7.78, C2 15.7, C3 1.35, C4 4.47, D -760
- Gesamtverbrauch von erneuerbarer Primärenergie (PERT) [MJ]: A1-A3 983, A4 5.09, A5 3.29, B2 21.1, B3 462, B4 0, B5 778.97, B6 0, B7 0, C1 3.58, C2 0.88, C3 0.53, C4 0.6, D -237

## Outputs
- Komponenten für die Wiederverwendung (CRU) [kg]: A1-A3 0, A4 0, A5 0, B2 0, B3 0, B4 0, B5 0, B6 0, B7 0, C1 0, C2 0, C3 0, C4 0, D 0
- Exportierte elektrische Energie (EEE) [MJ]: A1-A3 0.96, A4 0, A5 1.49, B2 0, B3 6.8, B4 0, B5 8.92, B6 0, B7 0, C1 0, C2 0, C3 6.47, C4 0, D 0
- Exportierte thermische Energie (EET) [MJ]: A1-A3 2.11, A4 0, A5 2.67, B2 0, B3 12.1, B4 0, B5 16.28, B6 0, B7 0, C1 0, C2 0, C3 11.5, C4 0, D 0
- Gefährlicher Abfall zur Beseitigung (HWD) [kg]: A1-A3 3.93e-7, A4 4.6e-9, A5 1.9e-9, B2 2.02e-7, B3 1.12e-8, B4 0, B5 2.82e-8, B6 0, B7 0, C1 2.06e-9, C2 7.93e-10, C3 3.26e-10, C4 4.75e-10, D -1.06e-7
- Stoff für die Energierückgewinnung (MER) [kg]: A1-A3 0, A4 0, A5 0, B2 0, B3 0, B4 0, B5 0, B6 0, B7 0, C1 0, C2 0, C3 0, C4 0, D 0
- Stoffe zum Recycling (MFR) [kg]: A1-A3 0.21, A4 0, A5 0, B2 0, B3 21.9, B4 0, B5 16.51, B6 0, B7 0, C1 0, C2 0, C3 16.3, C4 0, D 0
- Ungefährlicher Abfall zur Beseitigung (NHWD) [kg]: A1-A3 20.4, A4 0.0136, A5 0.0142, B2 0.45, B3 0.0386, B4 0, B5 31.55, B6 0, B7 0, C1 0.00552, C2 0.00234, C3 0.0127, C4 22.3, D -12.6
- Entsorgter radioaktiver Abfall (RWD) [kg]: A1-A3 0.0834, A4 0.00011, A5 0.00106, B2 0.00331, B3 0.00125, B4 0, B5 0.0553, B6 0, B7 0, C1 0.00116, C2 1.9e-5, C3 0.000167, C4 4.7e-5, D -0.0366

## Impact indicators
- Potenzial für den abiotischen Abbau nicht fossiler Ressourcen (ADPE) / Potencial de agotamiento de recursos abióticos para recursos no fósiles (ADPE) [kg Sb eq.]: A1-A3 0.000455, A4 5.83e-7, A5 1.4e-7, B2 1.05e-5, B3 0.000217, B4 0, B5 0.000376, B6 0, B7 0, C1 1.46e-7, C2 1.01e-7, C3 3.51e-8, C4 1.18e-7, D -0.000101
- Potenzial für den abiotischen Abbau fossiler Brennstoffe (ADPF) / Potencial de agotamiento de recursos abióticos para recursos fósiles (ADPF) [MJ]: A1-A3 2360, A4 91, A5 4.54, B2 1470, B3 1060, B4 0, B5 1988.39, B6 0, B7 0, C1 4.86, C2 15.7, C3 0.93, C4 4.36, D -667
- Versauerungspotenzial von Boden und Wasser (AP) / Potencial de acidificación del suelo y de los recursos de agua (AP) [kg SO2 eq.]: A1-A3 0.71, A4 0.0155, A5 0.00085, B2 0.0474, B3 0.38, B4 0, B5 0.54, B6 0, B7 0, C1 0.000849, C2 0.00223, C3 0.000292, C4 0.00193, D -0.25
- Eutrophierungspotenzial (EP) / Potencial de eutrofización (EP) [kg (PO4)3- eq.]: A1-A3 0.0782, A4 0.00385, A5 0.000107, B2 0.00787, B3 0.0482, B4 0, B5 0.071, B6 0, B7 0, C1 9.99e-5, C2 0.000551, C3 5.35e-5, C4 0.000219, D -0.0199
- Globales Erwärmungspotenzial (GWP) / Potencial de calentamiento global (GWP) [kg CO2 eq.]: A1-A3 179, A4 6.68, A5 1.16, B2 48.2, B3 72.1, B4 0, B5 148.23, B6 0, B7 0, C1 0.43, C2 1.15, C3 3.09, C4 0.32, D -55.7
- Abbau Potential der stratosphärischen Ozonschicht (ODP) / Potencial de agotamiento de la capa de ozono estratosférico (ODP) [kg CFC 11 eq.]: A1-A3 2.07e-7, A4 1.17e-15, A5 1.28e-14, B2 1.04e-13, B3 8.34e-9, B4 0, B5 2.07e-7, B6 0, B7 0, C1 1.4e-14, C2 2.01e-16, C3 2.07e-15, C4 1.75e-15, D -2.08e-13
- Bildungspotential für troposphärisches Ozon (POCP) / Potencial de formación de ozono troposférico (POCP) [kg C2H2 eq.]: A1-A3 0.0457, A4 -0.0055, A5 6.25e-5, B2 0.0129, B3 0.0246, B4 0, B5 0.0325, B6 0, B7 0, C1 6.16e-5, C2 -0.000724, C3 2.73e-5, C4 0.000147, D 0.00124

## Use advice
Dieser Datensatz beinhaltet die Ergebnisse für die Module A1-A3 sowie die Module A4, A5, B2, B3, B4, B5, B6, B7, C1, C2, C3, C4, D gemäß EN 15804.
Ein Vergleich mit anderen Produkten ist nur mit einer vergleichbaren Anwendung im Gebäude zulässig. Grundsätzlich ist eine Gegenüberstellung oder die Bewertung von EPD Daten nur möglich, wenn alle zu vergleichenden Datensätze nach EN 15804 erstellt wurden und der Gebäudekontext, bzw. die produktspezifischen Leistungsmerkmale berücksichtigt werden.

Die Muster-EPD erlangt Gültigkeit durch die Übertragung an den Hersteller durch das ift. Aktuell gültige EPDs sind der nachfolgenden Liste zu entehmen und auf www.ift-service.de/epd veröffentlicht.
EPD-Nummer und Deklarationsinhaber:
Derzeit sind keine gültigen EPDs vorhanden.

## Review details
Die angewendete LCI Methode ist in Übereinstimmung mit ISO 14040 und 14044. Die Dokumentation enthält alle relevanten Informationen im Hinblick auf die Datenqualität und den Umfang der Anwendung der jeweiligen LCI Ergebnisse bzw. der Datensätze. Der Datensatz repräsentiert den Stand der Technik bezogen auf die funktionelle Einheit.

## Data sources
- GaBi database (general)
