# Grobblech

Dataset: ILCD process, EPD, average dataset
Geography: AT
Reference year: 2017
Valid until: 2022
Classification: OEKOBAU.DAT: Metalle / Stahl und Eisen / Stahlbleche
Classification: IBUCategories: 02 Bauprodukte / Metallbauprodukte und Zubehör / Baustähle
Method details: Baustähle.pdf
Registration number: EPD-VOE-20170157-IBC1-DE
Owner: voestalpine AG
Compliance: DIN EN 15804; ISO 14025
Review: Accredited third party review by Institut Bauen und Umwelt e. V.
Amounts: rows without a unit in brackets have none in this file; such an amount is in the reference unit of its flow, which a separate flow dataset defines
copyright: true

## General comment
The products of voestalpine Grobblech GmbH are found in a wide variety of applications.

For the placing of structural steels on the market in the EU/EFTA (with the exception of Switzerland) Regulation (EU) No. 305/2011 applies. The products need a Declaration of Performance (DoP) taking into consideration /EN 10025/ and the CE marking.

For the application and use the respective national regulations apply. In Austria, for example, it is the /building regulations of the individual states/ as well as the technical stipulations based on these regulations.

## Technology and included processes
Das Ausgangsmaterial für die Herstellung von Grobblechprodukten der voestalpine bildet Rohstahl, der über die Primärroute (Hochofen, LD-Stahlwerk) am Standort Linz hergestellt wird. Der flüssige Rohstahl wird mittels Stranggussverfahren zu Brammen gegossen. Die gegossenen Brammen werden über Stoßöfen erneut auf rund 1100 - 1250 °C erwärmt. Beim Grobblech kommt im Gegensatz zu warmgewalzten Stahlbändern das sogenannte "Quartowalzen", ein reversierendes Walzen, zum Einsatz. Das Walzgerüst (Quartogerüst) besteht immer aus zwei Arbeitswalzen und zwei Stützwalzen, also insgesamt vier Walzen. Das Material wird auf diese Weise sowohl in die richtige Breite als auch Länge gewalzt. Das Produkt wird in der voestalpine Grobblech GmbH am Standort Linz unter anderem zu Kesselböden weiterverarbeitet werden. Dabei werden die Grobblech-Tafeln mithilfe einer Presse zu Böden umgeformt, wobei Form und Größe individuell wählbar sind.
Technische Daten:
Die vorliegende EPD bezieht sich auf alle Produkte der voestalpine Grobblech GmbH (alform®, aldur®, durostat®, toughcore®) in unterschiedlichen Stahlgüten, Größen, Formen und Auslieferungszuständen. Spezifische Informationen hinsichtlich Toleranzen in den entsprechenden Anwendungsbereichen können beispielsweise in den Normen /EN 10029/ sowie /EN 10163/ eingesehen werden.
Es gelten die Angaben in der Leistungserklärung.
Deklarierte Einheit:
Die vorliegende Umweltproduktdeklaration bezieht sich auf eine deklarierte Einheit von 1 t voestalpine Grobblech. Dies beinhaltet Grobbleche in verschiedensten Lieferzuständen, jedoch keine walzplattierten Produkte.

## Technical purpose
Die gewalzten Bleche und warm- oder kaltgeformten Böden der voestalpine Grobblech GmbH finden in folgenden Bereichen Anwendung:

- Rohrwerke für große Öl- und Gaspipelines
- Herstellung von Ölplattformen (Offshore-Industrie)
- Kessel- und Apparatebau
- Stahl- und Brückenbau
- Fahrzeug- und Kranbau (hochfeste und verschleißfeste Stähle)

## Reference product
- 1 t Grobblech: 1000

## Inputs
- Erneuerbare Primärenergie als Energieträger (PERE) [MJ]: A1-A3 959.552, C3 0, C4 1.22714, D 383.732
- Erneuerbare Primärenergie zur stofflichen Nutzung (PERM) [MJ]: A1-A3 0, C3 0, C4 0, D 0
- Total erneuerbare Primärenergie (PERT) [MJ]: A1-A3 959.552, C3 0, C4 1.22714, D 383.732
- Nicht-erneuerbare Primärenergie als Energieträger (PENRE) [MJ]: A1-A3 19739.1, C3 0, C4 10.8152, D -11368.4
- Nicht-erneuerbare Primärenergie zur stofflichen Nutzung (PENRM) [MJ]: A1-A3 0, C3 0, C4 0, D 0
- Total nicht erneuerbare Primärenergie (PENRT) [MJ]: A1-A3 19739.1, C3 0, C4 10.8152, D -11368.4
- Einsatz von Sekundärstoffen (SM) [kg]: A1-A3 194.46, C3 0, C4 0, D 950
- Erneuerbare Sekundärbrennstoffe (RSF) [MJ]: A1-A3 0, C3 0, C4 0, D 0
- Nicht erneuerbare Sekundärbrennstoffe (NRSF) [MJ]: A1-A3 0, C3 0, C4 0, D 0
- Einsatz von Süßwasserressourcen (FW) [m^3]: A1-A3 4.41935, C3 0, C4 0.00220586, D -0.824679

## Outputs
- Gefährlicher Abfall zur Deponie (HWD) [kg]: A1-A3 0.000469462, C3 0, C4 2.46995e-7, D 0.00173762
- Entsorgter nicht gefährlicher Abfall (NHWD) [kg]: A1-A3 24.6428, C3 0, C4 50.0867, D -18.5701
- Entsorgter radioaktiver Abfall (RWD) [kg]: A1-A3 0.151946, C3 0, C4 0.000150816, D 0.252805
- Komponenten für die Wiederverwendung (CRU) [kg]: A1-A3 0, C3 0, C4 0, D 0
- Stoffe zum Recycling (MFR) [kg]: A1-A3 0, C3 950, C4 0, D 0
- Stoffe für die Energierückgewinnung (MER) [kg]: A1-A3 0, C3 0, C4 0, D 0
- Exportierte elektrische Energie (EEE) [MJ]: A1-A3 0, C3 0, C4 0, D 0
- Exportierte thermische Energie (EET) [MJ]: A1-A3 0, C3 0, C4 0, D 0

## Impact indicators
- Globales Erwärmungspotenzial (GWP) [kg CO_(2)-Äq.]: A1-A3 2127.62, C3 0, C4 0.802816, D -1287.44
- Abbau Potential der stratosphärischen Ozonschicht (ODP) [kg CFC11-Äq.]: A1-A3 1.04431e-8, C3 0, C4 8.83753e-12, D 1.43063e-8
- Versauerungspotenzial von Boden und Wasser (AP) [kg SO_(2)-Äq.]: A1-A3 7.26393, C3 0, C4 0.00481341, D -5.00745
- Eutrophierungspotenzial (EP) [kg PO_(4)^(3)-Äq.]: A1-A3 0.68422, C3 0, C4 0.000654592, D -0.419862
- Bildungspotential für troposphärisches Ozon (POCP) [kg Ethen-Äq.]: A1-A3 0.749791, C3 0, C4 0.000382613, D -0.726022
- Potenzial für den abiotischen Abbau nicht fossiler Ressourcen (ADPE) [kg Sb-Äq.]: A1-A3 0.00781205, C3 0, C4 2.77182e-7, D -1.30395e-5
- Potenzial für den abiotischen Abbau fossiler Brennstoffe (ADPF) [MJ]: A1-A3 19356, C3 0, C4 10.4351, D -12006.3

## Use advice
Gültigkeitsbereich:
Die vorliegende Umweltproduktdeklaration bezieht sich auf eine deklarierte Einheit von 1 t durchschnittlichem voestalpine Grobblech - alform®, aldur®, durostat®, toughcore® - produziert am Standort Linz. Dies beinhaltet thermomechanisch gewalzte, normal- und hochfeste Grobbleche. Walzplattierte Grobleche werden in einer separaten Deklaration behandelt.
Systemgrenze:
Die Ökobilanz des durchschnittlichen voestalpine Grobblechs beinhaltet eine cradle-to-gate (Wiege bis zum Werkstor) Betrachtung der auftretenden Umweltwirkungen mit Optionen. Die folgenden Lebenszyklusphasen werden in der Analyse berücksichtigt:

Modul A1-A3 | Produktstadium
Das Produktstadium beinhaltet die Aufwendungen der Rohstoffversorgung (Kohle, Eisenerz, Pellets, etc.) sowie der damit verbundenen Transporte am Produktionsstandort Linz. Am Standort wurden die für die Kokerei, Sinteranlage, in den Hochöfen, im Stahlwerk und in der Grobblechstraße benötigten Material- und Energieflüsse erfasst.
Die Energiebereitstellung am Standort Linz erfolgt über ein Kraftwerk in dem Hüttengase zur Energiegewinnung verwertet werden. Da mehr Energie verbraucht wird als durch das eigene Kraftwerk zur Verfügung steht, werden zusätzlich Erdgas und elektrische Energie vom österreichischen Netz bezogen.

Modul C3 | Abfallbehandlung

Jener Produktfluss, der das Modul D zum Recycling erreicht, verlässt das Produktsystem in C3. Aufwendungen für die Zerkleinerung und Sortierung des Stahlschrottes sind nicht enthalten.
Modul C4 | Entsorgung

Das Modul C4 deklariert die durch die Deponierung (5 % des Produktes) entstehenden Umweltwirkungen.
Modul D | Gutschriften und Lasten außerhalb der Systemgrenze

Im Modul D werden die Substitutionspotentiale von Primärstahl durch ein Recyclingszenario (95 % des Produktes) dargestellt.

## Data sources
- Grobblech.pdf
- GaBi Database (all versions)
- GaBi database SP29 2016
