# Massivdecken

Dataset: ILCD process, EPD, average dataset
Geography: RER
Reference year: 2020
Valid until: 2025
Classification: OEKOBAU.DAT: Mineralische Baustoffe / Steine und Elemente / Betonfertigteile und Betonwaren
Classification: IBUCategories: 02 Bauprodukte / Normal- Leicht- und Porenbeton / Betonfertigteile
Method details: Betonfertigteile.pdf
Generated by: myclimate Deutschland gGmbH
Registration number: EPD-THO-20200204-IBD1-DE
Owner: thomas gruppe - Geschäftsfeld Betonbauteile
Compliance: DIN EN 15804; ISO 14025
Review: Accredited third party review by Institut Bauen und Umwelt e. V.
Amounts: rows without a unit in brackets have none in this file; such an amount is in the reference unit of its flow, which a separate flow dataset defines
copyright: true
licenseType: Free of charge for all users and uses
accessRestrictions: None

## General comment
Diese Deklaration bezieht sich auf die Produktgruppe der Massivdecken.

Die Herstellung von Massivdecken erfolgt auf Flachbahnen, in den automatischen Umlaufanlagen oder auf Kipptischen der Betonfertigteilwerke. Massivdecken bestehen aus vorgefertigten

Stahlbetonplatten und Normal- oder Leichtbeton. Sie werden als Deckenelemente im Wohnungsbau eingesetzt und unterscheiden sich in ihren Größen und Abmessungen.

## Technology and included processes
Formgebung Die Vorprodukte wie Zuschlagstoffe, Zement und Stahl für die Massivdecken werden angeliefert. Nach fest vorgegebenen Rezepten wird der Beton zusammengemixt. Bevor die Massivdecken gegossen werden, werden die Schalungen mit den gewünschten Abmessungen erstellt. Die Armierungseisen für die Stahlbetonplatten werden angebracht und anschließend betoniert. Aushärtung und Auslagerung Die Aushärtung der Massivdecken findet bei einer Dauer von 8-10 Stunden statt. Im Anschluss werden die Massivdecken entschalt und können verladen werden. Die Normfestigkeit ist nach 28 Tagen nach der Herstellung erreicht.
Technische Daten:
Es gelten die Daten entsprechend den
Leistungserklärungen nach DIN EN 13747:2010-08 Betonfertigteile - Deckenplatten mit Ortbetonergänzung.
Deklarierte Einheit:
Die Deklaration bezieht sich auf die Herstellung von 1 t produzierte Massivdecke.

Die Produktgruppe der Massivdecken variieren in Volumen, Massen und geringfügig in ihrer Zusammensetzung. Die Durchschnittsbildung erfolgte bezogen auf die gemittelte Jahreproduktion der einzelnen Standorte.

## Technical purpose
Massivdecken der thomas gruppe aus dem Geschäftsfeld Betonbauteile finden Anwendung im Wohnungs- und Industriebau.

## Reference product
- Massivdecke (): 1000

## Inputs
- Erneuerbare Primärenergie als Energieträger (PERE) [MJ]: A1-A3 289, C1 0.0535, C2 1.61, C4 26
- Erneuerbare Primärenergie zur stofflichen Nutzung (PERM) [MJ]: A1-A3 0, C1 0, C2 0, C4 0
- Total erneuerbare Primärenergie (PERT) [MJ]: A1-A3 289, C1 0.0535, C2 1.61, C4 26
- Nicht-erneuerbare Primärenergie als Energieträger (PENRE) [MJ]: A1-A3 1560, C1 11.9, C2 25.8, C4 205
- Nicht-erneuerbare Primärenergie zur stofflichen Nutzung (PENRM) [MJ]: A1-A3 0, C1 0, C2 0, C4 0
- Total nicht erneuerbare Primärenergie (PENRT) [MJ]: A1-A3 1560, C1 11.9, C2 25.8, C4 205
- Einsatz von Sekundärstoffen (SM) [kg]: C1 0, C2 0, C4 0
- Erneuerbare Sekundärbrennstoffe (RSF) [MJ]: A1-A3 0, C1 0, C2 0, C4 0
- Nicht erneuerbare Sekundärbrennstoffe (NRSF) [MJ]: A1-A3 0, C1 0, C2 0, C4 0
- Einsatz von Süßwasserressourcen (FW) [m^3]: A1-A3 0.503, C1 8.45e-5, C2 0.00182, C4 0.0515

## Outputs
- Gefährlicher Abfall zur Deponie (HWD) [kg]: A1-A3 0.00197, C1 1.69e-9, C2 1.46e-6, C4 3.49e-6
- Entsorgter nicht gefährlicher Abfall (NHWD) [kg]: A1-A3 43.1, C1 0.00151, C2 0.00183, C4 951
- Entsorgter radioaktiver Abfall (RWD) [kg]: A1-A3 0.0316, C1 1.18e-5, C2 3.9e-5, C4 0.00272
- Komponenten für die Wiederverwendung (CRU) [kg]: A1-A3 0, C1 0, C2 0, C4 0
- Stoffe zum Recycling (MFR) [kg]: A1-A3 1.27, C1 0, C2 50.5, C4 0
- Stoffe für die Energierückgewinnung (MER) [kg]: A1-A3 0, C1 0, C2 0, C4 0
- Exportierte elektrische Energie (EEE) [MJ]: A1-A3 0, C1 0, C2 0, C4 0
- Exportierte thermische Energie (EET) [MJ]: A1-A3 0, C1 0, C2 0, C4 0

## Impact indicators
- Globales Erwärmungspotenzial (GWP) [kg CO_(2)-Äq.]: A1-A3 205, C1 0.863, C2 1.92, C4 14.1
- Abbau Potential der stratosphärischen Ozonschicht (ODP) [kg CFC11-Äq.]: A1-A3 1.06e-6, C1 2.84e-16, C2 9.11e-16, C4 8.29e-14
- Versauerungspotenzial von Boden und Wasser (AP) [kg SO_(2)-Äq.]: A1-A3 0.258, C1 0.000607, C2 0.00433, C4 0.0847
- Eutrophierungspotenzial (EP) [kg PO_(4)^(3)-Äq.]: A1-A3 0.0709, C1 8.7e-5, C2 0.00106, C4 0.0096
- Bildungspotential für troposphärisches Ozon (POCP) [kg Ethen-Äq.]: A1-A3 0.0301, C1 9.06e-5, C2 -0.00134, C4 0.0065
- Potenzial für den abiotischen Abbau nicht fossiler Ressourcen (ADPE) [kg Sb-Äq.]: A1-A3 4.12e-5, C1 3.02e-8, C2 1.86e-7, C4 5.2e-6
- Potenzial für den abiotischen Abbau fossiler Brennstoffe (ADPF) [MJ]: A1-A3 1470, C1 11.8, C2 25.7, C4 198

## Use advice
Gültigkeitsbereich:
Dieses Dokument bezieht sich auf Massivdecken aus dem Geschäftsfeld Betonbauteile der thomas gruppe, hergestellt an den nachfolgenden 3 von insgesamt 15 Produktionsstandorten:

thomas betonbauteile Melsdorf GmbH & Co. KG

Am Ihlberg 22-24

24109 Melsdorf

thomas praefab Neubrandenburg GmbH

Ihlenfelder Straße 111

17034 Neubrandenburg

thomas praefab Międzyrzecz Sp. z o.o.

ul. Budowlanych 9

66-300 Międzyrzecz

Die deklarierte Einheit bezieht sich auf 1 t Massivdecken. Die Datenerhebung für die Herstellung des deklarierten Produktes erfolgte werksspezifisch mit aktuellen Jahresdaten von 2018. Der Deklarationsinhaber ist verantwortlich für die zugrunde liegenden Daten und deren Verifizierung.
Systemgrenze:
Die Ökobilanz betrachtet die Systemgrenzen "von der Wiege bis zum Werkstor - mit Optionen" und folgt dem modularen Aufbau nach EN 15804. Die Ökobilanz berücksichtigt folgende Module:

A1: Rohstoffgewinnung und –verarbeitung, Verarbeitungsprozesse von Zement und Zuschlagstoffen, Stahlerzeugung, -guß und -produktion; Aufbereitung von Recyclingmaterialien
A2: Transport zum Hersteller: Transport der Rohstoffe zum Herstellungswerk
A3: Herstellungsprozesse und -aufwendungen: Herstellung der Betonfertigteile
C1: Rückbau & Abriss der Betonfertigteile
C2: Transport zur Abfallbewirtschaftung

C4: Beseitigung der Betonfertigteile zur Deponie

## Data sources
- ecoinvent database (all versions)
- ecoinvent 3.6 database
