# Tor - Peneder Bau-Elemente GmbH - Brandschutztor SN90

Dataset: ILCD process, EPD, specific dataset
Geography: AT
Reference year: 2020
Valid until: 2026
Classification: OEKOBAU.DAT: Komponenten von Fenstern und Vorhangfassaden / Türen und Tore / Stahl
Synonyms: Brandschutztore aus Stahl; PENEDERrail; Elektronische Brandschutztore; SN30
Method details: Produktkategorieregeln Teil B – für Türen und Tore; Produktkategorieregeln Teil A
Generated by: ift Rosenheim
Registration number: EPD-PTO-47.0
Owner: Peneder Bau-Elemente GmbH
Compliance: EN 15804
Review: Independent external review by Patrick Wortner
Amounts: rows without a unit in brackets have none in this file; such an amount is in the reference unit of its flow, which a separate flow dataset defines
copyright: true
licenseType: Free of charge for all users and uses
accessRestrictions: None

## General comment
A1-A3 sowie Module A4, A5, B2, B3, B4, B5, B6, B7, C1, C2, C3, C4, D. Das Umweltprofil beinhaltet die Aufwendungen für die Lebenszyklus-Stadien cradle to grave. Die Herstellung der Verpackung wurde innerhalb der Module A1-A3 berücksichtigt.

## Geography
Dieser Datensatz repräsentiert die Situation des Unternehmens Peneder Bau-Elemente GmbH in 4904 Atzbach, im Hinblick auf die wichtigsten Technologien und die gesetzlichen Rahmenbedingungen.

## Time period
jährlicher Durchschnitt

## Technology and included processes
Die Ökobilanzergebnisse umfassen die Lebenszyklusstadien der Herstellung der Vorprodukte bis hin zur Rohstoffgewinnung und Verarbeitungsprozesse von als Input dienenden Sekundärstoffen (z.B. Recyclingprozesse), deren Transporte zum Werk sowie die Produktion selbst, einschließlich der Bereitstellung von allen Hilfs- und Betriebsstoffen, Energie, sowie die vollständige Abfallbehandlung oder die Deponierung der Restabfälle während des Stadiums der Produktion. Die Module A1, A2 und A3 sind hier als ein aggregiertes Modul A1-A3 ausgewiesen. Falls für diesen Datensatz weitere Module berechnet wurden, sind diese separat zu finden und können für eine Betrachtung des gesamten Lebenszyklus zusammengeführt werden.

## Technical purpose
PENEDERrail für den Einsatz im industriellen, gewerblichen und privaten Bereich.

## Reference product
- Tor - Peneder Bau-Elemente GmbH - Brandschutztor SN90: 1

## Inputs
- Frischwasserverbrauch (FW) [m3]: A1-A3 0.24, A4 0, A5 0.041, B2 0.13, B3 0.0284, B4 0.29, B5 0, B6 0.000127, B7 0, C1 0, C2 0.000117, C3 0.08, C4 0.000143, D -0.0762
- Nicht-erneuerbare Primärenergie als Energieträger (PENRE) [MJ]: A1-A3 3560, A4 42.2, A5 14.24, B2 13.1, B3 59.6, B4 3010, B5 0, B6 0.283, B7 0, C1 0, C2 1.83, C3 25.93, C4 1.2, D -655
- Nicht-erneuerbare Primärenergie zur stofflichen Nutzung (PENRM) [MJ]: A1-A3 22.7, A4 0, A5 -10.34, B2 0, B3 0, B4 0, B5 0, B6 0, B7 0, C1 0, C2 0, C3 -11.73, C4 -0.62, D 0
- Verbrauch nicht erneuerbarer Sekundärbrennstoffe (NRSF) [MJ]: A1-A3 0, A4 0, A5 0, B2 0, B3 0, B4 0, B5 0, B6 0, B7 0, C1 0, C2 0, C3 0, C4 0, D 0
- Erneuerbare Primärenergie als Energieträger (PERE) [MJ]: A1-A3 370, A4 2.35, A5 138.93, B2 0.18, B3 14.7, B4 319, B5 0, B6 0.13, B7 0, C1 0, C2 0.1, C3 3.63, C4 0.89, D -72
- Erneuerbare Primärenergie zur stofflichen Nutzung (PERM) [MJ]: A1-A3 140, A4 0, A5 -138.16, B2 0, B3 0, B4 0, B5 0, B6 0, B7 0, C1 0, C2 0, C3 -0.81, C4 -0.81, D 0
- Erneuerbare Sekundärbrennstoffe (RSF) [MJ]: A1-A3 0, A4 0, A5 0, B2 0, B3 0, B4 0, B5 0, B6 0, B7 0, C1 0, C2 0, C3 0, C4 0, D 0
- Einsatz von Sekundärstoffen (SM) [kg]: A1-A3 10, A4 0, A5 0, B2 0, B3 0, B4 10, B5 0, B6 0, B7 0, C1 0, C2 0, C3 0, C4 0, D 0
- Total nicht erneuerbare Primärenergie (PENRT) [MJ]: A1-A3 3580, A4 42.2, A5 3.9, B2 13.1, B3 59.6, B4 3010, B5 0, B6 0.283, B7 0, C1 0, C2 1.83, C3 14.2, C4 0.58, D -655
- Gesamtverbrauch von erneuerbarer Primärenergie (PERT) [MJ]: A1-A3 510, A4 2.35, A5 0.77, B2 0.18, B3 14.7, B4 319, B5 0, B6 0.13, B7 0, C1 0, C2 0.1, C3 2.82, C4 0.08, D -72

## Outputs
- Komponenten für die Wiederverwendung (CRU) [kg]: A1-A3 0, A4 0, A5 0, B2 0, B3 0, B4 0, B5 0, B6 0, B7 0, C1 0, C2 0, C3 0, C4 0, D 0
- Exportierte elektrische Energie (EEE) [MJ]: A1-A3 2.4, A4 0, A5 25.2, B2 0, B3 1.52, B4 58.5, B5 0, B6 0, B7 0, C1 0, C2 0, C3 30.9, C4 0, D 0
- Exportierte thermische Energie (EET) [MJ]: A1-A3 7.72, A4 0, A5 45.4, B2 0, B3 13.5, B4 121, B5 0, B6 0, B7 0, C1 0, C2 0, C3 67.6, C4 0, D 0
- Gefährlicher Abfall zur Beseitigung (HWD) [kg]: A1-A3 3.59e-7, A4 2.13e-9, A5 7.03e-10, B2 3e-10, B3 3.15e-8, B4 2.98e-7, B5 0, B6 7.48e-11, B7 0, C1 0, C2 9.23e-11, C3 2.71e-9, C4 6.17e-11, D -7.06e-8
- Stoff für die Energierückgewinnung (MER) [kg]: A1-A3 0, A4 0, A5 0, B2 0, B3 0, B4 0, B5 0, B6 0, B7 0, C1 0, C2 0, C3 0, C4 0, D 0
- Stoffe zum Recycling (MFR) [kg]: A1-A3 6.45, A4 0, A5 0, B2 0, B3 0, B4 39.6, B5 0, B6 0, B7 0, C1 0, C2 0, C3 33.1, C4 0, D 0
- Ungefährlicher Abfall zur Beseitigung (NHWD) [kg]: A1-A3 4.06, A4 0.00627, A5 0.24, B2 0.037, B3 0.45, B4 10.3, B5 0, B6 0.000201, B7 0, C1 0, C2 0.000272, C3 3.71, C4 2.9, D -0.63
- Entsorgter radioaktiver Abfall (RWD) [kg]: A1-A3 0.0118, A4 5.1e-5, A5 0.000208, B2 5.67e-5, B3 0.0017, B4 -0.00589, B5 0, B6 4.21e-5, B7 0, C1 0, C2 2.21e-6, C3 0.000681, C4 6.1e-6, D -0.0191

## Impact indicators
- Potenzial für den abiotischen Abbau nicht fossiler Ressourcen (ADPE) / Potencial de agotamiento de recursos abióticos para recursos no fósiles (ADPE) [kg Sb-Äqv.]: A1-A3 0.00107, A4 2.7e-7, A5 2.37e-7, B2 4.25e-8, B3 3.63e-5, B4 0.00107, B5 0, B6 5.3e-9, B7 0, C1 0, C2 1.17e-8, C3 1.29e-6, C4 1.53e-8, D -4.86e-6
- Potenzial für den abiotischen Abbau fossiler Brennstoffe (ADPF) / Potencial de agotamiento de recursos abióticos para recursos fósiles (ADPF) [MJ]: A1-A3 911, A4 42.1, A5 3.38, B2 13, B3 55.3, B4 381, B5 0, B6 0.18, B7 0, C1 0, C2 1.83, C3 12.5, C4 0.57, D -607
- Versauerungspotenzial von Boden und Wasser (AP) / Potencial de acidificación del suelo y de los recursos de agua (AP) [kg SO2-Äqv.]: A1-A3 0.22, A4 0.00298, A5 0.0018, B2 0.000748, B3 0.00687, B4 0.13, B5 0, B6 3.09e-5, B7 0, C1 0, C2 0.000116, C3 0.0109, C4 0.00025, D -0.11
- Eutrophierungspotenzial (EP) / Potencial de eutrofización (EP) [kg Phosphat-Äqv.]: A1-A3 0.027, A4 0.000704, A5 0.000348, B2 7.41e-5, B3 0.000886, B4 0.0187, B5 0, B6 3.64e-6, B7 0, C1 0, C2 2.66e-5, C3 0.00202, C4 2.84e-5, D -0.0115
- Globales Erwärmungspotenzial (GWP) / Potencial de calentamiento global (GWP) [kg CO2-Äqv.]: A1-A3 64.3, A4 3.11, A5 16.8, B2 0.27, B3 4.67, B4 55.4, B5 0, B6 0.0157, B7 0, C1 0, C2 0.13, C3 28.1, C4 0.0415, D -58.3
- Abbau Potential der stratosphärischen Ozonschicht (ODP) / Potencial de agotamiento de la capa de ozono estratosférico (ODP) [kg R11 eq.]: A1-A3 1.82e-7, A4 5.39e-16, A5 3.25e-15, B2 7.04e-16, B3 3.31e-10, B4 1.82e-7, B5 0, B6 5.08e-16, B7 0, C1 0, C2 2.34e-17, C3 1.22e-14, C4 2.27e-16, D -2.7e-13
- Bildungspotential für troposphärisches Ozon (POCP) / Potencial de formación de ozono troposférico (POCP) [kg Ethen-Äqv.]: A1-A3 0.0304, A4 -0.000397, A5 0.000136, B2 0.000118, B3 0.000904, B4 0.0163, B5 0, B6 2.24e-6, B7 0, C1 0, C2 -1.1e-5, C3 0.000646, C4 1.9e-5, D -0.0146

## Use advice
Dieser Datensatz beinhaltet die Ergebnisse für die Module A1-A3 sowie die Module A4, A5, B2, B3, B4, B5, B6, B7, C1, C2, C3, C4, D gemäß EN 15804. Ein Vergleich mit anderen Produkten ist nur mit einer vergleichbaren Anwendung im Gebäude zulässig. Grundsätzlich ist eine Gegenüberstellung oder die Bewertung von EPD Daten nur möglich, wenn alle zu vergleichenden Datensätze nach EN 15804 erstellt wurden und der Gebäudekontext, bzw. die produktspezifischen Leistungsmerkmale berücksichtigt werden.

## Review details
Die angewendete LCI Methode ist in Übereinstimmung mit ISO 14040 und 14044. Die Dokumentation enthält alle relevanten Informationen im Hinblick auf die Datenqualität und den Umfang der Anwendung der jeweiligen LCI Ergebnisse bzw. der Datensätze. Der Datensatz repräsentiert den Stand der Technik bezogen auf die funktionelle Einheit.

## Data sources
- GaBi database (general)
