# Steinwolle Flachdämmplatte; 145 kg/m3

Dataset: ILCD process, EPD, generic dataset
Geography: DE
Reference year: 2021
Valid until: 2022
Classification: oekobau.dat: Gebäudetechnik / Heizung / Wärmeverteilung und Abgabe
Owner: Sphera Solutions GmbH
Compliance: EN 15804+A2
Review: Dependent internal review by Sphera Solutions GmbH; Independent external review by GaBi user forum
Amounts: rows without a unit in brackets have none in this file; such an amount is in the reference unit of its flow, which a separate flow dataset defines
copyright: true
licenseType: Free of charge for all users and uses
accessRestrictions: The license conditions as stated on https://www.oekobaudat.de/ apply.
accessRestrictions: Es gelten die Lizenzbedingungen wie sie auf https://www.oekobaudat.de/ genannt sind.

## General comment
Dieser Datensatz wurde nach dem European Standard EN 15804+A2 für Nachhaltiges Bauen modelliert. Ergebnisse werden in Modulen abgebildet, die den strukturierten Ausdruck von Ergebnissen über den gesamten Lebenszyklus zulassen.

## Geography
Der Datensatz bildet die länderspezifische Situation in Deutschland ab. Dabei werden Haupttechnologien, spezifische regionale Charakteristiken und ggf. Importstatistiken berücksichtigt.

## Time period
Jährlicher Durchschnitt

## Technology and included processes
Der Datensatz beschreibt die Mineralwolle- und Glaswolle-Herstellung. Mineralwolle wird aus Sediment- und Magmatitgestein, v. a. Basalt hergestellt und enthält darüber hinaus verschiedene Recyclingmaterialien. Das Material wird im Schmelzofen bei Temperaturen von 1400-1500 ° C durch schnell rotierende Walzen aufgeschmolzen. Bindemittel wird zugegeben. Das Bindemittel härtet danach in Tunnelöfen mit kontinuierlicher Beschickung aus. Zur Glaswolle-Herstellung wird reines Grundglas in einem Strom betriebenen Ofen bei etwa 1400°C aufgeschmolzen. Das geschmolzene Glas wird in einer perforierten Rotationstrommel zentrifugiert. Der warme Luftstrom verdampft das Wasser und die Fasern verfestigen sich. Die so entstandenen Rohfasern werden über ein Laufband und durch einen Tunnelofen geführt. Die Bindemittel härtet bei ca. 200 ° C. Die Fasern werden dann bis zur gewünschten Größe geschnitten und verpackt.
Die Systemgrenze bildet das verkaufsfertige Produkt. Transporte vom Werk zum Einbauort sind nicht berücksichtigt und sollten nach Bedarf nachträglich einbezogen werden.

Hintergrundsystem:
Strom: Die Stromerzeugung wird entsprechend der länderspezifischen Randbedingungen modelliert. Die landesspezifische Analyse beinhaltet:
1.: Spezifische Kraftwerke der verschiedenen fossilen Energieträger und der Einsatz erneuerbarer Energien sind entsprechend der länderspezifischen Energieträgermixe modelliert. Die Analyse bezieht Stromimporte aus den Nachbarländern, Transmissions-und Verteilungsverluste und den Eigenverbrauch im Kraftwerk und bei der Verteilung bzw. Speicherung, z. B. durch Pumpspeicherwerke, ein.
2.: Die landes-/regionalspezifischen Technologiestandards sowie die Erzeugung in Elektrizitätskraftwerken und/oder in speziellen Kraftwerken mit Kraft-Wärme-Kopplung (KWK) sind berücksichtigt.
3.: Die länderspezifische Energieträgerbereitstellung (mit Anteil der Importe und/oder Eigenversorgung) einschließlich der Energieträger-Eigenschaften (z. B. Elementar- und Energiegehalte) werden berücksichtigt.
4.: Die Förderung, Produktion, Verarbeitung und Transportprozesse werden entsprechend der Situation im jeweiligen Stromerzeugerland modelliert. Die unterschiedlichen Produktions- und Verarbeitungsverfahren (Emissionen und Wirkungsgrade) in den verschiedenen Energieerzeugerländern werden einbezogen, z. B. Rohöl-Veredelungsverfahren oder Abfackel-Raten an den Ölplattformen.
Thermische Energie, Prozessdampf: Die Erzeugung von Dampf und thermischer Energie in Heizkraftwerken wird entsprechend der landesspezifischen Situation (Emissionsgrenzwerte, Energieträgerbasis) modelliert.
Der Wirkungsgrad für die thermische Energieerzeugung beträgt per Definition 100% des Energieträgereinsatzes. Für Prozessdampf liegt der Wirkungsgrad im Bereich von 85-95%. Die zur Heizenergie-Erzeugung verwendeten Energieträger werden entsprechend der nationalen Situation modelliert (siehe Kapitel Strom oben).
Transporte: Alle relevanten und bekannten Transportprozesse in Form von See- und Binnenschiffsverkehr sowie Bahn-, Lkw- und der Leitungstransport sind enthalten.
Energieträger: Die Energieträger werden entsprechend der spezifischen Versorgungslage modelliert (siehe Kapitel Strom oben).
Raffinerieprodukte: Diesel, Benzin, technische Gase, Heizöl, Schmierstoffe und Rückstände, wie Bitumen, werden mit einem parametrierten länderspezifische Raffineriemodell modelliert. Das Raffinerie-Modell bezieht die länderspezifischen Veredelungsverfahren (z. B. Emissionspegel, interner Energieverbrauch etc.) und das länderspezifische Produktspektrum ein, das sich je nach Land stark unterscheiden kann. Die Rohöl-Förderung wird gemäß der länderspezifischen Situation mit den jeweiligen Energieträger-Eigenschaften modelliert.

## Technical purpose
Dieses Produkt kann im Baubereich verwendet werden.

## Safety margin
20 %. Produktsystem bis auf wenige Prozesse/Flüsse abgebildet. Technologische, zeitliche und geographische Repräsentativität teilweise gegeben.

## Reference product
- Steinwolle Flachdämmplatte: 1

## Inputs
- Erneuerbare Primärenergie als Energieträger (PERE) [MJ]: A1-A3 274.334, C2 0.00522934, C3 0, C4 0.0325289
- Erneuerbare Primärenergie zur stofflichen Nutzung (PERM) [MJ]: A1-A3 0, C2 0, C3 0, C4 0
- Total erneuerbare Primärenergie (PERT) [MJ]: A1-A3 274.334, C2 0.00522934, C3 0, C4 0.0325289
- Nicht-erneuerbare Primärenergie als Energieträger (PENRE) [MJ]: A1-A3 2053.73, C2 0.0901018, C3 21.024, C4 0.240862
- Nicht-erneuerbare Primärenergie zur stofflichen Nutzung (PENRM) [MJ]: A1-A3 17.52, C2 0, C3 -17.52, C4 0
- Total nicht-erneuerbare Primärenergie (PENRT) [MJ]: A1-A3 2071.25, C2 0.0901018, C3 3.504, C4 0.240862
- Einsatz von Sekundärstoffen (SM) [kg]: A1-A3 0, C2 0, C3 0, C4 0
- Erneuerbare Sekundärbrennstoffe (SF) [MJ]: A1-A3 0, C2 0, C3 0, C4 0
- Nicht erneuerbare Sekundärbrennstoffe (NRSF) [MJ]: A1-A3 0, C2 0, C3 0, C4 0
- Nettoeinsatz von Süßwasserressourcen (FW) [m3]: A1-A3 0.336531, C2 4.64758e-6, C3 0, C4 5.93297e-5

## Outputs
- Gefährlicher Abfall zur Deponie (HWD) [kg]: A1-A3 2.85196e-7, C2 3.76596e-12, C3 0, C4 2.56252e-11
- Entsorgter nicht gefährlicher Abfall (NHWD) [kg]: A1-A3 71.8115, C2 1.45445e-5, C3 0, C4 1.20118
- Entsorgter radioaktiver Abfall (RWD) [kg]: A1-A3 0.0332859, C2 8.64644e-8, C3 0, C4 2.48649e-6
- Komponenten für die Wiederverwendung (CRU) [kg]: A1-A3 0, C2 0, C3 0, C4 0
- Stoffe zum Recycling (MFR) [kg]: A1-A3 0, C2 0, C3 0, C4 0
- Stoffe für die Energierückgewinnung (MER) [kg]: A1-A3 0, C2 0, C3 0, C4 0
- Exportierte elektrische Energie (EEE) [MJ]: A1-A3 0, C2 0, C3 0, C4 0
- Exportierte thermische Energie (EET) [MJ]: A1-A3 0, C2 0, C3 0, C4 0

## Impact indicators
- Globales Erwärmungspotenzial - total (GWP-total) [kg CO2 eq.]: A1-A3 198.067, C2 0.00675226, C3 0, C4 0.017773
- Globales Erwärmungspotenzial - fossil (GWP-fossil) [kg CO2 eq.]: A1-A3 197.198, C2 0.00670579, C3 0, C4 0.0181588
- Globales Erwärmungspotenzial - biogen (GWP-biogenic) [kg CO2 eq.]: A1-A3 0.749489, C2 2.81579e-6, C3 0, C4 -0.000439177
- Globales Erwärmungspotenzial - luluc (GWP-luluc) [kg CO2 eq.]: A1-A3 0.119502, C2 4.36552e-5, C3 0, C4 5.33877e-5
- Abbaupotenzial der stratosphärischen Ozonschicht (ODP) [kg CFC-11 eq.]: A1-A3 1.10483e-12, C2 1.7393e-18, C3 0, C4 7.12511e-17
- Versauerungspotenzial, kumulierte Überschreitung (AP) [Mole of H+ eq.]: A1-A3 1.52938, C2 5.52183e-5, C3 0, C4 0.000129255
- Eutrophierungspotenzial - Süßwasser (EP-freshwater) [kg P eq.]: A1-A3 0.000236331, C2 1.39798e-8, C3 0, C4 3.05624e-8
- Eutrophierungspotenzial - Salzwasser (EP-marine) [kg N eq.]: A1-A3 0.146265, C2 2.77437e-5, C3 0, C4 3.35553e-5
- Eutrophierungspotenzial - Land (EP-terrestrial) [Mole of N eq.]: A1-A3 4.5364, C2 0.000306221, C3 0, C4 0.000368662
- Bildungspotenzial für troposphärisches Ozon (POCP) [kg NMVOC eq.]: A1-A3 0.486857, C2 5.18488e-5, C3 0, C4 0.000101676
- Potenzial für die Verknappung abiotischer Ressourcen nicht fossile Ressourcen (ADPE) [kg Sb eq.]: A1-A3 1.99297e-5, C2 5.91286e-10, C3 0, C4 1.72118e-9
- Potenzial für die Verknappung abiotischer Ressourcen fossile Brennstoffe (ADPF) [MJ]: A1-A3 2073.51, C2 0.090098, C3 0, C4 0.240735
- Wasser-Entzugspotenzial (Benutzer) (WDP) [m³ world equiv.]: A1-A3 10.9356, C2 2.64241e-5, C3 0, C4 0.00194337

## Use advice
Der Datensatz repräsentiert ein Cradle to Gate Inventar. Er kann verwendet werden, um die Lieferkette des jeweiligen Produktes in einer repräsentativen Weise zu charakterisieren. Die Kombination mit einzelnen Einheitenprozessen und diesem Produkt ermöglicht die Erstellung von anwenderspezifischen (Produkt-) LCAs.

## Data sources
- AUB-Deklaration Rockwool: Unkaschierte bzw. unbeschichtete kunstharzgebundene Steinwolle-Dämmstoffe
- IBU-Deklaration Saint-Gobain ISOVER G+H: Unkaschierte Glaswolle-Platten und -Filze, 2008
- Documentation of data quality management
- GaBi Database Edition 2021, CUP2021.01
- GaBi database (all versions)
