# Glasbausteine; 1800 kg/m3

Dataset: ILCD process, EPD, generic dataset
Geography: DE
Reference year: 2021
Valid until: 2022
Classification: oekobau.dat: Mineralische Baustoffe / Steine und Elemente / Glasbausteine
Owner: Sphera Solutions GmbH
Compliance: EN 15804+A2
Review: Dependent internal review by Sphera Solutions GmbH; Independent external review by GaBi user forum
Amounts: rows without a unit in brackets have none in this file; such an amount is in the reference unit of its flow, which a separate flow dataset defines
copyright: true
licenseType: Free of charge for all users and uses
accessRestrictions: The license conditions as stated on https://www.oekobaudat.de/ apply.
accessRestrictions: Es gelten die Lizenzbedingungen wie sie auf https://www.oekobaudat.de/ genannt sind.

## General comment
Dieser Datensatz wurde nach dem European Standard EN 15804+A2 für Nachhaltiges Bauen modelliert. Ergebnisse werden in Modulen abgebildet, die den strukturierten Ausdruck von Ergebnissen über den gesamten Lebenszyklus zulassen.

## Geography
Der Datensatz bildet die länderspezifische Situation in Deutschland ab. Dabei werden Haupttechnologien, spezifische regionale Charakteristiken und ggf. Importstatistiken berücksichtigt.

## Time period
Jährlicher Durchschnitt

## Technology and included processes
Die Lebenszyklusanalyse von Glasbausteinen umfasst im wesentlichen den Prozess der Glasherstellung. Die verschiedenen Formen und Maße der Glasbausteine sind der DIN 1051-1 (Anhang C) zu entnehmen. Die Systemgrenze bildet das fertige Produkt am Werkstor. Transporte vom Werk zur Baustelle sind nicht berücksichtigt und müssen bei Systembetrachtungen eingerechnet werden. Der Datensatz stellt eine Abschätzung auf Basis von Fensterglas dar.

In der Entsorgungsphase wird in Modul C1 ein maschineller Rückbau (Bagger) bilanziert. Der Transport in Modul C2 zur Aufbereitungsanlage erfolgt mit einem LKW (50km). In Modul C3 wird das Material aufbereitet, eventuelle Bewehrung wird einer Senke (keine Lasten, keine Gutschriften) zugeführt. Es wurde ein Aufbereitungsverlust von 25% angenommen. Dieser Verlust wird einer Inertstoffdeponie innerhalb von Modul C3 zugeführt (durchschnittliche Deponieemissionen). In Modul D erfolgt eine Gutschrift für die Netto-Materialmenge (ohne Bewehrungsanteil und abzüglich Aufbereitungsverluste) für die Substitution von natürlichem Kies als Verfüllmaterial (z.B. im Straßen- oder Deponiebau).

## Technical purpose
Dieses Produkt kann im Baubereich verwendet werden.

## Safety margin
30 %. Wichtige Prozesse/Flüsse können fehlen oder sind abgeschätzt. Stark eingeschränkte technologische, zeitliche oder geographische Repräsentativität.

## Reference product
- Glasbausteine: 1

## Inputs
- Erneuerbare Primärenergie als Energieträger (PERE) [MJ]: A1-A3 2964.96, C2 7.39677, C4 88.0991
- Erneuerbare Primärenergie zur stofflichen Nutzung (PERM) [MJ]: A1-A3 0, C2 0, C4 0
- Total erneuerbare Primärenergie (PERT) [MJ]: A1-A3 2964.96, C2 7.39677, C4 88.0991
- Nicht-erneuerbare Primärenergie als Energieträger (PENRE) [MJ]: A1-A3 45302.5, C2 127.447, C4 652.336
- Nicht-erneuerbare Primärenergie zur stofflichen Nutzung (PENRM) [MJ]: A1-A3 0, C2 0, C4 0
- Total nicht-erneuerbare Primärenergie (PENRT) [MJ]: A1-A3 45302.5, C2 127.447, C4 652.336
- Einsatz von Sekundärstoffen (SM) [kg]: A1-A3 0, C2 0, C4 0
- Erneuerbare Sekundärbrennstoffe (SF) [MJ]: A1-A3 0, C2 0, C4 0
- Nicht erneuerbare Sekundärbrennstoffe (NRSF) [MJ]: A1-A3 0, C2 0, C4 0
- Nettoeinsatz von Süßwasserressourcen (FW) [m3]: A1-A3 7.85691, C2 0.00657389, C4 0.160685

## Outputs
- Gefährlicher Abfall zur Deponie (HWD) [kg]: A1-A3 1.07091e-5, C2 5.32686e-9, C4 6.94017e-8
- Entsorgter nicht gefährlicher Abfall (NHWD) [kg]: A1-A3 87.7931, C2 0.0205728, C4 3253.2
- Entsorgter radioaktiver Abfall (RWD) [kg]: A1-A3 0.325289, C2 0.000122302, C4 0.00673423
- Komponenten für die Wiederverwendung (CRU) [kg]: A1-A3 0, C2 0, C4 0
- Stoffe zum Recycling (MFR) [kg]: A1-A3 0, C2 0, C4 0
- Stoffe für die Energierückgewinnung (MER) [kg]: A1-A3 0, C2 0, C4 0
- Exportierte elektrische Energie (EEE) [MJ]: A1-A3 0, C2 0, C4 0
- Exportierte thermische Energie (EET) [MJ]: A1-A3 0, C2 0, C4 0

## Impact indicators
- Globales Erwärmungspotenzial - total (GWP-total) [kg CO2 eq.]: A1-A3 3995.15, C2 9.69917, C4 48.2266
- Globales Erwärmungspotenzial - fossil (GWP-fossil) [kg CO2 eq.]: A1-A3 3987.94, C2 9.63374, C4 49.18
- Globales Erwärmungspotenzial - biogen (GWP-biogenic) [kg CO2 eq.]: A1-A3 5.54562, C2 0.00367648, C4 -1.09794
- Globales Erwärmungspotenzial - luluc (GWP-luluc) [kg CO2 eq.]: A1-A3 1.66711, C2 0.0617492, C4 0.144592
- Abbaupotenzial der stratosphärischen Ozonschicht (ODP) [kg CFC-11 eq.]: A1-A3 1.20019e-11, C2 2.46019e-15, C4 1.92972e-13
- Versauerungspotenzial, kumulierte Überschreitung (AP) [Mole of H+ eq.]: A1-A3 23.3211, C2 0.0302076, C4 0.350064
- Eutrophierungspotenzial - Süßwasser (EP-freshwater) [kg P eq.]: A1-A3 0.00290542, C2 1.97741e-5, C4 8.27732e-5
- Eutrophierungspotenzial - Salzwasser (EP-marine) [kg N eq.]: A1-A3 8.48993, C2 0.0141018, C4 0.090879
- Eutrophierungspotenzial - Land (EP-terrestrial) [Mole of N eq.]: A1-A3 102.106, C2 0.157459, C4 0.99846
- Bildungspotenzial für troposphärisches Ozon (POCP) [kg NMVOC eq.]: A1-A3 21.9387, C2 0.0271946, C4 0.275372
- Potenzial für die Verknappung abiotischer Ressourcen nicht fossile Ressourcen (ADPE) [kg Sb eq.]: A1-A3 0.000302412, C2 8.36359e-7, C4 4.66153e-6
- Potenzial für die Verknappung abiotischer Ressourcen fossile Brennstoffe (ADPF) [MJ]: A1-A3 45295.1, C2 127.441, C4 651.992
- Wasser-Entzugspotenzial (Benutzer) (WDP) [m³ world equiv.]: A1-A3 -113.334, C2 0.0373762, C4 5.26329

## Use advice
Der Datensatz repräsentiert ein Cradle to Gate Inventar. Er kann verwendet werden, um die Lieferkette des jeweiligen Produktes in einer repräsentativen Weise zu charakterisieren. Die Kombination mit einzelnen Einheitenprozessen und diesem Produkt ermöglicht die Erstellung von anwenderspezifischen (Produkt-) LCAs.

## Data sources
- DIN EN 1051-1 Glassteine und Betongläser - Begriffe und Beschreibungen, 2003
- Documentation of data quality management
- GaBi Database Edition 2021, CUP2021.01
- GaBi database (all versions)
