# Sand 0/2 getrocknet; grain size 0/2, dried

Dataset: ILCD process, EPD, generic dataset
Geography: DE
Reference year: 2018
Valid until: 2022
Classification: oekobau.dat: Mineralische Baustoffe / Zuschläge / Sand und Kies
Owner: thinkstep
Compliance: DIN EN 15804
Review: Dependent internal review by thinkstep, IABP-GaBi, IBP-GaBi; Independent external review by GaBi user forum, GaBi bug forum, GaBi user community
Amounts: rows without a unit in brackets have none in this file; such an amount is in the reference unit of its flow, which a separate flow dataset defines
copyright: true

## General comment
Dieser Datensatz wurde nach dem European Standard EN 15804 für Nachhaltiges Bauen modelliert. Ergebnisse werden in Modulen abgebildet, die den strukturierten Ausdruck von Ergebnissen über den gesamten Lebenszyklus zulassen.

## Geography
Der Datensatz bildet die länderspezifische Situation in Deutschland ab. Dabei werden Haupttechnologien, spezifische regionale Charakteristiken und ggf. Importstatistiken berücksichtigt.

## Time period
Jährlicher Durchschnitt

## Technology and included processes
Die Aufbereitung der Rohstoffe beginnt mit dem Waschen der Gesteinskörner, die aus dem Tagebau gewonnen wurden. Durch die Zugabe von sauberem Wasser wird das Rohmaterial in verschiedenen Waschstufen von abschlämmbaren Substanzen (Lehm und Ton) und von Fremdstoffen (Holz, Kaolin, Kohle, Metalle etc.) befreit. Anschließend erfolgt eine Sortierung mit Hilfe von Vibrationssieben und/oder einer vorgeschalteten Sortiermaschine. Sand und Kies mit einem SiO2-Gehalt größer als 96 % sind bekannt als Quarzsand oder Quarzkies. Es folgt die Trocknung. In einem Heiß-Gas-Generator wird Luft mit einem Öl- oder Gasbrenner auf 450 °C erhitzt. Mit der Heißluft erfolgt die Trocknung der Körnung im Trockenofen, bis der Wassergehalt kleiner als 0,2 %. Anschließend wird die Körnung mit Hilfe von Sieben klassifiziert nach Korngruppen. Die Lebenszyklusanalyse von Sand umfasst den Prozess der Rohkies-Gewinnung und die Aufbereitung im Kieswerk sowie eine anschließende Trocknung. Die Systemgrenze bildet das fertige Produkt Sand 0/2 (getrocknet) am Werkstor. Transporte vom Werk zur Baustelle sind nicht berücksichtigt und müssen bei Systembetrachtungen eingerechnet werden.

Hintergrundsystem:
Strom: Die Stromerzeugung wird entsprechend der länderspezifischen Randbedingungen modelliert. Die landesspezifische Analyse beinhaltet:
1.: Spezifische Kraftwerke der verschiedenen fossilen Energieträger und der Einsatz erneuerbarer Energien sind entsprechend der länderspezifischen Energieträgermixe modelliert. Die Analyse bezieht Stromimporte aus den Nachbarländern, Transmissions-und Verteilungsverluste und den Eigenverbrauch im Kraftwerk und bei der Verteilung bzw. Speicherung, z. B. durch Pumpspeicherwerke, ein.
2.: Die landes-/regionalspezifischen Technologiestandards sowie die Erzeugung in Elektrizitätskraftwerken und/oder in speziellen Kraftwerken mit Kraft-Wärme-Kopplung (KWK) sind berücksichtigt.
3.: Die länderspezifische Energieträgerbereitstellung (mit Anteil der Importe und/oder Eigenversorgung) einschließlich der Energieträger-Eigenschaften (z. B. Elementar- und Energiegehalte) werden berücksichtigt.
4.: Die Förderung, Produktion, Verarbeitung und Transportprozesse werden entsprechend der Situation im jeweiligen Stromerzeugerland modelliert. Die unterschiedlichen Produktions- und Verarbeitungsverfahren (Emissionen und Wirkungsgrade) in den verschiedenen Energieerzeugerländern werden einbezogen, z. B. Rohöl-Veredelungsverfahren oder Abfackel-Raten an den Ölplattformen.
Thermische Energie, Prozessdampf: Die Erzeugung von Dampf und thermischer Energie in Heizkraftwerken wird entsprechend der landesspezifischen Situation (Emissionsgrenzwerte, Energieträgerbasis) modelliert.
Der Wirkungsgrad für die thermische Energieerzeugung beträgt per Definition 100% des Energieträgereinsatzes. Für Prozessdampf liegt der Wirkungsgrad im Bereich von 85-95%. Die zur Heizenergie-Erzeugung verwendeten Energieträger werden entsprechend der nationalen Situation modelliert (siehe Kapitel Strom oben).
Transporte: Alle relevanten und bekannten Transportprozesse in Form von See- und Binnenschiffsverkehr sowie Bahn-, Lkw- und der Leitungstransport sind enthalten.
Energieträger: Die Energieträger werden entsprechend der spezifischen Versorgungslage modelliert (siehe Kapitel Strom oben).
Raffinerieprodukte: Diesel, Benzin, technische Gase, Heizöl, Schmierstoffe und Rückstände, wie Bitumen, werden mit einem parametrierten länderspezifische Raffineriemodell modelliert. Das Raffinerie-Modell bezieht die länderspezifischen Veredelungsverfahren (z. B. Emissionspegel, interner Energieverbrauch etc.) und das länderspezifische Produktspektrum ein, das sich je nach Land stark unterscheiden kann. Die Rohöl-Förderung wird gemäß der länderspezifischen Situation mit den jeweiligen Energieträger-Eigenschaften modelliert.

## Technical purpose
Dieses Produkt kann im Baubereich verwendet werden.

## Safety margin
20 %. Produktsystem bis auf wenige Prozesse/Flüsse abgebildet. Technologische, zeitliche und geographische Repräsentativität teilweise gegeben.

## Reference product
- Sand (0/2): 1

## Inputs
- Erneuerbare Primärenergie als Energieträger (PERE) [MJ]: A1-A3 0.0143774, C1 0.000566453, C2 0.0021792, C3 0.0131508, D -0.00781763
- Erneuerbare Primärenergie zur stofflichen Nutzung (PERM) [MJ]: A1-A3 0, C1 0, C2 0, C3 0, D 0
- Total erneuerbare Primärenergie (PERT) [MJ]: A1-A3 0.0143774, C1 0.000566453, C2 0.0021792, C3 0.0131508, D -0.00781763
- Nicht-erneuerbare Primärenergie als Energieträger (PENRE) [MJ]: A1-A3 0.542523, C1 0.0097302, C2 0.037433, C3 0.121834, D -0.0274094
- Nicht-erneuerbare Primärenergie zur stofflichen Nutzung (PENRM) [MJ]: A1-A3 0, C1 0, C2 0, C3 0, D 0
- Total nicht erneuerbare Primärenergie (PENRT) [MJ]: A1-A3 0.542523, C1 0.0097302, C2 0.037433, C3 0.121834, D -0.0274094
- Einsatz von Sekundärstoffen (SM) [kg]: A1-A3 0, C1 0, C2 0, C3 0, D 0
- Erneuerbare Sekundärbrennstoffe (RSF) [MJ]: A1-A3 0, C1 0, C2 0, C3 0, D 0
- Nicht erneuerbare Sekundärbrennstoffe (NRSF) [MJ]: A1-A3 0, C1 0, C2 0, C3 0, D 0
- Einsatz von Süßwasserressourcen (FW) [m3]: A1-A3 7.05236e-5, C1 5.07306e-7, C2 1.95166e-6, C3 3.12591e-5, D -5.06974e-6

## Outputs
- Gefährlicher Abfall zur Deponie (HWD) [kg]: A1-A3 1.00935e-9, C1 3.63607e-10, C2 1.39883e-9, C3 2.20686e-9, D -5.16622e-10
- Entsorgter nicht gefährlicher Abfall (NHWD) [kg]: A1-A3 0.0251455, C1 1.70782e-6, C2 6.57015e-6, C3 0.309602, D -0.0161111
- Entsorgter radioaktiver Abfall (RWD) [kg]: A1-A3 1.56538e-6, C1 1.02439e-8, C2 3.94093e-8, C3 1.17417e-6, D -1.02055e-6
- Komponenten für die Wiederverwendung (CRU) [kg]: A1-A3 0, C1 0, C2 0, C3 0, D 0
- Stoffe zum Recycling (MFR) [kg]: A1-A3 0, C1 0, C2 0, C3 0.927835, D 0
- Stoffe für die Energierückgewinnung (MER) [kg]: A1-A3 0, C1 0, C2 0, C3 0, D 0
- Exportierte elektrische Energie (EEE) [MJ]: A1-A3 0, C1 0, C2 0, C3 0, D 0
- Exportierte thermische Energie (EET) [MJ]: A1-A3 0, C1 0, C2 0, C3 0, D 0

## Impact indicators
- Globales Erwärmungspotenzial (GWP) [kg CO2 Äquiv.]: A1-A3 0.0332595, C1 0.000718871, C2 0.00278506, C3 0.00733722, D -0.00205398
- Abbaupotenzial der stratosphärischen Ozonschicht (ODP) [kg R11 Äquiv.]: A1-A3 6.87963e-17, C1 2.39627e-19, C2 9.21867e-19, C3 4.15632e-17, D -3.96418e-17
- Versauerungspotential (AP) [kg SO2 Äquiv.]: A1-A3 2.30524e-5, C1 2.50738e-6, C2 5.62553e-6, C3 4.74501e-5, D -4.85042e-6
- Eutrophierungspotential (EP) [kg Phosphat Äquiv.]: A1-A3 4.10634e-6, C1 5.91605e-7, C2 1.33734e-6, C3 8.07382e-6, D -9.43813e-7
- Bildungspotenzial für troposphärisches Ozon (POCP) [kg Ethen Äquiv.]: A1-A3 1.54938e-6, C1 2.47755e-7, C2 -1.6854e-6, C3 4.30615e-6, D 4.45872e-7
- Potenzial für den abiotischen Abbau nicht fossiler Ressourcen (ADPE) [kg Sb Äquiv.]: A1-A3 2.53879e-9, C1 6.09201e-11, C2 2.34365e-10, C3 3.9426e-9, D -4.56497e-10
- Potenzial für den abiotischen Abbau fossiler Brennstoffe (ADPF) [MJ]: A1-A3 0.538568, C1 0.00970402, C2 0.0373323, C3 0.118868, D -0.024833

## Use advice
Der Datensatz repräsentiert ein Cradle to Gate Inventar. Er kann verwendet werden, um die Lieferkette des jeweiligen Produktes in einer repräsentativen Weise zu charakterisieren. Die Kombination mit einzelnen Einheitenprozessen und diesem Produkt ermöglicht die Erstellung von anwenderspezifischen (Produkt-) LCAs.

## Data sources
- GaBi Database Edition 2020, SP40
- GaBi database (all versions)
- Baustoff-Ökobilanz. Wirkungsabschätzung und Auswertung in der Steine-Erden-Industrie, 1999
