# Kielstegelemente mit innerem Fachwerk OSB; 158,3 kg/m³

Dataset: ILCD process, EPD, specific dataset
Geography: AT
Reference year: 2019
Valid until: 2024
Classification: OEKOBAU.DAT: Holz / Holzwerkstoffe / Elemente aus Holzwerkstoffen
Synonyms: Holzdecken, Holzfachwerk, Holzelemente
Method details: PKR Bau EPD GmbH PKR-Code: 2.11.1 Stand 17.08.2017 "Vollholzprodukte bzw. Holzwerkstoffe"
Generated by: IBO Institut für Baubiologie und Bauökologie
Registration number: BAU-EPD-Kielsteg-2019-1-Ecoinvent
Owner: Kielsteg GmbH
Compliance: ISO 14025; EN 15804
Review: Independent external review by Bau EPD GmbH - DI Sarah Richter
Amounts: rows without a unit in brackets have none in this file; such an amount is in the reference unit of its flow, which a separate flow dataset defines
copyright: true
licenseType: Free of charge for all users and uses
accessRestrictions: keine

## General comment
Kielstegelemente (mit innerem Fachwerk OSB der Firma Kielsteg GmbH
aus einem Werk. Die deklarierte Einheit ist 1 m³.

## Time period
Die Sachbilanzdaten repräsentieren die im Jahr 2017 tatsächlich produzierten
Mengen an Kielstegelementen mit Stegen aus OSB in dem
österreichischen Werk in Pischelsdorf.

## Technology and included processes
Kielsteg-Bauelemente sind leichte und hochtragfähige, einachsig gespannte Flächentragsysteme bestehend aus einer oberen sowie
unteren Druck-, bzw. Zugzone aus Fichtenholz und einem dazwischenliegenden Fachwerk aus dünnwandigen OSB- (oriented strand
board) oder PLY- (Sperrholz)-Platten. Das Material wird im Querschnitt effizient und gezielt da konzentriert, wo es statisch notwendig ist. Die Tragkraft der charakteristischen Zellenbauweise prädestiniert die Bauelemente für den Einsatz als biegebeanspruchte Tragwerke in Gebäuden mit großer Spannweite.

## Technical purpose
Für eine breite Anwendung in Hallen und Wohnbauten bis hin zu Carports werden die Bauelemente
vorwiegend für Dach- aber auch als Deckentragwerke eingesetzt. Mit Spannweiten von bis zu 27 Metern als Einfeldsystem sichert die Technologie eine größtmögliche Flexibilität in der Gebäudenutzung.

## Reference product
- KIELSTEG ecoinvent Kielstegelemente aus Holz mit innerem Fachwerk OSB: 1

## Inputs
- Erneuerbare Primärenergie als Energieträger (PERE) / Uso de energía primaria renovable excluyendo los recursos de energía primaria renovable utilizada como materia prima (PERE) [MJ]: A1 0, A1-A3 964.508, A2 0, A3 0, A4 1.49, A5 50.6, B1 0, B2 0, B3 0, B4 0, B5 0, B6 0, B7 0, C1 0.0473, C2 1.09, C3 0.553, C4 0, D -123.452
- Erneuerbare Primärenergie zur stofflichen Nutzung (PERM) / Uso de energía primaria renovable utilizada como materia prima (PERM) [MJ]: A1 0, A1-A3 2667.61, A2 0, A3 0, A4 0, A5 0, B1 0, B2 0, B3 0, B4 0, B5 0, B6 0, B7 0, C1 0, C2 0, C3 -2670, C4 0, D 0
- Total erneuerbare Primärenergie (PERT) / Uso total de la energía primaria renovable (energía primaria y recursos de energía primaria renovable utilizada como materia prima) (PERT) [MJ]: A1 0, A1-A3 3632.12, A2 0, A3 0, A4 1.49, A5 50.6, B1 0, B2 0, B3 0, B4 0, B5 0, B6 0, B7 0, C1 0.0473, C2 1.09, C3 -2670, C4 0, D -123.452
- Nicht-erneuerbare Primärenergie als Energieträger (PENRE) / Uso de energía primaria no renovable, excluyendo los recursos de energía primaria no renovable utilizada como materia prima (PENRE) [MJ]: A1 0, A1-A3 1285.11, A2 0, A3 0, A4 123, A5 59.3, B1 0, B2 0, B3 0, B4 0, B5 0, B6 0, B7 0, C1 8.46, C2 75.6, C3 27.5, C4 0, D -845.09
- Nicht-erneuerbare Primärenergie zur stofflichen Nutzung (PENRM) / Uso de la energía primaria no renovable utilizada como materia prima (PENRM) [MJ]: A1 0, A1-A3 13.6675, A2 0, A3 0, A4 0, A5 0, B1 0, B2 0, B3 0, B4 0, B5 0, B6 0, B7 0, C1 0, C2 0, C3 0, C4 0, D 0
- Total nicht erneuerbare Primärenergie (PENRT) / Uso total de la energía primaria no renovable (energía primaria y recursos de energía primaria renovable utilizada como materia prima) (PENRT) [MJ]: A1 0, A1-A3 1298.78, A2 0, A3 0, A4 123, A5 59.3, B1 0, B2 0, B3 0, B4 0, B5 0, B6 0, B7 0, C1 8.46, C2 75.6, C3 27.5, C4 0, D -845.09
- Einsatz von Sekundärstoffen (SM) / Uso de materiales secundarios (SM) [kg]: A1 0, A1-A3 0.00906, A2 0, A3 0, A4 0.000302, A5 0.00033, B1 0, B2 0, B3 0, B4 0, B5 0, B6 0, B7 0, C1 9.29e-6, C2 0.000217, C3 0.000104, C4 0, D -0.00269985
- Erneuerbare Sekundärbrennstoffe (RSF) / Uso de combustibles secundarios renovables (RSF) [MJ]: A1 0, A1-A3 965, A2 0, A3 0, A4 1.49, A5 50.6, B1 0, B2 0, B3 0, B4 0, B5 0, B6 0, B7 0, C1 0.0473, C2 1.09, C3 0.553, C4 0, D -123.452
- Nicht erneuerbare Sekundärbrennstoffe (NRSF) / Uso de combustibles secundarios no renovables (NRSF) [MJ]: A1 0, A1-A3 2670, A2 0, A3 0, A4 0, A5 0, B1 0, B2 0, B3 0, B4 0, B5 0, B6 0, B7 0, C1 0, C2 0, C3 0, C4 0, D 0
- Einsatz von Süßwasserressourcen (FW) / Uso neto de recursos de agua dulce (FW) [m3]: A1 0, A2 0, A3 0

## Outputs
- Gefährlicher Abfall zur Deponie (HWD) / Residuos peligrosos eliminados (HWD) [kg]: A1 0, A1-A3 0.00161048, A2 0, A3 0, A4 7.63e-5, A5 9.94e-5, B1 0, B2 0, B3 0, B4 0, B5 0, B6 0, B7 0, C1 3.77e-6, C2 5.06e-5, C3 5.72e-5, C4 0, D -0.0014854
- Entsorgter nicht gefährlicher Abfall (NHWD) / Residuos no peligrosos eliminados (NHWD) [kg]: A1 0, A1-A3 21.3948, A2 0, A3 0, A4 5.89, A5 0.679, B1 0, B2 0, B3 0, B4 0, B5 0, B6 0, B7 0, C1 0.00919, C2 2.97, C3 2.91, C4 0, D -1.84652
- Entsorgter radioaktiver Abfall (RWD) / Residuos radiactivos eliminados (RWD) [kg]: A1 0, A1-A3 0.0101423, A2 0, A3 0, A4 0.00166, A5 0.000453, B1 0, B2 0, B3 0, B4 0, B5 0, B6 0, B7 0, C1 0.000117, C2 0.00102, C3 0.000111, C4 0, D -0.00171627
- Komponenten für die Wiederverwendung (CRU) / Componentes para su reutilización (CRU) [kg]: A1 0, A1-A3 0, A2 0, A3 0, A4 0, A5 0, B1 0, B2 0, B3 0, B4 0, B5 0, B6 0, B7 0, C1 0, C2 0, C3 0, C4 0, D 0
- Stoffe zum Recycling (MFR) / Materiales para el reciclaje (MFR) [kg]: A1 0, A1-A3 0, A2 0, A3 0, A4 0, A5 0, B1 0, B2 0, B3 0, B4 0, B5 0, B6 0, B7 0, C1 0, C2 0, C3 0.162, C4 0, D 0
- Stoffe für die Energierückgewinnung (MER) / Materiales para valorización energética (recuperación de energía) (MER) [kg]: A1 0, A1-A3 0, A2 0, A3 0, A4 0, A5 0.476, B1 0, B2 0, B3 0, B4 0, B5 0, B6 0, B7 0, C1 0, C2 0, C3 158, C4 0, D 0
- Exportierte elektrische Energie (EEE) / Energía exportada electrica (EEE) [MJ]: A1 0, A1-A3 0, A2 0, A3 0, A4 0, A5 0.582, B1 0, B2 0, B3 0, B4 0, B5 0, B6 0, B7 0, C1 0, C2 0, C3 158, C4 0, D -158.582
- Exportierte thermische Energie (EET) / Energía exportada termal (EET) [MJ]: A1 0, A1-A3 0, A2 0, A3 0, A4 0, A5 5.13, B1 0, B2 0, B3 0, B4 0, B5 0, B6 0, B7 0, C1 0, C2 0, C3 1390, C4 0, D -1395.13

## Impact indicators
- Globales Erwärmungspotenzial (GWP) / Potencial de calentamiento global (GWP) [kg CO2-Äqv.]: A1 0, A1-A3 -169.869, A2 0, A3 0, A4 8.11, A5 0.73, B1 0, B2 0, B3 0, B4 0, B5 0, B6 0, B7 0, C1 0.581, C2 4.98, C3 269, C4 0, D -51.388
- Abbau Potential der stratosphärischen Ozonschicht (ODP) / Potencial de agotamiento de la capa de ozono estratosférico (ODP) [kg R11 eq.]: A1 0, A1-A3 8.56167e-6, A2 0, A3 0, A4 1.48e-6, A5 4.84e-7, B1 0, B2 0, B3 0, B4 0, B5 0, B6 0, B7 0, C1 1.05e-7, C2 9e-7, C3 2.25e-7, C4 0, D -9.1836e-6
- Versauerungspotenzial von Boden und Wasser (AP) / Potencial de acidificación del suelo y de los recursos de agua (AP) [kg SO2-Äqv.]: A1 0, A1-A3 0.425274, A2 0, A3 0, A4 0.0221, A5 0.0208, B1 0, B2 0, B3 0, B4 0, B5 0, B6 0, B7 0, C1 0.0044, C2 0.0188, C3 0.0234, C4 0, D -0.095347
- Eutrophierungspotenzial (EP) / Potencial de eutrofización (EP) [kg Phosphat-Äqv.]: A1 0, A1-A3 0.210634, A2 0, A3 0, A4 0.00484, A5 0.00756, B1 0, B2 0, B3 0, B4 0, B5 0, B6 0, B7 0, C1 0.00102, C2 0.00444, C3 0.0239, C4 0, D -0.061824
- Bildungspotential für troposphärisches Ozon (POCP) / Potencial de formación de ozono troposférico (POCP) [kg Ethen-Äqv.]: A1 0, A1-A3 0.0969349, A2 0, A3 0, A4 0.0037, A5 0.0031, B1 0, B2 0, B3 0, B4 0, B5 0, B6 0, B7 0, C1 0.000534, C2 0.00227, C3 0.00123, C4 0, D -0.0122441
- Potenzial für den abiotischen Abbau nicht fossiler Ressourcen (ADPE) / Potencial de agotamiento de recursos abióticos para recursos no fósiles (ADPE) [kg Sb-Äqv.]: A1 0, A1-A3 0.00015271, A2 0, A3 0, A4 2.44e-5, A5 1.1e-5, B1 0, B2 0, B3 0, B4 0, B5 0, B6 0, B7 0, C1 1.95e-7, C2 2.01e-5, C3 3.27e-6, C4 0, D -1.40395e-5
- Potenzial für den abiotischen Abbau fossiler Brennstoffe (ADPF) / Potencial de agotamiento de recursos abióticos para recursos fósiles (ADPF) [MJ]: A1 0, A1-A3 1284.82, A2 0, A3 0, A4 122, A5 57.9, B1 0, B2 0, B3 0, B4 0, B5 0, B6 0, B7 0, C1 8.32, C2 74.7, C3 28.5, C4 0, D -829.03

## Use advice
Kielsteg-Bauelemente sind leichte und hochtragfähige, einachsig gespannte Flächentragsysteme bestehend aus einer oberen sowie
unteren Druck-, bzw. Zugzone aus Fichtenholz und einem dazwischenliegenden Fachwerk aus dünnwandigen OSB- (oriented strand
board) oder PLY- (Sperrholz)-Platten. Das Material wird im Querschnitt effizient und gezielt da konzentriert, wo es statisch notwendig ist.
Die Tragkraft der charakteristischen Zellenbauweise prädestiniert die Bauelemente für den Einsatz als biegebeanspruchte Tragwerke in
Gebäuden mit großer Spannweite. Für eine breite Anwendung in Hallen und Wohnbauten bis hin zu Carports werden die Bauelemente
vorwiegend für Dach- aber auch als Deckentragwerke eingesetzt. Mit Spannweiten von bis zu 27 Metern als Einfeldsystem sichert die
Technologie eine größtmögliche Flexibilität in der Gebäudenutzung.

## Data sources
- ecoinvent database (general)
- ecoinvent 3.4 database
- Software: SimaPro 8.5.2.0
