# PIR Hartschaum

Dataset: ILCD process, EPD, generic dataset
Geography: DE
Reference year: 2021
Valid until: 2022
Classification: oekobau.dat: Dämmstoffe / Polyurethan-Hartschaum (PU) / PIR-Hartschaum
Owner: Sphera Solutions GmbH
Compliance: EN 15804+A2
Review: Dependent internal review by Sphera Solutions GmbH; Independent external review by GaBi user forum
Amounts: rows without a unit in brackets have none in this file; such an amount is in the reference unit of its flow, which a separate flow dataset defines
copyright: true
licenseType: Free of charge for all users and uses
accessRestrictions: The license conditions as stated on https://www.oekobaudat.de/ apply.
accessRestrictions: Es gelten die Lizenzbedingungen wie sie auf https://www.oekobaudat.de/ genannt sind.

## General comment
Dieser Datensatz wurde nach dem European Standard EN 15804+A2 für Nachhaltiges Bauen modelliert. Ergebnisse werden in Modulen abgebildet, die den strukturierten Ausdruck von Ergebnissen über den gesamten Lebenszyklus zulassen.

## Geography
Der Datensatz bildet die länderspezifische Situation in Deutschland ab. Dabei werden Haupttechnologien, spezifische regionale Charakteristiken und ggf. Importstatistiken berücksichtigt.

## Time period
Jährlicher Durchschnitt

## Technology and included processes
PIR wird aus den Rohstoffen MDI und Polyol hergestellt. Im Gegensatz zu PUR Schäumen ist bei der Herstellung von PIR MDI im Überschuss vorhanden, weshalb dieses dann teilweise mit sich selbst reagiert. Es entsteht PIR, ein sehr stark vernetzter Kunststoff mit ringartigen Strukturen. Die Rohstoffe MDI und Polyol dominieren die Ökobilanz.

In Modul C1 wird ein manueller Rückbau (lastenfrei) angenommen. Sammelverluste werden vernachlässigt.
Der Transport in Modul C2 zur Verwertungsanlage erfolgt mit einem LKW (50km).
In Modul C3 wird die Zerkleinerung und thermische Behandlung (Verbrennung) des Materials berücksichtigt. Bei der Berechnung der Verbrennungsemissionen und Gutschriften wird der spezifische Heizwert des jeweiligen Materials sowie die Materialzusammensetzung berücksichtigt.
In Modul D erfolgen Gutschriften für die Substitution von Strom (deutscher Strommix) und thermischer Energie (aus Erdgas).

## Technical purpose
PIR Hartschaumplatten werden als Dämstoff von statisch hoch belasteten Flächen (Industrieböden, Flchdachaufbauten mit hoher Belastung etc.) eingesetzt.

## Safety margin
10 %. Produktsystem weitgehend vollständig abgebildet. Gute technologische, zeitliche und geographische Repräsentativität.

## Reference product
- PIR Hartschaum: 1

## Inputs
- Erneuerbare Primärenergie als Energieträger (PERE) [MJ]: A1-A3 178.912, C2 0.0601195, C3 4.27399, D -140.173
- Erneuerbare Primärenergie zur stofflichen Nutzung (PERM) [MJ]: A1-A3 0, C2 0, C3 0, D 0
- Total erneuerbare Primärenergie (PERT) [MJ]: A1-A3 178.912, C2 0.0601195, C3 4.27399, D -140.173
- Nicht-erneuerbare Primärenergie als Energieträger (PENRE) [MJ]: A1-A3 1277.41, C2 1.03586, C3 915.088, D -402.435
- Nicht-erneuerbare Primärenergie zur stofflichen Nutzung (PENRM) [MJ]: A1-A3 810, C2 0, C3 -810, D 0
- Total nicht-erneuerbare Primärenergie (PENRT) [MJ]: A1-A3 2087.41, C2 1.03586, C3 105.088, D -402.435
- Einsatz von Sekundärstoffen (SM) [kg]: A1-A3 0, C2 0, C3 0, D 0
- Erneuerbare Sekundärbrennstoffe (SF) [MJ]: A1-A3 0, C2 0, C3 0, D 0
- Nicht erneuerbare Sekundärbrennstoffe (NRSF) [MJ]: A1-A3 0, C2 0, C3 0, D 0
- Nettoeinsatz von Süßwasserressourcen (FW) [m3]: A1-A3 0.631528, C2 5.34312e-5, C3 0.178573, D -0.0521149

## Outputs
- Gefährlicher Abfall zur Deponie (HWD) [kg]: A1-A3 0.000390598, C2 4.32957e-11, C3 5.88952e-9, D -1.40483e-7
- Entsorgter nicht gefährlicher Abfall (NHWD) [kg]: A1-A3 0.874229, C2 0.000167212, C3 0.393873, D -0.214854
- Entsorgter radioaktiver Abfall (RWD) [kg]: A1-A3 0.0504288, C2 9.94044e-7, C3 0.000524646, D -0.0150759
- Komponenten für die Wiederverwendung (CRU) [kg]: A1-A3 0, C2 0, C3 0, D 0
- Stoffe zum Recycling (MFR) [kg]: A1-A3 0, C2 0, C3 0, D 0
- Stoffe für die Energierückgewinnung (MER) [kg]: A1-A3 0, C2 0, C3 30, D 0
- Exportierte elektrische Energie (EEE) [MJ]: A1-A3 0, C2 0, C3 102.955, D 0
- Exportierte thermische Energie (EET) [MJ]: A1-A3 0, C2 0, C3 225.122, D 0

## Impact indicators
- Globales Erwärmungspotenzial - total (GWP-total) [kg CO2 eq.]: A1-A3 95.6256, C2 0.0786849, C3 78.2309, D -25.962
- Globales Erwärmungspotenzial - fossil (GWP-fossil) [kg CO2 eq.]: A1-A3 96.1297, C2 0.0781477, C3 77.3811, D -25.6656
- Globales Erwärmungspotenzial - biogen (GWP-biogenic) [kg CO2 eq.]: A1-A3 -0.841033, C2 3.53147e-5, C3 0.848332, D -0.25769
- Globales Erwärmungspotenzial - luluc (GWP-luluc) [kg CO2 eq.]: A1-A3 0.336953, C2 0.000501885, C3 0.00141211, D -0.0386976
- Abbaupotenzial der stratosphärischen Ozonschicht (ODP) [kg CFC-11 eq.]: A1-A3 0.000157425, C2 1.99959e-17, C3 1.75464e-14, D -6.12005e-13
- Versauerungspotenzial, kumulierte Überschreitung (AP) [Mole of H+ eq.]: A1-A3 0.214329, C2 0.000221567, C3 0.0517165, D -0.0266127
- Eutrophierungspotenzial - Süßwasser (EP-freshwater) [kg P eq.]: A1-A3 0.000604815, C2 1.6072e-7, C3 2.5972e-6, D -6.43665e-5
- Eutrophierungspotenzial - Salzwasser (EP-marine) [kg N eq.]: A1-A3 0.0558199, C2 0.000102071, C3 0.0237487, D -0.00974908
- Eutrophierungspotenzial - Land (EP-terrestrial) [Mole of N eq.]: A1-A3 0.58746, C2 0.00114199, C3 0.285522, D -0.103784
- Bildungspotenzial für troposphärisches Ozon (POCP) [kg NMVOC eq.]: A1-A3 0.229933, C2 0.000199041, C3 0.0606573, D -0.0254862
- Potenzial für die Verknappung abiotischer Ressourcen nicht fossile Ressourcen (ADPE) [kg Sb eq.]: A1-A3 1.41393e-5, C2 6.79776e-9, C3 2.76311e-7, D -8.21401e-6
- Potenzial für die Verknappung abiotischer Ressourcen fossile Brennstoffe (ADPF) [MJ]: A1-A3 2167.72, C2 1.03582, C3 24.0829, D -402.376
- Wasser-Entzugspotenzial (Benutzer) (WDP) [m³ world equiv.]: A1-A3 24.8515, C2 0.000303787, C3 7.57901, D -0.316221

## Use advice
Dieser Datensatz bezieht sich auf die Herstellung von 1 m³ PIR Hartschaumplatten. Eine Kaschierung wurde nicht berücksichtigt. Die Rohdichte beträgt 30 kg/m³. Die Wärmeleitfähigkeit 0,024 W/mK. Der Datensatz kann näherungsweise für die Abschätzung Phenolharz Hartschaum mit einer Dichte von 25 - 35 kg/m³, sowie für die Abschätzung von Platten mit dünner Glasfaserkaschierung verwendet werden.

Der Datensatz repräsentiert ein Cradle to Gate Inventar. Er kann verwendet werden, um die Lieferkette des jeweiligen Produktes in einer repräsentativen Weise zu charakterisieren. Die Kombination mit einzelnen Einheitenprozessen und diesem Produkt ermöglicht die Erstellung von anwenderspezifischen (Produkt-) LCAs

## Data sources
- GaBi databases
- Documentation of data quality management
- GaBi Database Edition 2021, CUP2021.01
- GaBi database (all versions)
