# colofer®

Dataset: ILCD process, EPD, average dataset
Geography: AT
Reference year: 2017
Valid until: 2022
Classification: OEKOBAU.DAT: Metalle / Stahl und Eisen / Stahlbleche
Classification: IBUCategories: 02 Bauprodukte / Metallbauprodukte und Zubehör / Dünnwandige Profile und Profiltafeln aus Metall
Method details: Dünnwandige Profile und Profiltafeln aus Metall.pdf
Registration number: EPD-VOE-20170087-IBC1-DE
Owner: voestalpine Stahl GmbH
Compliance: DIN EN 15804; ISO 14025
Review: Accredited third party review by Institut Bauen und Umwelt e. V.
Amounts: rows without a unit in brackets have none in this file; such an amount is in the reference unit of its flow, which a separate flow dataset defines
copyright: true

## General comment
Das deklarierte Produkt wird unter dem Namen colofer® geführt. Es ist charakterisiert als ein Verbundprodukt aus metallischem Trägermaterial (verzinktes Stahlband) und einer organischen Beschichtung mittels Coilcoating-Verfahren nach /EN 10169/.
Durch die Kombination der beiden Komponenten können besondere Materialeigenschaften erzielt werden:
- Hohe Korrosionsbeständigkeit
- Formbarkeit
- Dekorative Optik

Für die Verwendung des Produkts gelten die jeweiligen nationalen Bestimmungen am Ort der Verwendung, in Österreich zum Beispiel die /Bauordnungen der Länder/ und die technischen Bestimmungen auf Grund dieser Vorschriften.

## Technology and included processes
Das Ausgangsmaterial für die Herstellung von colofer® ist Stahl, der über die Primärroute (Hochofen, LD-Stahlwerk) hergestellt wird. Der flüssige Rohstahl wird mittels Stanggussverfahren zu Brammen gegossen. Die gegossenen Brammen werden über Stoß- bzw. Hubbalkenofen erneut auf 1100 - 1250°C erwärmt und in mehreren Walzschritten zu Bändern mit einer Dicke von 1,2 - 4 mm gewalzt. Auf dem Warmband bildet sich eine Walzzunderschicht aus, die vor deren Weiterverarbeitung im Kaltwalzwerk entfernt wird (Entzundern). Dieser Produktionsschritt verläuft zuerst durch eine mechanische Lockerung der Zunderschicht (Streckrichtanlage). In weiterer Folge wird das Stahlband mittels Salz- und Schwefelsäure gebeizt. Nach dem Beizen wird das Band gespült, getrocknet und eingeölt. Das gebeizte Warmband wird im Kaltwalzwerk der voestalpine weiterverarbeitet. Das Stahlband kann auf Dicken zwischen 0,3 und 3mm gewalzt werden. Zur Wiederherstellung der Verformbarkeit des Stahlbandes bzw. zur Herstellung eines Werkstoffes mit bestimmten Materialeigenschaften wird eine Wärmebehandlung (Haubenglühe oder Kontiglühe) durchgeführt. Beim Haubenglühverfahren werden die festgewickelten Bunde unter Schutzgasatmosphäre bei rund 600-700°C über einen Zeitraum von 15 - 40 Stunden geglüht, auf Temperatur gehalten und wieder abgekühlt. Im Gegensatz zur Haubenglühe erfolgt der Glühprozess in der Kontiglühe durch Abwickeln des Bandes und Durchziehen durch einen Ofen. Zur Oberflächenveredelung des Stahlbandes werden metallische Überzüge (Zink und Zink-Magnesium) eingesetzt, die eine kathodische Schutzwirkung für das Stahlband aufweisen. Für das deklarierte Produkt wird der Verzinkungsvorgang mittels Schmelztauchverfahren vorgenommen. colofer® wird am Standort Linz in der Bandbeschichtungsanlage 2 hergestellt. Dabei werden die verzinkten Stahlbänder nach dem Durchlaufen des Einlaufspeichers gereinigt und vorbehandelt um in weiterer Folge eine bessere Anbindung der Lackschicht zu erzielen. An den Beschichtungsstationen wird der flüssige Lack mittels Rollen auf das Stahlband aufgetragen. Zur Verfestigung der Lackschicht wird dieser in einem Ofen getrocknet und anschließend gekühlt.
Technische Daten:
Das deklarierte Produkt kann folgende technische Spezifikationen aufweisen (siehe Tabelle):
Deklarierte Einheit:
Die vorliegende Umweltproduktdeklaration bezieht sich auf eine deklarierte Einheit von 1 m² organisch beschichtetes Stahlblech colofer® mit einem durchschnittlichen Flächengewicht von 5,28 kg/m² und einer Referenzstärke von 0,67 mm. Für andere Stärken ist die lineare Umrechnung der Ökobilanzergebnisse über das Flächengewicht möglich.

## Technical purpose
Die Anwendungsbereiche von colofer® betreffen viele Branchen und Bereiche - aufgeteilt in die Segmente Hausindustrie (Außenanwendung) und Hausgeräteindustrie (Innenanwendung). Einige Anwendungsbeispiele sind:

- Dach- und Wandelemente
- Sandwichpanele
- Dachentwässerungssysteme
- Wandkassetten

- Kühlschränke
- Waschmaschinen
- Herde

## Reference product
- 1 m² colofer® [5,28 kg/m²]: 1

## Inputs
- Erneuerbare Primärenergie als Energieträger (PERE) [MJ]: A1-A3 7.35, C2 0.0999, C3 0, C4 0.00648, D 2.11
- Erneuerbare Primärenergie zur stofflichen Nutzung (PERM) [MJ]: A1-A3 0, C2 0, C3 0, C4 0, D 0
- Total erneuerbare Primärenergie (PERT) [MJ]: A1-A3 7.35, C2 0.0999, C3 0, C4 0.00648, D 2.11
- Nicht-erneuerbare Primärenergie als Energieträger (PENRE) [MJ]: A1-A3 129, C2 1.74, C3 0, C4 0.0571, D -62.4
- Nicht-erneuerbare Primärenergie zur stofflichen Nutzung (PENRM) [MJ]: A1-A3 0, C2 0, C3 0, C4 0, D 0
- Total nicht erneuerbare Primärenergie (PENRT) [MJ]: A1-A3 129, C2 1.74, C3 0, C4 0.0571, D -62.4
- Einsatz von Sekundärstoffen (SM) [kg]: A1-A3 0.866, C2 0, C3 0, C4 0, D 5
- Erneuerbare Sekundärbrennstoffe (RSF) [MJ]: A1-A3 0, C2 0, C3 0, C4 0, D 0
- Nicht erneuerbare Sekundärbrennstoffe (NRSF) [MJ]: A1-A3 0, C2 0, C3 0, C4 0, D 0
- Einsatz von Süßwasserressourcen (FW) [m^3]: A1-A3 0.0234, C2 0.000247, C3 0, C4 1.16e-5, D -0.00453

## Outputs
- Gefährlicher Abfall zur Deponie (HWD) [kg]: A1-A3 3.81e-6, C2 1.3e-7, C3 0, C4 1.3e-9, D 9.54e-6
- Entsorgter nicht gefährlicher Abfall (NHWD) [kg]: A1-A3 0.129, C2 0.00015, C3 0, C4 0.264, D -0.102
- Entsorgter radioaktiver Abfall (RWD) [kg]: A1-A3 0.00116, C2 3.73e-6, C3 0, C4 7.96e-7, D 0.00139
- Komponenten für die Wiederverwendung (CRU) [kg]: A1-A3 0, C2 0, C3 0, C4 0, D 0
- Stoffe zum Recycling (MFR) [kg]: A1-A3 0, C2 0, C3 5, C4 0, D 0
- Stoffe für die Energierückgewinnung (MER) [kg]: A1-A3 0, C2 0, C3 0, C4 0, D 0
- Exportierte elektrische Energie (EEE) [MJ]: A1-A3 0, C2 0, C3 0, C4 0, D 0
- Exportierte thermische Energie (EET) [MJ]: A1-A3 0, C2 0, C3 0, C4 0, D 0

## Impact indicators
- Globales Erwärmungspotenzial (GWP) [kg CO_(2)-Äq.]: A1-A3 12.4, C2 0.126, C3 0, C4 0.00424, D -7.07
- Abbau Potential der stratosphärischen Ozonschicht (ODP) [kg CFC11-Äq.]: A1-A3 1.65e-10, C2 9.1e-13, C3 0, C4 4.67e-14, D 7.86e-11
- Versauerungspotenzial von Boden und Wasser (AP) [kg SO_(2)-Äq.]: A1-A3 0.0382, C2 0.000549, C3 0, C4 2.54e-5, D -0.0275
- Eutrophierungspotenzial (EP) [kg PO_(4)^(3)-Äq.]: A1-A3 0.00359, C2 0.000135, C3 0, C4 3.46e-6, D -0.00231
- Bildungspotential für troposphärisches Ozon (POCP) [kg Ethen-Äq.]: A1-A3 0.00443, C2 -0.000186, C3 0, C4 2.47e-6, D -0.00408
- Potenzial für den abiotischen Abbau nicht fossiler Ressourcen (ADPE) [kg Sb-Äq.]: A1-A3 0.000573, C2 9.41e-9, C3 0, C4 1.46e-9, D -7.31e-8
- Potenzial für den abiotischen Abbau fossiler Brennstoffe (ADPF) [MJ]: A1-A3 126, C2 1.73, C3 0, C4 0.0551, D -66

## Use advice
Gültigkeitsbereich:
Die vorliegende Umweltproduktdeklaration bezieht sich auf eine deklarierte Einheit von 1 m² durchschnittliches colofer® mit einem Flächengewicht von 5,28 kg/m² produziert am Standort Linz. Es handelt sich um organisch beschichtete Bleche und Bänder aus Stahl.
Systemgrenze:
Die Ökobilanz des durchschnittlichen organisch beschichteten Kaltbandes beinhaltet eine cradle-to-gate (Wiege bis zum Werkstor) Betrachtung der auftretenden Umweltwirkungen mit Optionen. Die folgenden Lebenszyklusphasen werden in der Analyse berücksichtigt:

Modul A1-A3 | Produktionsstadium
Das Produktstadium beinhaltet die Aufwendungen der Rohstoffversorgung (Kohle, Eisenerz, Pellets, etc.) sowie der damit verbundenen Transporte am Produktionsstandort Linz. Am Standort wurden die für die Kokerei, Sinteranlage, in den Hochöfen, im Stahl- und Walzwerk sowie bei der Feuerverzinkung und organischen Beschichtung benötigten Material- und Energieflüsse erfasst. Die Energiebereitstellung am Standort Linz erfolgt über ein Kraftwerk in dem Hüttengase zur Energiegewinnung verwertet werden. Da mehr Energie verbraucht wird als durch das eigene Kraftwerk zur Verfügung steht, werden zusätzlich Erdgas und elektrische Energie vom österreichischen Netz bezogen.

Modul C2 | Transport zur Entsorgung/Verwertung
Für den Transport zur Entsorgung/Verwertung wird eine konservative Annahme von 500 km Distanz angesetzt.

Modul C3 | Abfallbehandlung
Jener Produktfluss, der das Modul D zum Recycling erreicht, verlässt das Produktsystem in C3. Aufwendungen für die Zerkleinerung und Sortierung des Stahlschrottes sind nicht enthalten.

Modul C4 | Entsorgung
Das Modul C4 deklariert die durch die Deponierung (5 % des Produktes) entstehenden Umweltwirkungen.

Modul D | Gutschriften und Lasten außerhalb der Systemgrenze
Im Modul D werden die Substitutionspotentiale von Primärstahl durch ein Recyclingszenario (95 % des Produktes) dargestellt.

## Data sources
- colofer®.pdf
- GaBi Database (all versions)
- GaBi database SP30 2016
