# Chlorodifluormethan (R22)

Dataset: ILCD process, EPD, generic dataset
Geography: DE
Reference year: 2018
Valid until: 2022
Classification: oekobau.dat: Gebäudetechnik / Klimatisierung und Lüftung / Kältemittel
Owner: thinkstep
Compliance: DIN EN 15804
Review: Dependent internal review by thinkstep, IABP-GaBi, IBP-GaBi; Independent external review by GaBi user forum, GaBi bug forum, GaBi user community
Amounts: rows without a unit in brackets have none in this file; such an amount is in the reference unit of its flow, which a separate flow dataset defines
copyright: true

## General comment
Dieser Datensatz wurde nach dem European Standard EN 15804 für Nachhaltiges Bauen modelliert. Ergebnisse werden in Modulen abgebildet, die den strukturierten Ausdruck von Ergebnissen über den gesamten Lebenszyklus zulassen.

## Geography
Der Datensatz bildet die länderspezifische Situation in Deutschland ab. Dabei werden Haupttechnologien, spezifische regionale Charakteristiken und ggf. Importstatistiken berücksichtigt.

## Time period
Jährlicher Durchschnitt

## Technology and included processes
Die Herstellung (Module A1-A3) des Kältemittels erfolgt auf Basis von Flurwasserstoff und Trichlormethan. Die Vorkette der beiden o.g. Grundchemikalien dominiert dabei die Herstellungsphase.

In Modul B1 wurde das Entweichen von 1 kg Kältemittel in die Luft bilanziert. Die Werte von Modul B1 können sowohl für die Nutzungsphase (z.B. Leckagen) als auch für die Entsorgungsphase (Modul C1 Ausbau, Entsorgungsverluste) verwendet werden. Szenarien für Nutzung und Entsorgung müssen auf der Gebäudeebene festgelegt werden (siehe Feld Anwendungshinweis für den Datensatz).

In der Entsorgungsphase (C-Module) wurden eventuelle Lasten durch den Ausbau (in der Regel Absaugung mittels Druckluft in spezielle Behältersysteme), Transporte zum Entsorgungs- bzw. Verwertungsunternehmen, sowie die Lasten für die chemische Analyse (i.d.R. Gaschromatographie) vernachlässigt. Entsorgungsverluste (Emissionen in die Luft) müssen auf Gebäudeebene festgelegt werden (s.o.).

In Modul C4 wurde 100% thermische Behandlung/Beseitigung bilanziert. Eine Wiederverwendung ist gesetzlich untersagt. In Modul D erfolgt eine Gutschrift für substituierte elektrische und thermische Energie.

## Technical purpose
Üblicher Einsatzzweck ist die Verwendung in Bestandsklimaanlagen. Seit dem Jahr 2000 darf das Kühlmittel nicht mehr in Neuanlagen eingesetzt werden. Seit 2015 gilt ein generelles Verwendungsverbot.

## Safety margin
10 %. Produktsystem weitgehend vollständig abgebildet. Gute technologische, zeitliche und geographische Repräsentativität.

## Reference product
- Chlordifluormethan (R22): 1

## Inputs
- Erneuerbare Primärenergie als Energieträger (PERE) [MJ]: A1-A3 16.0039, B1 0, C4 1.12654, D -0.887593
- Erneuerbare Primärenergie zur stofflichen Nutzung (PERM) [MJ]: A1-A3 0, B1 0, C4 0, D 0
- Total erneuerbare Primärenergie (PERT) [MJ]: A1-A3 16.0039, B1 0, C4 1.12654, D -0.887593
- Nicht-erneuerbare Primärenergie als Energieträger (PENRE) [MJ]: A1-A3 91.747, B1 0, C4 14.7855, D -3.11457
- Nicht-erneuerbare Primärenergie zur stofflichen Nutzung (PENRM) [MJ]: A1-A3 0, B1 0, C4 0, D 0
- Total nicht erneuerbare Primärenergie (PENRT) [MJ]: A1-A3 91.747, B1 0, C4 14.7855, D -3.11457
- Einsatz von Sekundärstoffen (SM) [kg]: A1-A3 0, B1 0, C4 0, D 0
- Erneuerbare Sekundärbrennstoffe (RSF) [MJ]: A1-A3 0, B1 0, C4 0, D 0
- Nicht erneuerbare Sekundärbrennstoffe (NRSF) [MJ]: A1-A3 0, B1 0, C4 0, D 0
- Einsatz von Süßwasserressourcen (FW) [m3]: A1-A3 0.0358481, B1 0, C4 0.0086849, D -0.000414061

## Outputs
- Gefährlicher Abfall zur Deponie (HWD) [kg]: A1-A3 9.74575e-8, B1 0, C4 5.8497e-8, D -1.64543e-9
- Entsorgter nicht gefährlicher Abfall (NHWD) [kg]: A1-A3 0.0479043, B1 0, C4 0.735754, D -0.00146314
- Entsorgter radioaktiver Abfall (RWD) [kg]: A1-A3 0.00237228, B1 0, C4 0.00016306, D -0.000107234
- Komponenten für die Wiederverwendung (CRU) [kg]: A1-A3 0, B1 0, C4 0, D 0
- Stoffe zum Recycling (MFR) [kg]: A1-A3 0, B1 0, C4 0, D 0
- Stoffe für die Energierückgewinnung (MER) [kg]: A1-A3 0, B1 0, C4 0, D 0
- Exportierte elektrische Energie (EEE) [MJ]: A1-A3 0, B1 0, C4 0.78017, D 0
- Exportierte thermische Energie (EET) [MJ]: A1-A3 0, B1 0, C4 1.80802, D 0

## Impact indicators
- Globales Erwärmungspotenzial (GWP) [kg CO2 Äquiv.]: A1-A3 4.75856, B1 1810, C4 1.77483, D -0.212757
- Abbaupotenzial der stratosphärischen Ozonschicht (ODP) [kg R11 Äquiv.]: A1-A3 1.8361e-7, B1 0.05, C4 5.44513e-15, D -4.90791e-15
- Versauerungspotential (AP) [kg SO2 Äquiv.]: A1-A3 0.0185125, B1 0, C4 0.00566938, D -0.000179396
- Eutrophierungspotential (EP) [kg Phosphat Äquiv.]: A1-A3 0.00130868, B1 0, C4 0.00105125, D -3.39889e-5
- Bildungspotenzial für troposphärisches Ozon (POCP) [kg Ethen Äquiv.]: A1-A3 0.00115119, B1 0, C4 0.000401133, D -1.82879e-5
- Potenzial für den abiotischen Abbau nicht fossiler Ressourcen (ADPE) [kg Sb Äquiv.]: A1-A3 0.000967001, B1 0, C4 7.93798e-8, D -5.273e-8
- Potenzial für den abiotischen Abbau fossiler Brennstoffe (ADPF) [MJ]: A1-A3 85.7508, B1 0, C4 14.3736, D -2.84386

## Use advice
Der Datensatz bezieht sich auf die Herstellung, Nutzung und Recycling von 1 kg Kältemittel. Der Datensatz kann nicht für die Abschätzung anderer Kältemittel verwendet werden, da Umweltwirkungen, Haltbarkeit und Einsatzzweck sehr unterschiedlich sein können.
Für die Berechnung der potentiellen Umweltwirkungen durch den Einsatz des Kühlmittels auf Gebäudeebene sind die Vorgaben des jeweiligen Zertifizierungssystems zu beachten. Für eine erste Abschätzung können folgende Formeln verwendet werden:

I_tot= I_(Herst.)+ I_(Nutz.)+ I_(Ent.)

mit

I_(Herst.) = I_(A1-A3) × m × a_Geb/a_KM
I_(Nutz.) = (I_(A1-A3) × L × a_Geb ) + (I_B1 ×L × a_Geb )
I_(Ent.)= (I_B1 × m × a_Geb/a_KM ×E ) + (I_C4 × m × a_Geb/a_KM × (1-E)) + (I_D × m × a_Geb/a_KM × (1-E))

Dabei ist:

I Indikatorwert der jeweiligen Lebenszyklusphase
m Masse des Kältemittels [kg]
a_Geb Lebensdauer des Gebäudes [a]
a_KM Lebensdauer des Kältemittels [a]
L Leckage Rate [%/a]
E Entsorgungsverluste [%]

Übliche Werte für die benötigte Masse m des Kühlmittels in kg je kW Nennkälteleistung können Tabelle 46 /UBA/ entnommen werden (siehe Abbildungen).
Näherungswerte für die übliche Lebensdauer a_KM, Leckage Raten L und Entsorgungsverluste E können Tabelle 50 /UBA/ entnommen werden (siehe Abbildungen).
/UBA/: Umwelt Bundesamt (UBA), Klimaschonende Klimatisierung (Heizen und Kühlen) mit natürlichen Kältemitteln Konzepte für Nichtwohngebäude mit Serverräumen/Rechenzentren, 2016

## Data sources
- GaBi Database Edition 2020, SP40
- GaBi database (all versions)
