# noraplan® ed

Dataset: ILCD process, EPD, specific dataset
Geography: RER
Reference year: 2022
Valid until: 2027
Classification: OEKOBAU.DAT: Kunststoffe / Bodenbeläge / Gummi-/Kautschuk-Bodenbeläge
Classification: IBUCategories: 02 Bauprodukte / Bodenbeläge / Bodenbeläge
Method details: Bodenbeläge.pdf
Generated by: nora systems GmbH
Registration number: EPD-NOR-2022008-IBA1-DE
Owner: nora systems GmbH
Compliance: DIN EN 15804+A2; ISO 14025
Review: Accredited third party review by Institut Bauen und Umwelt e. V.
Amounts: rows without a unit in brackets have none in this file; such an amount is in the reference unit of its flow, which a separate flow dataset defines
copyright: true
licenseType: Free of charge for all users and uses
accessRestrictions: None

## General comment
In dieser Umwelt-Produktdeklaration (EDP) werden elastische, elektrostatisch ableitende Kautschuk-Bodenbeläge der nora systems GmbH aus der Produktfamilie noraplan® ed abgebildet. Die Produkte sind erhältlich in verschiedenen Designs und Oberflächenstrukturierungen, basieren jedoch auf der gleichen Kautschukrezeptur.

## Technology and included processes
Die Produktionsstufen sind Einwiegen, Mischen und Ausziehen der unvulkanisierten Rohlinge auf einem Kalander. Die anschließende Vulkanisation erfolgt kontinuierlich auf Fertigungslinien mit dampfbeheizten Trommelpressen unter hohem Druck bei einer Temperatur von ca. 180°C zu 1,22 m breiten Bahnen. Hinter der Vulkanisationsmaschine werden die Bahnen rückseitig geschliffen und entweder als Rollenware aufgewickelt oder für Fliesenware abgelegt und gestanzt. Das Flächengewicht beträgt 2,95 kg/m². Das Qualitätsmanagement der nora Systems GmbH ist nach ISO 9001 zertifiziert.
Technische Daten:
Auszug aus technischen Datenblättern: (abrufbar auf www.nora.com)
Deklarierte Einheit:
Als Referenzgröße wird 1 m² Bodenbelag betrachtet. Die Werte des Moduls A1- A3 beziehen sich auf 1 m² produziertes Produkt.

Es handelt sich um eine Produktdeklaration. Die Herstellung und Beseitigung der Verschnitte bei der Installation werden dem Modul A5 zugeordnet. Die Module A1- A3, A4 und A5 beziehen sich gesamt auf

1 m² installiertes Produkt.

Die zur Installation notwendigen Materialien zur Vorbereitung des Untergrunds und zur Klebung werden nicht berücksichtigt. Für den vollständigen Bodenaufbau können Umweltproduktdeklarationen nach den PCR „Dispersionsklebstoffe und – voranstriche“ sowie „Mineralische Werkmörtel“ herangezogen werden.

## Technical purpose
noraplan® ed Bodenbeläge bieten bei der Fertigung von elektronischen Bauelementen und Baugruppen geräteoptimalen ESD-Schutz und beugen elektrischen Schlägen vor. Zudem sind die noraplan® ed Bodenbeläge weitgehend beständig gegen viele Öle und Schmierfette.

Die Bodenbeläge werden gemäß DIN EN ISO 10874
klassifiziert.
Bodenbeläge für sehr starke Beanspruchung im Objektbereich:

## Reference product
- noraplan ed (): 1

## Inputs
- Erneuerbare Primärenergie als Energieträger (PERE) [MJ]: A1-A3 22.0321, A4 0.109067, A5 2.82439, B2 0.456397, C1 0.325931, C2 0.00541139, C3 0.792681, D -4.53928
- Erneuerbare Primärenergie zur stofflichen Nutzung (PERM) [MJ]: A1-A3 2.24713, A4 0, A5 -1.55329, B2 0, C1 0, C2 0, C3 -0.69384, D 0
- Total erneuerbare Primärenergie (PERT) [MJ]: A1-A3 24.2792, A4 0.109067, A5 1.27109, B2 0.456397, C1 0.325931, C2 0.00541139, C3 0.0988412, D -4.53928
- Nicht-erneuerbare Primärenergie als Energieträger (PENRE) [MJ]: A1-A3 185.156, A4 2.13034, A5 12.4381, B2 8.05377, C1 0.70735, C2 0.094384, C3 49.7643, D -19.9718
- Nicht-erneuerbare Primärenergie zur stofflichen Nutzung (PENRM) [MJ]: A1-A3 49.3978, A4 0, A5 -0.1299, B2 0, C1 0, C2 0, C3 -49.2679, D 0
- Total nicht erneuerbare Primärenergie (PENRT) [MJ]: A1-A3 234.554, A4 2.13034, A5 12.3082, B2 8.05377, C1 0.70735, C2 0.094384, C3 0.496365, D -19.9718
- Einsatz von Sekundärstoffen (SM) [kg]: A1-A3 0.170281, A4 0, A5 0.00851404, B2 0, C1 0, C2 0, C3 0, D 0
- Erneuerbare Sekundärbrennstoffe (RSF) [MJ]: A1-A3 0, A4 0, A5 0, B2 0, C1 0, C2 0, C3 0, D 0
- Nicht erneuerbare Sekundärbrennstoffe (NRSF) [MJ]: A1-A3 0, A4 0, A5 0, B2 0, C1 0, C2 0, C3 0, D 0
- Einsatz von Süßwasserressourcen (FW) [m^3]: A1-A3 0.044673, A4 0.000125321, A5 0.00269272, B2 0.00138901, C1 0.000317357, C2 6.19779e-6, C3 0.00608795, D -0.00443335

## Outputs
- Gefährlicher Abfall zur Deponie (HWD) [kg]: A1-A3 0.00017629, A4 1.01367e-10, A5 9.14551e-6, B2 0.000413867, C1 1.86995e-10, C2 4.9733e-12, C3 8.6744e-11, D -4.4923e-9
- Entsorgter nicht gefährlicher Abfall (NHWD) [kg]: A1-A3 3.56687, A4 0.000320513, A5 0.190145, B2 0.0179808, C1 0.00050159, C2 1.48077e-5, C3 0.0909547, D -0.00939793
- Entsorgter radioaktiver Abfall (RWD) [kg]: A1-A3 0.00221102, A4 3.69621e-6, A5 0.000116478, B2 0.000206277, C1 0.000105332, C2 1.71206e-7, C3 2.6447e-5, D -0.00146049
- Komponenten für die Wiederverwendung (CRU) [kg]: A1-A3 0, A4 0, A5 0, B2 0, C1 0, C2 0, C3 0, D 0
- Stoffe zum Recycling (MFR) [kg]: A1-A3 0, A4 0, A5 0.1, B2 0, C1 0, C2 0, C3 0, D 0
- Stoffe für die Energierückgewinnung (MER) [kg]: A1-A3 0, A4 0, A5 0, B2 0, C1 0, C2 0, C3 0, D 0
- Exportierte elektrische Energie (EEE) [MJ]: A1-A3 0, A4 0, A5 0.287, B2 0, C1 0, C2 0, C3 4.69, D 0
- Exportierte thermische Energie (EET) [MJ]: A1-A3 0, A4 0, A5 0.514, B2 0, C1 0, C2 0, C3 8.41, D 0

## Impact indicators
- Globales Erwärmungspotenzial total (GWP-total) [kg CO_(2)-Äq.]: A1-A3 12.1696, A4 0.162924, A5 0.82158, B2 0.355314, C1 0.0401444, C2 0.00712724, C3 3.03009, D -1.15702
- Globales Erwärmungspotenzial fossil (GWP-fossil) [kg CO_(2)-Äq.]: A1-A3 12.0427, A4 0.161912, A5 0.810272, B2 0.345064, C1 0.0397502, C2 0.00707794, C3 3.02993, D -1.15045
- Globales Erwärmungspotenzial biogen (GWP-biogenic) [kg CO_(2)-Äq.]: A1-A3 0.0369279, A4 0, A5 0.00657555, B2 0.0102006, C1 0.000337935, C2 0, C3 0.000124886, D -0.00577256
- Globales Erwärmungspotenzial luluc (GWP-luluc) [kg CO_(2)-Äq.]: A1-A3 0.0900212, A4 0.00115461, A5 0.00473195, B2 4.89506e-5, C1 5.6285e-5, C2 5.77098e-5, C3 3.40151e-5, D -0.000799187
- Abbau Potential der stratosphärischen Ozonschicht (ODP) [kg CFC11-Äq.]: A1-A3 1.4639e-8, A4 2.99566e-17, A5 7.59438e-10, B2 2.68815e-11, C1 9.51741e-16, C2 1.39391e-18, C3 3.09735e-16, D -1.32115e-14
- Versauerungspotenzial von Boden und Wasser (AP) [mol H^(+)-Äq.]: A1-A3 0.0405014, A4 0.00120348, A5 0.00218152, B2 0.00101264, C1 8.27244e-5, C2 2.12747e-5, C3 0.000295805, D -0.00150761
- Eutrophierungspotenzial Süßwasser (EP-freshwater) [kg PO_(4)-Äq.]: A1-A3 5.67609e-5, A4 4.24069e-7, A5 2.97109e-6, B2 1.09327e-5, C1 1.06644e-7, C2 2.09755e-8, C3 7.77904e-8, D -1.51145e-6
- Eutrophierungspotenzial Salzwasser (EP-marine) [kg N-Äq.]: A1-A3 0.0100191, A4 0.000390644, A5 0.000544705, B2 0.000218632, C1 1.96509e-5, C2 9.63448e-6, C3 7.69723e-5, D -0.000428073
- Eutrophierungspotenzial Land (EP-terrestrial) [mol N-Äq.]: A1-A3 0.114379, A4 0.00432284, A5 0.00624228, B2 0.00193324, C1 0.000206311, C2 0.000107745, C3 0.00138699, D -0.00458529
- Bildungspotential für troposphärisches Ozon (POCP) [kg NMVOC-Äq.]: A1-A3 0.0300714, A4 0.000938041, A5 0.00162202, B2 0.00100378, C1 5.33222e-5, C2 1.91474e-5, C3 0.0002196, D -0.00120159
- Potenzial für den abiotischen Abbau nicht fossiler Ressourcen (ADPE) [kg Sb-Äq.]: A1-A3 0.000192823, A4 1.31158e-8, A5 1.00041e-5, B2 6.29625e-8, C1 1.16965e-8, C2 6.25796e-10, C3 4.74886e-9, D -1.9202e-7
- Potenzial für den abiotischen Abbau fossiler Brennstoffe (ADPF) [MJ]: A1-A3 234.456, A4 2.12317, A5 12.3027, B2 8.05344, C1 0.707184, C2 0.0940415, C3 0.496132, D -19.9693
- Wassernutzung (WDP) [m^(3) Welt-Äq. entzogen]: A1-A3 0.363788, A4 0.00134129, A5 0.0346375, B2 0.0536569, C1 0.00637938, C2 6.5518e-5, C3 0.259133, D -0.088648
- Auftreten von Krankheiten aufgrund von Feinstaubemissionen (PM) [Krankheitsfälle]: A1-A3 4.3608e-7, A4 1.5485e-8, A5 2.35905e-8, B2 1.29409e-8, C1 6.97573e-10, C2 1.24934e-10, C3 2.81458e-9, D -1.29666e-8
- Wirkung durch Exposition des Menschen mit U235 (IR) [kBq U235-Äq.]: A1-A3 0.363538, A4 0.000539611, A5 0.0191349, B2 0.130488, C1 0.0172865, C2 2.50381e-5, C3 0.00412544, D -0.239557
- Toxizitätsvergleichseinheit für Ökosysteme (ETP-fw) [CTUe]: A1-A3 249.539, A4 1.57087, A5 13.0426, B2 2.75591, C1 0.297388, C2 0.0697838, C3 0.264743, D -4.20282
- Toxizitätsvergleichseinheit für Menschen (krebserregend) (HTP-c) [CTUh]: A1-A3 3.60905e-9, A4 3.14889e-11, A5 1.89973e-10, B2 8.92915e-11, C1 8.42315e-12, C2 1.41122e-12, C3 1.84419e-11, D -1.90455e-10
- Toxizitätsvergleichseinheit für Menschen (nicht krebserregend) (HTP-nc) [CTUh]: A1-A3 2.49943e-7, A4 1.79599e-9, A5 1.31034e-8, B2 1.56395e-8, C1 3.17753e-10, C2 8.21681e-11, C3 7.38828e-10, D -7.51745e-9
- Bodenqualitätsindex (SQP) [SQP]: A1-A3 27.2592, A4 0.647105, A5 1.45602, B2 0.212483, C1 0.223144, C2 0.0323229, C3 0.139487, D -3.10678

## Use advice
Gültigkeitsbereich:
Produktfamilie noraplan® ed. Kontinuierlich in Bahnen vulkanisierte, elektrostatisch ableitende Bodenbeläge aus Kautschuk in verschiedenen Farben und Designs. Diese Deklaration ist eine Umweltproduktdeklaration gemäß ISO 14025 und EN 15804 und beschreibt die spezifische Umweltleistung der hier genannten Bauprodukte, produziert in Deutschland am Produktionsstandort Weinheim (Bergstraße).
Systemgrenze:
Typ der EPD: von der Wiege bis zum Fabriktor mit

Optionen.

Die ökobilanzielle Berechnung umfasst folgende

Phasen:

Herstellungsphase A1- A3: Berücksichtigung der Vorkette und der Produktion des Bodenbelags, inkl. Verpackung (Input von Altpapier bei der Papier-/Kartonherstellung).
Transport A4: Annahme für den Transport der Produkte zur Baustelle.
Installationsphase A5: Berücksichtigung der Herstellung und des Transports der Verschnittmenge, Verbrennung des Verschnitts (gewonnene Energie wird in D als vermiedene Umweltlasten deklariert), Entsorgung der Verpackungsmaterialien (Verbrennung von Polyethylenfolie). Die Untergrundvorbehandlung (Grundierung, Spachtelmasse, Klebstoff) bleibt unberücksichtigt. Diese ist abhängig vom Gebäude und der Anwendung und muss im Einzelfall spezifiziert werden.
Nutzungsphase B2: Szenario für die Reinigung entsprechend den Herstellerempfehlungen (siehe 4.).
End-of-Life-Phase C1, C2, C3: Szenario für die Verbrennung des Bodenbelags inkl. Ausbau aus dem Gebäude und Transport zum Verbrennungsort (gewonnene Energie wird in D als vermiedene Umweltlasten deklariert).
Nutzen und Lasten für das nächste System D: Gewinnung von elektrischer und thermischer Energie aus der thermischen Verwertung des Produkts, des Installationsverschnitts und der VerpackungEinflüsse von Abfällen werden in den Modulen berücksichtigt, in denen diese anfallen.

## Data sources
- GaBi Database (all versions)
- GaBi Database Edition 2021, CUP 2021.01
