# Zementgebundene Spanplatte (generisch)

Dataset: ILCD process, EPD, generic dataset
Geography: DE
Reference year: 2021
Valid until: 2022
Classification: oekobau.dat: Holz / Holzwerkstoffe / Spanplatten
Owner: Sphera Solutions GmbH
Compliance: EN 15804+A2
Review: Dependent internal review by Sphera Solutions GmbH; Independent external review by GaBi user forum
Amounts: rows without a unit in brackets have none in this file; such an amount is in the reference unit of its flow, which a separate flow dataset defines
copyright: true
licenseType: Free of charge for all users and uses
accessRestrictions: The license conditions as stated on https://www.oekobaudat.de/ apply.
accessRestrictions: Es gelten die Lizenzbedingungen wie sie auf https://www.oekobaudat.de/ genannt sind.

## General comment
Dieser Datensatz wurde nach dem European Standard EN 15804+A2 für Nachhaltiges Bauen modelliert. Ergebnisse werden in Modulen abgebildet, die den strukturierten Ausdruck von Ergebnissen über den gesamten Lebenszyklus zulassen.

## Geography
Der Datensatz bildet die länderspezifische Situation in Deutschland ab. Dabei werden Haupttechnologien, spezifische regionale Charakteristiken und ggf. Importstatistiken berücksichtigt.

## Time period
Jährlicher Durchschnitt

## Technology and included processes
Modelliert wurde eine unbeschichtete zementgebundene Spanplatte ohne Zugabe von Leichtzuschlägen wie z.B. Perlite. Hauptbestandteile sind Zement (ca. 75 M.%) und Holz (ca. 18 M.%). Die Rohstoffe werden mit Wasser und geringen Mengen Zusatzmitteln gemischt, gepresst und anschließend unter Zugabe von Dampf gehärtet und konfektioniert oder in Form gebracht. Nach einer Reifezeit von 28 Tagen erfolgt eine technische Trocknung. Der Zementeinsatz sowie die thermische Energie (hier aus Erdgas) dominieren dabei die Ökobilanz.

In Modul C1 wird ein manueller Rückbau (lastenfrei) angenommen. Sammelverluste werden vernachlässigt.
Der Transport in Modul C2 zur Verwertungsanlage erfolgt mit einem LKW (50km).
In Modul C3 wird die Zerkleinerung und thermische Behandlung (Verbrennung) des Materials berücksichtigt. Es wird angenommen, dass das Material das Ende der Abfalleigenschaft direkt nach der Zerkleinerung erreicht. Das im Material durch Photosynthese aufgenommene und gespeicherte CO2 (aus Modul A1) wird in C3 ausgebucht (CO2 Neutralität innerhalb des Produktsystems gemäß EN 16485: Round and sawn timber - Environmental Product Declarations - Product category rules for wood and wood-based products for use in construction, 2014),
Modul D enthält die Lasten durch den Betrieb der Verwertungsanlage (exkl. biogenes CO2, siehe oben) sowie Gutschriften für die Substitution von Strom (deutscher Strommix) und thermischer Energie (aus Erdgas). Bei der Berechnung der Verbrennungsemissionen und Gutschriften wird der spezifische Heizwert des jeweiligen Materials sowie die Materialzusammensetzung berücksichtigt.

## Technical purpose
Bekleidungsmaterial für den Innenausbau insbesondere in Bereichen mit hohen Brand- oder Schallschutzanforderungen. Kann auch als Trockenestrichelement verwendet werden.

## Safety margin
20 %. Produktsystem bis auf wenige Prozesse/Flüsse abgebildet. Technologische, zeitliche und geographische Repräsentativität teilweise gegeben.

## Reference product
- Zementgebundene Spanplatte (generisch): 1

## Inputs
- Erneuerbare Primärenergie als Energieträger (PERE) [MJ]: A1-A3 3493.15, C2 2.6234, C3 2732.45, D -349.92
- Erneuerbare Primärenergie zur stofflichen Nutzung (PERM) [MJ]: A1-A3 2250, C2 0, C3 -2250, D 0
- Total erneuerbare Primärenergie (PERT) [MJ]: A1-A3 5743.15, C2 2.6234, C3 482.447, D -349.92
- Nicht-erneuerbare Primärenergie als Energieträger (PENRE) [MJ]: A1-A3 19714.3, C2 45.2012, C3 92.8099, D -1048.39
- Nicht-erneuerbare Primärenergie zur stofflichen Nutzung (PENRM) [MJ]: A1-A3 0, C2 0, C3 0, D 0
- Total nicht-erneuerbare Primärenergie (PENRT) [MJ]: A1-A3 19714.3, C2 45.2012, C3 92.8099, D -1048.39
- Einsatz von Sekundärstoffen (SM) [kg]: A1-A3 0, C2 0, C3 0, D 0
- Erneuerbare Sekundärbrennstoffe (SF) [MJ]: A1-A3 0, C2 0, C3 0, D 0
- Nicht erneuerbare Sekundärbrennstoffe (NRSF) [MJ]: A1-A3 0, C2 0, C3 0, D 0
- Nettoeinsatz von Süßwasserressourcen (FW) [m3]: A1-A3 1.97799, C2 0.00233155, C3 0.674492, D -0.130203

## Outputs
- Gefährlicher Abfall zur Deponie (HWD) [kg]: A1-A3 5.626e-6, C2 1.88926e-9, C3 2.4417e-8, D -3.63113e-7
- Entsorgter nicht gefährlicher Abfall (NHWD) [kg]: A1-A3 222.961, C2 0.00729651, C3 1.91042, D -0.550073
- Entsorgter radioaktiver Abfall (RWD) [kg]: A1-A3 0.367064, C2 4.33765e-5, C3 0.00398503, D -0.0376341
- Komponenten für die Wiederverwendung (CRU) [kg]: A1-A3 0, C2 0, C3 0, D 0
- Stoffe zum Recycling (MFR) [kg]: A1-A3 0, C2 0, C3 0, D 0
- Stoffe für die Energierückgewinnung (MER) [kg]: A1-A3 0, C2 0, C3 0, D 0
- Exportierte elektrische Energie (EEE) [MJ]: A1-A3 0, C2 0, C3 280.292, D 0
- Exportierte thermische Energie (EET) [MJ]: A1-A3 0, C2 0, C3 657.129, D 0

## Impact indicators
- Globales Erwärmungspotenzial - total (GWP-total) [kg CO2 eq.]: A1-A3 1742.91, C2 3.43339, C3 233.916, D -67.3687
- Globales Erwärmungspotenzial - fossil (GWP-fossil) [kg CO2 eq.]: A1-A3 1963.8, C2 3.41008, C3 6.85014, D -66.56
- Globales Erwärmungspotenzial - biogen (GWP-biogenic) [kg CO2 eq.]: A1-A3 -221.965, C2 0.00141259, C3 227.056, D -0.712058
- Globales Erwärmungspotenzial - luluc (GWP-luluc) [kg CO2 eq.]: A1-A3 1.07194, C2 0.0219005, C3 0.0103939, D -0.0966907
- Abbaupotenzial der stratosphärischen Ozonschicht (ODP) [kg CFC-11 eq.]: A1-A3 1.4111e-11, C2 8.7255e-16, C3 1.33795e-13, D -1.52753e-12
- Versauerungspotenzial, kumulierte Überschreitung (AP) [Mole of H+ eq.]: A1-A3 2.02718, C2 0.00966836, C3 0.053332, D -0.0679903
- Eutrophierungspotenzial - Süßwasser (EP-freshwater) [kg P eq.]: A1-A3 0.00167128, C2 7.01322e-6, C3 1.73344e-5, D -0.000160886
- Eutrophierungspotenzial - Salzwasser (EP-marine) [kg N eq.]: A1-A3 0.72064, C2 0.00445401, C3 0.0150567, D -0.0250502
- Eutrophierungspotenzial - Land (EP-terrestrial) [Mole of N eq.]: A1-A3 7.8748, C2 0.0498322, C3 0.251222, D -0.26696
- Bildungspotenzial für troposphärisches Ozon (POCP) [kg NMVOC eq.]: A1-A3 2.01043, C2 0.00868542, C3 0.0393767, D -0.0656596
- Potenzial für die Verknappung abiotischer Ressourcen nicht fossile Ressourcen (ADPE) [kg Sb eq.]: A1-A3 0.000231961, C2 2.96629e-7, C3 1.75074e-6, D -2.06966e-5
- Potenzial für die Verknappung abiotischer Ressourcen fossile Brennstoffe (ADPF) [MJ]: A1-A3 19712.6, C2 45.1993, C3 92.7847, D -1048.24
- Wasser-Entzugspotenzial (Benutzer) (WDP) [m³ world equiv.]: A1-A3 16.248, C2 0.0132561, C3 28.3618, D -0.790624

## Use advice
Dieser Datensatz bezieht sich auf die Herstellung von 1 m³ unbeschichteter, zementgebundener Spanplatte. Die Rohdichte beträgt 1200 kg/m³. Die Wärmeleitfähigkeit beträgt 0,35 - 0,4 W/mK. Der Datensatz kann näherungsweise für die Abschätzung von unbeschichteten zementgebundenen Spanplatten mit einer Dichte von 1100 - 1300 kg/m³ verwendet werden.

Der Datensatz repräsentiert ein Cradle to Gate Inventar. Er kann verwendet werden, um die Lieferkette des jeweiligen Produktes in einer repräsentativen Weise zu charakterisieren. Die Kombination mit einzelnen Einheitenprozessen und diesem Produkt ermöglicht die Erstellung von anwenderspezifischen (Produkt-) LCAs

## Data sources
- GaBi databases
- Documentation of data quality management
- GaBi Database Edition 2021, CUP2021.01
- GaBi database (all versions)
