# FOAMGLAS® T4+

Dataset: ILCD process, EPD, specific dataset
Geography: RER
Reference year: 2021
Valid until: 2026
Classification: OEKOBAU.DAT: Dämmstoffe / Schaumglas / Platten
Classification: IBUCategories: 02 Building products / Thermal insulation products / Mineral insulating materials
Method details: Mineral insulating materials.pdf
Generated by: Sphera Solutions GmbH
Registration number: EPD-PCE-20200299-IBB1-EN
Owner: Pittsburgh Corning Europe NV
Compliance: DIN EN 15804+A2; ISO 14025
Review: Accredited third party review by Institut Bauen und Umwelt e. V.
Amounts: rows without a unit in brackets have none in this file; such an amount is in the reference unit of its flow, which a separate flow dataset defines
copyright: true
licenseType: Free of charge for all users and uses
accessRestrictions: None

## General comment
Schaumglasplatten mittlerer Rohdichte

## Technology and included processes
Technische Daten:
Wärmeleitfähigkeit 0,041 W/m²K
Deklarierte Einheit:
1 kg FOAMGLAS® T4+

## Technical purpose
Dämmstoff für die gesamte Gebäudehülle. Das Hauptanwendungsgebiet ist die Anwendung als Kompaktdach für langlebige Flachdachkonstruktionen.

## Scenarios
- S1: Szenario 1
- S2: Szenario 2
- S3: Szenario 3

## Reference product
- FOAMGLAS® T4+ (1 kg FOAMGLAS® T4+): 1

## Inputs
- Erneuerbare Primärenergie als Energieträger (PERE) [MJ]: A1-A3 12.8, A4 0.0211, A5 0.728, C1 0.000461, C2 0.00167, C3 (S2) 0, C3 (S3) 0.0187, C4 0.0261, D (S0) -0.168, D (S2) -12.8, D (S3) -0.118
- Erneuerbare Primärenergie zur stofflichen Nutzung (PERM) [MJ]: A1-A3 0.72, A4 0, A5 -0.72, C1 0, C2 0, C3 (S2) 0, C3 (S3) 0, C4 0, D (S0) 0, D (S2) -0.72, D (S3) 0
- Total erneuerbare Primärenergie (PERT) [MJ]: A1-A3 13.52, A4 0.0211, A5 0.008, C1 0.000461, C2 0.00167, C3 (S2) 0, C3 (S3) 0.0187, C4 0.0261, D (S0) -0.168, D (S2) -13.52, D (S3) -0.118
- Nicht-erneuerbare Primärenergie als Energieträger (PENRE) [MJ]: A1-A3 21.6, A4 0.375, A5 0.677, C1 0.00821, C2 0.0298, C3 (S2) 0, C3 (S3) 0.0421, C4 0.199, D (S0) -0.81, D (S2) -21.6, D (S3) -2.91
- Nicht-erneuerbare Primärenergie zur stofflichen Nutzung (PENRM) [MJ]: A1-A3 0.64, A4 0, A5 -0.64, C1 0, C2 0, C3 (S2) 0, C3 (S3) 0, C4 0, D (S0) 0, D (S2) -0.64, D (S3) 0
- Total nicht erneuerbare Primärenergie (PENRT) [MJ]: A1-A3 22.24, A4 0.375, A5 0.037, C1 0.00821, C2 0.0298, C3 (S2) 0, C3 (S3) 0.0421, C4 0.199, D (S0) -0.81, D (S2) -22.24, D (S3) -2.91
- Einsatz von Sekundärstoffen (SM) [kg]: A1-A3 0.454, A4 0, A5 0, C1 0, C2 0, C3 (S2) 0, C3 (S3) 0, C4 0, D (S0) 0, D (S2) 0, D (S3) 0
- Erneuerbare Sekundärbrennstoffe (RSF) [MJ]: A1-A3 0, A4 0, A5 0, C1 0, C2 0, C3 (S2) 0, C3 (S3) 0, C4 0, D (S0) 0, D (S2) 0, D (S3) 0
- Nicht erneuerbare Sekundärbrennstoffe (NRSF) [MJ]: A1-A3 0, A4 0, A5 0, C1 0, C2 0, C3 (S2) 0, C3 (S3) 0, C4 0, D (S0) 0, D (S2) 0, D (S3) 0
- Einsatz von Süßwasserressourcen (FW) [m^3]: A1-A3 0.0313, A4 2.44e-5, A5 0.000299, C1 5.34e-7, C2 1.94e-6, C3 (S2) 0, C3 (S3) 2.16e-5, C4 5.02e-5, D (S0) -0.000195, D (S2) -0.0313, D (S3) -0.000139

## Outputs
- Gefährlicher Abfall zur Deponie (HWD) [kg]: A1-A3 6.03e-8, A4 1.75e-8, A5 8.76e-11, C1 3.82e-10, C2 1.39e-9, C3 (S2) 0, C3 (S3) 1.74e-11, C4 3.03e-9, D (S0) -3.22e-10, D (S2) -6.03e-8, D (S3) -2.45e-9
- Entsorgter nicht gefährlicher Abfall (NHWD) [kg]: A1-A3 0.0409, A4 5.74e-5, A5 0.00508, C1 1.26e-6, C2 4.56e-6, C3 (S2) 0, C3 (S3) 2.99e-5, C4 1, D (S0) -0.000364, D (S2) -0.0409, D (S3) -0.000772
- Entsorgter radioaktiver Abfall (RWD) [kg]: A1-A3 9.95e-5, A4 4.64e-7, A5 1.73e-6, C1 1.02e-8, C2 3.68e-8, C3 (S2) 0, C3 (S3) 6.39e-6, C4 2.26e-6, D (S0) -5.73e-5, D (S2) -9.95e-5, D (S3) -3.9e-5
- Komponenten für die Wiederverwendung (CRU) [kg]: A1-A3 0, A4 0, A5 0, C1 0, C2 0, C3 (S2) 1, C3 (S3) 0, C4 0, D (S0) 0, D (S2) 0, D (S3) 0
- Stoffe zum Recycling (MFR) [kg]: A1-A3 0, A4 0, A5 0, C1 0, C2 0, C3 (S2) 0, C3 (S3) 0.546, C4 0, D (S0) 0, D (S2) 0, D (S3) 0
- Stoffe für die Energierückgewinnung (MER) [kg]: A1-A3 0, A4 0, A5 0.0618, C1 0, C2 0, C3 (S2) 0, C3 (S3) 0, C4 0, D (S0) 0, D (S2) 0, D (S3) 0
- Exportierte elektrische Energie (EEE) [MJ]: A1-A3 0, A4 0, A5 0.192, C1 0, C2 0, C3 (S2) 0, C3 (S3) 0, C4 0, D (S0) 0, D (S2) 0, D (S3) 0
- Exportierte thermische Energie (EET) [MJ]: A1-A3 0, A4 0, A5 0.383, C1 0, C2 0, C3 (S2) 0, C3 (S3) 0, C4 0, D (S0) 0, D (S2) 0, D (S3) 0

## Impact indicators
- Globales Erwärmungspotenzial total (GWP-total) [kg CO_(2)-Äq.]: A1-A3 1.43, A4 0.0296, A5 0.1211, C1 0.000616, C2 0.00235, C3 (S2) 0, C3 (S3) 0.00241, C4 0.0153, D (S0) -0.0479, D (S2) -1.43, D (S3) -0.1773
- Globales Erwärmungspotenzial fossil (GWP-fossil) [kg CO_(2)-Äq.]: A1-A3 1.49, A4 0.028, A5 0.0423, C1 0.00064, C2 0.00223, C3 (S2) 0, C3 (S3) 0.00239, C4 0.0152, D (S0) -0.0478, D (S2) -1.49, D (S3) -0.177
- Globales Erwärmungspotenzial biogen (GWP-biogenic) [kg CO_(2)-Äq.]: A1-A3 -0.0562, A4 0.00133, A5 0.0788, C1 1.93e-6, C2 0.000106, C3 (S2) 0, C3 (S3) 2.11e-5, C4 4.86e-5, D (S0) -0.00011, D (S2) 0.0562, D (S3) -0.000279
- Globales Erwärmungspotenzial luluc (GWP-luluc) [kg CO_(2)-Äq.]: A1-A3 0.0011, A4 0.000228, A5 3.16e-6, C1 4.99e-6, C2 1.81e-5, C3 (S2) 0, C3 (S3) 3.47e-6, C4 4.37e-5, D (S0) -3.18e-5, D (S2) -0.0011, D (S3) -4.25e-5
- Abbau Potential der stratosphärischen Ozonschicht (ODP) [kg CFC11-Äq.]: A1-A3 8.21e-14, A4 3.38e-18, A5 3.1e-17, C1 7.41e-20, C2 2.68e-19, C3 (S2) 0, C3 (S3) 5.27e-17, C4 5.62e-17, D (S0) -4.73e-16, D (S2) -8.21e-14, D (S3) -3.23e-16
- Versauerungspotenzial von Boden und Wasser (AP) [mol H^(+)-Äq.]: A1-A3 0.00508, A4 2.95e-5, A5 2.02e-5, C1 3.09e-6, C2 7.17e-6, C3 (S2) 0, C3 (S3) 5.28e-6, C4 0.000109, D (S0) -6.51e-5, D (S2) -0.00508, D (S3) -0.000164
- Eutrophierungspotenzial Süßwasser (EP-freshwater) [kg PO_(4)-Äq.]: A1-A3 1.99e-5, A4 8.56e-8, A5 4.92e-9, C1 1.87e-9, C2 6.79e-9, C3 (S2) 0, C3 (S3) 6.39e-9, C4 2.6e-8, D (S0) -5.86e-8, D (S2) -1.99e-5, D (S3) -6.49e-8
- Eutrophierungspotenzial Salzwasser (EP-marine) [kg N-Äq.]: A1-A3 0.00167, A4 8.75e-6, A5 5.94e-6, C1 1.44e-6, C2 3.23e-6, C3 (S2) 0, C3 (S3) 1.17e-6, C4 2.8e-5, D (S0) -1.7e-5, D (S2) -0.00167, D (S3) -5.89e-5
- Eutrophierungspotenzial Land (EP-terrestrial) [mol N-Äq.]: A1-A3 0.0185, A4 0.000105, A5 9.34e-5, C1 1.59e-5, C2 3.61e-5, C3 (S2) 0, C3 (S3) 1.23e-5, C4 0.000308, D (S0) -0.000183, D (S2) -0.0185, D (S3) -0.000648
- Bildungspotential für troposphärisches Ozon (POCP) [kg NMVOC-Äq.]: A1-A3 0.00393, A4 2.4e-5, A5 1.62e-5, C1 4.03e-6, C2 6.33e-6, C3 (S2) 0, C3 (S3) 3.22e-6, C4 8.48e-5, D (S0) -4.91e-5, D (S2) -0.00393, D (S3) -0.000178
- Potenzial für den abiotischen Abbau nicht fossiler Ressourcen (ADPE) [kg Sb-Äq.]: A1-A3 2.18e-7, A4 2.02e-9, A5 4.48e-10, C1 4.42e-11, C2 1.6e-10, C3 (S2) 0, C3 (S3) 6.93e-10, C4 1.36e-9, D (S0) -7.57e-9, D (S2) -2.18e-7, D (S3) -1.26e-8
- Potenzial für den abiotischen Abbau fossiler Brennstoffe (ADPF) [MJ]: A1-A3 22.2, A4 0.375, A5 0.0372, C1 0.0082, C2 0.0297, C3 (S2) 0, C3 (S3) 0.0421, C4 0.199, D (S0) -0.81, D (S2) -22.2, D (S3) -2.91
- Wassernutzung (WDP) [m^(3) world-Äq. deprived]: A1-A3 0.125, A4 0.000252, A5 0.0127, C1 5.51e-6, C2 2e-5, C3 (S2) 0, C3 (S3) 0.000522, C4 0.00159, D (S0) -0.0047, D (S2) -0.125, D (S3) -0.00328
- Auftreten von Krankheiten aufgrund von Feinstaubemissionen (PM) [Disease incidence]: A1-A3 5.46e-8, A4 1.73e-10, A5 1.59e-10, C1 3.47e-11, C2 3.92e-11, C3 (S2) 0, C3 (S3) 4.43e-11, C4 1.35e-9, D (S0) -5.54e-10, D (S2) -5.46e-8, D (S3) -8.8e-9
- Wirkung durch Exposition des Menschen mit U235 (IR) [kBq U235-Äq.]: A1-A3 0.014, A4 6.71e-5, A5 0.000225, C1 1.47e-6, C2 5.33e-6, C3 (S2) 0, C3 (S3) 0.00105, C4 0.000232, D (S0) -0.00941, D (S2) -0.014, D (S3) -0.00636
- Toxizitätsvergleichseinheit für Ökosysteme (ETP-fw) [CTUe]: A1-A3 43.3, A4 0.265, A5 0.0152, C1 0.0058, C2 0.021, C3 (S2) 0, C3 (S3) 0.018, C4 0.114, D (S0) -0.166, D (S2) -43.3, D (S3) -0.16
- Toxizitätsvergleichseinheit für Menschen (krebserregend) (HTP-c) [CTUh]: A1-A3 6.93e-10, A4 5.55e-12, A5 1.13e-12, C1 1.21e-13, C2 4.4e-13, C3 (S2) 0, C3 (S3) 4.97e-13, C4 1.68e-11, D (S0) -7.47e-12, D (S2) -6.93e-10, D (S3) -2.18e-11
- Toxizitätsvergleichseinheit für Menschen (nicht krebserregend) (HTP-nc) [CTUh]: A1-A3 2.78e-8, A4 2.87e-10, A5 8.11e-11, C1 7.28e-12, C2 2.58e-11, C3 (S2) 0, C3 (S3) 1.83e-11, C4 1.86e-9, D (S0) -2.78e-10, D (S2) -2.78e-8, D (S3) -8.34e-10
- Bodenqualitätsindex (SQP) [SQP]: A1-A3 25, A4 0.131, A5 0.0107, C1 0.00288, C2 0.0104, C3 (S2) 0, C3 (S3) 0.0134, C4 0.0415, D (S0) -0.121, D (S2) -25, D (S3) -0.0943

## Use advice
Gültigkeitsbereich:
Dieses Dokument bezieht sich auf die Herstellung von
1 kg unbeschichtetes Schaumglas „FOAMGLAS®
T4+“ hergestellt in Belgien am Produktionsstandort
Tessenderlo der Firma Pittsburgh Corning Europe NV sowie in Klasterec Tschechische Republik.
Systemgrenze:
Typ der EPD: Wiege-bis-Werkstor
Die berechnete Ökobilanz adressiert das Lebenszyklusstadium
der Produktherstellung. Aufwendungen für das Umschmelzen von End-of-Life
Schrotten sowie Gutschriften für die im System
anfallende Nettoschrottmenge und Gutschriften aus
der thermischen Verwertung von Reststoffen sind dem
Modul D zugeordnet.

## Data sources
- GaBi Database (all versions)
- GaBi database SP40 2020
