# Trinkwasserrohr PE-X-Alu; PE-X-Alu

Dataset: ILCD process, EPD, generic dataset
Geography: DE
Reference year: 2021
Valid until: 2022
Classification: oekobau.dat: Kunststoffe / Rohre / Trinkwasserrohre
Owner: Sphera Solutions GmbH
Compliance: EN 15804+A2
Review: Dependent internal review by Sphera Solutions GmbH; Independent external review by GaBi user forum
Amounts: rows without a unit in brackets have none in this file; such an amount is in the reference unit of its flow, which a separate flow dataset defines
copyright: true
licenseType: Free of charge for all users and uses
accessRestrictions: The license conditions as stated on https://www.oekobaudat.de/ apply.
accessRestrictions: Es gelten die Lizenzbedingungen wie sie auf https://www.oekobaudat.de/ genannt sind.

## General comment
Dieser Datensatz wurde nach dem European Standard EN 15804+A2 für Nachhaltiges Bauen modelliert. Ergebnisse werden in Modulen abgebildet, die den strukturierten Ausdruck von Ergebnissen über den gesamten Lebenszyklus zulassen.

## Geography
Der Datensatz bildet die länderspezifische Situation in Deutschland ab. Dabei werden Haupttechnologien, spezifische regionale Charakteristiken und ggf. Importstatistiken berücksichtigt.

## Time period
Jährlicher Durchschnitt

## Technology and included processes
Die Lebenszyklusanalyse der Trinkwasserrohre aus PE-X-Alu umfasst die Lebenswegabschnitte Herstellung (Module A1-A3) und Entsorgung (Module C1-D), d. h. insbesondere einen Compoundierungsprozess mit einer anschließenden Extrudierung sowie die Herstellung der Aluminiumschicht. Die Ausvernetzung im Wasserbad wurde nicht berücksichtigt. Das fertige Produkt setzt sich jeweils zu 50% aus PE-X und Aluminium zusammen. Klebeschichten wurden nicht berücksichtigt. Transporte vom Werk zum Einbauort sind nicht berücksichtigt und müssen bei Systembetrachtungen eingerechnet werden.

In Modul C1 wird ein manueller Rückbau (lastenfrei) angenommen. Sammelverluste werden vernachlässigt.
Der Transport in Modul C2 zur Verwertungsanlage erfolgt mit einem LKW (50km).

Behandlung Metallkomponenten:
Es wird angenommen, dass alle Metalle das Ende der Abfalleigenschaft direkt nach dem Ausbau erreichen. Das heißt die Lasten für die Aufbereitung und die Gutschriften für die Substitution von Primärmaterial werden in Modul D ausgewiesen.
In Modul D sind die Lasten für die Sortierung, Umschmelzen, Schlackebehandlung, Deponierung von Reststoffen, Behandlung von Filterstäuben und Krätzebehandlung enthalten. Die Gutschriften werden für die Nettoschrottmenge (zurückgebaute Menge abzüglich ggfs. enthaltenes Sekundärmaterial, abzüglich Aufbereitungsverluste) für den durchschnittlich vorhandenen Materialmix (aus verschiedenen Legierungen) vergeben.

Kunststoffkomponten:
In Modul C3 wird die Zerkleinerung und thermische Behandlung (Verbrennung) des Materials berücksichtigt. Bei der Berechnung der Verbrennungsemissionen und Gutschriften wird der spezifische Heizwert des jeweiligen Materials sowie die Materialzusammensetzung berücksichtigt.
In Modul D erfolgen Gutschriften für die Substitution von Strom (deutscher Strommix) und thermischer Energie (aus Erdgas).

## Technical purpose
Dieses Produkt kann im Baubereich verwendet werden.

## Safety margin
20 %. Produktsystem bis auf wenige Prozesse/Flüsse abgebildet. Technologische, zeitliche und geographische Repräsentativität teilweise gegeben.

## Reference product
- Trinkwasserrohr PE-X-Alu: 1

## Inputs
- Erneuerbare Primärenergie als Energieträger (PERE) [MJ]: A1-A3 39.6459, C1 0, C2 0.00218616, C3 0.0678385, D -18.0315
- Erneuerbare Primärenergie zur stofflichen Nutzung (PERM) [MJ]: A1-A3 0, C1 0, C2 0, C3 0, D 0
- Total erneuerbare Primärenergie (PERT) [MJ]: A1-A3 39.6459, C1 0, C2 0.00218616, C3 0.0678385, D -18.0315
- Nicht-erneuerbare Primärenergie als Energieträger (PENRE) [MJ]: A1-A3 112.26, C1 0, C2 0.0376677, C3 21.3076, D -54.3699
- Nicht-erneuerbare Primärenergie zur stofflichen Nutzung (PENRM) [MJ]: A1-A3 17.5, C1 0, C2 0, C3 -17.5, D 0
- Total nicht-erneuerbare Primärenergie (PENRT) [MJ]: A1-A3 129.76, C1 0, C2 0.0376677, C3 3.80758, D -54.3699
- Einsatz von Sekundärstoffen (SM) [kg]: A1-A3 0, C1 0, C2 0, C3 0, D 0
- Erneuerbare Sekundärbrennstoffe (SF) [MJ]: A1-A3 0, C1 0, C2 0, C3 0, D 0
- Nicht erneuerbare Sekundärbrennstoffe (NRSF) [MJ]: A1-A3 0, C1 0, C2 0, C3 0, D 0
- Nettoeinsatz von Süßwasserressourcen (FW) [m3]: A1-A3 0.0827979, C1 0, C2 1.94295e-6, C3 0.00405081, D -0.0318761

## Outputs
- Gefährlicher Abfall zur Deponie (HWD) [kg]: A1-A3 1.90459e-8, C1 0, C2 1.57439e-12, C3 6.47371e-11, D 3.37853e-10
- Entsorgter nicht gefährlicher Abfall (NHWD) [kg]: A1-A3 1.54371, C1 0, C2 6.08042e-6, C3 0.00761695, D -0.773183
- Entsorgter radioaktiver Abfall (RWD) [kg]: A1-A3 0.00542524, C1 0, C2 3.61471e-8, C3 8.32919e-6, D -0.0038283
- Komponenten für die Wiederverwendung (CRU) [kg]: A1-A3 0, C1 0, C2 0, C3 0, D 0
- Stoffe zum Recycling (MFR) [kg]: A1-A3 0, C1 0.5, C2 0, C3 0, D 0
- Stoffe für die Energierückgewinnung (MER) [kg]: A1-A3 0, C1 0, C2 0, C3 0.5, D 0
- Exportierte elektrische Energie (EEE) [MJ]: A1-A3 0, C1 0, C2 0, C3 2.8518, D 0
- Exportierte thermische Energie (EET) [MJ]: A1-A3 0, C1 0, C2 0, C3 6.56813, D 0

## Impact indicators
- Globales Erwärmungspotenzial - total (GWP-total) [kg CO2 eq.]: A1-A3 7.75184, C1 0, C2 0.00286116, C3 1.88481, D -3.98008
- Globales Erwärmungspotenzial - fossil (GWP-fossil) [kg CO2 eq.]: A1-A3 7.70987, C1 0, C2 0.00284173, C3 1.88469, D -3.96308
- Globales Erwärmungspotenzial - biogen (GWP-biogenic) [kg CO2 eq.]: A1-A3 0.0372042, C1 0, C2 1.17716e-6, C3 0.000101026, D -0.0153929
- Globales Erwärmungspotenzial - luluc (GWP-luluc) [kg CO2 eq.]: A1-A3 0.00476691, C1 0, C2 1.82504e-5, C3 2.25803e-5, D -0.00160048
- Abbaupotenzial der stratosphärischen Ozonschicht (ODP) [kg CFC-11 eq.]: A1-A3 6.09827e-14, C1 0, C2 7.27125e-19, C3 2.78659e-16, D 1.08947e-12
- Versauerungspotenzial, kumulierte Überschreitung (AP) [Mole of H+ eq.]: A1-A3 0.0292566, C1 0, C2 8.05696e-6, C3 0.000290842, D -0.0128938
- Eutrophierungspotenzial - Süßwasser (EP-freshwater) [kg P eq.]: A1-A3 1.99465e-5, C1 0, C2 5.84435e-9, C3 3.80234e-8, D -2.6471e-6
- Eutrophierungspotenzial - Salzwasser (EP-marine) [kg N eq.]: A1-A3 0.00468025, C1 0, C2 3.71167e-6, C3 4.68182e-5, D -0.00214524
- Eutrophierungspotenzial - Land (EP-terrestrial) [Mole of N eq.]: A1-A3 0.0501508, C1 0, C2 4.15269e-5, C3 0.0013541, D -0.0233079
- Bildungspotenzial für troposphärisches Ozon (POCP) [kg NMVOC eq.]: A1-A3 0.0157801, C1 0, C2 7.23785e-6, C3 0.000126879, D -0.00636842
- Potenzial für die Verknappung abiotischer Ressourcen nicht fossile Ressourcen (ADPE) [kg Sb eq.]: A1-A3 1.20812e-6, C1 0, C2 2.47191e-10, C3 3.96246e-9, D -4.77945e-7
- Potenzial für die Verknappung abiotischer Ressourcen fossile Brennstoffe (ADPF) [MJ]: A1-A3 133.162, C1 0, C2 0.0376661, C3 0.30747, D -54.3196
- Wasser-Entzugspotenzial (Benutzer) (WDP) [m³ world equiv.]: A1-A3 0.826344, C1 0, C2 1.10468e-5, C3 0.172629, D -0.211054

## Use advice
Der Datensatz repräsentiert ein Cradle to Gate Inventar. Er kann verwendet werden, um die Lieferkette des jeweiligen Produktes in einer repräsentativen Weise zu charakterisieren. Die Kombination mit einzelnen Einheitenprozessen und diesem Produkt ermöglicht die Erstellung von anwenderspezifischen (Produkt-) LCAs.

## Data sources
- Extrusionslinien zur Herstellung von Alu-Verbundrohre, 2008
- LRS 2008
- POLYSAN 2008
- Documentation of data quality management
- GaBi Database Edition 2021, CUP2021.01
- GaBi database (all versions)
