# Wedi Fundo

Dataset: ILCD process, EPD, specific dataset
Geography: DE
Reference year: 2019
Valid until: 2024
Classification: OEKOBAU.DAT: Gebäudetechnik / Sanitär / Dusch- und Badewannen
Classification: IBUCategories: 02 Bauprodukte / Wärmedämmungsprodukte / Dämmstoffe aus Schaumkunststoffen
Method details: Dämmstoffe aus Schaumkunststoffen.pdf
Generated by: WESSLING GmbH
Registration number: EPD-WDI-20190017-IAA1-DE
Owner: wedi GmbH
Compliance: DIN EN 15804; ISO 14025
Review: Accredited third party review by Institut Bauen und Umwelt e. V.
Amounts: rows without a unit in brackets have none in this file; such an amount is in the reference unit of its flow, which a separate flow dataset defines
copyright: true
licenseType: Free of charge for all users and uses
accessRestrictions: None

## General comment
Die wedi Fundo bodengleiche Dusche besteht aus einem extrudierten Polystyrol-Hartschaumkern mit einer beidseitigen Glasfaserarmierung und einer polymer-zementären Mörtelbeschichtung. Extrudierter Polystyrol-Hartschaum (XPS) ist ein Kunststoffschaum-Dämmstoff entsprechend der /EN 13164/, der in Form von Platten im Rohdichtenbereich von 35 kg/m³ (+/-3) produziert wird. Die wedi Fundo bodengleichen Duschen werden in unterschiedlichen Abmessungen geliefert.

## Technology and included processes
XPS wird in einem kontinuierlichen Extrusionsprozess aus Polystyrol-Granulat hergestellt. Das Polystyrol wird mit den Zusatzstoffen in einem Tandem-Extruder unter hohem Druck aufgeschmolzen und homogenisiert. Das Treibmittel wird in der Schmelze gelöst und anschließend durch eine Breitschlitzdüse ausgetragen. Durch den dabei stark abfallenden Gegendruck schäumt das Treibmittel die Schmelze in Umgebungstemperatur auf. Die Schmelze kühlt sich dabei ab und der Polystyrol-Schaum verfestigt sich. Es entsteht ein geschlossenzelliger Polystyrol-Hartschaum. Dieser kühlt sich weiter ab und kann nach der Entfernung der Extrusionshaut verpackt werden. Im ersten Schritt wird auf die XPS Grundplatte ein vorgegebenes Gefälle aufgebracht. Zur Beschichtung der bodengleichen Dusche wird ein polymer-modifizierter Zementmörtel mit Wasser und Dispersion gemischt und zusammen mit dem Glasgewebe beidseitig auf den XPS-Kern aufgebracht. Die getrocknete bodengleiche Dusche kann abschließend dimensioniert werden. Die wedi bodengleiche Dusche wird in Kartonage einzeln verpackt und auf Palette gestapelt mit Polyethylen-Folie verpackt. XPS aus Produktionsabschnitten und Frässtaub wird direkt in den Produktionen rezykliert und wieder zur Produktion von XPS eingesetzt. Polystyrol ist ein thermoplastisches Material und kann deshalb einfach und kostengünstig durch Aufschmelzen rezykliert werden.
Deklarierte Einheit:
Die deklarierte Einheit der vorliegenden Studie ist ein dreifach beschichtetes, bodengleiches Duschsystem mit einer Fläche von 1 m² und einer Dicke von 40 mm. Die Systembezeichnung des Herstellers lautet wedi Fundo.

## Technical purpose
Das wedi Fundo Bodenelement wird in Nassräumen und Sanitärbereichen eingesetzt. Das wedi Fundo System kann auf fast jedem Untergrund als individuell verfliesbares, bodengleiches Duschsystem eingebaut werden. Zu dem System gehört ein Polystyrol-Hartschaumkern mit Spezialbeschichtung aus Polymer-Zementmörtel inkl. eines vorgegebenen Oberflächengefälles. Für die Anwendung gelten die jeweiligen nationalen Bestimmungen.
(weitere Informationen unter www.wedi.eu)

## Reference product
- wedi Fundo, 40 mm (wedi Fundo, 40 mm ): 1

## Inputs
- Erneuerbare Primärenergie als Energieträger (PERE) [MJ]: A1-A3 16.8, A5 0.093
- Erneuerbare Primärenergie zur stofflichen Nutzung (PERM) [MJ]: A1-A3 14.6, A5 0
- Total erneuerbare Primärenergie (PERT) [MJ]: A1-A3 31.4, A5 0.093
- Nicht-erneuerbare Primärenergie als Energieträger (PENRE) [MJ]: A1-A3 191.9, A5 0.492
- Nicht-erneuerbare Primärenergie zur stofflichen Nutzung (PENRM) [MJ]: A1-A3 60, A5 0
- Total nicht erneuerbare Primärenergie (PENRT) [MJ]: A1-A3 251.9, A5 0.492
- Einsatz von Sekundärstoffen (SM) [kg]: A1-A3 0, A5 0
- Erneuerbare Sekundärbrennstoffe (RSF) [MJ]: A1-A3 0.031, A5 0
- Nicht erneuerbare Sekundärbrennstoffe (NRSF) [MJ]: A1-A3 0.327, A5 0
- Einsatz von Süßwasserressourcen (FW) [m^3]: A1-A3 0.049, A5 0.004

## Outputs
- Gefährlicher Abfall zur Deponie (HWD) [kg]: A1-A3 4.26e-6, A5 1.14e-9
- Entsorgter nicht gefährlicher Abfall (NHWD) [kg]: A1-A3 0.23, A5 0.0294
- Entsorgter radioaktiver Abfall (RWD) [kg]: A1-A3 0.005, A5 1.98e-5
- Komponenten für die Wiederverwendung (CRU) [kg]: A1-A3 0, A5 0
- Stoffe zum Recycling (MFR) [kg]: A1-A3 0, A5 0
- Stoffe für die Energierückgewinnung (MER) [kg]: A1-A3 1.36, A5 0
- Exportierte elektrische Energie (EEE) [MJ]: A1-A3 0, A5 0
- Exportierte thermische Energie (EET) [MJ]: A1-A3 0, A5 0

## Impact indicators
- Globales Erwärmungspotenzial (GWP) [kg CO_(2)-Äq.]: A1-A3 10.5, A5 1.54
- Abbau Potential der stratosphärischen Ozonschicht (ODP) [kg CFC11-Äq.]: A1-A3 9.81e-8, A5 7.33e-14
- Versauerungspotenzial von Boden und Wasser (AP) [kg SO_(2)-Äq.]: A1-A3 0.025, A5 0.000288
- Eutrophierungspotenzial (EP) [kg PO_(4)^(3)-Äq.]: A1-A3 0.003, A5 5.82e-5
- Bildungspotential für troposphärisches Ozon (POCP) [kg Ethen-Äq.]: A1-A3 0.004, A5 2.06e-5
- Potenzial für den abiotischen Abbau nicht fossiler Ressourcen (ADPE) [kg Sb-Äq.]: A1-A3 9.42e-5, A5 8.65e-9
- Potenzial für den abiotischen Abbau fossiler Brennstoffe (ADPF) [MJ]: A1-A3 235, A5 0.44

## Use advice
Gültigkeitsbereich:
Der Bezugszeitraum der gesammelten Daten ist 2017. Die Daten stammen aus dem Werk Emsdetten, Nordrhein-Westfalen, Deutschland.
Systemgrenze:
Die Umweltinformationen der vorliegenden EPD beruhen auf einer „cradle-to-gate“-Annahme (Wiege bis Werkstor) und berücksichtigen daher ausschließlich die Module des Produktstadiums bzw. der Herstellungsphase A1-A3 sowie das Modul A5 zur Beschreibung des End-of-Life-Prozesses des Verpackungsmaterials.

A1: Rohstoffgewinnung- und Verarbeitung

1. Kern aus extrudiertem Polystyrol-Hartschaum

2. Armierung aus Glasfasergewebe

3. kunststoffvergüteter Mörtel mit Dispersion

4. Quarzsand

A2: Transport zum Hersteller

Bereitstellung von Diesel und die Verwendung der Transportfahrzeuge (LKW) über die spezifischen Distanzen wurden berücksichtigt.

A3: Produktionsprozess wedi

Die Vorbereitung der Vorprodukte vor dem Zusammensetzen und der allgemeine Produktionsprozess der Bauplatte bis zur Verpackung und Lagerung wurde berücksichtigt.

A5: Baustadium: End of Life Verpackungsmaterial Zur Vervollständigung wurde mit dem Modul A5 die Entsorgung des im Werk verwendeten Verpackungsmaterials berücksichtigt.

## Data sources
- GaBi Database (all versions)
- GaBi database SP34 2017
