# Wolfin M

Dataset: ILCD process, EPD, specific dataset
Geography: DE
Reference year: 2020
Valid until: 2025
Classification: OEKOBAU.DAT: Kunststoffe / Dachbahnen / PVC-Dachbahnen
Classification: IBUCategories: 02 Bauprodukte / Abdichtungen / Dach- und Dichtungsbahnsysteme aus Kunststoffen und Elastomeren
Method details: Dach- und Dichtungsbahnsysteme aus Kunststoffen und Elastomeren.pdf
Generated by: PE INTERNATIONAL AG
Registration number: EPD-WOL-20200035-IBA1-DE
Owner: WOLFIN Bautechnik GmbH
Compliance: DIN EN 15804; ISO 14025
Review: Accredited third party review by Institut Bauen und Umwelt e. V.
Amounts: rows without a unit in brackets have none in this file; such an amount is in the reference unit of its flow, which a separate flow dataset defines
copyright: true
licenseType: Free of charge for all users and uses
accessRestrictions: None

## General comment
Wolfin M Dach- und Dichtungsbahnen sind mittig verstärkte, im Extrusionsverfahren hergestellte, hochpolymere, durchgehend homogene (keine unterschiedlichen Ober- Mittel- Unterschichten) Kunststoff Dach- und Dichtungsbahnen.

## Technology and included processes
Die Grundstoffe der Rezeptur werden in einem Mi­scher zusammengeführt und gemischt und anschlie­ßend in einem Extruder geknetet und plastifiziert. Durch eine Breitschlitzdüse wird im Extrusionsver­fahren die untere Schicht gefertigt und im Walzenspalt geprägt und mit der Glasgitterverstärkung verbunden. Über eine Kühlstrecke wird dieses Vormaterial auf eine Großdocke gewickelt. Im zweiten Arbeitsgang wird die Rezeptur wie zuvor beschrieben gemischt und plastifiziert. Nach Austritt aus der Breitschlitzdüse wird die zugeführte Unterschicht aus Wolfin Bahnenmaterial mit Verstärkung mit der Wolfin Oberschicht durch Temperatur und Druck im Walzenspalt verbunden. Über Kühlwalzen erfolgt die Abkühlung der Bahn. Auf dem Weg zur Konfektionierung erhält die Bahn einen eindeutigen Bahnenaufdruck inkl. Chargennummmer zur Rückverfolgbarkeit. Die Bahn wird auf die entsprechende Breite zugeschnitten. Da die mittig verstärkte Wolfin M Bahn über einen beidseitigen homogenen Bahnenrand verfügt, können die Randabschnitte komplett recycelt und dem Produktionsprozess wieder zugeführt werden. Die Produktion ist nach /DIN EN ISO 9001/ zertifiziert.
Deklarierte Einheit:
Die deklarierte Einheit ist 1 m² produzierte Dachbahn Wolfin M. Es wird die Dicke 1,5 mm deklariert; in Kapitel 5 ist der Faktor zur Berechnung von Wolfin M 2 mm angegeben. Die Bahnen werden lose mit Auflast oder mechanisch befestigt verlegt. Die Auflast oder Befestigungselemente sind nicht in dieser Produktdeklaration enthalten.

## Technical purpose
Einlagige hochpolymere Kunststoff Dach,- und Bauwerksabdichtung. Die Bahnen werden lose mit Auflast (Kies, Platten, Begrünung) oder lose, mechanisch befestigt, verlegt.

## Reference product
- 1 m² Wolfin M 1,5 mm (): 1

## Inputs
- Erneuerbare Primärenergie als Energieträger (PERE) [MJ]: A1-A3 -2.05
- Erneuerbare Primärenergie zur stofflichen Nutzung (PERM) [MJ]: A1-A3 13
- Total erneuerbare Primärenergie (PERT) [MJ]: A1-A3 10.9, C2 0.00382, C4 1.28, D -2.31
- Nicht-erneuerbare Primärenergie als Energieträger (PENRE) [MJ]: A1-A3 107
- Nicht-erneuerbare Primärenergie zur stofflichen Nutzung (PENRM) [MJ]: A1-A3 60.8
- Total nicht erneuerbare Primärenergie (PENRT) [MJ]: A1-A3 167, C2 0.0644, C4 15, D -22.8
- Einsatz von Sekundärstoffen (SM) [kg]: A1-A3 0, C2 0, C4 0
- Erneuerbare Sekundärbrennstoffe (RSF) [MJ]: A1-A3 0, C2 0, C4 0, D 0
- Nicht erneuerbare Sekundärbrennstoffe (NRSF) [MJ]: A1-A3 0, C2 0, C4 0, D 0
- Einsatz von Süßwasserressourcen (FW) [m^3]: A1-A3 0.0409, C2 2.47e-6, C4 0.011, D -0.00312

## Outputs
- Gefährlicher Abfall zur Deponie (HWD) [kg]: A1-A3 0.00917, C2 2.86e-7, C4 0.00173, D -0.00336
- Entsorgter nicht gefährlicher Abfall (NHWD) [kg]: A1-A3 0.0798, C2 1.23e-5, C4 3.61, D -0.00566
- Entsorgter radioaktiver Abfall (RWD) [kg]: A1-A3 0.00358, C2 8.98e-8, C4 0.000665, D -0.00129
- Komponenten für die Wiederverwendung (CRU) [kg]: A1-A3 0, C2 0, C4 0
- Stoffe zum Recycling (MFR) [kg]: A1-A3 0, C2 0, C4 0
- Stoffe für die Energierückgewinnung (MER) [kg]: A1-A3 0, C2 0, C4 0
- Exportierte elektrische Energie (EEE) [MJ]: A1-A3 0, C2 0, C4 4.54
- Exportierte thermische Energie (EET) [MJ]: A1-A3 0, C2 0, C4 11.1

## Impact indicators
- Globales Erwärmungspotenzial (GWP) [kg CO_(2)-Äq.]: A1-A3 8.82, C2 0.00471, C4 5.55, D -1.48
- Abbau Potential der stratosphärischen Ozonschicht (ODP) [kg CFC11-Äq.]: A1-A3 2.51e-10, C2 1.13e-14, C4 3.14e-11, D -6.02e-11
- Versauerungspotenzial von Boden und Wasser (AP) [kg SO_(2)-Äq.]: A1-A3 0.0158, C2 2.15e-5, C4 0.00729, D -0.00211
- Eutrophierungspotenzial (EP) [kg PO_(4)^(3)-Äq.]: A1-A3 0.00317, C2 5.15e-6, C4 0.000269, D -0.000251
- Bildungspotential für troposphärisches Ozon (POCP) [kg Ethen-Äq.]: A1-A3 0.00386, C2 -7.24e-6, C4 0.00024, D -0.000195
- Potenzial für den abiotischen Abbau nicht fossiler Ressourcen (ADPE) [kg Sb-Äq.]: A1-A3 2.54e-5, C2 2.21e-10, C4 4.97e-6, D -1.75e-7
- Potenzial für den abiotischen Abbau fossiler Brennstoffe (ADPF) [MJ]: A1-A3 158, C2 0.0642, C4 13.4, D -19.6

## Use advice
Gültigkeitsbereich:
Diese Deklaration gilt für Wolfin M Dach- und Dichtungsbahnen der Dicke 1,5 mm und 2 mm, die am Standort Wächtersbach in Deutschland hergestellt werden. Es werden die Ökobilanzergebnisse von Wolfin M 1,5 mm deklariert. In Kapitel 5 ist ein Faktor angegeben, mit dem die Ergebnisse für Wolfin M 2 mm berechnet werden können.
Systemgrenze:
Typ der EPD: Wiege bis Werkstor - mit Optionen.

Die Ökobilanz berücksichtigt die Rohstoff- und Energiegewinnung, Rohstofftransporte und die Produktherstellung (Module A1-A3), sowie den Transport nach dem Rückbau (Modul C2), die Abfallbehandlung (thermische Verwertung, Modul C4) und Nutzenpotentiale außerhalb der Systemgrenze für die thermische Verwertung (Modul D).

## Data sources
- GaBi Database (all versions)
- GaBi database SP25 2014
