# Mauerziegel (mit Dämmstoff gefüllt)

Dataset: ILCD process, EPD, average dataset
Geography: DE
Reference year: 2021
Valid until: 2026
Classification: OEKOBAU.DAT: Mineralische Baustoffe / Steine und Elemente / Ziegel
Classification: IBUCategories: 02 Bauprodukte / Mauerwerk und Mörtel / Ziegel
Method details: Ziegel.pdf
Generated by: Life Cycle Engineering Experts GmbH
Registration number: EPD-BDZ-20210071-ICG1-DE
Owner: Bundesverband der Deutschen Ziegelindustrie e.V.
Compliance: DIN EN 15804+A2; ISO 14025
Review: Accredited third party review by Institut Bauen und Umwelt e. V.
Amounts: rows without a unit in brackets have none in this file; such an amount is in the reference unit of its flow, which a separate flow dataset defines
copyright: true
licenseType: Free of charge for all users and uses
accessRestrictions: None

## General comment
Mauerziegel sind ein Baustoff aus gebranntem Ton. Sie können mit Perlit, Mineralwollstecklingen, Pads aus Mineralwolle, Holzwolle oder Polystyrol verfüllt werden. Mit Dämmstoff gefüllte Mauerziegel werden in Außenwänden von Gebäuden eingesetzt. Für Mauerziegel gibt es eine eigene EPD. Die Werte dieser EPD beziehen sich auf durchschnittlich gefüllte Ziegel, wobei die Füllung einen durchschnittlichen Mix aller genannten Füllmaterialien repräsentiert.

Grundlage der Ökobilanzergebnisse in dieser EPD ist eine Durchschnittsbildung aller deutschen Werke, die als gewichteter Mittelwert bezogen auf den Anteil der einzelnen Produktionsstätten an der Gesamtjahresproduktion erfolgte. Als repräsentatives Produkt wurde ein Ziegel mit einer Rohdichte von 605 kg/m³ ausgewählt.

## Technology and included processes
Nach dem Tonabbau im Tagebau erfolgt der Transport zur Zwischenlagerung auf dem Werksgelände. Die mechanische Aufbereitung der Tone, wie das Zerkleinern und Mischen, geschieht im Kollergang und den Walzwerken. Die o. g. Grundstoffe werden in bestimmten optimierten Verhältnissen zerkleinert (aufbereitet) gemischt und befeuchtet. Es folgt eine Lagerung im Sumpfhaus. Die Zugabeder Porosierungsmittel erfolgt vor oder nach der Lagerung im Sumpfhaus. Nach Durchlaufen des Feinwalzwerkes und erneuter Wasserzugabe erfolgt die Formgebung der Rohlinge durch Strangpressen mit entsprechenden Mundstücken und nachgeschaltetem Abschneider. Das so geformte Material kommt in den Trockner, der im Wesentlichen mit der Abwärme des Tunnelofens betrieben wird. Die Trocknungszeit variiert je nach Format und Rohdichte und beträgt in der Regel 24 Stunden. Danach werden die getrockneten Rohlinge bei ca. 1000 °C innerhalb von bis zu maximal 24 Stunden im Tunnelofen gebrannt. Die Verbrennung der Porosierungsstoffe bewirkt eine Feinporosierung. Zur Herstellung von Planziegeln werden die Ziegel plangeschliffen. Die Ziegel werden gestapelt, in recyclebare PE-Folie eingeschweißt oder mit Polyester- oder Stahlbändern umreift. Der Energiebedarf für die Ziegelherstellung betrifft hauptsächlich den Brennvorgang und das Trocknen. Die elektrische Energie wird hauptsächlich in der Aufbereitung verbraucht. Verfüllung mit Perlit: Das geblähte Perlit wird nach der Anlieferung ins Werk in Großsilos zwischengelagert. Für die Verfüllung wird es aus den Silos abgezogen und mit einem Bindemittel auf Wasserbasis gemischt. Über einen Beschicker wird das Perlit in die zugeführten Ziegelrohlinge eingefüllt und verdichtet. Der mit hydrophobiertem Perlit gefüllte Ziegel durchläuft danach zwei Stationen, in denen je die Ober- und Unterseite des verfüllten Ziegels nachverdichtet, verfestigt und gereinigt werden. Die verfüllten Ziegel durchlaufen anschließend einen Trockner. Bei einer Temperatur von ca. 120 °C wird die Dämmstofffüllung getrocknet. Verfüllung mit Pads aus Mineralwolle: Als Basis zur Verfüllung der Lochung der Mauerziegel dienen konventionell hergestellte Platten aus Mineralwolle, die entsprechend der Lochgeometrie des Ziegels geschnitten werden. Die so hergestellten Plattenabschnitte (Stecklinge) werden in einer weiteren Station mit Greifern von einem Roboter aufgenommen und über eine Matrize in die Lochung der Mauerziegel eingeführt. Die verwendeten Mineralfaserplatten sind bereits bei Anlieferung hinsichtlich Rohdichte und Geometrie an die Verfüllung der Mauerziegel angepasst. So lässt sich u. a. Abfall durch Verschnitt gänzlich vermeiden. Verfüllung mit Mineralwollegranulat Bei dieser Art der Verfüllung wird ein Mineralwollegranulat in die Ziegel eingebracht. Verfüllung mit Polystyrol: Als Basis zur Verfüllung der Lochung der Mauerziegel dienen lose Styroporkugeln, die in die Ziegelkammern eingefüllt werden und mittels Wasserdampf und Druck kernfest verbunden werden. Bei der Verfüllung fallen keine Abfälle an. Verfüllung mit Holzwolle: Der Füllstoff aus Holzfasern wird in die Hochlöcher der Ziegel eingerüttelt.
Deklarierte Einheit:
Die Deklaration bezieht sich auf einen Kubikmeter Mauerziegel mit einer Rohdichte von 605 kg/m³. Grundlage der Ökobilanzergebnisse in dieser EPD ist eine Durchschnittsbildung aller deutschen Werke, die als gewichteter Mittelwert bezogen auf den Anteil der einzelnen Produktionsstätten an der Gesamtjahresproduktion erfolgte.

## Technical purpose
Mit Dämmstoff gefüllte Mauerziegel werden aufgrund ihrer sehr guten Wärmedämmung in der Regel als tragendes Mauerwerk in Außenwänden von Gebäuden eingesetzt. Gefüllte Fassadenelemente werden als Vorsatzschalen für Außenwände oder als Innendämmung im Altbau verwendet.

## Scenarios
- S1: 1

## Reference product
- Mauerziegel (605 kg/m³): 1

## Inputs
- Erneuerbare Primärenergie als Energieträger (PERE) [MJ]: A1-A3 243, A4 3.1, A5 0.0559, C1 0.271, C2 0.725, C3 2.28, C4 1.7, D (S0) -5.45, D (S1) -3.78
- Erneuerbare Primärenergie zur stofflichen Nutzung (PERM) [MJ]: A1-A3 0, A4 0, A5 0, C1 0, C2 0, C3 0, C4 0, D (S0) 0, D (S1) 0
- Total erneuerbare Primärenergie (PERT) [MJ]: A1-A3 243, A4 3.1, A5 0.0559, C1 0.271, C2 0.725, C3 2.28, C4 1.7, D (S0) -5.45, D (S1) -3.78
- Nicht-erneuerbare Primärenergie als Energieträger (PENRE) [MJ]: A1-A3 1590, A4 53.3, A5 0.0559, C1 4.66, C2 12.5, C3 27.1, C4 12.9, D (S0) -19.1, D (S1) -15.1
- Nicht-erneuerbare Primärenergie zur stofflichen Nutzung (PENRM) [MJ]: A1-A3 1.23, A4 0, A5 0, C1 0, C2 0, C3 0, C4 0, D (S0) 0, D (S1) 0
- Total nicht erneuerbare Primärenergie (PENRT) [MJ]: A1-A3 1590, A4 53.3, A5 0.0559, C1 4.66, C2 12.5, C3 27.1, C4 12.9, D (S0) -19.1, D (S1) -15.1
- Einsatz von Sekundärstoffen (SM) [kg]: A1-A3 142, A4 0, A5 0, C1 0, C2 0, C3 567, C4 0, D (S0) 0, D (S1) 0
- Erneuerbare Sekundärbrennstoffe (RSF) [MJ]: A1-A3 0, A4 0, A5 0, C1 0, C2 0, C3 0, C4 0, D (S0) 0, D (S1) 0
- Nicht erneuerbare Sekundärbrennstoffe (NRSF) [MJ]: A1-A3 0, A4 0, A5 0, C1 0, C2 0, C3 0, C4 0, D (S0) 0, D (S1) 0
- Einsatz von Süßwasserressourcen (FW) [m^3]: A1-A3 0.205, A4 0.00278, A5 0.00405, C1 0.000243, C2 0.00065, C3 0.00709, C4 0.00326, D (S0) 0.00354, D (S1) -0.00206

## Outputs
- Gefährlicher Abfall zur Deponie (HWD) [kg]: A1-A3 0.00168, A4 2.05e-6, A5 2.28e-10, C1 1.74e-7, C2 4.66e-7, C3 5.7e-7, C4 1.08e-7, D (S0) -3.6e-7, D (S1) -7.95e-9
- Entsorgter nicht gefährlicher Abfall (NHWD) [kg]: A1-A3 7.84, A4 0.00962, A5 0.00761, C1 0.000818, C2 0.00219, C3 0.00815, C4 35.7, D (S0) -11.2, D (S1) -0.00712
- Entsorgter radioaktiver Abfall (RWD) [kg]: A1-A3 0.0288, A4 5.77e-5, A5 8.1e-6, C1 4.91e-6, C2 1.31e-5, C3 0.000217, C4 7.96e-5, D (S0) -0.000712, D (S1) -0.000548
- Komponenten für die Wiederverwendung (CRU) [kg]: A1-A3 0, A4 0, A5 0, C1 0, C2 0, C3 0, C4 0, D (S0) 0, D (S1) 0
- Stoffe zum Recycling (MFR) [kg]: A1-A3 0, A4 0, A5 0, C1 0, C2 0, C3 567, C4 0, D (S0) 0, D (S1) 0
- Stoffe für die Energierückgewinnung (MER) [kg]: A1-A3 0, A4 0, A5 0, C1 0, C2 0, C3 0, C4 0, D (S0) 0, D (S1) 0
- Exportierte elektrische Energie (EEE) [MJ]: A1-A3 0, A4 0, A5 3.42, C1 0, C2 0.05, C3 0, C4 0, D (S0) 0, D (S1) 0
- Exportierte thermische Energie (EET) [MJ]: A1-A3 0, A4 0, A5 7.88, C1 0, C2 0.11, C3 0, C4 0, D (S0) 0, D (S1) 0

## Impact indicators
- Globales Erwärmungspotenzial total (GWP-total) [kg CO_(2)-Äq.]: A1-A3 146, A4 4.15, A5 0.824, C1 0.352, C2 0.942, C3 -10.1, C4 0.5, D (S0) -1.46, D (S1) -1.06
- Globales Erwärmungspotenzial fossil (GWP-fossil) [kg CO_(2)-Äq.]: A1-A3 145.6, A4 4.13, A5 0.83, C1 0.366, C2 0.938, C3 1.44, C4 0.541, D (S0) -1.45, D (S1) -1.05
- Globales Erwärmungspotenzial biogen (GWP-biogenic) [kg CO_(2)-Äq.]: A1-A3 0.291, A4 0.00166, A5 -0.0039, C1 -0.0156, C2 0.000377, C3 -11.5, C4 -0.0429, D (S0) -0.00909, D (S1) -0.00439
- Globales Erwärmungspotenzial luluc (GWP-luluc) [kg CO_(2)-Äq.]: A1-A3 0.0795, A4 0.0173, A5 -0.00132, C1 0.00147, C2 0.00392, C3 0.00529, C4 0.00156, D (S0) -0.00484, D (S1) -0.00135
- Abbau Potential der stratosphärischen Ozonschicht (ODP) [kg CFC11-Äq.]: A1-A3 2.91e-11, A4 1.01e-15, A5 -1.59e-14, C1 8.61e-17, C2 2.3e-16, C3 6.11e-15, C4 2.03e-15, D (S0) -2.07e-14, D (S1) -1.61e-14
- Versauerungspotenzial von Boden und Wasser (AP) [mol H^(+)-Äq.]: A1-A3 0.279, A4 0.00383, A5 -0.000866, C1 0.00173, C2 0.000871, C3 0.0135, C4 0.00388, D (S0) -0.00461, D (S1) -0.00116
- Eutrophierungspotenzial Süßwasser (EP-freshwater) [kg PO_(4)-Äq.]: A1-A3 0.00014, A4 8.99e-6, A5 -2.17e-6, C1 7.64e-7, C2 2.04e-6, C3 3.43e-6, C4 9.32e-7, D (S0) -4.41e-6, D (S1) -2.2e-6
- Eutrophierungspotenzial Salzwasser (EP-marine) [kg N-Äq.]: A1-A3 0.0473, A4 0.00119, A5 -0.000329, C1 0.000816, C2 0.000271, C3 0.00664, C4 0.000999, D (S0) -0.00175, D (S1) -0.000375
- Eutrophierungspotenzial Land (EP-terrestrial) [mol N-Äq.]: A1-A3 1, A4 0.0145, A5 -0.00265, C1 0.00904, C2 0.00329, C3 0.073, C4 0.011, D (S0) -0.0192, D (S1) -0.004
- Bildungspotential für troposphärisches Ozon (POCP) [kg NMVOC-Äq.]: A1-A3 0.135, A4 0.00315, A5 -0.000881, C1 0.00228, C2 0.000717, C3 0.0193, C4 0.00302, D (S0) -0.00414, D (S1) -0.00101
- Potenzial für den abiotischen Abbau nicht fossiler Ressourcen (ADPE) [kg Sb-Äq.]: A1-A3 1.62e-5, A4 3.43e-7, A5 -2.25e-7, C1 2.92e-8, C2 7.79e-8, C3 1.58e-6, C4 4.88e-8, D (S0) -3.14e-7, D (S1) -2.28e-7
- Potenzial für den abiotischen Abbau fossiler Brennstoffe (ADPF) [MJ]: A1-A3 1580, A4 54.8, A5 -14.9, C1 4.66, C2 12.5, C3 27.1, C4 6.9, D (S0) -19.1, D (S1) -15.1
- Wassernutzung (WDP) [m^(3) Welt-Äq. entzogen]: A1-A3 4.89, A4 0.0178, A5 0.161, C1 0.00151, C2 0.00404, C3 0.242, C4 0.0565, D (S0) -0.0355, D (S1) -0.012
- Auftreten von Krankheiten aufgrund von Feinstaubemissionen (PM) [Krankheitsfälle]
- Wirkung durch Exposition des Menschen mit U235 (IR) [kBq U235-Äq.]
- Toxizitätsvergleichseinheit für Ökosysteme (ETP-fw) [CTUe]
- Toxizitätsvergleichseinheit für Menschen (krebserregend) (HTP-c) [CTUh]
- Toxizitätsvergleichseinheit für Menschen (nicht krebserregend) (HTP-nc) [CTUh]
- Bodenqualitätsindex (SQP) [SQP]

## Use advice
Gültigkeitsbereich:
Die Anwendung dieses Dokumentes ist auf gefüllte Hintermauerziegel beschränkt, die von Mitgliedsunternehmen des Bundesverbands der Deutschen Ziegelindustrie e.V. in Deutschland hergestellt werden. Für diese Deklaration wurden von 17 Mitgliedsunternehmen Daten aus dem Jahr 2019 zur Verfügung gestellt. Diese Mitglieder repräsentieren nach Anzahl 90 % der im Bundesverband der Deutschen Ziegelindustrie e.V. zusammengeschlossenen Hersteller von gefüllten Hintermauerziegeln. Das Produktionsvolumen dieser Firmen liegt - nach Produktionsmenge - bei etwa 90 % des deutschen Marktes.

Der zugrundeliegende Hintermauerziegel basiert auf einer EPD, an der 20 Mitgliedsfirmen des Bundesverbands der Deutschen Ziegelindustrie e.V. beteiligt waren.
Systemgrenze:
Typ der EPD: Wiege bis zum Werkstor – mit Optionen. Die Ökobilanz berücksichtigt die Rohstoffgewinnung, die Rohstofftransporte und die eigentliche Produktherstellung inklusive der Verpackungsmaterialien (Module A1–A3). Der Transport zur Baustelle (Modul A4) sowie die Behandlung der Verpackungsmaterialien in Müllverbrennungsanlagen nach dem Einbau des Produktes (Modul A5) sind ebenfalls Teil der Systemgrenzen. Nach Ablauf der Nutzungsdauer wird das Produkt rückgebaut (Modul C1). Nach dem Transport des rückgebauten Produktes (Modul C2) ist für rund 6 % der Ziegel eine Deponierung auf einer Inertstoffdeponie vorgesehen (Modul C4), 94 % können weiterverwertet werden. Gutschriften infolge des Recyclings von Ziegelbruch sind in Modul D deklariert. Gutschriften für Strom und thermische Energie infolge der thermischen Verwertung der Verpackung innerhalb des Moduls A5 werden ebenfalls in Modul D1 berücksichtigt.

## Data sources
- GaBi Database (all versions)
- GaBi database SP39 2019
