# STEICO LVL

Dataset: ILCD process, EPD, specific dataset
Geography: RER
Reference year: 2019
Valid until: 2024
Classification: OEKOBAU.DAT: Holz / Holzwerkstoffe / Laminated Veneer Lumber (LVL)
Classification: IBUCategories: 02 Bauprodukte / Produkte aus Bauholz / Vollholzprodukte
Method details: Vollholzprodukte.pdf
Registration number: EPD-STE-20190005-IBC1-DE
Owner: STEICO SE
Compliance: DIN EN 15804; ISO 14025
Review: Accredited third party review by Institut Bauen und Umwelt e. V.
Amounts: rows without a unit in brackets have none in this file; such an amount is in the reference unit of its flow, which a separate flow dataset defines
copyright: true

## General comment
STEICO LVL Furnierschichthölzer in den Varianten STEICO LVL R, STEICO LVL RS, STEICO LVL RL und STEICO LVL X sind industriell gefertigte Produkte für tragende und nichttragende Konstruktionen. Sie bestehen aus mehreren Lagen miteinander verklebter Nadelholzfurniere. Die natürlichen Fehlstellen des Holzes wie zum Beispiel Äste werden durch den Produktionsprozess auf das einzelne Furnierblatt reduziert und gleichmäßig über den Querschnitt verteilt; es entsteht ein annähernd homogener Querschnitt mit hohen Festigkeiten und Steifigkeiten. Durch die Trocknung der Furniere entsteht ein Produkt mit niedriger Holzfeuchte und nahezu keinem Feuchtegradienten im Querschnitt.

Bei den Produkten STEICO LVL R, STEICO LVL RL und STEICO LVL RS sind alle Furnierlagen längsorientiert zueinander verklebt. Bei STEICO LVL X sind einige Furnierlagen kreuzweise zueinander verklebt.

Die Produkte STEICO LVL R, STEICO LVL RL und STEICO LVL RS unterscheiden sich in den Steifigkeits- und Festigkeitseigenschaften.

## Technology and included processes
STEICO LVL Furnierschichthölzer in den Varianten STEICO LVL R, STEICO LVL RS, STEICO LVL RL und STEICO LVL X sind industriell gefertigte Produkte für tragende und nichttragende Konstruktionen. Sie bestehen aus mehreren Lagen miteinander verklebter Nadelholzfurniere. Die natürlichen Fehlstellen des Holzes wie zum Beispiel Äste werden durch den Produktionsprozess auf das einzelne Furnierblatt reduziert und gleichmäßig über den Querschnitt verteilt; es entsteht ein annähernd homogener Querschnitt mit hohen Festigkeiten und Steifigkeiten. Durch die Trocknung der Furniere entsteht ein Produkt mit niedriger Holzfeuchte und nahezu keinem Feuchtegradienten im Querschnitt. Bei den Produkten STEICO LVL R, STEICO LVL RL und STEICO LVL RS sind alle Furnierlagen längsorientiert zueinander verklebt. Bei STEICO LVL X sind einige Furnierlagen kreuzweise zueinander verklebt. Die Produkte STEICO LVL R, STEICO LVL RL und STEICO LVL RS unterscheiden sich in den Steifigkeits- und Festigkeitseigenschaften.
Technische Daten:
Die technischen Daten von STEICO LVL Furnierschichtholz in den Varianten STEICO LVL R, STEICO LVL RL, STEICO LVL RS und STEICO LVL X sind den jeweils aktuellen Leistungserklärungen zu entnehmen.
Deklarierte Einheit:
Die deklarierte Einheit der ökologischen Betrachtung ist 1 m³ Furnierschichtholz unter Berücksichtigung des Mixes der verwendeten Klebstoffe nach 2.5 und einer Masse von 550 kg/m³ bei einer Holzfeuchte von 9,15 %, was einem Wasseranteil von 8 % entspricht. Der Anteil der Klebstoffe liegt bei 4,56 %. Alle Angaben zu eingesetzten Klebstoffen wurden auf Grundlage spezifischer Daten berechnet.

## Technical purpose
STEICO LVL Furnierschichtholz Produkte finden Anwendung als tragende und nichttragende Bauteile im Hoch-, Brücken und Schalungsbau. Zudem werden die Produkte als tragende oder nichttragende Bauteile im Möbel-, Messebau oder Objektbau verwendet.

## Reference product
- 1 m³ STEICO LVL: 1

## Inputs
- Erneuerbare Primärenergie als Energieträger (PERE) [MJ]: A1 32.2989, A2 12.1059, A3 5789.76, A5 128.563, C2 0.487092, C3 27.0522, D -1669.86
- Erneuerbare Primärenergie zur stofflichen Nutzung (PERM) [MJ]: A1 9267.81, A2 0, A3 127.613, A5 -127.613, C2 0, C3 -9267.81, D 0
- Total erneuerbare Primärenergie (PERT) [MJ]: A1 9300.11, A2 12.1059, A3 5917.37, A5 0.950146, C2 0.487092, C3 -9240.76, D -1669.86
- Nicht-erneuerbare Primärenergie als Energieträger (PENRE) [MJ]: A1 1299.06, A2 183.237, A3 3046.57, A5 95.9648, C2 8.8312, C3 57.7777, D -7158.84
- Nicht-erneuerbare Primärenergie zur stofflichen Nutzung (PENRM) [MJ]: A1 250.8, A2 0, A3 90.576, A5 -90.576, C2 0, C3 -250.8, D 0
- Total nicht erneuerbare Primärenergie (PENRT) [MJ]: A1 1549.86, A2 183.237, A3 3137.14, A5 5.38881, C2 8.8312, C3 -193.022, D -7158.84
- Einsatz von Sekundärstoffen (SM) [kg]: A1 0, A2 0, A3 0, A5 0, C2 0, C3 0, D 0
- Erneuerbare Sekundärbrennstoffe (RSF) [MJ]: A1 0, A2 0, A3 0, A5 0, C2 0, C3 0, D 9267.81
- Nicht erneuerbare Sekundärbrennstoffe (NRSF) [MJ]: A1 0, A2 0, A3 0, A5 0, C2 0, C3 0, D 250.8
- Einsatz von Süßwasserressourcen (FW) [m^3]: A1 0.803148, A2 0.0147614, A3 2.53495, A5 0.0446048, C2 0.000897612, C3 0.0171783, D 1.15325

## Outputs
- Gefährlicher Abfall zur Deponie (HWD) [kg]: A1 0.00144483, A2 1.16298e-5, A3 1.54439e-5, A5 2.21096e-8, C2 5.10628e-7, C3 4.40648e-8, D -4.01845e-6
- Entsorgter nicht gefährlicher Abfall (NHWD) [kg]: A1 0.170633, A2 0.0138474, A3 4.6806, A5 0.609974, C2 0.000739789, C3 0.0593649, D 3.82406
- Entsorgter radioaktiver Abfall (RWD) [kg]: A1 0.0073154, A2 0.000224389, A3 0.0285281, A5 0.000227675, C2 1.20862e-5, C3 0.00571594, D -0.358264
- Komponenten für die Wiederverwendung (CRU) [kg]: A1 0, A2 0, A3 0, A5 0, C2 0, C3 0, D 0
- Stoffe zum Recycling (MFR) [kg]: A1 0, A2 0, A3 0, A5 0, C2 0, C3 0, D 0
- Stoffe für die Energierückgewinnung (MER) [kg]: A1 0, A2 0, A3 0, A5 0, C2 0, C3 550, D 0
- Exportierte elektrische Energie (EEE) [MJ]: A1 0, A2 0, A3 0, A5 28.5877, C2 0, C3 0, D 0
- Exportierte thermische Energie (EET) [MJ]: A1 0, A2 0, A3 0, A5 59.4734, C2 0, C3 0, D 0

## Impact indicators
- Globales Erwärmungspotenzial (GWP) [kg CO_(2)-Äq.]: A1 -829.39, A2 13.7567, A3 284.047, A5 18.6123, C2 0.639919, C3 885.516, D -443.223
- Abbau Potential der stratosphärischen Ozonschicht (ODP) [kg CFC11-Äq.]: A1 2.53014e-8, A2 2.95023e-13, A3 1.86572e-8, A5 2.80231e-13, C2 1.76683e-14, C3 6.57922e-12, D -4.11813e-10
- Versauerungspotenzial von Boden und Wasser (AP) [kg SO_(2)-Äq.]: A1 0.132876, A2 0.0557978, A3 1.26267, A5 0.0029421, C2 0.00270068, C3 0.00680786, D -0.45502
- Eutrophierungspotenzial (EP) [kg PO_(4)^(3)-Äq.]: A1 0.0249418, A2 0.0142652, A3 0.156506, A5 0.000443579, C2 0.000692638, C3 0.0011088, D -0.0715278
- Bildungspotential für troposphärisches Ozon (POCP) [kg Ethen-Äq.]: A1 0.021736, A2 -0.0236623, A3 0.170105, A5 0.000132576, C2 -0.001124, C3 0.000451891, D -0.0404132
- Potenzial für den abiotischen Abbau nicht fossiler Ressourcen (ADPE) [kg Sb-Äq.]: A1 9.78409e-6, A2 1.38237e-6, A3 3.68304e-5, A5 6.06438e-7, C2 5.30933e-8, C3 3.04835e-6, D -0.000186874
- Potenzial für den abiotischen Abbau fossiler Brennstoffe (ADPF) [MJ]: A1 1530.73, A2 182.661, A3 2975.23, A5 4.81402, C2 8.80018, C3 43.3416, D -6378.42

## Use advice
Gültigkeitsbereich:
Diese Deklaration gilt für STEICO LVL Furnierschichtholz welches in folgenden Varianten hergestellt wird:

STEICO LVL R
STEICO LVL RS
STEICO LVL RL
STEICO LVL XHerstellwerk:

STEICO Sp.z o.o.

Ul. Mickiewicza 10

83-262 Czarna Woda

Polen
Systemgrenze:
Der Deklarationstyp entspricht einer EPD „Wiege bis Werkstor – mit Optionen“. Inhalte sind das Stadium der Produktion, also von der Bereitstellung der Rohstoffe bis zum Werkstor der Produktion (cradle-to-gate, Module A1 bis A3), sowie das Modul A5 und Teile des Endes des Lebensweges (Modul C2 und C3). Darüber hinaus erfolgt eine Betrachtung der potenziellen Nutzen und Lasten über den Lebensweg des Produktes hinaus (Modul D).

Im Einzelnen werden in Modul A1 die Bereitstellung des Holzes aus dem Forst sowie die Bereitstellung der Klebstoffe bilanziert. Die Transporte dieser Stoffe werden in Modul A2 berücksichtigt. Modul A3 umfasst die Bereitstellung der Brennstoffe, Betriebsmittel und Strom sowie die Herstellungsprozesse vor Ort. Diese sind im Wesentlichen die Entrindung, das Furnierschälen, die Trocknung, die Verklebung, Hobel- und Profilierprozesse sowie die Verpackung der Produkte. In Modul A5 wird ausschließlich die Entsorgung der Produktverpackung abgedeckt, welche den Ausgang des enthaltenen biogenen Kohlenstoffs sowie der enthaltenen Primärenergie (PERM und PENRM) einschließt.

Modul C2 berücksichtigt den Transport zum Entsorger und Modul C3 die Aufbereitung und Sortierung des Altholzes. Zudem werden in Modul C3 gemäß /EN 16485/ die CO2-Äquivalente des im Produkt befindlichen holzinhärenten Kohlenstoffs sowie die im Produkt enthaltene erneuerbare und nicht-erneuerbare Primärenergie (PERM und PENRM) als Abgänge verbucht.

Modul D bilanziert die thermische Verwertung des Produktes am Ende seines Lebenswegs sowie die daraus resultierenden potenziellen Nutzen und Lasten in Form einer Systemerweiterung.

## Data sources
- STEICO LVL.pdf
- GaBi Database (all versions)
- GaBi database SP35 2018
