# Kalkzement Putzmörtel

Dataset: ILCD process, EPD, generic dataset
Geography: DE
Reference year: 2021
Valid until: 2022
Classification: oekobau.dat: Mineralische Baustoffe / Mörtel und Beton / Putz und Putzmörtel
Owner: Sphera Solutions GmbH
Compliance: EN 15804+A2
Review: Dependent internal review by Sphera Solutions GmbH; Independent external review by GaBi user forum
Amounts: rows without a unit in brackets have none in this file; such an amount is in the reference unit of its flow, which a separate flow dataset defines
copyright: true
licenseType: Free of charge for all users and uses
accessRestrictions: The license conditions as stated on https://www.oekobaudat.de/ apply.
accessRestrictions: Es gelten die Lizenzbedingungen wie sie auf https://www.oekobaudat.de/ genannt sind.

## General comment
Dieser Datensatz wurde nach dem European Standard EN 15804+A2 für Nachhaltiges Bauen modelliert. Ergebnisse werden in Modulen abgebildet, die den strukturierten Ausdruck von Ergebnissen über den gesamten Lebenszyklus zulassen.

## Geography
Der Datensatz bildet die länderspezifische Situation in Deutschland ab. Dabei werden Haupttechnologien, spezifische regionale Charakteristiken und ggf. Importstatistiken berücksichtigt.

## Time period
Jährlicher Durchschnitt

## Technology and included processes
Bilanziert wurde ein Trockenmörtel (Wasserzugabe und Mischen erfolgt auf der Baustelle). Hauptrohstoffe sind Sand, Zement und Luftkalk sowie geringe Mengen von Zuschlagsstoffen für eine bessere Verarbeitbarkeit. Die Vorkette von Zement und Luftkalk dominiert dabei die Ökobilanz.

In der Entsorgungsphase wird ein manueller Rückbau (lastenfrei) in Modul C1 angenommen. Der Transport in Modul C2 zur Deponie erfolgt mit einem LKW (50km). In C3 wird, sofern relevant, eine Verpackung mit PE-Folie berücksichtigt (z.B. bei Mineralfaserprodukten, 0,0125 kg Folie je kg entsorgtes Material). In Modul C4 werden dem Produkt entsprechende, durchschnittliche Deponieemissionen (Bezugsraum Deutschland) ausgewiesen. Die Nutzung von Deponiegas wird nicht berücksichtigt.

## Technical purpose
Normalputz ohne besondere Eigenschaften zur Herstellung von Innen- und Aussenputz.

## Safety margin
10 %. Produktsystem weitgehend vollständig abgebildet. Gute technologische, zeitliche und geographische Repräsentativität.

## Reference product
- Kalkzement Putzmörtel: 1

## Inputs
- Erneuerbare Primärenergie als Energieträger (PERE) [MJ]: A1-A3 1178.99, C2 4.50634, C4 53.6727
- Erneuerbare Primärenergie zur stofflichen Nutzung (PERM) [MJ]: A1-A3 0, C2 0, C4 0
- Total erneuerbare Primärenergie (PERT) [MJ]: A1-A3 1178.99, C2 4.50634, C4 53.6727
- Nicht-erneuerbare Primärenergie als Energieträger (PENRE) [MJ]: A1-A3 2079.81, C2 77.6444, C4 397.423
- Nicht-erneuerbare Primärenergie zur stofflichen Nutzung (PENRM) [MJ]: A1-A3 0, C2 0, C4 0
- Total nicht-erneuerbare Primärenergie (PENRT) [MJ]: A1-A3 2079.81, C2 77.6444, C4 397.423
- Einsatz von Sekundärstoffen (SM) [kg]: A1-A3 0, C2 0, C4 0
- Erneuerbare Sekundärbrennstoffe (SF) [MJ]: A1-A3 0, C2 0, C4 0
- Nicht erneuerbare Sekundärbrennstoffe (NRSF) [MJ]: A1-A3 0, C2 0, C4 0
- Nettoeinsatz von Süßwasserressourcen (FW) [m3]: A1-A3 0.680403, C2 0.00400501, C4 0.097894

## Outputs
- Gefährlicher Abfall zur Deponie (HWD) [kg]: A1-A3 7.92352e-7, C2 3.24529e-9, C4 4.22816e-8
- Entsorgter nicht gefährlicher Abfall (NHWD) [kg]: A1-A3 22.6302, C2 0.0125336, C4 1981.95
- Entsorgter radioaktiver Abfall (RWD) [kg]: A1-A3 0.0998761, C2 7.451e-5, C4 0.0041027
- Komponenten für die Wiederverwendung (CRU) [kg]: A1-A3 0, C2 0, C4 0
- Stoffe zum Recycling (MFR) [kg]: A1-A3 0, C2 0, C4 0
- Stoffe für die Energierückgewinnung (MER) [kg]: A1-A3 0, C2 0, C4 0
- Exportierte elektrische Energie (EEE) [MJ]: A1-A3 0, C2 0, C4 0
- Exportierte thermische Energie (EET) [MJ]: A1-A3 0, C2 0, C4 0

## Impact indicators
- Globales Erwärmungspotenzial - total (GWP-total) [kg CO2 eq.]: A1-A3 354.912, C2 5.90944, C4 38.4995
- Globales Erwärmungspotenzial - fossil (GWP-fossil) [kg CO2 eq.]: A1-A3 363.801, C2 5.86917, C4 29.9619
- Globales Erwärmungspotenzial - biogen (GWP-biogenic) [kg CO2 eq.]: A1-A3 -9.24103, C2 0.00264707, C4 8.44948
- Globales Erwärmungspotenzial - luluc (GWP-luluc) [kg CO2 eq.]: A1-A3 0.352433, C2 0.0376195, C4 0.0880897
- Abbaupotenzial der stratosphärischen Ozonschicht (ODP) [kg CFC-11 eq.]: A1-A3 2.91123e-12, C2 1.49882e-15, C4 1.17564e-13
- Versauerungspotenzial, kumulierte Überschreitung (AP) [Mole of H+ eq.]: A1-A3 0.522891, C2 0.0184034, C4 0.21327
- Eutrophierungspotenzial - Süßwasser (EP-freshwater) [kg P eq.]: A1-A3 0.00211631, C2 1.2047e-5, C4 5.0428e-5
- Eutrophierungspotenzial - Salzwasser (EP-marine) [kg N eq.]: A1-A3 0.190196, C2 0.00859128, C4 0.0553663
- Eutrophierungspotenzial - Land (EP-terrestrial) [Mole of N eq.]: A1-A3 2.15666, C2 0.0959288, C4 0.608293
- Bildungspotenzial für troposphärisches Ozon (POCP) [kg NMVOC eq.]: A1-A3 0.428225, C2 0.0165678, C4 0.167765
- Potenzial für die Verknappung abiotischer Ressourcen nicht fossile Ressourcen (ADPE) [kg Sb eq.]: A1-A3 0.00146601, C2 5.09535e-7, C4 2.83995e-6
- Potenzial für die Verknappung abiotischer Ressourcen fossile Brennstoffe (ADPF) [MJ]: A1-A3 2078.6, C2 77.6412, C4 397.213
- Wasser-Entzugspotenzial (Benutzer) (WDP) [m³ world equiv.]: A1-A3 9.99134, C2 0.0227708, C4 3.20656

## Use advice
Dieser Datensatz bezieht sich auf die Herstellung von 1 m³ Kalkzement Putzmörtel. Die Trockenrohdichte beträgt 1800 kg/m³. Die Wärmeleitfähigkeit beträgt 0,8 - 0,9 W/mK. Der Datensatz kann näherungsweise für die Abschätzung von Kalkzement Putzmörteln mit einer Dichte von 1600 - 1800 kg/m³ verwendet werden. Kann für die Abschätzung von Frischmörteln im o.g. Dichtebereich verwendet werden, wenn die Trockenrohdichte des Frischmörtels angesetzt wird.

Der Datensatz repräsentiert ein Cradle to Gate Inventar. Er kann verwendet werden, um die Lieferkette des jeweiligen Produktes in einer repräsentativen Weise zu charakterisieren. Die Kombination mit einzelnen Einheitenprozessen und diesem Produkt ermöglicht die Erstellung von anwenderspezifischen (Produkt-) LCAs

## Data sources
- GaBi databases
- Documentation of data quality management
- GaBi Database Edition 2021, CUP2021.01
- GaBi database (all versions)
