# Dämmplatte mit Neopor® Plus BMB

Dataset: ILCD process, EPD, specific dataset
Geography: DE
Reference year: 2019
Valid until: 2021
Classification: OEKOBAU.DAT: Dämmstoffe / Expandiertes Polystyrol (EPS) / EPS grau
Classification: IBUCategories: 02 Bauprodukte / Wärmedämmungsprodukte / Dämmstoffe aus Schaumkunststoffen
Method details: Dämmstoffe aus Schaumkunststoffen.pdf
Registration number: EPD-BAS-20190059-IBA1-DE
Owner: BASF SE
Compliance: DIN EN 15804; ISO 14025
Review: Accredited third party review by Institut Bauen und Umwelt e. V.
Amounts: rows without a unit in brackets have none in this file; such an amount is in the reference unit of its flow, which a separate flow dataset defines
copyright: true

## General comment
Dämmplatten mit Neopor® Plus BMB sind expandiertes Polystyrol (EPS) mit polymerem Flammschutzmittel (Polymer-FR).

„BMB“ steht für Biomassenbilanz-Produkte. Im Biomassenbilanzverfahren werden erneuerbare Rohstoffe wie Bio-Naphtha oder Biogas bei der Herstellung von chemischen Grundprodukten im Produktionsverbund der BASF gemeinsam mit fossilen Rohstoffen eingesetzt. Der Bioanteil wird dann nach der zertifizierten Methode /TÜV Süd Standard CMS 71/ bestimmten BASF-Verkaufsprodukten wie Neopor® Plus BMB Granulat rechnerisch zugeordnet. BMB-Produkte haben die gleiche Qualität wie Nicht-BMB-Produkte, da die Formulierung des Produktes identisch ist mit der des fossilen Äquivalents.

Der Biomassenbilanz-Ansatz der BASF unterstützt die Verwendung von erneuerbaren Rohstoffen, die zu einer Einsparung von fossilen Rohstoffen und zu einer Reduzierung von Treibhausgasemissionen führt. Für die eingesetzte Biomasse muss ein Nachweis der Nachhaltigkeit in Form eines Zertifikats eines gemäß Erneuerbare-Energien-Richtlinie anerkannten Standards erbracht werden. Neopor® Plus BMB Granulat wird aus Biogas hergestellt, das aus Küchenabfällen gewonnen wird. Das eingesetzte Biogas ist nach dem /REDcert/ System zertifiziert.

## Technology and included processes
Zur Herstellung von Dämmplatten mit Neopor® Plus BMB ist ein mehrstufiger Herstellungsprozess notwendig. Zu Beginn wird das Granulat am BASF SE Standort in Ludwigshafen hergestellt und anschließend am Standort von Karl Bachl Kunststoffverarbeitung GmbH & Co.KG in Röhrnbach geschäumt. Der Verarbeitungsprozess von EPS-Granulat zu geschäumten Dämmplatten besteht aus den folgenden Schritten: Vorschäumung, Zwischenlagerung und Ausschäumung. Während der Vorschäumung wird mit Hilfe von Dampf und dem Treibmittel Pentan das Granulat geschäumt. Im Anschluss wird das expandierte Granulat in luftdurchlässigen Silos zwischengelagert. Durch die eindiffundierende Luft erhalten die EPS-Schaumstoff-Partikel die für die Weiterverarbeitung notwendige Stabilität. Das am häufigsten angewandte Verfahren zur Herstellung von Dämmstoffplatten ist das Blockschäumen mit anschließendem Schneiden. Die EPS-Schaumstoffpartikel werden hierzu in quaderförmige Blockformen eingefüllt und durch Dampfzufuhr bei 110 °C bis 120 °C ausgeschäumt. Nach kurzer Abkühlzeit werden die Blöcke entformt und abgelagert. Anschließend werden die Blöcke auf mechanischen oder thermischen Schneidanlagen zu Platten geschnitten. Produktionsabfälle werden zu 100% wieder für die Produktion von Primärmaterial eingesetzt.
Technische Daten:
Leistungswerte des Produkts entsprechend der Leistungserklärung in Bezug auf dessen Wesentliche Merkmale gemäß /EN 13163/:2012+A1:2015 - Wärmedämmstoffe für Gebäude - Werkmäßig hergestellte Produkte aus expandiertem Polystyrol (EPS) - Spezifikation
Deklarierte Einheit:
Die deklarierte Einheit ist 1 m³ Dämmplatte mit Neopor® Plus BMB. Die Umrechnungsfaktoren sind in der nachstehenden Tabelle aufgeführt.

## Technical purpose
Dämmplatten mit Neopor® Plus BMB sind für den Einsatz in vielen Anwendungen geeignet. Die in diesem Dokument beschriebene Produktplatte wird in Anwendungen wie Wandisolierung, Schrägdachisolierung, Wärmedämmverbundsystem (WDVS), Hohlraumisolierung, Deckenisolierung, Isolierung für Baumaschinen und Industrieanlagen eingesetzt.

## Reference product
- Neopor® Plus BMB Platte: 1

## Inputs
- Erneuerbare Primärenergie als Energieträger (PERE) [MJ]: A1-A3 1559.33, A4 0.59, A5 37.06, C2 0.2, C4 587.52, D -75.38
- Erneuerbare Primärenergie zur stofflichen Nutzung (PERM) [MJ]: A1-A3 594.3, A4 0, A5 -7.92, C2 0, C4 -586.38, D 0
- Total erneuerbare Primärenergie (PERT) [MJ]: A1-A3 2153.63, A4 0.59, A5 29.14, C2 0.2, C4 1.14, D -75.38
- Nicht-erneuerbare Primärenergie als Energieträger (PENRE) [MJ]: A1-A3 764.81, A4 11.22, A5 12.54, C2 3.47, C4 6.87, D -353.83
- Nicht-erneuerbare Primärenergie zur stofflichen Nutzung (PENRM) [MJ]: A1-A3 1.84, A4 0, A5 -1.84, C2 0, C4 0, D 0
- Total nicht erneuerbare Primärenergie (PENRT) [MJ]: A1-A3 766.65, A4 11.22, A5 10.7, C2 3.74, C4 6.87, D -353.83
- Einsatz von Sekundärstoffen (SM) [kg]: A1-A3 17.32, A4 0, A5 0, C2 0, C4 0, D 0
- Erneuerbare Sekundärbrennstoffe (RSF) [MJ]: A1-A3 0, A4 0, A5 0, C2 0, C4 0, D 0
- Nicht erneuerbare Sekundärbrennstoffe (NRSF) [MJ]: A1-A3 0, A4 0, A5 0, C2 0, C4 0, D 0
- Einsatz von Süßwasserressourcen (FW) [m^3]: A1-A3 0.242, A4 0.00108, A5 0.00518, C2 0.000359, C4 0.0945, D -0.0481

## Outputs
- Gefährlicher Abfall zur Deponie (HWD) [kg]: A1-A3 1.29e-6, A4 5.92e-7, A5 2.84e-9, C2 1.97e-7, C4 5.12e-9, D -1.99e-7
- Entsorgter nicht gefährlicher Abfall (NHWD) [kg]: A1-A3 2.95, A4 0.000901, A5 0.041, C2 0.0003, C4 0.0534, D -0.192
- Entsorgter radioaktiver Abfall (RWD) [kg]: A1-A3 0.0415, A4 2.34e-5, A5 0.000566, C2 7.81e-6, C4 0.00024, D -0.0159
- Komponenten für die Wiederverwendung (CRU) [kg]: A1-A3 0, A4 0, A5 0, C2 0, C4 0, D 0
- Stoffe zum Recycling (MFR) [kg]: A1-A3 0, A4 0, A5 0, C2 0, C4 0, D 0
- Stoffe für die Energierückgewinnung (MER) [kg]: A1-A3 0, A4 0, A5 0, C2 0, C4 0, D 0
- Exportierte elektrische Energie (EEE) [MJ]: A1-A3 0, A4 0, A5 1.55, C2 0, C4 76.5, D 0
- Exportierte thermische Energie (EET) [MJ]: A1-A3 0, A4 0, A5 3.57, C2 0, C4 176.47, D 0

## Impact indicators
- Globales Erwärmungspotenzial (GWP) [kg CO_(2)-Äq.]: A1-A3 16.22, A4 0.82, A5 1.19, C2 0.27, C4 49.98, D -24.27
- Abbau Potential der stratosphärischen Ozonschicht (ODP) [kg CFC11-Äq.]: A1-A3 4.55e-9, A4 3.41e-14, A5 6.15e-11, C2 1.14e-14, C4 2.74e-13, D -1.83e-11
- Versauerungspotenzial von Boden und Wasser (AP) [kg SO_(2)-Äq.]: A1-A3 0.12, A4 0.00246, A5 0.00175, C2 0.00082, C4 0.00391, D -0.0236
- Eutrophierungspotenzial (EP) [kg PO_(4)^(3)-Äq.]: A1-A3 0.0178, A4 0.000605, A5 0.000269, C2 0.000201, C4 0.00088, D -0.00412
- Bildungspotential für troposphärisches Ozon (POCP) [kg Ethen-Äq.]: A1-A3 0.288, A4 -0.000919, A5 0.00388, C2 -0.000306, C4 0.000282, D -0.00222
- Potenzial für den abiotischen Abbau nicht fossiler Ressourcen (ADPE) [kg Sb-Äq.]: A1-A3 2.3e-5, A4 6.69e-8, A5 3.15e-7, C2 2.23e-8, C4 1.32e-7, D -8.47e-6
- Potenzial für den abiotischen Abbau fossiler Brennstoffe (ADPF) [MJ]: A1-A3 661.17, A4 11.16, A5 9.26, C2 3.72, C4 6.26, D -313.68

## Use advice
Gültigkeitsbereich:
Die vorliegende EPD beschreibt eine Dämmplatte mit Neopor® Plus BMB (Biomassenbilanz-Ansatz). Das Granulat wird am Standort von BASF SE in Ludwigshafen hergestellt und die Weiterverarbeitung zur Platte erfolgt durch Karl Bachl Kunststoffverarbeitung GmbH & Co.KG in Röhrnbach.
Systemgrenze:
Typ der EPD: Cradle-to-Gate-mit Optionen

Die in der Lebenszyklusbewertung berücksichtigten Module sind:

A1: Rohstoffbereitstellung

A2: Transport zum Hersteller

A3: Herstellung

A4: Transport zur Baustelle

A5: Montage

C2: Transport zur Abfallbehandlung

C4: Entsorgung

D: Wiederverwendungs-, Verwertungs- oder Recyclingpotential

Die Analyse des Produktlebenszyklus umfasst die Herstellung der Grundstoffe, den Transport der Grundstoffe, die Herstellung des Produkts und der Verpackungsmaterialien in den Modulen A1- A3. Produktionsrückstände aus A3 wie z.B. Zuschnitte oder Randprofile werden in der Produktion wieder eingesetzt. Dies wurde bei der Berechnung der ökologischen Kennzahlen mit einbezogen.

Der Transport des Produkts wird in Modul A4 berücksichtigt. Die Entsorgung der Verpackungsmaterialien sowie die Herstellung, der Transport und die Entsorgung der auf der Baustelle anfallenden Verschnitte werden im Modul A5 betrachtet. Zurückgewonnene Energien aus Verbrennungsprozessen werden in Modul D über die Systemgrenze hinaus deklariert.

Die Nutzungsphase wird bei den Ökobilanz-Berechnungen nicht berücksichtigt.

Die End-of-Life-Modellierungen umfassen den Transport bis zum Ende der Lebensdauer (C2) sowie die Entsorgung des Produktes durch Verbrennung (C4).

Die Bilanzierung des Biomethans aus Küchenabfällen umfasst alle relevanten Prozessschritte von der Rohstoffgewinnung bis zur Herstellung (cradle-to-gate). Die Küchenabfälle haben keinen ökonomischen Wert und werden daher ohne Lasten berücksichtigt. Sie verlieren ihre Abfalleigenschaften sobald sie in Biogas umgewandelt sind.

Die Aufnahme von biogenem Kohlendioxid aus der Atmosphäre wird entsprechend dem biogenen Kohlenstoff-Gehalt im BMB-Produkt berücksichtigt (A1-A3). Bei der Entsorgung des Produktes werden biogene CO2-Emissionen wieder freigesetzt, die in C4 betrachtet sind.

## Data sources
- Dämmplatte mit Neopor® Plus BMB.pdf
- GaBi Database (all versions)
- GaBi database SP35 2018
