# Konstruktionsvollholz (Durchschnitt DE)

Dataset: ILCD process, EPD, representative dataset
Geography: DE
Reference year: 2021
Valid until: 2026
Classification: OEKOBAU.DAT: Holz / Vollholz / Konstruktionsvollholz
Method details: EN 15804; ILCD format
Generated by: Thünen-Institut für Holzforschung
Owner: Thünen-Institut für Holzforschung
Compliance: EN 15804+A2; EN 16485
Review: Independent external review by Dr. Frank Werner - Umwelt & Entwicklung
Amounts: rows without a unit in brackets have none in this file; such an amount is in the reference unit of its flow, which a separate flow dataset defines
copyright: true

## General comment
Der Datensatz wurde 2021 als Aktualisierung mit gleichbleibendem Vordergrundsystem erstellt. Alle Hintergrunddaten entstammen der GaBi Professional Datenbank in der Content Version 2021.1. Die Modellierung und Berechnung der Ökobilanz basiert auf den europäischen Normen EN 15804:2012+A2:2019 und EN 16485:2014. Bei Rückfragen wenden Sie sich bitte an holzundklima@thuenen.de.

## Geography
Für die Ökobilanzierung von KVH wurden Daten von 27 Werken berücksichtigt (Rüter & Diederichs 2012). Für alle in Rüter & Diederichs (2012) angeführten Vollholzprodukte wurden von 2009 bis 2011 insgesamt 178 Prozesslinien erfasst. Im Verhältnis zu den vom Statistischen Bundesamt gemeldeten Produktionsmengen im selben Zeitraum entspricht die erreichte Abdeckung von Vollholzprodukten aus Nadelschnittholz 38 %.

## Time period
Der Datensatz basiert auf Produktionsdaten aus den Jahren 2009 bis 2011 (Vordergrundsystem).
Eine Aktualisierung des Hintergrundsystems erfolgte 2021.

## Technology and included processes
Konstruktionsvollholz ist ein industriell gefertigtes Produkt für tragende Konstruktionen. Es besteht aus in der Länge kraftschlüssig mittels Keilzinkenverbindungen gestoßenen, kammergetrockneten Kanthölzern aus Nadelholz. Die im Produkt enthaltenen Bindemittel sind vorwiegend auf Basis von Melamin-Harnstoff-Formaldehyd und Polyurethan. Vereinzelt kommen Phenol-Resorzin-Harze zum Einsatz. Das Produkt wird nicht mit Holzschutzmitteln oder ähnlichen Mitteln behandelt. Das auf weniger als 18 % Holzfeuchte getrocknete konventionelle Schnittholz (kammergetrocknetes Schnittholz) wird zunächst vorgehobelt und visuell bzw. maschinell nach der Festigkeit sortiert (Hobelware). Identifizierte Kantholzabschnitte mit festigkeitsvermindernden Stellen werden abhängig von der erwünschten Festigkeitsklasse ausgekappt und die entstandenen Kanthölzer werden je nach gewünschter Länge ggf. durch Keilzinkenverbindung zu endlos langen Lamellen gestoßen. Nach Aushärtung, bei nicht keilgezinktem Konstruktionsvollholz unmittelbar nach der Festigkeitssortierung, wird der Rohling gehobelt, gefast, abgebunden und verpackt.
Die Holzfeuchte des Produktes liegt bei 12%

## Technical purpose
KVH® findet Anwendung als tragende Bauteile in Konstruktionen des Hoch- und Brückenbaus.

## Scenarios
- energetisch (Modul D): therm. Verwertung
- stofflich (Modul D): stoffl. Verwertung
- Entsorgung Verpackung (Modul A5): Das Modul A5 enthält ausschließlich die Entsorgung der Verpackungsmaterialien

## Reference product
- KVH (Durchschnitt DE): 1

## Inputs
- Erneuerbare Primärenergie als Energieträger (PERE) / Uso de energía primaria renovable excluyendo los recursos de energía primaria renovable utilizada como materia prima (PERE) [MJ]: A1 986.967, A2 6.07122, A3 1255.61, A1-A3 2248.65, A5 (Entsorgung Verpackung) 0.283765, C2 0.395384, C3 100.439, D (energetisch) 5982.55, D (stofflich) -37.9841
- Erneuerbare Primärenergie zur stofflichen Nutzung (PERM) / Uso de energía primaria renovable utilizada como materia prima (PERM) [MJ]: A1 8472.5, A2 0, A3 37.9333, A1-A3 8510.43, A5 (Entsorgung Verpackung) -37.9333, C2 0, C3 -8472.5, D (energetisch) 0, D (stofflich) 0
- Total erneuerbare Primärenergie (PERT) / Uso total de la energía primaria renovable (energía primaria y recursos de energía primaria renovable utilizada como materia prima) (PERT) [MJ]: A1 9459.46, A2 6.07122, A3 1293.54, A1-A3 10759.1, A5 (Entsorgung Verpackung) -37.6495, C2 0.395384, C3 -8372.06, D (energetisch) 5982.55, D (stofflich) -37.9841
- Nicht-erneuerbare Primärenergie als Energieträger (PENRE) / Uso de energía primaria no renovable, excluyendo los recursos de energía primaria no renovable utilizada como materia prima (PENRE) [MJ]: A1 475.046, A2 102.633, A3 521.195, A1-A3 1098.87, A5 (Entsorgung Verpackung) 1.46605, C2 7.09428, C3 153.986, D (energetisch) -4634.82, D (stofflich) -175.927
- Nicht-erneuerbare Primärenergie zur stofflichen Nutzung (PENRM) / Uso de la energía primaria no renovable utilizada como materia prima (PENRM) [MJ]: A1 5.17577, A2 0, A3 20.232, A1-A3 25.4078, A5 (Entsorgung Verpackung) -20.232, C2 0, C3 -5.17577, D (energetisch) 0, D (stofflich) 0
- Total nicht erneuerbare Primärenergie (PENRT) / Uso total de la energía primaria no renovable (energía primaria y recursos de energía primaria renovable utilizada como materia prima) (PENRT) [MJ]: A1 480.222, A2 102.633, A3 541.427, A1-A3 1124.28, A5 (Entsorgung Verpackung) -18.766, C2 7.09428, C3 148.81, D (energetisch) -4634.82, D (stofflich) -175.927
- Einsatz von Sekundärstoffen (SM) / Uso de materiales secundarios (SM) [kg]: A1 0, A2 0, A3 0, A1-A3 0, A5 (Entsorgung Verpackung) 0, C2 0, C3 0, D (energetisch) 0, D (stofflich) 492.931
- Erneuerbare Sekundärbrennstoffe (RSF) / Uso de combustibles secundarios renovables (RSF) [MJ]: A1 67.3262, A2 0, A3 106.379, A1-A3 173.705, A5 (Entsorgung Verpackung) 0, C2 0, C3 0, D (energetisch) 0, D (stofflich) 0
- Nicht erneuerbare Sekundärbrennstoffe (NRSF) / Uso de combustibles secundarios no renovables (NRSF) [MJ]: A1 0, A2 0, A3 0, A1-A3 0, A5 (Entsorgung Verpackung) 0, C2 0, C3 0, D (energetisch) 0, D (stofflich) 0
- Einsatz von Süßwasserressourcen (FW) / Uso neto de recursos de agua dulce (FW) [m3]: A1 0.0828656, A2 0.00630807, A3 0.135536, A1-A3 0.224709, A5 (Entsorgung Verpackung) 0.0161698, C2 0.000452579, C3 0.0472656, D (energetisch) 0.779893, D (stofflich) -0.0204565

## Outputs
- Gefährlicher Abfall zur Deponie (HWD) / Residuos peligrosos eliminados (HWD) [kg]: A1 7.69226e-7, A2 4.97624e-9, A3 1.0002e-6, A1-A3 1.7744e-6, A5 (Entsorgung Verpackung) 2.65846e-10, C2 3.57476e-10, C3 5.59893e-8, D (energetisch) -1.60263e-6, D (stofflich) -2.3144e-7
- Entsorgter nicht gefährlicher Abfall (NHWD) / Residuos no peligrosos eliminados (NHWD) [kg]: A1 0.802539, A2 0.0160997, A3 1.05283, A1-A3 1.87147, A5 (Entsorgung Verpackung) 0.0553652, C2 0.00105387, C3 0.11997, D (energetisch) 2.48354, D (stofflich) -0.0390354
- Entsorgter radioaktiver Abfall (RWD) / Residuos radiactivos eliminados (RWD) [kg]: A1 0.014437, A2 0.000203886, A3 0.032422, A1-A3 0.0470629, A5 (Entsorgung Verpackung) 6.88488e-5, C2 8.58142e-6, C3 0.0123357, D (energetisch) -0.284416, D (stofflich) -0.00404324
- Komponenten für die Wiederverwendung (CRU) / Componentes para su reutilización (CRU) [kg]: A1 0, A2 0, A3 0, A1-A3 0, A5 (Entsorgung Verpackung) 0, C2 0, C3 0, D (energetisch) 0, D (stofflich) 0
- Stoffe zum Recycling (MFR) / Materiales para el reciclaje (MFR) [kg]: A1 0, A2 0, A3 0, A1-A3 0, A5 (Entsorgung Verpackung) 0, C2 0, C3 492.931, D (energetisch) 0, D (stofflich) 0
- Stoffe für die Energierückgewinnung (MER) / Materiales para valorización energética (recuperación de energía) (MER) [kg]: A1 0, A2 0, A3 0, A1-A3 0, A5 (Entsorgung Verpackung) 1.96841, C2 0, C3 492.931, D (energetisch) 0, D (stofflich) 0
- Exportierte elektrische Energie (EEE) / Energía exportada electrica (EEE) [MJ]: A1 0, A2 0, A3 0.121649, A1-A3 0.121649, A5 (Entsorgung Verpackung) 10.6018, C2 0, C3 0, D (energetisch) 0, D (stofflich) 0
- Exportierte thermische Energie (EET) / Energía exportada termal (EET) [MJ]: A1 0, A2 0, A3 0.282604, A1-A3 0.282604, A5 (Entsorgung Verpackung) 20.7597, C2 0, C3 0, D (energetisch) 0, D (stofflich) 0

## Impact indicators
- Globales Erwärmungspotenzial - total (GWP-total) [kg CO2-Äqv.]: A1 -767.774, A2 7.58367, A3 37.4763, A1-A3 -722.714, A5 (Entsorgung Verpackung) 5.54754, C2 0.511866, C3 818.163, D (energetisch) -338.831, D (stofflich) -13.2947
- Globales Erwärmungspotenzial - fossil (GWP-fossil) [kg CO2-Äqv.]: A1 38.2508, A2 7.58367, A3 41.0851, A1-A3 86.9196, A5 (Entsorgung Verpackung) 1.93878, C2 0.511866, C3 12.138, D (energetisch) -338.831, D (stofflich) -13.2947
- Globales Erwärmungspotenzial - biogen (GWP-biogenic) [kg CO2-Äqv.]: A1 -806.025, A2 0, A3 -3.60876, A1-A3 -809.634, A5 (Entsorgung Verpackung) 3.60876, C2 0, C3 806.025, D (energetisch) 0, D (stofflich) 0
- Abbaupotenzial der stratosphärischen Ozonschicht (ODP) [kg CFC 11-Äquiv.]: A1 4.77126e-13, A2 2.25527e-15, A3 1.08865e-12, A1-A3 1.56803e-12, A5 (Entsorgung Verpackung) 9.42546e-16, C2 6.79984e-17, C3 4.15483e-13, D (energetisch) -9.57665e-12, D (stofflich) -1.34739e-13
- Versauerungspotenzial, kumulierte Überschreitung (AP) [mol H+ eqv.]: A1 0.308988, A2 0.0444991, A3 0.262308, A1-A3 0.615795, A5 (Entsorgung Verpackung) 0.00102181, C2 0.00309023, C3 0.0174679, D (energetisch) -0.310408, D (stofflich) -0.0669204
- Eutrophierungspotenzial - Süßwasser (EP-freshwater) [kg P eqv.]: A1 0.000116405, A2 2.01977e-5, A3 0.000216101, A1-A3 0.000352703, A5 (Entsorgung Verpackung) 1.41992e-7, C2 1.57994e-6, C3 5.08852e-5, D (energetisch) -0.00117643, D (stofflich) -3.22096e-5
- Eutrophierungspotenzial - Salzwasser (EP-marine) [kg N eqv.]: A1 0.139691, A2 0.0218439, A3 0.109407, A1-A3 0.270942, A5 (Entsorgung Verpackung) 0.000292086, C2 0.00151416, C3 0.00558653, D (energetisch) -0.110953, D (stofflich) -0.0316421
- Eutrophierungspotenzial - Land (EP-terrestrial) [mol N eqv.]: A1 1.55554, A2 0.241748, A3 1.22807, A1-A3 3.02536, A5 (Entsorgung Verpackung) 0.0048544, C2 0.0167592, C3 0.0583261, D (energetisch) -0.90318, D (stofflich) -0.348131
- Bildungspotenzial für troposphärisches Ozon (POCP) [kg NMVOC eqv.]: A1 0.392576, A2 0.0411229, A3 0.317989, A1-A3 0.751688, A5 (Entsorgung Verpackung) 0.000783913, C2 0.00285563, C3 0.0138795, D (energetisch) -0.277402, D (stofflich) -0.0818738
- Potenzial für die Verknappung abiotischer Ressourcen – nicht fossile Ressourcen (ADPE) [kg Sb-Äqv.]: A1 1.62655e-5, A2 6.26673e-7, A3 1.7412e-5, A1-A3 3.43043e-5, A5 (Entsorgung Verpackung) 1.44084e-8, C2 4.05188e-8, C3 4.98206e-6, D (energetisch) -0.000119802, D (stofflich) -2.36558e-6
- Potenzial für die Verknappung abiotischer Ressourcen – fossile Brennstoffe (ADPF) [MJ]: A1 480.136, A2 102.547, A3 521.009, A1-A3 1103.69, A5 (Entsorgung Verpackung) 1.46535, C2 7.08483, C3 153.938, D (energetisch) -4638.91, D (stofflich) -175.906
- Wasser-Entzugspotenzial (Benutzer) (WDP) [m3 world eqv.]: A1 0.0828656, A2 0.00630807, A3 0.135536, A1-A3 0.224709, A5 (Entsorgung Verpackung) 0.0161698, C2 0.000452579, C3 0.0472656, D (energetisch) 0.779893, D (stofflich) -0.0204565
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
## Use advice
Aufgrund der hohen Abdeckung bildet der Datensatz die durchschnittlichen Produktionsverhältnisse und die damit verbundenen Umweltwirkungen repräsentativ für Deutschland ab. Liegen keine herstellerspezifischen Ökobilanzergebnisse des verwendeten Produkts vor, empfiehlt sich die Verwendung dieses Durchschnittsdatensatzes.

## Data sources
- Rüter S, Diederichs S (2012) Ökobilanz Basisdaten für Bauprodukte aus Holz, Hamburg, Johann Heinrich von Thünen Institut, Institut für Holztechnologie und Holzbiologie, Abschlussbericht
- GaBi database (general)
