# Kalk (CaO; Feinkalk); CaO finelime, density of CaO: 3,37 g·cm3 (20 °C), molar mass of CaO: 56,08 g·mol1

Dataset: ILCD process, EPD, generic dataset
Geography: DE
Reference year: 2018
Valid until: 2022
Classification: oekobau.dat: Mineralische Baustoffe / Bindemittel / Kalk
Owner: thinkstep
Compliance: DIN EN 15804
Review: Dependent internal review by thinkstep, IABP-GaBi, IBP-GaBi; Independent external review by GaBi user forum, GaBi bug forum, GaBi user community
Amounts: rows without a unit in brackets have none in this file; such an amount is in the reference unit of its flow, which a separate flow dataset defines
copyright: true

## General comment
Dieser Datensatz wurde nach dem European Standard EN 15804 für Nachhaltiges Bauen modelliert. Ergebnisse werden in Modulen abgebildet, die den strukturierten Ausdruck von Ergebnissen über den gesamten Lebenszyklus zulassen.

## Geography
Der Datensatz bildet die länderspezifische Situation in Deutschland ab. Dabei werden Haupttechnologien, spezifische regionale Charakteristiken und ggf. Importstatistiken berücksichtigt.

## Time period
Jährlicher Durchschnitt

## Technology and included processes
Um Calciumoxid (CaO) herzustellen, wird Kalkstein (CaCO3) durch erhöhte Temperatur in Kalk und Kohlensäure aufgeteilt. Der Reaktions-Wärmeinhalt ist 3010 kJ/kg. Im Brennofen beträgt die Gastemperatur gewöhnlich 1200 - 1300 °C, mindestens 900 °C werden für die Reaktion benötigt. Die durch die endotherme Reaktion verbrauchte Energie wird durch Brennkoks geliefert. Die verwendeten Brennöfen sind normalerweise Seigerschaft-Öfen. Oben wird eine Mischung aus Kalkstein und Koks in den Brennofen eingefüllt. Der erste Schritt ist die Vorheiz-Zone, die ca. 800 ° C heiß ist. Wenn das Kalkstein-Kraftstoff-Gemisch sich abwärts bewegt, erreicht es die Kalkbrenn-Zone. Dort entstehen Temperaturen von 1200 bis 1300 °C, die durch die Kraftstoff-Verbrennung verursacht werden. Luft wird eingeführt, um die Verbrennung zu ermöglichen. In der Kalkbrenn-Zone findet die Zersetzung des Kalksteins statt. Die heißen (CO2 enthaltenden) Gase steigen auf und erhitzen die Vorheiz-Zone. Das durch die Kalkbrennung hergestellte Calciumoxid bewegt sich hinunter zur letzten Zone, der Kühlzone, wo es abkühlt. Eine Alternative zum Seigerschaft-Ofen stellt der Drehofen dar. Das Vorheiz- und Reaktionsverfahren ist dasselbe, aber der Ofen besteht aus einer horizontalen (leicht schrägen), sich drehenden Trommel, die Kalkstein-Kraftstoff-Gemisch bewegt sich die abschüssige Fläche hinunter. Der Kalk, der den Ofen verlässt, wird Ätzkalk/Kalkerde genannt, seine Partikelgröße ist immer noch zu groß. Ätzkalk/Kalkerde wird in Röhrenwerken zu Feinkalk zermahlen. In vielen Fällen ist es üblich, Hilfsmaterialien zum Mahlen wie Alkohol oder Amine (< 0,2 %)zu verwenden. Teilweise werden Luftstromsichter verwendet, um eine verbesserte Qualität mit einer besseren Gesetzmäßigkeit zu erhalten. Mit den Fertigerzeugnissen werden dann die Fertigerzeugnis-Bunker beliefert.

Hintergrundsystem:

Strom: Die Stromerzeugung wird entsprechend der länderspezifischen Randbedingungen modelliert. Die landesspezifische Analyse beinhaltet:
1.: Spezifische Kraftwerke der verschiedenen fossilen Energieträger und der Einsatz erneuerbarer Energien sind entsprechend der länderspezifischen Energieträgermixe modelliert. Die Analyse bezieht Stromimporte aus den Nachbarländern, Transmissions-und Verteilungsverluste und den Eigenverbrauch im Kraftwerk und bei der Verteilung bzw. Speicherung, z. B. durch Pumpspeicherwerke, ein.
2.: Die landes-/regionalspezifischen Technologiestandards sowie die Erzeugung in Elektrizitätskraftwerken und/oder in speziellen Kraftwerken mit Kraft-Wärme-Kopplung (KWK) sind berücksichtigt.
3.: Die länderspezifische Energieträgerbereitstellung (mit Anteil der Importe und/oder Eigenversorgung) einschließlich der Energieträger-Eigenschaften (z. B. Elementar- und Energiegehalte) werden berücksichtigt.
4.: Die Förderung, Produktion, Verarbeitung und Transportprozesse werden entsprechend der Situation im jeweiligen Stromerzeugerland modelliert. Die unterschiedlichen Produktions- und Verarbeitungsverfahren (Emissionen und Wirkungsgrade) in den verschiedenen Energieerzeugerländern werden einbezogen, z. B. Rohöl-Veredelungsverfahren oder Abfackel-Raten an den Ölplattformen.
Thermische Energie, Prozessdampf: Die Erzeugung von Dampf und thermischer Energie in Heizkraftwerken wird entsprechend der landesspezifischen Situation (Emissionsgrenzwerte, Energieträgerbasis) modelliert.
Der Wirkungsgrad für die thermische Energieerzeugung beträgt per Definition 100% des Energieträgereinsatzes. Für Prozessdampf liegt der Wirkungsgrad im Bereich von 85-95%. Die zur Heizenergie-Erzeugung verwendeten Energieträger werden entsprechend der nationalen Situation modelliert (siehe Kapitel Strom oben).
Transporte: Alle relevanten und bekannten Transportprozesse in Form von See- und Binnenschiffsverkehr sowie Bahn-, Lkw- und der Leitungstransport sind enthalten.
Energieträger: Die Energieträger werden entsprechend der spezifischen Versorgungslage modelliert (siehe Kapitel Strom oben).
Raffinerieprodukte: Diesel, Benzin, technische Gase, Heizöl, Schmierstoffe und Rückstände, wie Bitumen, werden mit einem parametrierten länderspezifische Raffineriemodell modelliert. Das Raffinerie-Modell bezieht die länderspezifischen Veredelungsverfahren (z. B. Emissionspegel, interner Energieverbrauch etc.) und das länderspezifische Produktspektrum ein, das sich je nach Land stark unterscheiden kann. Die Rohöl-Förderung wird gemäß der länderspezifischen Situation mit den jeweiligen Energieträger-Eigenschaften modelliert.
"

## Technical purpose
Dieses Produkt kann im Baubereich verwendet werden.

## Safety margin
20 %. Produktsystem bis auf wenige Prozesse/Flüsse abgebildet. Technologische, zeitliche und geographische Repräsentativität teilweise gegeben.

## Reference product
- Kalk Feinkalk (gemahlen): 1

## Inputs
- Erneuerbare Primärenergie als Energieträger (PERE) [MJ]: A1-A3 0.577359
- Erneuerbare Primärenergie zur stofflichen Nutzung (PERM) [MJ]: A1-A3 0
- Total erneuerbare Primärenergie (PERT) [MJ]: A1-A3 0.577359
- Nicht-erneuerbare Primärenergie als Energieträger (PENRE) [MJ]: A1-A3 4.34032
- Nicht-erneuerbare Primärenergie zur stofflichen Nutzung (PENRM) [MJ]: A1-A3 0
- Total nicht erneuerbare Primärenergie (PENRT) [MJ]: A1-A3 4.34032
- Einsatz von Sekundärstoffen (SM) [kg]: A1-A3 0
- Erneuerbare Sekundärbrennstoffe (RSF) [MJ]: A1-A3 0
- Nicht erneuerbare Sekundärbrennstoffe (NRSF) [MJ]: A1-A3 0
- Einsatz von Süßwasserressourcen (FW) [m3]: A1-A3 0.000505446

## Outputs
- Gefährlicher Abfall zur Deponie (HWD) [kg]: A1-A3 7.94829e-9
- Entsorgter nicht gefährlicher Abfall (NHWD) [kg]: A1-A3 0.00202818
- Entsorgter radioaktiver Abfall (RWD) [kg]: A1-A3 8.23752e-5
- Komponenten für die Wiederverwendung (CRU) [kg]: A1-A3 0
- Stoffe zum Recycling (MFR) [kg]: A1-A3 0
- Stoffe für die Energierückgewinnung (MER) [kg]: A1-A3 0
- Exportierte elektrische Energie (EEE) [MJ]: A1-A3 0
- Exportierte thermische Energie (EET) [MJ]: A1-A3 0

## Impact indicators
- Globales Erwärmungspotenzial (GWP) [kg CO2 Äquiv.]: A1-A3 1.44393
- Abbaupotenzial der stratosphärischen Ozonschicht (ODP) [kg R11 Äquiv.]: A1-A3 3.19287e-15
- Versauerungspotential (AP) [kg SO2 Äquiv.]: A1-A3 0.000323581
- Eutrophierungspotential (EP) [kg Phosphat Äquiv.]: A1-A3 6.87835e-5
- Bildungspotenzial für troposphärisches Ozon (POCP) [kg Ethen Äquiv.]: A1-A3 5.4772e-6
- Potenzial für den abiotischen Abbau nicht fossiler Ressourcen (ADPE) [kg Sb Äquiv.]: A1-A3 3.65846e-8
- Potenzial für den abiotischen Abbau fossiler Brennstoffe (ADPF) [MJ]: A1-A3 4.13234

## Use advice
Der Datensatz repräsentiert ein Cradle to Gate Inventar. Er kann verwendet werden, um die Lieferkette des jeweiligen Produktes in einer repräsentativen Weise zu charakterisieren. Die Kombination mit einzelnen Einheitenprozessen und diesem Produkt ermöglicht die Erstellung von anwenderspezifischen (Produkt-) LCAs.

## Data sources
- GaBi Database Edition 2020, SP40
- GaBi database (all versions)
- Ökologische Bilanzierung von Baustoffen und Gebäuden, 2000
- Umweltgesichtspunkte bei der Herstellung und Anwendung von Kalkprodukten, 1995
