# EGGER Eurodekor - beschichtete MDF

Dataset: ILCD process, EPD, average dataset
Geography: DE
Reference year: 2021
Valid until: 2026
Classification: OEKOBAU.DAT: Holz / Holzwerkstoffe / Holzfaserplatten
Classification: IBUCategories: 02 Bauprodukte / Holzwerkstoffe / Holzwerkstoffe
Method details: Holzwerkstoffe.pdf
Generated by: Daxner & Merl GmbH
Registration number: EPD-EGG-20200252-IBC1-DE
Owner: Fritz EGGER GmbH & Co. OG
Compliance: DIN EN 15804+A2; ISO 14025
Review: Accredited third party review by Institut Bauen und Umwelt e. V.
Amounts: rows without a unit in brackets have none in this file; such an amount is in the reference unit of its flow, which a separate flow dataset defines
copyright: true
licenseType: Free of charge for all users and uses
accessRestrictions: None

## General comment
Beschichtete MDF-Platten Eurodekor sind plattenförmige Werkstoffe gemäß

EN 622-5, Faserplatten Anforderungen - Teil 5: Anforderungen an Platten nach dem Trockenverfahren (MDF) und
EN 14322:2017-03, Holzwerkstoffe ― Melaminbeschichtete Platten zur Verwendung im Innenbereich ― Definition, Anforderungen und Klassifizierung.Diese Werkstoffplatten werden vorwiegend als Möbelplatte eingesetzt. Sie finden bspw. als Tiefziehfronten im Küchenbereich Anwendung. Die dekorative Zeichnung wird mittels eines bedruckten Dekorpapiers erreicht.

Bei der Verpressung wird der Oberfläche gleichzeitig eine entsprechende Haptik verliehen.

Betrachtet wird die durchschnittliche Leimflotte über alle Plattentypen. Die Produktionsbedingungen des Standortes Brilon sind vergleichbar mit jenen der anderen Werke. Sie entsprechen den in allen Standorten eingesetzten Technologien und Standards.

## Technology and included processes
Herstellung der Rohplatten (EGGER MDF): 1. Holzaufbereitung - Rundholzzerspanung - Hackschnitzelaufbereitung - Restholzaufbereitung 2. Kochen der Späne 3. Zerfaserung im Refiner 4. Trockung der Fasern auf ca. 2-3 % Restfeuchte 5. Beleimung der Fasern mit Harzen 6. Streuung der beleimten Fasern auf ein Formband 7. Verpressen der Fasermatte in einer kontinuierlich arbeitenden Heißpresse 8. Aufteilen und Besäumen des Faserstranges zu Rohplattenformaten 9. Auskühlen der Rohplatten in Sternkühlwendern 10. Abstapelung zu Großstapeln 11. Nach Klimatisierungsphase Schleifen der Ober- und Unterseite Herstellung der Imprägnate für die Beschichtung: 1. Abwicklung der Rohpapiere 2. Aufnahme von Imprägnierharz (MUF) in der Anlage 3. Trocknung des imprägnierten Papiers in beheizten Trocknern 4. Formatierung des endlosen Papiers mittels Querschneider 5. Abstapelung der formatierten Bögen auf Paletten Herstellung der beschichteten MDF Platte (EGGER Eurodekor): 1. Legung der Imprägnate auf die Ober- und Unterseite der Rohplatte 2. Verpressung der Platte in der Heißpresse mit verschieden strukturierten Pressblechen 3. Qualitätssortierung und Abstapelung 4. Klimatisierungsphase von bis zu 14 Tagen Alle während der Produktion anfallenden Reste (Besäum-, Schneid- und Fräsreste) werden ausnahmslos einer thermischen Verwertung zugeführt. Das Qualitätsmanagementsystem ist nach den Anforderungen der ISO 9001 implementiert und zertifiziert.
Technische Daten:
Definitionen, Anforderungen und Klassifizierungen melaminbeschichteter Platten zur Verwendung im Innenbereich wie Oberflächeneigenschaften und Maßtoleranzen liefert die Norm EN 14322:2017-03. Detaillierte Angaben entnehmen Sie bitte den technischen Datenblättern, verfügbar auf www.egger.com.
Deklarierte Einheit:
Die vorliegende Umwelt-Produktdeklaration bezieht sich auf eine deklarierte Einheit von 1 m² EGGER Eurodekor beschichtete MDF mit einer mittleren Dichte von 13,22 kg/m² und einer Auslieferungsfeuchte von etwa 6 %.

## Technical purpose
Beschichtete MDF-Platten werden im Innenbereich für höherwertige Zwecke im Möbelbau eingesetzt. MDF-Platten können aufgrund ihres homogenen Aufbaues dreidimensional ausgefräst und anschließend

entweder lackiert oder mit einer Folie in einer Membranpresse beschichtet werden. Häufig werden solcherart hergestellte Platten als Fronten für hochwertige Küchen eingesetzt.

## Reference product
- Eurodekor MDF: 1

## Inputs
- Erneuerbare Primärenergie als Energieträger (PERE) [MJ]: A1-A3 30.5723, C1 0, C2 0.0320797, C3 197.684, C4 0, D -49.2272
- Erneuerbare Primärenergie zur stofflichen Nutzung (PERM) [MJ]: A1-A3 200.636, C1 0, C2 0, C3 -196.807, C4 0, D 0
- Total erneuerbare Primärenergie (PERT) [MJ]: A1-A3 231.209, C1 0, C2 0.0320797, C3 0.876294, C4 0, D -49.2272
- Nicht-erneuerbare Primärenergie als Energieträger (PENRE) [MJ]: A1-A3 120.005, C1 0, C2 0.557039, C3 33.3809, C4 0, D -195.527
- Nicht-erneuerbare Primärenergie zur stofflichen Nutzung (PENRM) [MJ]: A1-A3 31.4112, C1 0, C2 0, C3 -31.402, C4 0, D 0
- Total nicht erneuerbare Primärenergie (PENRT) [MJ]: A1-A3 151.416, C1 0, C2 0.557039, C3 1.97886, C4 0, D -195.527
- Einsatz von Sekundärstoffen (SM) [kg]: A1-A3 0.0030135, C1 0, C2 0, C3 0, C4 0, D 0
- Erneuerbare Sekundärbrennstoffe (RSF) [MJ]: A1-A3 14.808, C1 0, C2 0, C3 0, C4 0, D 184.573
- Nicht erneuerbare Sekundärbrennstoffe (NRSF) [MJ]: A1-A3 0, C1 0, C2 0, C3 0, C4 0, D 29.45
- Einsatz von Süßwasserressourcen (FW) [m^3]: A1-A3 0.0305629, C1 0, C2 3.73837e-5, C3 0.00101322, C4 0, D -0.0398128

## Outputs
- Gefährlicher Abfall zur Deponie (HWD) [kg]: A1-A3 1.64243e-6, C1 0, C2 2.57584e-8, C3 8.18635e-10, C4 0, D -6.61734e-8
- Entsorgter nicht gefährlicher Abfall (NHWD) [kg]: A1-A3 0.134319, C1 0, C2 8.82863e-5, C3 0.00140296, C4 0, D 0.00714826
- Entsorgter radioaktiver Abfall (RWD) [kg]: A1-A3 0.00433523, C1 0, C2 1.02668e-6, C3 0.000300049, C4 0, D -0.0168305
- Komponenten für die Wiederverwendung (CRU) [kg]: A1-A3 0, C1 0, C2 0, C3 0, C4 0, D 0
- Stoffe zum Recycling (MFR) [kg]: A1-A3 0, C1 0, C2 0, C3 0, C4 0, D 0
- Stoffe für die Energierückgewinnung (MER) [kg]: A1-A3 0, C1 0, C2 0, C3 13.9683, C4 0, D 0
- Exportierte elektrische Energie (EEE) [MJ]: A1-A3 0, C1 0, C2 0, C3 0, C4 0, D 0
- Exportierte thermische Energie (EET) [MJ]: A1-A3 0, C1 0, C2 0, C3 0, C4 0, D 0

## Impact indicators
- Globales Erwärmungspotenzial total (GWP-total) [kg CO_(2)-Äq.]: A1-A3 -11.0819, C1 0, C2 0.0420894, C3 19.6226, C4 0, D -9.50619
- Globales Erwärmungspotenzial fossil (GWP-fossil) [kg CO_(2)-Äq.]: A1-A3 8.25906, C1 0, C2 0.0418226, C3 0.112492, C4 0, D -9.46843
- Globales Erwärmungspotenzial biogen (GWP-biogenic) [kg CO_(2)-Äq.]: A1-A3 -19.3545, C1 0, C2 -6.98079e-5, C3 19.5099, C4 0, D -0.0285193
- Globales Erwärmungspotenzial luluc (GWP-luluc) [kg CO_(2)-Äq.]: A1-A3 0.0134743, C1 0, C2 0.000336591, C3 0.000162981, C4 0, D -0.0092426
- Abbau Potential der stratosphärischen Ozonschicht (ODP) [kg CFC11-Äq.]: A1-A3 1.56017e-11, C1 0, C2 7.63192e-18, C3 2.47385e-15, C4 0, D -1.38656e-13
- Versauerungspotenzial von Boden und Wasser (AP) [mol H^(+)-Äq.]: A1-A3 0.0256952, C1 0, C2 0.000141328, C3 0.000248365, C4 0, D 0.00761486
- Eutrophierungspotenzial Süßwasser (EP-freshwater) [kg PO_(4)-Äq.]: A1-A3 2.55626e-5, C1 0, C2 1.26658e-7, C3 3.00465e-7, C4 0, D -1.69825e-5
- Eutrophierungspotenzial Salzwasser (EP-marine) [kg N-Äq.]: A1-A3 0.0113234, C1 0, C2 6.3758e-5, C3 5.51611e-5, C4 0, D 0.00193121
- Eutrophierungspotenzial Land (EP-terrestrial) [mol N-Äq.]: A1-A3 0.108966, C1 0, C2 0.000712216, C3 0.000579536, C4 0, D 0.022952
- Bildungspotential für troposphärisches Ozon (POCP) [kg NMVOC-Äq.]: A1-A3 0.0279385, C1 0, C2 0.000125264, C3 0.000151169, C4 0, D 0.00815703
- Potenzial für den abiotischen Abbau nicht fossiler Ressourcen (ADPE) [kg Sb-Äq.]: A1-A3 3.77663e-6, C1 0, C2 3.36249e-9, C3 3.25541e-8, C4 0, D -2.08473e-6
- Potenzial für den abiotischen Abbau fossiler Brennstoffe (ADPF) [MJ]: A1-A3 151.381, C1 0, C2 0.554814, C3 1.97846, C4 0, D -195.504
- Wassernutzung (WDP) [m^(3) Welt-Äq. entzogen]: A1-A3 0.303357, C1 0, C2 0.00040548, C3 0.0245131, C4 0, D -0.639854
- Auftreten von Krankheiten aufgrund von Feinstaubemissionen (PM) [Krankheitsfälle]: A1-A3 2.24548e-7, C1 0, C2 7.98542e-10, C3 2.08305e-9, C4 0, D -4.11858e-8
- Wirkung durch Exposition des Menschen mit U235 (IR) [kBq U235-Äq.]: A1-A3 0.429008, C1 0, C2 0.00015146, C3 0.0492278, C4 0, D -2.76121
- Toxizitätsvergleichseinheit für Ökosysteme (ETP-fw) [CTUe]: A1-A3 42.7166, C1 0, C2 0.415109, C3 0.846711, C4 0, D -47.8851
- Toxizitätsvergleichseinheit für Menschen (krebserregend) (HTP-c) [CTUh]: A1-A3 4.17239e-8, C1 0, C2 8.57972e-12, C3 2.33808e-11, C4 0, D -1.89382e-10
- Toxizitätsvergleichseinheit für Menschen (nicht krebserregend) (HTP-nc) [CTUh]: A1-A3 7.58432e-8, C1 0, C2 4.94367e-10, C3 8.61445e-10, C4 0, D 5.53527e-8
- Bodenqualitätsindex (SQP) [SQP]: A1-A3 1420.03, C1 0, C2 0.194746, C3 0.629672, C4 0, D -35.9551

## Use advice
Gültigkeitsbereich:
Dieses Dokument bezieht sich auf beschichtete MDF-Platten EGGER Eurodekor, produziert mit einer durchschnittlichen Leimflotte am Standort Brilon, Deutschland.

Die Produktionsbedingungen in Brilon sind vergleichbar mit jenen der anderen Werke. Sie entsprechen den in allen Standorten eingesetzten Technologien und Standards.
Systemgrenze:
Die Ökobilanz der durchschnittlichen EGGER Eurodekor beschichteten MDF beinhaltet eine cradle-to-gate Betrachtung (Wiege bis zum Werkstor) der auftretenden Umweltwirkungen mit den Modulen C1-C4 und Modul D (A1-A3,+C,+D). Die folgenden Lebenszyklusphasen werden in der Analyse berücksichtigt:

Modul A1–A3 | Produktionsstadium

Das Produktionsstadium beinhaltet die Aufwendungen der Rohstoffversorgung (Rundholz, Altholz, Sägespäne, Leimsystem, Hilfsstoffe, etc.) sowie der damit verbundenen Transporte zum Produktionsstandort in Brilon. Innerhalb der Werksgrenzen werden der Holzplatz, die Nassspanaufbereitung, Trocknung, Beleimung, Streuung, das Pressen, die Schleifstraße bis zum Lager und der Versand berücksichtigt. Die Eurodekor-Produkte werden darüber hinaus durch das Aufbringen einer Imprägnierung in den Kurztaktpressen veredelt und anschließend verpackt. Die Bereitstellung von thermischer und elektrischer Energie, Druckluft und Wasser erfolgt durch zentrale Versorger am Standort Brilon. Der Großteil der eingesetzten elektrischen Energie wird vom deutschen Stromnetz bezogen. Im eigenen Biomasse-Kraftwerk wird sowohl internes Restholz als auch extern bezogenes Altholz verwertet. Die Systemgrenze für in der Produktion verwendetes Altholz wird nach dem Sortieren und Hacken gesetzt. Dabei wird angenommen, dass das Ende der Abfalleigenschaft erreicht ist. Hier gilt die nach EN 15804 definierte Systemgrenze für Sekundärrohstoffe.

Modul C1 | Rückbau / Abriss

Für die Eurodekor beschichtete MDF-Platten wurde ein

manueller Ausbau angenommen. Die damit verbundenen Aufwände sind vernachlässigbar, wodurch keine Umweltwirkungen aus dem Rückbau der Produkte deklariert werden.

Modul C2 | Transport zur Abfallbehandlung

Modul C2 beinhaltet den Transport zur Abfallbehandlung. Dazu wird der Transport via LKW über 50 km Transportdistanz als repräsentatives Szenario angesetzt.

Modul C3 | Abfallbehandlung

In Modul C3 wird das Hacken nach Ausbau der Produkte betrachtet. Die Holzprodukte und mit ihnen die materialinhärenten Eigenschaften verlassen das Produktsystem als Sekundärbrennstoff in Modul C3.

Modul C4 | Beseitigung

Das angesetzte Szenario deklariert die energetische Verwertung der Holzprodukte, wodurch keine Umweltauswirkungen aus der Abfallbehandlung der Produkte in C4 zu erwarten sind.

Modul D | Gutschriften und Lasten außerhalb der Systemgrenze

In Modul D wird die energetische Verwertung des Produktes am Lebensende inklusive den entsprechender energetischen Substitutionspotenziale in Form eines europäischen Durchschnittsszenarios beschrieben.

## Data sources
- GaBi Database (all versions)
- GaBi database SP40 2020
