# Stahlprofil; Steel sections

Dataset: ILCD process, EPD, generic dataset
Geography: DE
Reference year: 2021
Valid until: 2022
Classification: oekobau.dat: Metalle / Stahl und Eisen / Stahlprofile
Owner: Sphera Solutions GmbH
Compliance: EN 15804+A2
Review: Dependent internal review by Sphera Solutions GmbH; Independent external review by GaBi user forum
Amounts: rows without a unit in brackets have none in this file; such an amount is in the reference unit of its flow, which a separate flow dataset defines
copyright: true
licenseType: Free of charge for all users and uses
accessRestrictions: The license conditions as stated on https://www.oekobaudat.de/ apply.
accessRestrictions: Es gelten die Lizenzbedingungen wie sie auf https://www.oekobaudat.de/ genannt sind.

## General comment
Dieser Datensatz wurde nach dem European Standard EN 15804+A2 für Nachhaltiges Bauen modelliert. Ergebnisse werden in Modulen abgebildet, die den strukturierten Ausdruck von Ergebnissen über den gesamten Lebenszyklus zulassen.

## Geography
Der Datensatz bildet die länderspezifische Situation in Deutschland ab. Dabei werden Haupttechnologien, spezifische regionale Charakteristiken und ggf. Importstatistiken berücksichtigt.

## Time period
Jährlicher Durchschnitt

## Technology and included processes
Das Stahlprofil wird mittels Primär- und Sekundärstahl hergestellt.20 % stammen aus Hochöfen (primär) und 80 % aus Lichtbögenöfen (sekundär).
Beschreibung des Elektrostahlwerks: Das Hauptausgangsmaterial für die Lichtbögenöfen sind Eisenmetallschrott, der den Schrott innerhalb der Stahlwerke (z. B. Ausschuss), Ausschuss von Stahlproduktherstellern (z. B. Fahrzeugbauer) und Verbraucherschrott (z. B. Altprodukte) einschließt. Wie in dem integrierten Hütten-/Stahlwerk inklusive Hochöfen und Konvertern, wird Schlacke aus Kalk gebildet, um unerwünschte Komponenten im Stahl zu sammeln. Dementsprechend ist Kalk ein Zusatzstoff, ebenso wie Kohle (Kohlenstoff) ein Reduktionsmittel ist. Sauerstofflanzen und/oder Sauerstoffbrenner werden zur Unterstützung in frühen Stadien des Schmelzens verwendet. Für jede Metallfraktion wird der Transport im Datensatz berücksichtigt. Für die Herstellung von Karbonstahl und niedriglegierten Stahlen, werden die folgenden Operationen durchgeführt: Rohmaterial-Handling und -Lagerung, Hochofenbeschickung mit/ohne Schrottvorwärmung, Lichtbogenofen-Schrott-Einschmelzung, Stahl- und Schlacken-Abstechen, Stahlbehandlung zur Qualitätsanpassung, Schlacketransporte und schließlich Strangguss. Der Output des Stranggusses sind Brammen.

In der Entsorgungsphase wird in Modul C1 für Stahlprodukte ein maschineller Rückbau bilanziert (Bagger). Für alle anderen Metalle erfolgt ein manueller Rückbau (lastenfrei). Sammelverluste werden vernachlässigt. Es wird angenommen, dass alle Metalle das Ende der Abfalleigenschaft direkt nach dem Ausbau erreichen. Das heißt die Lasten für die Aufbereitung und die Gutschriften für die Substitution von Primärmaterial werden in Modul D ausgewiesen.
Der Transport in Modul C2 zur Aufbereitungsanlage erfolgt mit einem LKW (50km).
In Modul D sind die Lasten für die Sortierung, Umschmelzen, Schlackebehandlung, Deponierung von Reststoffen, Behandlung von Filterstäuben und Krätzebehandlung enthalten. Die Gutschriften werden für die Nettoschrottmenge (zurückgebaute Menge abzüglich ggfs. enthaltenes Sekundärmaterial, abzüglich Aufbereitungsverluste) für den durchschnittlich vorhandenen Materialmix (aus verschiedenen Legierungen) vergeben.

## Technical purpose
Dieses Produkt kann im Baubereich verwendet werden.

## Safety margin
10 %. Produktsystem weitgehend vollständig abgebildet. Gute technologische, zeitliche und geographische Repräsentativität.

## Reference product
- Stahlprofil: 1

## Inputs
- Erneuerbare Primärenergie als Energieträger (PERE) [MJ]: A1-A3 3.75258, C1 0.0002292, C2 0.00200398, D 0.233587
- Erneuerbare Primärenergie zur stofflichen Nutzung (PERM) [MJ]: A1-A3 0, C1 0, C2 0, D 0
- Total erneuerbare Primärenergie (PERT) [MJ]: A1-A3 3.75258, C1 0.0002292, C2 0.00200398, D 0.233587
- Nicht-erneuerbare Primärenergie als Energieträger (PENRE) [MJ]: A1-A3 10.7184, C1 0.00394912, C2 0.0345287, D -1.53164
- Nicht-erneuerbare Primärenergie zur stofflichen Nutzung (PENRM) [MJ]: A1-A3 0, C1 0, C2 0, D 0
- Total nicht-erneuerbare Primärenergie (PENRT) [MJ]: A1-A3 10.7184, C1 0.00394912, C2 0.0345287, D -1.53164
- Einsatz von Sekundärstoffen (SM) [kg]: A1-A3 0.88276, C1 0, C2 0, D 0
- Erneuerbare Sekundärbrennstoffe (SF) [MJ]: A1-A3 0, C1 0, C2 0, D 0
- Nicht erneuerbare Sekundärbrennstoffe (NRSF) [MJ]: A1-A3 0, C1 0, C2 0, D 0
- Nettoeinsatz von Süßwasserressourcen (FW) [m3]: A1-A3 0.00225394, C1 2.03701e-7, C2 1.78104e-6, D -0.000139737

## Outputs
- Gefährlicher Abfall zur Deponie (HWD) [kg]: A1-A3 2.48229e-9, C1 1.6506e-13, C2 1.44319e-12, D 2.24713e-10
- Entsorgter nicht gefährlicher Abfall (NHWD) [kg]: A1-A3 0.00722602, C1 6.37478e-7, C2 5.57372e-6, D -0.00300353
- Entsorgter radioaktiver Abfall (RWD) [kg]: A1-A3 0.000407225, C1 3.78969e-9, C2 3.31348e-8, D 3.01485e-5
- Komponenten für die Wiederverwendung (CRU) [kg]: A1-A3 0, C1 0, C2 0, D 0
- Stoffe zum Recycling (MFR) [kg]: A1-A3 0, C1 1, C2 0, D 0
- Stoffe für die Energierückgewinnung (MER) [kg]: A1-A3 0, C1 0, C2 0, D 0
- Exportierte elektrische Energie (EEE) [MJ]: A1-A3 0, C1 0, C2 0, D 0
- Exportierte thermische Energie (EET) [MJ]: A1-A3 0, C1 0, C2 0, D 0

## Impact indicators
- Globales Erwärmungspotenzial - total (GWP-total) [kg CO2 eq.]: A1-A3 0.964395, C1 0.000295452, C2 0.00262283, D -0.207236
- Globales Erwärmungspotenzial - fossil (GWP-fossil) [kg CO2 eq.]: A1-A3 0.958401, C1 0.00029347, C2 0.00260492, D -0.20763
- Globales Erwärmungspotenzial - biogen (GWP-biogenic) [kg CO2 eq.]: A1-A3 0.00483583, C1 6.93722e-8, C2 1.17716e-6, D 0.000398191
- Globales Erwärmungspotenzial - luluc (GWP-luluc) [kg CO2 eq.]: A1-A3 0.00115862, C1 1.91339e-6, C2 1.67295e-5, D -4.87973e-6
- Abbaupotenzial der stratosphärischen Ozonschicht (ODP) [kg CFC-11 eq.]: A1-A3 1.59454e-14, C1 7.62325e-20, C2 6.66532e-19, D 1.17542e-15
- Versauerungspotenzial, kumulierte Überschreitung (AP) [Mole of H+ eq.]: A1-A3 0.00219631, C1 3.95122e-6, C2 7.38555e-6, D -0.000573589
- Eutrophierungspotenzial - Süßwasser (EP-freshwater) [kg P eq.]: A1-A3 1.97308e-6, C1 6.12728e-10, C2 5.35732e-9, D -3.58836e-8
- Eutrophierungspotenzial - Salzwasser (EP-marine) [kg N eq.]: A1-A3 0.000539475, C1 1.79756e-6, C2 3.40237e-6, D -0.000119118
- Eutrophierungspotenzial - Land (EP-terrestrial) [Mole of N eq.]: A1-A3 0.00578543, C1 1.97643e-5, C2 3.80663e-5, D -0.00129055
- Bildungspotenzial für troposphärisches Ozon (POCP) [kg NMVOC eq.]: A1-A3 0.00186711, C1 5.38347e-6, C2 6.6347e-6, D -0.000398185
- Potenzial für die Verknappung abiotischer Ressourcen nicht fossile Ressourcen (ADPE) [kg Sb eq.]: A1-A3 2.3132e-7, C1 2.59158e-11, C2 2.26592e-10, D 5.37388e-9
- Potenzial für die Verknappung abiotischer Ressourcen fossile Brennstoffe (ADPF) [MJ]: A1-A3 10.6856, C1 0.00394895, C2 0.0345273, D -1.51436
- Wasser-Entzugspotenzial (Benutzer) (WDP) [m³ world equiv.]: A1-A3 -0.00226491, C1 1.15816e-6, C2 1.01262e-5, D 0.00516378

## Use advice
Der Datensatz repräsentiert ein Cradle to Gate Inventar. Er kann verwendet werden, um die Lieferkette des jeweiligen Produktes in einer repräsentativen Weise zu charakterisieren. Die Kombination mit einzelnen Einheitenprozessen und diesem Produkt ermöglicht die Erstellung von anwenderspezifischen (Produkt-) LCAs.

## Data sources
- Documentation of data quality management
- GaBi Database Edition 2021, CUP2021.01
- GaBi database (all versions)
