# Mitteldichte Faserplatten EGGER MDF

Dataset: ILCD process, EPD, average dataset
Geography: DE
Reference year: 2021
Valid until: 2022
Classification: OEKOBAU.DAT: Holz / Holzwerkstoffe / Holzfaserplatten
Classification: IBUCategories: 02 Bauprodukte / Holzwerkstoffe / Holzwerkstoffe
Method details: Holzwerkstoffe.pdf
Generated by: Daxner & Merl GmbH
Registration number: EPD-EGG-20200250-IBC1-DE
Owner: Fritz EGGER GmbH & Co. OG
Compliance: DIN EN 15804+A2; ISO 14025
Review: Accredited third party review by Institut Bauen und Umwelt e. V.
Amounts: rows without a unit in brackets have none in this file; such an amount is in the reference unit of its flow, which a separate flow dataset defines
copyright: true
licenseType: Free of charge for all users and uses
accessRestrictions: None

## General comment
Rohe MDF-Platten sind plattenförmige Werkstoffe für den trockenen Möbel- und Innenausbau gemäß EN 622-5:2009, Faserplatten - Anforderungen - Teil 5: Anforderungen an Platten nach dem Trockenverfahren (MDF).

Betrachtet wird die durchschnittliche Leimflotte über alle Plattentypen. Die Produktionsbedingungen des Standortes Brilon sind vergleichbar mit jenen der anderen Werke. Sie entsprechen den in allen Standorten eingesetzten Technologien und Standards.

## Technology and included processes
1. Entrindung der Stämme 2. Zerspanung des Holzes zu Spänen 3. Kochen der Späne 4. Zerfaserung im Refiner 5. Trocknung der Fasern auf ca. 2-3 % Restfeuchte 6. Beleimung der Fasern mit Harzen 7. Streuung der beleimten Fasern auf ein Formband 8. Verpressen der Fasermatte in einer kontinuierlich arbeitenden Heißpresse 9. Aufteilen und Besäumen des Faserstranges zu Rohplattenformaten 10. Auskühlen der Rohplatten in Sternkühlwendern 11. Abstapelung zu Großstapeln 12. Nach Klimatisierungsphase Schleifen der Oberund Unterseite Alle Werke, in denen EGGER MDF-Platten hergestellt werden, sind mit einem Qualitätsmanagementsystem nach ISO 9001 zertifiziert.
Technische Daten:
Egger MDF-Platten sind Bauprodukte gemäß der harmonisierten Norm EN 13986.
Deklarierte Einheit:
Die vorliegende Umweltproduktdeklaration bezieht sich auf eine deklarierte Einheit von 1 m³ mitteldichte Faserplatte EGGER MDF unbeschichtet mit einer mittleren Dichte von 736 kg/m³ und einer Auslieferungsfeuchte von etwa 6 %.

## Technical purpose
MDF-Platten können aufgrund ihres homogenen Aufbaues dreidimensional ausgefräst und anschließend entweder lackiert oder mit einer Folie in einer Membranpresse beschichtet werden. Vorwiegend werden sie beschichtet und als Möbelplatte eingesetzt. Sie finden bspw. als Tiefziehfronten im Küchenbereich Anwendung.

## Reference product
- mitteldichte Faserplatte MDF (1 m³ MDF Platte unbeschichtet): 1

## Inputs
- Erneuerbare Primärenergie als Energieträger (PERE) [MJ]: A1-A3 1296.8, C1 0, C2 1.78598, C3 11105, C4 0, D -2772.59
- Erneuerbare Primärenergie zur stofflichen Nutzung (PERM) [MJ]: A1-A3 11157.4, C1 0, C2 0, C3 -11056.2, C4 0, D 0
- Total erneuerbare Primärenergie (PERT) [MJ]: A1-A3 12454.2, C1 0, C2 1.78598, C3 48.7861, C4 0, D -2772.59
- Nicht-erneuerbare Primärenergie als Energieträger (PENRE) [MJ]: A1-A3 5180.26, C1 0, C2 31.0121, C3 1784.94, C4 0, D -11012.6
- Nicht-erneuerbare Primärenergie zur stofflichen Nutzung (PENRM) [MJ]: A1-A3 1675.94, C1 0, C2 0, C3 -1674.77, C4 0, D 0
- Total nicht erneuerbare Primärenergie (PENRT) [MJ]: A1-A3 6856.2, C1 0, C2 31.0121, C3 110.169, C4 0, D -11012.6
- Einsatz von Sekundärstoffen (SM) [kg]: A1-A3 0, C1 0, C2 0, C3 0, C4 0, D 0
- Erneuerbare Sekundärbrennstoffe (RSF) [MJ]: A1-A3 0, C1 0, C2 0, C3 0, C4 0, D 10463.9
- Nicht erneuerbare Sekundärbrennstoffe (NRSF) [MJ]: A1-A3 682.866, C1 0, C2 0, C3 0, C4 0, D 1585.05
- Einsatz von Süßwasserressourcen (FW) [m^3]: A1-A3 1.34171, C1 0, C2 0.00208127, C3 0.0564094, C4 0, D -2.24235

## Outputs
- Gefährlicher Abfall zur Deponie (HWD) [kg]: A1-A3 7.56937e-5, C1 0, C2 1.43405e-6, C3 4.55761e-8, C4 0, D -3.72704e-6
- Entsorgter nicht gefährlicher Abfall (NHWD) [kg]: A1-A3 6.12194, C1 0, C2 0.00491518, C3 0.0781075, C4 0, D 0.402607
- Entsorgter radioaktiver Abfall (RWD) [kg]: A1-A3 0.214737, C1 0, C2 5.71583e-5, C3 0.0167047, C4 0, D -0.947937
- Komponenten für die Wiederverwendung (CRU) [kg]: A1-A3 0, C1 0, C2 0, C3 0, C4 0, D 0
- Stoffe zum Recycling (MFR) [kg]: A1-A3 0, C1 0, C2 0, C3 0, C4 0, D 0
- Stoffe für die Energierückgewinnung (MER) [kg]: A1-A3 0, C1 0, C2 0, C3 777.66, C4 0, D 0
- Exportierte elektrische Energie (EEE) [MJ]: A1-A3 0, C1 0, C2 0, C3 0, C4 0, D 0
- Exportierte thermische Energie (EET) [MJ]: A1-A3 0, C1 0, C2 0, C3 0, C4 0, D 0

## Impact indicators
- Globales Erwärmungspotenzial total (GWP-total) [kg CO_(2)-Äq.]: A1-A3 -709.289, C1 0, C2 2.34325, C3 1102.09, C4 0, D -542.944
- Globales Erwärmungspotenzial fossil (GWP-fossil) [kg CO_(2)-Äq.]: A1-A3 378.618, C1 0, C2 2.3284, C3 6.26277, C4 0, D -540.817
- Globales Erwärmungspotenzial biogen (GWP-biogenic) [kg CO_(2)-Äq.]: A1-A3 -1088.57, C1 0, C2 -0.00388643, C3 1095.82, C4 0, D -1.60628
- Globales Erwärmungspotenzial luluc (GWP-luluc) [kg CO_(2)-Äq.]: A1-A3 0.666613, C1 0, C2 0.0187391, C3 0.00907369, C4 0, D -0.520566
- Abbau Potential der stratosphärischen Ozonschicht (ODP) [kg CFC11-Äq.]: A1-A3 4.62191e-10, C1 0, C2 4.24894e-16, C3 1.37727e-13, C4 0, D -7.80946e-12
- Versauerungspotenzial von Boden und Wasser (AP) [mol H^(+)-Äq.]: A1-A3 1.26948, C1 0, C2 0.00786819, C3 0.0138273, C4 0, D 0.428887
- Eutrophierungspotenzial Süßwasser (EP-freshwater) [kg PO_(4)-Äq.]: A1-A3 0.00116702, C1 0, C2 7.05144e-6, C3 1.67279e-5, C4 0, D -0.000956495
- Eutrophierungspotenzial Salzwasser (EP-marine) [kg N-Äq.]: A1-A3 0.534838, C1 0, C2 0.00354961, C3 0.003071, C4 0, D 0.10877
- Eutrophierungspotenzial Land (EP-terrestrial) [mol N-Äq.]: A1-A3 5.52299, C1 0, C2 0.0396514, C3 0.0322646, C4 0, D 1.29271
- Bildungspotential für troposphärisches Ozon (POCP) [kg NMVOC-Äq.]: A1-A3 1.39653, C1 0, C2 0.00697388, C3 0.00841607, C4 0, D 0.459423
- Potenzial für den abiotischen Abbau nicht fossiler Ressourcen (ADPE) [kg Sb-Äq.]: A1-A3 0.000146754, C1 0, C2 1.87201e-7, C3 1.81239e-6, C4 0, D -0.000117417
- Potenzial für den abiotischen Abbau fossiler Brennstoffe (ADPF) [MJ]: A1-A3 6854.59, C1 0, C2 30.8883, C3 110.147, C4 0, D -11011.3
- Wassernutzung (WDP) [m^(3) Welt-Äq. entzogen]: A1-A3 10.665, C1 0, C2 0.0225744, C3 1.36472, C4 0, D -36.0381
- Auftreten von Krankheiten aufgrund von Feinstaubemissionen (PM) [Krankheitsfälle]: A1-A3 1.11772e-5, C1 0, C2 4.44574e-8, C3 1.1597e-7, C4 0, D -2.31969e-6
- Wirkung durch Exposition des Menschen mit U235 (IR) [kBq U235-Äq.]: A1-A3 20.965, C1 0, C2 0.00843227, C3 2.74067, C4 0, D -155.518
- Toxizitätsvergleichseinheit für Ökosysteme (ETP-fw) [CTUe]: A1-A3 1981.61, C1 0, C2 23.1104, C3 47.1391, C4 0, D -2697
- Toxizitätsvergleichseinheit für Menschen (krebserregend) (HTP-c) [CTUh]: A1-A3 2.28088e-6, C1 0, C2 4.77661e-10, C3 1.30169e-9, C4 0, D -1.06665e-8
- Toxizitätsvergleichseinheit für Menschen (nicht krebserregend) (HTP-nc) [CTUh]: A1-A3 3.47023e-6, C1 0, C2 2.7523e-8, C3 4.79594e-8, C4 0, D 3.1176e-6
- Bodenqualitätsindex (SQP) [SQP]: A1-A3 75314.1, C1 0, C2 10.8421, C3 35.0559, C4 0, D -2025.08

## Use advice
Gültigkeitsbereich:
Dieses Dokument bezieht sich auf mitteldichte Faserplatten EGGER MDF, produziert mit einer durchschnittlichen Leimflotte am Standort Brilon, Deutschland.

Die Produktionsbedingungen in Brilon sind vergleichbar mit jenen der anderen Werke. Sie entsprechen den in allen Standorten eingesetzten Technologien und Standards.
Systemgrenze:
Die Ökobilanz der EGGER MDF unbeschichtet beinhaltet eine cradle-to-gate Betrachtung (Wiege bis zum Werkstor) der auftretenden Umweltwirkungen mit den Modulen C1-C4 und Modul D (A1-A3,+C,+D). Die folgenden Lebenszyklusphasen werden in der Analyse berücksichtigt:

Modul A1–A3 | Produktionsstadium

Das Produktionsstadium beinhaltet die Aufwendungen der Rohstoffversorgung (Rundholz, Altholz, Sägespäne, Leimsystem, Hilfsstoffe, etc.) sowie der damit verbundenen Transporte zum Produktionsstandort in Brilon. Innerhalb der Werksgrenzen werden der Holzplatz, die Nassspanaufbereitung, Trocknung, Beleimung, Streuung, das Pressen, die Schleifstraße bis zum Lager und der Versand berücksichtigt. Die Bereitstellung von thermischer und elektrischer Energie, Druckluft und Wasser erfolgt durch zentrale Versorger am Standort Brilon. Der Großteil der eingesetzten elektrischen Energie wird vom deutschen Stromnetz bezogen. Im eigenen Biomasse-Kraftwerk wird sowohl internes Restholz als auch extern bezogenes Altholz verwertet. Die Systemgrenze für in der Produktion verwendetes Altholz wird nach dem Sortieren und Hacken gesetzt. Dabei wird angenommen, dass das Ende der Abfalleigenschaft erreicht ist. Hier gilt die nach EN 15804 definierte Systemgrenze für Sekundärrohstoffe.

Modul C1 | Rückbau / Abriss

Für die MDF-Platten wurde ein manueller Ausbau angenommen. Die damit verbundenen Aufwände sind vernachlässigbar, wodurch keine Umweltwirkungen aus dem Rückbau der Produkte deklariert werden.

Modul C2 | Transport zur Abfallbehandlung

Modul C2 beinhaltet den Transport zur Abfallbehandlung. Dazu wird der Transport via LKW über 50 km Transportdistanz als repräsentatives Szenario angesetzt.

Modul C3 | Abfallbehandlung

In Modul C3 wird das Hacken nach Ausbau der Produkte betrachtet. Die Holzprodukte und mit ihnen die materialinhärenten Eigenschaften verlassen das Produktsystem als Sekundärbrennstoff in Modul C3.

Modul C4 | Beseitigung

Das angesetzte Szenario deklariert die energetische Verwertung der Holzprodukte, wodurch keine Umweltauswirkungen aus der Abfallbehandlung der Produkte in C4 zu erwarten sind.

Modul D | Gutschriften und Lasten außerhalb der Systemgrenze

In Modul D wird die energetische Verwertung des Produktes am Lebensende inklusive der entsprechenden energetischen Substitutionspotenziale in Form eines europäischen Durchschnittsszenarios beschrieben.

## Data sources
- GaBi Database (all versions)
- GaBi database SP40 2020
