# Elastomer Fugenbänder, Silikonkautschuk; Silicone rubber

Dataset: ILCD process, EPD, generic dataset
Geography: DE
Reference year: 2018
Valid until: 2022
Classification: oekobau.dat: Komponenten von Fenstern und Vorhangfassaden / Dichtungskomponenten / -materialien / Elastomer-Fugenbänder
Owner: thinkstep
Compliance: DIN EN 15804
Review: Dependent internal review by thinkstep, IABP-GaBi, IBP-GaBi; Independent external review by GaBi user forum, GaBi bug forum, GaBi user community
Amounts: rows without a unit in brackets have none in this file; such an amount is in the reference unit of its flow, which a separate flow dataset defines
copyright: true

## General comment
Dieser Datensatz wurde nach dem European Standard EN 15804 für Nachhaltiges Bauen modelliert. Ergebnisse werden in Modulen abgebildet, die den strukturierten Ausdruck von Ergebnissen über den gesamten Lebenszyklus zulassen.

## Geography
Der Datensatz bildet die länderspezifische Situation in Deutschland ab. Dabei werden Haupttechnologien, spezifische regionale Charakteristiken und ggf. Importstatistiken berücksichtigt.

## Time period
Jährlicher Durchschnitt

## Technology and included processes
Die Ökobilanz von Elastomer-Fugenbändern aus Siliconkautschuk beinhaltet hauptsächlich die Herstellung eines Extrusionsprofils mit einer Dichte von 1,1 g/cm3. Die Systemgrenze bildet das verkaufsfertige Produkt in verschiedenen Dicken und Breiten.
Zur Herstellung des Silikonkautschuks (RTV): Als Grundstoff zur Herstellung von RTV dient Polydimethylsiloxan mit endständigen Hydroxyl-Gruppen. Als zweite Hauptkomponente wird ein Vernetzer aus der Gruppe der Alkoxylsilane eingesetzt, der hydrolyse-empfindlich reagiert. Das Verhältnis der beiden Grundstoffe liegt zwischen 100 : 1 und 10 : 1 (Polydimethylsiloxan : Vernetzer). Darüber hinaus werden neben geringen Mengen Wasser unverstärkte Füllstoffe, Silikonfluid und Pigmente zugegeben. Um die Reaktion zu beschleunigen, wird ein Sn-Katalyst verwendet.
Transporte vom Werk zum Einbauort sind nicht berücksichtigt und sollten nach Bedarf nachträglich einbezogen werden.

Hintergrundsystem:
Strom: Die Stromerzeugung wird entsprechend der länderspezifischen Randbedingungen modelliert. Die landesspezifische Analyse beinhaltet:
1.: Spezifische Kraftwerke der verschiedenen fossilen Energieträger und der Einsatz erneuerbarer Energien sind entsprechend der länderspezifischen Energieträgermixe modelliert. Die Analyse bezieht Stromimporte aus den Nachbarländern, Transmissions-und Verteilungsverluste und den Eigenverbrauch im Kraftwerk und bei der Verteilung bzw. Speicherung, z. B. durch Pumpspeicherwerke, ein.
2.: Die landes-/regionalspezifischen Technologiestandards sowie die Erzeugung in Elektrizitätskraftwerken und/oder in speziellen Kraftwerken mit Kraft-Wärme-Kopplung (KWK) sind berücksichtigt.
3.: Die länderspezifische Energieträgerbereitstellung (mit Anteil der Importe und/oder Eigenversorgung) einschließlich der Energieträger-Eigenschaften (z. B. Elementar- und Energiegehalte) werden berücksichtigt.
4.: Die Förderung, Produktion, Verarbeitung und Transportprozesse werden entsprechend der Situation im jeweiligen Stromerzeugerland modelliert. Die unterschiedlichen Produktions- und Verarbeitungsverfahren (Emissionen und Wirkungsgrade) in den verschiedenen Energieerzeugerländern werden einbezogen, z. B. Rohöl-Veredelungsverfahren oder Abfackel-Raten an den Ölplattformen.
Thermische Energie, Prozessdampf: Die Erzeugung von Dampf und thermischer Energie in Heizkraftwerken wird entsprechend der landesspezifischen Situation (Emissionsgrenzwerte, Energieträgerbasis) modelliert.
Der Wirkungsgrad für die thermische Energieerzeugung beträgt per Definition 100% des Energieträgereinsatzes. Für Prozessdampf liegt der Wirkungsgrad im Bereich von 85-95%. Die zur Heizenergie-Erzeugung verwendeten Energieträger werden entsprechend der nationalen Situation modelliert (siehe Kapitel Strom oben).
Transporte: Alle relevanten und bekannten Transportprozesse in Form von See- und Binnenschiffsverkehr sowie Bahn-, Lkw- und der Leitungstransport sind enthalten.
Energieträger: Die Energieträger werden entsprechend der spezifischen Versorgungslage modelliert (siehe Kapitel Strom oben).
Raffinerieprodukte: Diesel, Benzin, technische Gase, Heizöl, Schmierstoffe und Rückstände, wie Bitumen, werden mit einem parametrierten länderspezifische Raffineriemodell modelliert. Das Raffinerie-Modell bezieht die länderspezifischen Veredelungsverfahren (z. B. Emissionspegel, interner Energieverbrauch etc.) und das länderspezifische Produktspektrum ein, das sich je nach Land stark unterscheiden kann. Die Rohöl-Förderung wird gemäß der länderspezifischen Situation mit den jeweiligen Energieträger-Eigenschaften modelliert.

## Technical purpose
Dieses Produkt kann im Baubereich verwendet werden.

## Safety margin
20 %. Produktsystem bis auf wenige Prozesse/Flüsse abgebildet. Technologische, zeitliche und geographische Repräsentativität teilweise gegeben.

## Reference product
- Elastomer Fugenband (Silikon): 1

## Inputs
- Erneuerbare Primärenergie als Energieträger (PERE) [MJ]: A1-A3 52.63, C1 0, C2 0.0021792, C3 0.197043, D -2.94542
- Erneuerbare Primärenergie zur stofflichen Nutzung (PERM) [MJ]: A1-A3 0, C1 0, C2 0, C3 0, D 0
- Total erneuerbare Primärenergie (PERT) [MJ]: A1-A3 52.63, C1 0, C2 0.0021792, C3 0.197043, D -2.94542
- Nicht-erneuerbare Primärenergie als Energieträger (PENRE) [MJ]: A1-A3 82.4444, C1 0, C2 0.037433, C3 22.3301, D -10.2805
- Nicht-erneuerbare Primärenergie zur stofflichen Nutzung (PENRM) [MJ]: A1-A3 21.6, C1 0, C2 0, C3 -21.6, D 0
- Total nicht erneuerbare Primärenergie (PENRT) [MJ]: A1-A3 104.044, C1 0, C2 0.037433, C3 0.73006, D -10.2805
- Einsatz von Sekundärstoffen (SM) [kg]: A1-A3 0, C1 0, C2 0, C3 0, D 0
- Erneuerbare Sekundärbrennstoffe (RSF) [MJ]: A1-A3 0, C1 0, C2 0, C3 0, D 0
- Nicht erneuerbare Sekundärbrennstoffe (NRSF) [MJ]: A1-A3 0, C1 0, C2 0, C3 0, D 0
- Einsatz von Süßwasserressourcen (FW) [m3]: A1-A3 0.0572799, C1 0, C2 1.95166e-6, C3 0.00373792, D -0.00137392

## Outputs
- Gefährlicher Abfall zur Deponie (HWD) [kg]: A1-A3 8.3304e-7, C1 0, C2 1.39883e-9, C3 2.70994e-9, D -5.4376e-9
- Entsorgter nicht gefährlicher Abfall (NHWD) [kg]: A1-A3 1.43395, C1 0, C2 6.57015e-6, C3 0.158402, D -0.00484209
- Entsorgter radioaktiver Abfall (RWD) [kg]: A1-A3 0.00415297, C1 0, C2 3.94093e-8, C3 2.81541e-5, D -0.000355854
- Komponenten für die Wiederverwendung (CRU) [kg]: A1-A3 0, C1 0, C2 0, C3 0, D 0
- Stoffe zum Recycling (MFR) [kg]: A1-A3 0, C1 0, C2 0, C3 0, D 0
- Stoffe für die Energierückgewinnung (MER) [kg]: A1-A3 0, C1 1.2, C2 0, C3 0, D 0
- Exportierte elektrische Energie (EEE) [MJ]: A1-A3 0, C1 0, C2 0, C3 2.8244, D 0
- Exportierte thermische Energie (EET) [MJ]: A1-A3 0, C1 0, C2 0, C3 6.48461, D 0

## Impact indicators
- Globales Erwärmungspotenzial (GWP) [kg CO2 Äquiv.]: A1-A3 6.85795, C1 0, C2 0.00278506, C3 1.51829, D -0.702716
- Abbaupotenzial der stratosphärischen Ozonschicht (ODP) [kg R11 Äquiv.]: A1-A3 1.28369e-13, C1 0, C2 9.21867e-19, C3 1.10074e-15, D -1.6287e-14
- Versauerungspotential (AP) [kg SO2 Äquiv.]: A1-A3 0.0148231, C1 0, C2 5.62553e-6, C3 0.000170512, D -0.000593617
- Eutrophierungspotential (EP) [kg Phosphat Äquiv.]: A1-A3 0.00186031, C1 0, C2 1.33734e-6, C3 3.79385e-5, D -0.000112503
- Bildungspotenzial für troposphärisches Ozon (POCP) [kg Ethen Äquiv.]: A1-A3 0.00186449, C1 0, C2 -1.6854e-6, C3 1.57871e-5, D -6.04414e-5
- Potenzial für den abiotischen Abbau nicht fossiler Ressourcen (ADPE) [kg Sb Äquiv.]: A1-A3 0.000121678, C1 0, C2 2.34365e-10, C3 1.14102e-8, D -1.74791e-7
- Potenzial für den abiotischen Abbau fossiler Brennstoffe (ADPF) [MJ]: A1-A3 93.5322, C1 0, C2 0.0373323, C3 0.65899, D -9.38215

## Use advice
Der Datensatz repräsentiert ein Cradle to Gate Inventar. Er kann verwendet werden, um die Lieferkette des jeweiligen Produktes in einer repräsentativen Weise zu charakterisieren. Die Kombination mit einzelnen Einheitenprozessen und diesem Produkt ermöglicht die Erstellung von anwenderspezifischen (Produkt-) LCAs.

## Data sources
- GaBi Database Edition 2020, SP40
- GaBi database (all versions)
