# Blähton Granulat; grain size 4/16

Dataset: ILCD process, EPD, generic dataset
Geography: DE
Reference year: 2021
Valid until: 2022
Classification: oekobau.dat: Mineralische Baustoffe / Zuschläge / Blähton
Owner: Sphera Solutions GmbH
Compliance: EN 15804+A2
Review: Dependent internal review by Sphera Solutions GmbH; Independent external review by GaBi user forum
Amounts: rows without a unit in brackets have none in this file; such an amount is in the reference unit of its flow, which a separate flow dataset defines
copyright: true
licenseType: Free of charge for all users and uses
accessRestrictions: The license conditions as stated on https://www.oekobaudat.de/ apply.
accessRestrictions: Es gelten die Lizenzbedingungen wie sie auf https://www.oekobaudat.de/ genannt sind.

## General comment
Dieser Datensatz wurde nach dem European Standard EN 15804+A2 für Nachhaltiges Bauen modelliert. Ergebnisse werden in Modulen abgebildet, die den strukturierten Ausdruck von Ergebnissen über den gesamten Lebenszyklus zulassen.

## Geography
Der Datensatz bildet die länderspezifische Situation in Deutschland ab. Dabei werden Haupttechnologien, spezifische regionale Charakteristiken und ggf. Importstatistiken berücksichtigt.

## Time period
Jährlicher Durchschnitt

## Technology and included processes
Blähton ist ein Zusatzstoff, dessen Produktion besonders geeignete Tone/Tonarten mit einheitlichen und fein geriebenen organischen Bestandteilen erfordert. Der Ton aus dem Tagebau wird zu Shots geformt und in einem trommelartigen Ofensystem bei 1.200 °C gebrannt. Die Zuführung von Eisenoxid oder Bleicherde können die Quellung mittels Sauerstoffspaltung bis zu 7 % unterstützen. Die organischen Bestandteile im Ton werden abgebrannt und die shots quellen auf. Der Blähton kann in einer sichtbaren Dichte von ungefähr 300 - 800 kg/m3 produziert werden, entsprechend seiner erforderlichen Anwendung. Blähtonkörner und Sand werden für Ziegelsteine, Wandelemente, Leichtputze, Leichtbeton und als Schüttgut auf Baugeländen und in Grünanlagen verwendet.

## Technical purpose
Dieses Produkt kann im Baubereich verwendet werden.

## Safety margin
20 %. Produktsystem bis auf wenige Prozesse/Flüsse abgebildet. Technologische, zeitliche und geographische Repräsentativität teilweise gegeben.

## Reference product
- Blähton Granulat: 1

## Inputs
- Erneuerbare Primärenergie als Energieträger (PERE) [MJ]: A1-A3 0.963147
- Erneuerbare Primärenergie zur stofflichen Nutzung (PERM) [MJ]: A1-A3 0
- Total erneuerbare Primärenergie (PERT) [MJ]: A1-A3 0.963147
- Nicht-erneuerbare Primärenergie als Energieträger (PENRE) [MJ]: A1-A3 4.94687
- Nicht-erneuerbare Primärenergie zur stofflichen Nutzung (PENRM) [MJ]: A1-A3 0
- Total nicht-erneuerbare Primärenergie (PENRT) [MJ]: A1-A3 4.94687
- Einsatz von Sekundärstoffen (SM) [kg]: A1-A3 0
- Erneuerbare Sekundärbrennstoffe (SF) [MJ]: A1-A3 0.015855
- Nicht erneuerbare Sekundärbrennstoffe (NRSF) [MJ]: A1-A3 0.0229811
- Nettoeinsatz von Süßwasserressourcen (FW) [m3]: A1-A3 0.000831201

## Outputs
- Gefährlicher Abfall zur Deponie (HWD) [kg]: A1-A3 6.15377e-10
- Entsorgter nicht gefährlicher Abfall (NHWD) [kg]: A1-A3 0.0100527
- Entsorgter radioaktiver Abfall (RWD) [kg]: A1-A3 7.01571e-5
- Komponenten für die Wiederverwendung (CRU) [kg]: A1-A3 0
- Stoffe zum Recycling (MFR) [kg]: A1-A3 0
- Stoffe für die Energierückgewinnung (MER) [kg]: A1-A3 0
- Exportierte elektrische Energie (EEE) [MJ]: A1-A3 0
- Exportierte thermische Energie (EET) [MJ]: A1-A3 0

## Impact indicators
- Globales Erwärmungspotenzial - total (GWP-total) [kg CO2 eq.]: A1-A3 0.371775
- Globales Erwärmungspotenzial - fossil (GWP-fossil) [kg CO2 eq.]: A1-A3 0.386503
- Globales Erwärmungspotenzial - biogen (GWP-biogenic) [kg CO2 eq.]: A1-A3 -0.014981
- Globales Erwärmungspotenzial - luluc (GWP-luluc) [kg CO2 eq.]: A1-A3 0.000252969
- Abbaupotenzial der stratosphärischen Ozonschicht (ODP) [kg CFC-11 eq.]: A1-A3 2.48012e-15
- Versauerungspotenzial, kumulierte Überschreitung (AP) [Mole of H+ eq.]: A1-A3 0.00274451
- Eutrophierungspotenzial - Süßwasser (EP-freshwater) [kg P eq.]: A1-A3 4.65117e-7
- Eutrophierungspotenzial - Salzwasser (EP-marine) [kg N eq.]: A1-A3 0.000321721
- Eutrophierungspotenzial - Land (EP-terrestrial) [Mole of N eq.]: A1-A3 0.00350964
- Bildungspotenzial für troposphärisches Ozon (POCP) [kg NMVOC eq.]: A1-A3 0.0011009
- Potenzial für die Verknappung abiotischer Ressourcen nicht fossile Ressourcen (ADPE) [kg Sb eq.]: A1-A3 4.29273e-8
- Potenzial für die Verknappung abiotischer Ressourcen fossile Brennstoffe (ADPF) [MJ]: A1-A3 4.94593
- Wasser-Entzugspotenzial (Benutzer) (WDP) [m³ world equiv.]: A1-A3 0.0217165

## Use advice
Der Datensatz repräsentiert ein Cradle to Gate Inventar. Er kann verwendet werden, um die Lieferkette des jeweiligen Produktes in einer repräsentativen Weise zu charakterisieren. Die Kombination mit einzelnen Einheitenprozessen und diesem Produkt ermöglicht die Erstellung von anwenderspezifischen (Produkt-) LCAs.

## Data sources
- Ökologische Bilanzierung von Baustoffen und Gebäuden, 2000
- AUB-Zertifkat Fibo ExClay: Blähton (Zertifikat-Nr.: Z.FIB100, Z.FIB200), 2000
- AUB-Zertifkat Liapor: Blähton (Zertifikat-Nr.: Z.LIA102), 2002
- Ganzheitliche Bilanzierung Gips-Baustoffe , 2001
- Documentation of data quality management
- GaBi Database Edition 2021, CUP2021.01
- GaBi database (all versions)
