# Holzfaserdämmstoff

Dataset: ILCD process, EPD, average dataset
Geography: FR
Reference year: 2016
Valid until: 2021
Classification: OEKOBAU.DAT: Dämmstoffe / Holzfasern / Holzfaserdämmplatte
Classification: IBUCategories: 02 Bauprodukte / Holzwerkstoffe / Holzwerkstoffe
Method details: Holzwerkstoffe.pdf
Owner: STEICO SE
Compliance: DIN EN 15804; ISO 14025
Review: Accredited third party review by IBU
Amounts: rows without a unit in brackets have none in this file; such an amount is in the reference unit of its flow, which a separate flow dataset defines
copyright: true

## General comment
Die vorliegende Deklaration beschreibt einen produktionsvolumengewichteten Durchschnitt der im Nass- sowie im Trockenverfahren produzierten Holzfaserdämmstoffe STEICOflex, STEICOtherm, STEICOtherm internal, STEICOtherm SD, STEICOfloor, STEICOisorel, STEICOroof, STEICOunderfloor, STEICOprotect M/H, STEICOuniversal und STEICOspecial.

Die in der Deklaration enthaltenen Holzfaserdämmstoffe werden einheitlich nach /DIN EN 13171/ sowohl als platten-, als auch als mattenförmige Dämmstoffe für Gebäude eingesetzt.

## Technology and included processes
Grundstoffe / Hilfsstoffe: Nadelholz 82,8%, Wasser, 6,0%, Klebstoffe 1,2%, Bindefaser 1,3%, Recyclingpapier 6,3%, Brandhemmer 2,4%, sonstige Hilfsstoffe 0,1%; Erläuterung des Produktionsablaufes Nassverfahren: Verarbeitung des Rohholzes zu Hackschnitzeln, Erhitzen der Hackschnitzel unter Dampfdruck, Zerfaserung der Hackschnitzel durch Defibrationsverfahren, Vermischung der Fasern mit Wasser zu einem Faserbrei (ggf. Zugabe der notwendigen Zusatzstoffe), Formung des Platte durch Pressen, Trocknen der Platten (ca. 160°C – 200°C), Verleimung, Zuschnitt und Profilierung, Abstapelung, Verpackung; Erläuterung des Produktionsablaufes Trockenverfahren: analogNassverfahren bis Zerfaserung im Defibrationsverfahren, Trocknung der Fasern im Stromrohrtrockner, Zumischung der Bindefaser, Aufgabe des Gemenges auf die Produktionslinie, Erwärmen und Pressen des Gemenges zur Dämmmatte, Zuschnitt, Abstapelung, Verpackung; Alle während der Produktion anfallenden Reststoffe werden entweder erneut der Produktion zugeführt oder intern einer energetischen Verwertung zugeführt; Deklarierte Einheit: die deklarierte Einheit ist 1 m³ Holzfaserdämmstoff mit einer mittleren Rohdichte von 157,5 kg/m³
Technische Daten:
Die folgenden Angaben beziehen sich auf die Produktlinie STEICOtherm. Angaben zu weiteren im Gültigkeitsbereich dieser EPD genannten Produkte sind unter www.steico.net einsehbar.
Deklarierte Einheit:
Die deklarierte Einheit ist 1m³ Holzfaserdämmstoff mit einer mittleren Rohdichte von 157,49 kg.

Die Berechnung der Rohdichte und der Inhaltsstoffanteile der deklarierten Einheit erfolgte über die produktionsvolumengewichtete Durchschnittsbildung der im Werk hergestellten Produkte.

## Technical purpose
Die unter 2.1 genannten Produkte sind sowohl druckfeste, im Nassverfahren produzierte Holzfaserdämmplatten als auch im Trockenverfahren produzierte, mattenförmige Holzfaserdämmmatten.

STEICO Holzfaserdämmstoffe können vielseitig für Wand-, Dach-, und Bodensysteme verwendet werden. Sie sind als tritt- und raumschalldämmende Unterlage unterhalb von Parkett- oder Laminatböden, als direkt verputzbares Dämmelement für Wärmedämmverbundsysteme und als flexible Gefachdämmung einsetzbar.

## Reference product
- 1 m³ Holzfaserdämmstoff: 1

## Inputs
- Erneuerbare Primärenergie als Energieträger (PERE) [MJ]: A1 8.74149, A2 0.00685666, A3 1177.1, C2 0.0029541, C3 6.31725, D 2363.05
- Erneuerbare Primärenergie zur stofflichen Nutzung (PERM) [MJ]: A1 2512.17, A2 0, A3 14.9497, C2 0, C3 -2527.12, D 0
- Total erneuerbare Primärenergie (PERT) [MJ]: A1 2520.91, A2 0.00685666, A3 1192.05, C2 0.0029541, C3 -2520.8, D 2363.05
- Nicht-erneuerbare Primärenergie als Energieträger (PENRE) [MJ]: A1 121.777, A2 5.20198, A3 1518.34, C2 2.2412, C3 73.3861, D -2063.52
- Nicht-erneuerbare Primärenergie zur stofflichen Nutzung (PENRM) [MJ]: A1 176.869, A2 0, A3 0, C2 0, C3 -176.869, D 0
- Total nicht erneuerbare Primärenergie (PENRT) [MJ]: A1 298.646, A2 5.20198, A3 1518.34, C2 2.2412, C3 -103.483, D -2063.52
- Einsatz von Sekundärstoffen (SM) [kg]: A1 0, A2 0, A3 0, C2 0, C3 0, D 0
- Erneuerbare Sekundärbrennstoffe (RSF) [MJ]: A2 0, A3 0, C2 0, C3 0
- Nicht erneuerbare Sekundärbrennstoffe (NRSF) [MJ]: A2 0, A3 0, C2 0, C3 0
- Einsatz von Süßwasserressourcen (FW) [m^3]: A1 4.58367, A2 9.75475e-5, A3 210.453, C2 4.2027e-5, C3 14.8075, D -0.316962

## Outputs
- Gefährlicher Abfall zur Deponie (HWD) [kg]: A1 0.00167889, A2 0, A3 1.1254e-5, C2 0, C3 0, D -0.000382159
- Entsorgter nicht gefährlicher Abfall (NHWD) [kg]: A1 0.000884026, A2 0, A3 0.0339905, C2 0, C3 0, D 6.8478e-8
- Entsorgter radioaktiver Abfall (RWD) [kg]: A1 0.00434611, A2 9.15768e-6, A3 0.356528, C2 3.94546e-6, C3 0.0255146, D -0.554699
- Komponenten für die Wiederverwendung (CRU) [kg]: A1 0, A2 0, A3 0, C2 0, C3 0, D 0
- Stoffe zum Recycling (MFR) [kg]: A1 0, A2 0, A3 0, C2 0, C3 157.497, D 0
- Stoffe für die Energierückgewinnung (MER) [kg]: A1 0, A2 0, A3 0.775763, C2 0, C3 157.497, D 0
- Exportierte elektrische Energie (EEE) [MJ]: A1 0, A2 0, A3 0, C2 0, C3 0, D 0
- Exportierte thermische Energie (EET) [MJ]: A1 0, A2 0, A3 0, C2 0, C3 0, D 0

## Impact indicators
- Globales Erwärmungspotenzial (GWP) [kg CO_(2)-Äq.]: A1 -220.716, A2 0.366783, A3 47.5186, C2 0.158023, C3 239.536, D -30.3006
- Abbau Potential der stratosphärischen Ozonschicht (ODP) [kg CFC11-Äq.]: A1 6.0022e-7, A2 7.33094e-10, A3 1.84736e-7, C2 3.15843e-10, C3 1.21101e-8, D -2.40883e-7
- Versauerungspotenzial von Boden und Wasser (AP) [kg SO_(2)-Äq.]: A1 0.0519606, A2 0.00157502, A3 0.251527, C2 0.000678576, C3 0.00220936, D -0.0126732
- Eutrophierungspotenzial (EP) [kg PO_(4)^(3)-Äq.]: A1 0.00935854, A2 0.000364877, A3 0.0600596, C2 0.000157202, C3 0.000235696, D 0.00632658
- Bildungspotential für troposphärisches Ozon (POCP) [kg Ethen-Äq.]: A1 0.00941757, A2 0.000172959, A3 0.0581219, C2 7.45168e-5, C3 0.0001757, D -0.00170857
- Potenzial für den abiotischen Abbau nicht fossiler Ressourcen (ADPE) [kg Sb-Äq.]: A1 1.7649e-5, A2 7.80769e-9, A3 1.92786e-5, C2 3.36383e-9, C3 4.8122e-7, D -9.69216e-6
- Potenzial für den abiotischen Abbau fossiler Brennstoffe (ADPF) [MJ]: A1 284.562, A2 5.15894, A3 617.859, C2 2.22265, C3 8.96006, D -423.889

## Use advice
Gültigkeitsbereich:
Diese Deklaration ist eine EPD, die ein Durchschnittsprodukt verschiedener Produktlinien abbildet, welche in folgendem Werk hergestellt werden:
STEICO SE, Route de Cocumont, 47700 Casteljaloux, Frankreich

Folgende Produkte sind in die Durchschnittsbildung eingeflossen:

STEICOflex

STEICOtherm

STEICOtherm internal

STEICOthermSD

STEICOunderfloor

STEICOfloor

STEICOisorel

STEICOroof

STEICOprotect M

STEICOprotect H

STEICOuniversal

STEICOspecial
Systemgrenze:
Der Deklarationstyp entspricht einer EPD „von der

Wiege bis Werkstor mit Optionen“. Inhalte sind das Stadium der Produktion, d. h. von der Bereitstellung

der Rohstoffe bis zum Werkstor der Türenfabrik

(cradle to gate, Module A1 bis A3), sowie Teile des

Endes des Lebensweges (Modul C2 bis C4). Darüber

hinaus erfolgt eine Betrachtung der Potenziale und

Lasten über den Lebensweg des Produktes hinaus

(Modul D).

Das Informationsmodul A1umfasst die Bereitstellung

aller Halbwaren, die sich als Material in der

deklarierten Einheit wiederfinden. Die Transporte

dieser Stoffe werden in Modul A2 berücksichtigt. Das

Modul A3 beinhaltet alle Aufwendungen der

Herstellung des Produkts und seiner Verpackung von

der Wiege bis zum Werkstor außer den bereits in den

Modulen A1 und A2 betrachteten Aspekten. Modul C2

beschreibt den Transport bis zur Entsorgungs- oder

Verwertungsstelle, Modul C3 die Aufbereitungsaufwendungen, welche die thermische Verwertung ermöglichen. Zudem werden in Modul C3 gemäß EN 16485 die CO2-Äquivalente des im Produkt befindlichen holzinhärenten Kohlenstoffs sowie die im Produkt enthaltene erneuerbare und nicht erneuerbare Primärenergie (PERM und PENRM) als Abgänge in Modul C3 verbucht. Die sich aus der thermischen Verwertung des Produkts und seiner Verpackung ergebenden Lasten und Potenziale am Ende seines Lebenswegs werden in Modul D bilanziert.

## Data sources
- Holzfaserdämmstoff.pdf
- GaBi Database (all versions)
- GaBi database SP26 2014
