# Aluminium-Pressbolzen

Dataset: ILCD process, EPD, average dataset
Geography: EU-27
Reference year: 2021
Valid until: 2026
Classification: OEKOBAU.DAT: Metalle / Aluminium / Gussteile aus Aluminium
Classification: IBUCategories: 02 Bauprodukte / Metallbauprodukte und Zubehör / Produkte aus Aluminium und Aluminiumlegierungen
Method details: Produkte aus Aluminium und Aluminiumlegierungen.pdf
Generated by: Daxner & Merl GmbH
Registration number: EPD-ALU-20210069-IBB1-DE
Owner: Aluminium GmbH Nachrodt
Compliance: DIN EN 15804+A2; ISO 14025
Review: Accredited third party review by Institut Bauen und Umwelt e. V.
Amounts: rows without a unit in brackets have none in this file; such an amount is in the reference unit of its flow, which a separate flow dataset defines
copyright: true
licenseType: Free of charge for all users and uses
accessRestrictions: None

## General comment
Bei den hergestellten Strangpressbolzen der Aluminium-Legierung 6000 handelt es sich um Halbzeuge für die Herstellung von Aluminiumprofilen.

Die Strangpressbolzen können in verschiedenen Durchmessern produziert werden. Die Strangpressbolzen werden bis zu einer maximalen Länge von 8 Metern gefertigt.

## Technology and included processes
Gattieren – Der Metallmix für die geforderte Spezifikation / Legierung wird erstellt. Schmelzen – Der Schmelzofen wird mit den Aluminiumschrotten laut Gattierung befüllt. Überführen – Das flüssige Aluminium wird in den Gießofen überführt. Legieren – Im Gießofen wird die Legierung überprüft. Falls nötig werden fehlende Legierungselemente zugegeben. Gießen – Das Aluminium wird auf einen sogenannten Gießtisch geleitet. Auf diesem befindet sich, je nach Bolzendurchmesser, eine entsprechende Anzahl an Kokillen. Durch diese fließt das flüssige Aluminium und gefriert innerhalb dieser Kokille. Durch eine kontinuierliche Absenkung des erstarrten Aluminiums entstehen so die Strangpressbolzen. Prüfung – Ist der Guss beendet werden die Bolzen aus der Gießgrube gezogen und einer Ultraschallprüfung unterzogen um mögliche Fehlstellen und Einschlüsse ausschließen zu können. Homogenisieren – Im nächsten Arbeitsschritt werden die Strangpressbolzen einer Wärmebehandlung unterzogen um ein gleichmäßiges Gefüge innerhalb des Aluminiums zu erhalten. Sägen – Die Strangpressbolzen werden auf die vom Kunden gewünschte Länge gesägt. Verpackung – Die Bolzen werden zu Bünden von mindestens zwei Stück zusammen gebunden und stehen zur Auslieferung bereit. Der gesamte Herstellungsprozess wird durch ein zertifiziertes Qualitätsmanagementsystem (ISO 9001) überwacht.
Technische Daten:
Die physikalischen Eigenschaften entsprechen Aluminium der Legierung 6000.

Die aufgelisteten Werte sind als Richtwerte zu sehen, da die Messwerte zwischen den unterschiedlichen Legierungen in Abhängigkeit der Kundenanforderungen variieren können. Als Grundlage diente die Spezifikation EN AW-6060.
Deklarierte Einheit:
Die vorliegende Umweltproduktdeklaration bezieht sich auf eine deklarierte Einheit von 1 kg Aluminium-Strangpressbolzen.

## Technical purpose
Aluminium-Strangpressbolzen werden in den Presswerken zu Aluminiumprofilen weiterverarbeitet. Die Anwendung ist somit von der Weiterverarbeitung und der Ausgestaltung des Endproduktes abhängig.

## Reference product
- Aluminium-Strangpressbolzen: 1

## Inputs
- Erneuerbare Primärenergie als Energieträger (PERE) [MJ]: A1-A3 16.2209, C1 0, C2 0.00229661, C3 0, C4 0.00247131, D -5.6221
- Erneuerbare Primärenergie zur stofflichen Nutzung (PERM) [MJ]: A1-A3 0.0807855, C1 0, C2 0, C3 0, C4 0, D 0
- Total erneuerbare Primärenergie (PERT) [MJ]: A1-A3 16.3017, C1 0, C2 0.00229661, C3 0, C4 0.00247131, D -5.6221
- Nicht-erneuerbare Primärenergie als Energieträger (PENRE) [MJ]: A1-A3 18.5735, C1 0, C2 0.0398788, C3 0, C4 0.0353129, D -12.0653
- Nicht-erneuerbare Primärenergie zur stofflichen Nutzung (PENRM) [MJ]: A1-A3 0, C1 0, C2 0, C3 0, C4 0, D 0
- Total nicht erneuerbare Primärenergie (PENRT) [MJ]: A1-A3 18.5735, C1 0, C2 0.0398788, C3 0, C4 0.0353129, D -12.0653
- Einsatz von Sekundärstoffen (SM) [kg]: A1-A3 0.826264, C1 0, C2 0, C3 0, C4 0, D 0
- Erneuerbare Sekundärbrennstoffe (RSF) [MJ]: A1-A3 0, C1 0, C2 0, C3 0, C4 0, D 0
- Nicht erneuerbare Sekundärbrennstoffe (NRSF) [MJ]: A1-A3 0, C1 0, C2 0, C3 0, C4 0, D 0
- Einsatz von Süßwasserressourcen (FW) [m^3]: A1-A3 0.0497912, C1 0, C2 2.67632e-6, C3 0, C4 4.71665e-7, D -0.0145238

## Outputs
- Gefährlicher Abfall zur Deponie (HWD) [kg]: A1-A3 3.68497e-8, C1 0, C2 1.84406e-9, C3 0, C4 1.59996e-10, D -6.84454e-9
- Entsorgter nicht gefährlicher Abfall (NHWD) [kg]: A1-A3 0.829699, C1 0, C2 6.32048e-6, C3 0, C4 0.0500681, D -0.292289
- Entsorgter radioaktiver Abfall (RWD) [kg]: A1-A3 0.000178069, C1 0, C2 7.35004e-8, C3 0, C4 4.18186e-7, D -0.000724847
- Komponenten für die Wiederverwendung (CRU) [kg]: A1-A3 0, C1 0, C2 0, C3 0, C4 0, D 0
- Stoffe zum Recycling (MFR) [kg]: A1-A3 0, C1 0, C2 0, C3 0.123578, C4 0, D 0
- Stoffe für die Energierückgewinnung (MER) [kg]: A1-A3 0, C1 0, C2 0, C3 0, C4 0, D 0
- Exportierte elektrische Energie (EEE) [MJ]: A1-A3 0, C1 0, C2 0, C3 0, C4 0, D 0
- Exportierte thermische Energie (EET) [MJ]: A1-A3 0, C1 0, C2 0, C3 0, C4 0, D 0

## Impact indicators
- Globales Erwärmungspotenzial total (GWP-total) [kg CO_(2)-Äq.]: A1-A3 1.89594, C1 0, C2 0.00303, C3 0, C4 0.00247, D -0.967372
- Globales Erwärmungspotenzial fossil (GWP-fossil) [kg CO_(2)-Äq.]: A1-A3 1.88951, C1 0, C2 0.00299, C3 0, C4 0.00247, D -0.965104
- Globales Erwärmungspotenzial biogen (GWP-biogenic) [kg CO_(2)-Äq.]: A1-A3 0.0057334, C1 0, C2 0.00957, C3 0, C4 0, D -0.00191751
- Globales Erwärmungspotenzial luluc (GWP-luluc) [kg CO_(2)-Äq.]: A1-A3 0.000689912, C1 0, C2 2.40968e-5, C3 0, C4 2.3996e-6, D -0.00035073
- Abbau Potential der stratosphärischen Ozonschicht (ODP) [kg CFC11-Äq.]: A1-A3 3.31443e-15, C1 0, C2 5.46374e-19, C3 0, C4 5.47224e-18, D -7.80981e-16
- Versauerungspotenzial von Boden und Wasser (AP) [mol H^(+)-Äq.]: A1-A3 0.0106887, C1 0, C2 1.01178e-5, C3 0, C4 7.92422e-6, D -0.00500533
- Eutrophierungspotenzial Süßwasser (EP-freshwater) [kg PO_(4)-Äq.]: A1-A3 1.49827e-6, C1 0, C2 9.0675e-9, C3 0, C4 1.88839e-9, D -3.59989e-7
- Eutrophierungspotenzial Salzwasser (EP-marine) [kg N-Äq.]: A1-A3 0.00175715, C1 0, C2 4.56448e-6, C3 0, C4 1.92694e-6, D -0.000623729
- Eutrophierungspotenzial Land (EP-terrestrial) [mol N-Äq.]: A1-A3 0.0192144, C1 0, C2 5.0988e-5, C3 0, C4 2.11443e-5, D -0.00680441
- Bildungspotential für troposphärisches Ozon (POCP) [kg NMVOC-Äq.]: A1-A3 0.00519521, C1 0, C2 8.96777e-6, C3 0, C4 6.10247e-6, D -0.00194893
- Potenzial für den abiotischen Abbau nicht fossiler Ressourcen (ADPE) [kg Sb-Äq.]: A1-A3 7.34563e-7, C1 0, C2 2.40723e-10, C3 0, C4 1.66733e-10, D -1.10881e-7
- Potenzial für den abiotischen Abbau fossiler Brennstoffe (ADPF) [MJ]: A1-A3 18.5284, C1 0, C2 0.0397195, C3 0, C4 0.0353063, D -12.0614
- Wassernutzung (WDP) [m^(3) Welt-Äq. entzogen]: A1-A3 0.590567, C1 0, C2 2.90286e-5, C3 0, C4 -2.65715e-5, D -0.150335
- Auftreten von Krankheiten aufgrund von Feinstaubemissionen (PM) [Krankheitsfälle]
- Wirkung durch Exposition des Menschen mit U235 (IR) [kBq U235-Äq.]
- Toxizitätsvergleichseinheit für Ökosysteme (ETP-fw) [CTUe]
- Toxizitätsvergleichseinheit für Menschen (krebserregend) (HTP-c) [CTUh]
- Toxizitätsvergleichseinheit für Menschen (nicht krebserregend) (HTP-nc) [CTUh]
- Bodenqualitätsindex (SQP) [SQP]

## Use advice
Gültigkeitsbereich:
Die vorliegende Produktdeklaration bezieht sich auf eine deklarierte Einheit von 1 kg Aluminium-Strangpressbolzen produziert an den beiden Giesserein in Nachrodt (Deutschland) und Schlins (Österreich).

Es handelt sich um einen gewichteten Durchschnitt der beiden Werke. Dieser bildet die Gesamtproduktion der Alu-met GmbH ab.
Systemgrenze:
Die Ökobilanz für Strangpressbolzen beinhaltet eine cradle-to-gate-Betrachtung (Wiege bis zum Werkstor) der auftretenden Umweltwirkungen mit Optionen.

Die folgenden Lebenszyklusphasen werden in der Analyse berücksichtigt:

Modul A1–A3 | Produktionsstadium

Das Produktionsstadium beinhaltet die Aufwendungen der Herstellung der eingesetzten Grundstoffe (Primäraluminium, Legierungselemente, Betriebsstoffe etc.), die Transporte aller Rohstoffe inklusive der eingesetzten Aluminiumschrotte sowie die Umweltaufwendungen aus den Gießereien an den Standorten Schlins (AT) und Nachrodt (DE). Eingesetztes Sekundäraluminium geht dabei lastenfrei in die Berechnung ein. Innerhalb der Werksgrenzen werden die Umweltwirkungen des Umschmelz-Prozesses betrachtet. Die Energiebereitstellung am Standort erfolgt über Erdgas und elektrische Energie aus dem regionalen Stromnetz. Auch die Produktion der Verpackung der Strangpressbolzen ist in Modul A1–A3 erfasst.

Modul C1 | Rückbau

Für das End-of-Life-Szenario wird angenommen, dass das Endprodukt nicht mit anderen Materialien verbunden ist und sortenrein rückgebaut werden kann. Die mit dem Rückbau verbundenen Aufwände werden damit als gering eingeschätzt und sind somit vernachlässigbar.

Modul C2 | Transport

Modul C2 beinhaltet den Transport zur Abfallbehandlung. Dazu wird der Transport via LKW über 50 km Transportdistanz als repräsentatives Szenario angesetzt.

Modul C3 | Abfallbehandlung

Der Produktfluss, der das Modul D zum Recycling erreicht, verlässt das Produktsystem in C3.

Aufwendungen für die Zerkleinerung und Sortierung des Aluminiumschrottes sind aufgrund der Geringfügigkeit der zu erwartenden Umweltwirkungen nicht enthalten.

Modul C4 | Entsorgung

Das Modul C4 deklariert die durch die Deponierung

(5 % des Produktes) entstehenden Umweltwirkungen.

Modul D | Gutschriften und Lasten außerhalb der Systemgrenze

Im Modul D werden die Substitutionspotenziale von Primäraluminium durch ein Recyclingszenario (95 % des Produktes) dargestellt.

## Data sources
- GaBi Database (all versions)
- GaBi database SP40 2020
