# PU-Dämmplatten mit Mineralvlies-Deckschicht

Dataset: ILCD process, EPD, average dataset
Geography: DE
Reference year: 2021
Valid until: 2026
Classification: OEKOBAU.DAT: Dämmstoffe / Polyurethan-Hartschaum (PU) / PU mit Mineralvlies
Classification: IBUCategories: 02 Bauprodukte / Wärmedämmungsprodukte / Dämmstoffe aus Schaumkunststoffen
Method details: Dämmstoffe aus Schaumkunststoffen.pdf
Generated by: PE INTERNATIONAL AG
Registration number: EPD-IVP-20210002-IBE2-DE
Owner: Industrieverband Polyurethan-Hartschaum e.V.
Compliance: DIN EN 15804; ISO 14025
Review: Accredited third party review by Institut Bauen und Umwelt e. V.
Amounts: rows without a unit in brackets have none in this file; such an amount is in the reference unit of its flow, which a separate flow dataset defines
copyright: true
licenseType: Free of charge for all users and uses
accessRestrictions: None

## General comment
Polyurethan-Hartschaum (PU) ist ein geschlossenzelliger Schaumstoff, der als werkmäßig hergestellter Wärmedämmstoff in Form von Dämmplatten im Hochbau und für haus- und betriebstechnische Anlagen eingesetzt wird. Die Produktfamilie der Polyurethan-Dämmstoffe (PU) umfasst hauptsächlich die Produktvariante Polyurethan – siehe EN 13165. PU-Dämmstoffe werden u. a. als Dämmplatten mit flexiblen Deckschichten hergestellt.

Diese Produktdeklaration bezieht sich auf beidseitig mit Mineralvlies-Folie kaschierten PU-Dämmplatten.

## Technology and included processes
Polyurethan-Hartschaumdämmplatten mit flexiblen Mineralvlies-Deckschichten werden in einem kontinuierlichen Verfahren auf einer Doppelbandanlage hergestellt. Bei diesem Fertigungsprozess strömt das Polyurethan-Reaktionsgemisch aus einem Mischkopf auf die untere Mineralvlies-Deckschicht, schäumt auf und verklebt innerhalb der Druckzone der Anlage mit einer von oben zugeführten Mineralvlies-Deckschicht. Die Bandschaumplatten werden nach dem Durchlauf durch die Doppelbandanlage in die gewünschten Abmessungen zugeschnitten. Gütesicherung Die deklarierten Produkte sind qualitätsüberwacht. Diese Gütesicherung basiert auf der Überwachung und Zertifizierung durch unabhängige, bauaufsichtlich anerkannte Stellen.
Technische Daten:
Zur Bestimmung der technischen Daten werden die Prüfmethoden gemäß EN 13165 verwendet. Die Rohdichte von PU-Dämmplatten mit Mineralvlies-Deckschichten für den Hochbau beträgt ca. 31 - 32 kg/m³.

Die Platten werden abhängig von den Dicken in den Wärmeleitfähigkeitsstufen WLS 026 bis WLS 029 hergestellt. Diese Stufen entsprechen Bemessungswerten der Wärmeleitfähigkeit von 0,026 W/(m·K) bis 0,029 W/(m·K). Kapillaraktiv modifizierte Dämmplatten weisen Bemessungswerte von 0,031 W/(m·K) auf. Zusätzlich zu der Wärmeleitfähigkeit kann der Nennwert des Wärmedurchlasswiderstandes R 4,29 (m2·K)/W bis 4,80 (m2·K)/W und die Dicke von 25 bis 28 mm der Dämmplatte bei R = 1 (m2·K)/W angegeben werden.

Die Nenndruckspannung oder Nenndruckfestigkeit bei 10% Stauchung beträgt 100 kPa (dh) oder 150 kPa (ds) nach DIN 4108-10. Höhere Druckfestigkeiten sind möglich. Die Nennzugfestigkeit senkrecht zur Dämmplattenebenebeträgt 40 kPa. Höhere Zugfestigkeiten sind möglich.

Die Wasserdampfdiffusionswiderstandszahl μ von

Polyurethan-Hartschaum liegt gemäß DIN 4108-4
zwischen 40 und 200.

Die maximale Feuchteaufnahme von Polyurethan-Hartschaum bei Diffusion und Kondensation beträgt ca. 6 Vol.-%. Die im Untertauchversuch nach 28 Tagen gemessene Wasseraufnahme liegt bei einer 60 mm dicken PU-Dämmplatte mit Mineralvlies-Kaschierung
bei 1,3 Vol.-%. Die Feuchteaufnahme bei Frost-Tau-Wechsel ergibt – auf den Dämmstoff ohne Deckschicht bezogen – Werte zwischen 2 und 7 Vol.-%.

Polyurethan-Hartschaum besitzt ausgeprägt duroplastische Eigenschaften und ist daher nicht schmelzbar.
Deklarierte Einheit:
Die deklarierte Einheit ist 1 m² installierte PU-Dämmplatte mit Mineralvlies-Deckschicht (beidseitig) und den folgenden Spezifikationen:

## Technical purpose
Das Anwendungsgebiet von PU-Hartschaum-Dämmstoffen ist die Wärmedämmung im Hochbau (z.B. Steildach, Flachdach, Boden, Decke und Außenwand (außen und innen)). Darüber hinaus wird PU-Hartschaum für die Dämmung haus- und betriebstechnischer Anlagen verwendet.

## Reference product
- 1 m² installierte PU-Dämmplatte mit Mineralvlies-Deckschicht: 1

## Inputs
- Erneuerbare Primärenergie als Energieträger (PERE) [MJ]: A1-A3 17.1, A4 0.357, A5 1.26, C2 0.0689, C3 1.144, D -14.1
- Erneuerbare Primärenergie zur stofflichen Nutzung (PERM) [MJ]: A1-A3 1.23, A4 0, A5 -1.23, C2 0, C3 0, D 0
- Total erneuerbare Primärenergie (PERT) [MJ]: A1-A3 18.3, A4 0.357, A5 0.028, C2 0.0689, C3 1.144, D -14.1
- Nicht-erneuerbare Primärenergie als Energieträger (PENRE) [MJ]: A1-A3 89.9, A4 6.36, A5 22.5, C2 1.23, C3 174.01, D -66.2
- Nicht-erneuerbare Primärenergie zur stofflichen Nutzung (PENRM) [MJ]: A1-A3 192, A4 0, A5 -22.4, C2 0, C3 -170, D 0
- Total nicht erneuerbare Primärenergie (PENRT) [MJ]: A1-A3 282, A4 6.36, A5 0.113, C2 1.23, C3 4.33, D -66.2
- Einsatz von Sekundärstoffen (SM) [kg]: A1-A3 0, A4 0, A5 0, C2 0, C3 0, D 0
- Erneuerbare Sekundärbrennstoffe (RSF) [MJ]: A1-A3 0, A4 0, A5 0, C2 0, C3 0, D 0
- Nicht erneuerbare Sekundärbrennstoffe (NRSF) [MJ]: A1-A3 0, A4 0, A5 0, C2 0, C3 0, D 0
- Einsatz von Süßwasserressourcen (FW) [m^3]: A1-A3 0.0814, A4 0.000414, A5 0.000887, C2 7.98e-5, C3 0.02259, D -0.0164

## Outputs
- Gefährlicher Abfall zur Deponie (HWD) [kg]: A1-A3 1.13e-5, A4 2.96e-7, A5 8.44e-11, C2 5.71e-8, C3 3.309e-9, D -2.65e-8
- Entsorgter nicht gefährlicher Abfall (NHWD) [kg]: A1-A3 0.259, A4 0.000974, A5 0.00378, C2 0.000188, C3 0.14623, D -0.0301
- Entsorgter radioaktiver Abfall (RWD) [kg]: A1-A3 0.00629, A4 7.88e-6, A5 8.97e-6, C2 1.52e-6, C3 0.000368, D -0.00482
- Komponenten für die Wiederverwendung (CRU) [kg]: A1-A3 0, A4 0, A5 0, C2 0, C3 0, D 0
- Stoffe zum Recycling (MFR) [kg]: A1-A3 0, A4 0, A5 0, C2 0, C3 0, D 0
- Stoffe für die Energierückgewinnung (MER) [kg]: A1-A3 0, A4 0, A5 0, C2 0, C3 0, D 3.81
- Exportierte elektrische Energie (EEE) [MJ]: A1-A3 0, A4 0, A5 0.411, C2 0, C3 15.4, D 0
- Exportierte thermische Energie (EET) [MJ]: A1-A3 0, A4 0, A5 0.731, C2 0, C3 27.8, D 0

## Impact indicators
- Globales Erwärmungspotenzial (GWP) [kg CO_(2)-Äq.]: A1-A3 11.6, A4 0.465, A5 0.392, C2 0.0896, C3 9.2968, D -3.82
- Abbau Potential der stratosphärischen Ozonschicht (ODP) [kg CFC11-Äq.]: A1-A3 1.91e-5, A4 7.65e-17, A5 1.11e-16, C2 1.47e-17, C3 4.51e-15, D -5.31e-14
- Versauerungspotenzial von Boden und Wasser (AP) [kg SO_(2)-Äq.]: A1-A3 0.022, A4 0.000376, A5 9.08e-5, C2 7.26e-5, C3 0.003747, D -0.00429
- Eutrophierungspotenzial (EP) [kg PO_(4)^(3)-Äq.]: A1-A3 0.00314, A4 7.01e-5, A5 2.2e-5, C2 1.35e-5, C3 0.0009177, D -0.000576
- Bildungspotential für troposphärisches Ozon (POCP) [kg Ethen-Äq.]: A1-A3 0.0121, A4 -6.12e-6, A5 6.31e-6, C2 -1.18e-6, C3 0.0002415, D -0.000437
- Potenzial für den abiotischen Abbau nicht fossiler Ressourcen (ADPE) [kg Sb-Äq.]: A1-A3 1.6e-6, A4 3.43e-8, A5 1.29e-9, C2 6.61e-9, C3 5.17e-8, D -6.62e-7
- Potenzial für den abiotischen Abbau fossiler Brennstoffe (ADPF) [MJ]: A1-A3 267, A4 6.34, A5 0.0908, C2 1.22, C3 3.39, D -54.1

## Use advice
Gültigkeitsbereich:
Diese Umwelt-Produktdeklaration gilt für die deklarierten Produkte der IVPU-Mitglieder Karl Bachl GmbH & Co KG, Paul Bauder GmbH & Co KG, IKO Insulation BV, Kingspan Insulation GmbH & Co KG, Linzmeier Bauelemente GmbH, puren gmbh, Recticel Dämmsysteme GmbH, Steinbacher Dämmstoff-GmbH, Unilin Insulation bv. Der IVPU repräsentiert über 90 % des Polyurethan-Dämmstoffmarktes in Deutschland. Diese Umwelt-Produktdeklaration basiert auf gewichteten Mittelwerten, bestimmt auf Basis der Einzelwerte aus den Produktionswerken der genannten Herstellerfirmen (siehe Abschnitt 3.1).
Systemgrenze:
Typ der EPD: Wiege bis Werkstor - mit Optionen

Die Ökobilanz betrachtet folgende Punkte des Lebenszyklus:
Rohstoffgewinnung und -bereitstellung (A1)
Transporte der Rohstoffe (A2)
Herstellung inklusive Verpackung (A3)
Transport zur Baustelle (A4)
Einbau ins Gebäude (Recycling bzw. thermische Verwertung der Verschnitte und Verpackungsabfälle) (A5)
Transport zum End-of-Life (C2)
Abfallbehandlung: Energie für Schredder (C3)
thermische Verwertung (PU Schaum) (C3)
Recycling- bzw. Nutzenpotenzial außerhalb der Systemgrenze (D)

## Data sources
- GaBi Database (all versions)
- GaBi database SP40 2020
