# Brettsperrholz (Durchschnitt DE)

Dataset: ILCD process, EPD, representative dataset
Geography: DE
Reference year: 2021
Valid until: 2026
Classification: OEKOBAU.DAT: Holz / Vollholz / Brettschichtholzplatte
Method details: EN 15804; ILCD format
Generated by: Thünen-Institut für Holzforschung
Owner: Thünen-Institut für Holzforschung
Compliance: EN 15804+A2; EN 16485
Review: Independent external review by Dr. Frank Werner - Umwelt & Entwicklung
Amounts: rows without a unit in brackets have none in this file; such an amount is in the reference unit of its flow, which a separate flow dataset defines
copyright: true

## General comment
Weitere Informationen zur deklarierten Einheit (Zusammensetzung) und die auf Herstellerangaben beruhende Sachbilanz (In- und Output der Stoff- und Energieströme) stehen als Excel-Datei unter dem Unterpunkt Hintergrund-Bericht zum Download bereit.
Der Datensatz wurde 2021 als Aktualisierung mit gleichbleibendem Vordergrundsystem erstellt. Alle Hintergrunddaten entstammen der GaBi Professional Datenbank in der Content Version 2021.1. Die Modellierung und Berechnung der Ökobilanz basiert auf den europäischen Normen EN 15804:2012+A2:2019 und EN 16485:2014. Bei Rückfragen wenden Sie sich bitte an holzundklima@thuenen.de.

## Geography
Für die Ökobilanzierung von Brettsperrholz wurden Daten von 5 Werken berücksichtigt (Rüter & Diederichs 2012). Für alle in Rüter & Diederichs (2012) angeführten Vollholzprodukte wurden von 2009 bis 2011 insgesamt 178 Prozesslinien erfasst. Im Verhältnis zu den vom Statistischen Bundesamt gemeldeten Produktionsmengen im selben Zeitraum entspricht die erreichte Abdeckung von Vollholzprodukten aus Nadelschnittholz 38%.

## Time period
Der Datensatz basiert auf Produktionsdaten aus den Jahren 2009 bis 2011 (Vordergrundsystem).
Eine Aktualisierung des Hintergrundsystems erfolgte 2021.

## Technology and included processes
Brettsperrholz ist i.d.R. symmetrisch aufgebaut und besteht aus mindestens drei rechtwinklig zueinander verklebten Lagen aus Nadelschnittholz, wobei die einzelnen Schnitthölzer längs ihrer Schmalseiten ohne oder mit planmäßigem seitlichem Abstand zueinander angeordnet sein können. Bei Brettsperrholzholz mit mehr als fünf Lagen können gemäß den Vorgaben der jeweiligen bauaufsichtlichen Zulassung bis zu drei benachbarte Vollholzlagen faserparallel miteinander verklebt werden. Die Vollholzlagen haben Dicken zwischen 17 und 45 mm. Zusätzliche, außenseitig angeordnete, nicht tragende Funktionsschichten aus Holz- oder Gipswerkstoffen sind möglich. Hier wird jedoch nur Brettsperrholz ohne Holzwerkstofflage betrachtet. Die Verklebung von Brettsperrholz wird vornehmlich mittels Melamin-Harnstoff-Formaldehyd und 1 Komponenten Polyurethan-Bindemittel durchgeführt. Teilweise kommen Emulsion-Polymer-Isocyanat-Bindemittel zum Einsatz. Für die Herstellung von Brettsperrholz werden Bretter und Bohlen aus Nadelholz zunächst auf weniger als 15 % Holzfeuchte getrocknet, vorgehobelt und visuell bzw. maschinell nach der Festigkeit sortiert. Identifizierte Brettabschnitte mit festigkeitsvermindernden Stellen werden abhängig von der erwünschten Festigkeitsklasse ausgekappt und die so entstandenen Brettabschnitte durch Keilzinkenverbindung zu endlos langen Lamellen gestoßen. Im folgenden Vorhobelprozess werden die Lamellen auf Stärken zwischen 17 mm und 45 mm vierseitig gehobelt. Bei einigen Herstellern werden die Lamellen mittels Schmalseitenverklebung zu einer Einschichtplatte verklebt. Produziert der Brettsperrholzhersteller zunächst Einschichtplatten, so werden diese nach der Aushärtung gehobelt, beleimt und danach in der Presse kreuzweise angeordnet. Hersteller, die ohne Schmalseitenverklebung arbeiten, ordnen unmittelbar die beleimten Lamellen kreuzweise im Pressbett an. Je nach Hersteller können einzelne Lagen aus Holzwerkstoffplatten hergestellt werden, die wiederum herstellerabhängig in den Fugen kraftschlüssig gestoßen sein können. Nach dem Pressen und Aushärten wird der Rohling gehobelt, gefast, abgebunden und verpackt.
Die Holzfeuchte des Produktes liegt bei 12%

## Technical purpose
Brettsperrholz wird vorwiegend bei hoher statischer Beanspruchung im Ingenieurholzbau verwendet. Es wird als Platten- oder Scheibenelement eingesetzt. Es kann für die Errichtung von Außen- und Innenwänden, Dach- und Deckenelementen eingesetzt werden sowie für Stiegenläufe und Balkonplatten.

## Scenarios
- energetisch (Modul D): therm. Verwertung
- stofflich (Modul D): stoffl. Verwertung
- Entsorgung Verpackung (Modul A5): Das Modul A5 enthält ausschließlich die Entsorgung der Verpackungsmaterialien

## Reference product
- Brettsperrholz: 1

## Inputs
- Erneuerbare Primärenergie als Energieträger (PERE) / Uso de energía primaria renovable excluyendo los recursos de energía primaria renovable utilizada como materia prima (PERE) [MJ]: A1 1514.29, A2 6.05115, A3 873.333, A1-A3 2393.67, A5 (Entsorgung Verpackung) 0.0575434, C2 0.39515, C3 100.439, D (energetisch) 5906.25, D (stofflich) -28.7291
- Erneuerbare Primärenergie zur stofflichen Nutzung (PERM) / Uso de energía primaria renovable utilizada como materia prima (PERM) [MJ]: A1 8290.96, A2 0, A3 0, A1-A3 8290.96, A5 (Entsorgung Verpackung) 0, C2 0, C3 -8290.96, D (energetisch) 0, D (stofflich) 0
- Total erneuerbare Primärenergie (PERT) / Uso total de la energía primaria renovable (energía primaria y recursos de energía primaria renovable utilizada como materia prima) (PERT) [MJ]: A1 9805.25, A2 6.05115, A3 873.333, A1-A3 10684.6, A5 (Entsorgung Verpackung) 0.0575434, C2 0.39515, C3 -8190.52, D (energetisch) 5906.25, D (stofflich) -28.7291
- Nicht-erneuerbare Primärenergie als Energieträger (PENRE) / Uso de energía primaria no renovable, excluyendo los recursos de energía primaria no renovable utilizada como materia prima (PENRE) [MJ]: A1 852.177, A2 98.675, A3 805.23, A1-A3 1756.08, A5 (Entsorgung Verpackung) 0.288846, C2 7.09009, C3 153.986, D (energetisch) -4473.7, D (stofflich) -144.702
- Nicht-erneuerbare Primärenergie zur stofflichen Nutzung (PENRM) / Uso de la energía primaria no renovable utilizada como materia prima (PENRM) [MJ]: A1 75.5691, A2 0, A3 20.268, A1-A3 95.8371, A5 (Entsorgung Verpackung) -20.268, C2 0, C3 -75.5691, D (energetisch) 0, D (stofflich) 0
- Total nicht erneuerbare Primärenergie (PENRT) / Uso total de la energía primaria no renovable (energía primaria y recursos de energía primaria renovable utilizada como materia prima) (PENRT) [MJ]: A1 927.747, A2 98.675, A3 825.498, A1-A3 1851.92, A5 (Entsorgung Verpackung) -19.9792, C2 7.09009, C3 78.417, D (energetisch) -4473.7, D (stofflich) -144.702
- Einsatz von Sekundärstoffen (SM) / Uso de materiales secundarios (SM) [kg]: A1 0, A2 0, A3 0, A1-A3 0, A5 (Entsorgung Verpackung) 0, C2 0, C3 0, D (energetisch) 0, D (stofflich) 489.437
- Erneuerbare Sekundärbrennstoffe (RSF) / Uso de combustibles secundarios renovables (RSF) [MJ]: A1 105.302, A2 0, A3 0, A1-A3 105.302, A5 (Entsorgung Verpackung) 0, C2 0, C3 0, D (energetisch) 0, D (stofflich) 0
- Nicht erneuerbare Sekundärbrennstoffe (NRSF) / Uso de combustibles secundarios no renovables (NRSF) [MJ]: A1 0, A2 0, A3 0, A1-A3 0, A5 (Entsorgung Verpackung) 0, C2 0, C3 0, D (energetisch) 0, D (stofflich) 0
- Einsatz von Süßwasserressourcen (FW) / Uso neto de recursos de agua dulce (FW) [m3]: A1 0.182439, A2 0.00595019, A3 0.209935, A1-A3 0.398325, A5 (Entsorgung Verpackung) 0.00379773, C2 0.000452312, C3 0.0472656, D (energetisch) 0.838411, D (stofflich) -0.0160142

## Outputs
- Gefährlicher Abfall zur Deponie (HWD) / Residuos peligrosos eliminados (HWD) [kg]: A1 9.41779e-7, A2 4.83728e-9, A3 1.41186e-6, A1-A3 2.35847e-6, A5 (Entsorgung Verpackung) 5.76819e-11, C2 3.57265e-10, C3 5.59893e-8, D (energetisch) -1.58296e-6, D (stofflich) -2.26481e-7
- Entsorgter nicht gefährlicher Abfall (NHWD) / Residuos no peligrosos eliminados (NHWD) [kg]: A1 1.32614, A2 0.0156934, A3 0.970046, A1-A3 2.31188, A5 (Entsorgung Verpackung) 0.00886804, C2 0.00105324, C3 0.11997, D (energetisch) 6.54654, D (stofflich) -0.038199
- Entsorgter radioaktiver Abfall (RWD) / Residuos radiactivos eliminados (RWD) [kg]: A1 0.0214532, A2 0.000168298, A3 0.0523, A1-A3 0.0739216, A5 (Entsorgung Verpackung) 7.01536e-6, C2 8.57635e-6, C3 0.0123357, D (energetisch) -0.279905, D (stofflich) -0.0029206
- Komponenten für die Wiederverwendung (CRU) / Componentes para su reutilización (CRU) [kg]: A1 0, A2 0, A3 0, A1-A3 0, A5 (Entsorgung Verpackung) 0, C2 0, C3 0, D (energetisch) 0, D (stofflich) 0
- Stoffe zum Recycling (MFR) / Materiales para el reciclaje (MFR) [kg]: A1 0, A2 0, A3 0, A1-A3 0, A5 (Entsorgung Verpackung) 0, C2 0, C3 489.437, D (energetisch) 0, D (stofflich) 0
- Stoffe für die Energierückgewinnung (MER) / Materiales para valorización energética (recuperación de energía) (MER) [kg]: A1 0, A2 0, A3 0, A1-A3 0, A5 (Entsorgung Verpackung) 0, C2 0, C3 489.437, D (energetisch) 0, D (stofflich) 0
- Exportierte elektrische Energie (EEE) / Energía exportada electrica (EEE) [MJ]: A1 0, A2 0, A3 0.435461, A1-A3 0.435461, A5 (Entsorgung Verpackung) 3.21052, C2 0, C3 0, D (energetisch) 0, D (stofflich) 0
- Exportierte thermische Energie (EET) / Energía exportada termal (EET) [MJ]: A1 0, A2 0, A3 1.01163, A1-A3 1.01163, A5 (Entsorgung Verpackung) 7.39429, C2 0, C3 0, D (energetisch) 0, D (stofflich) 0

## Impact indicators
- Globales Erwärmungspotenzial - total (GWP-total) [kg CO2-Äqv.]: A1 -728.649, A2 7.31545, A3 61.4887, A1-A3 -659.845, A5 (Entsorgung Verpackung) 1.7674, C2 0.511563, C3 800.893, D (energetisch) -293.405, D (stofflich) -11.1602
- Globales Erwärmungspotenzial - fossil (GWP-fossil) [kg CO2-Äqv.]: A1 60.1059, A2 7.31545, A3 61.4887, A1-A3 128.91, A5 (Entsorgung Verpackung) 1.7674, C2 0.511563, C3 12.138, D (energetisch) -293.405, D (stofflich) -11.1602
- Globales Erwärmungspotenzial - biogen (GWP-biogenic) [kg CO2-Äqv.]: A1 -788.755, A2 0, A3 0, A1-A3 -788.755, A5 (Entsorgung Verpackung) 0, C2 0, C3 788.755, D (energetisch) 0, D (stofflich) 0
- Abbaupotenzial der stratosphärischen Ozonschicht (ODP) [kg CFC 11-Äquiv.]: A1 6.98626e-13, A2 3.40329e-15, A3 1.75253e-12, A1-A3 2.45456e-12, A5 (Entsorgung Verpackung) 2.33961e-16, C2 6.79583e-17, C3 4.15483e-13, D (energetisch) -9.42487e-12, D (stofflich) -9.7007e-14
- Versauerungspotenzial, kumulierte Überschreitung (AP) [mol H+ eqv.]: A1 0.407352, A2 0.0426709, A3 0.225662, A1-A3 0.675685, A5 (Entsorgung Verpackung) 0.000276028, C2 0.00308841, C3 0.0174679, D (energetisch) -0.300966, D (stofflich) -0.0635037
- Eutrophierungspotenzial - Süßwasser (EP-freshwater) [kg P eqv.]: A1 0.000176026, A2 1.91315e-5, A3 0.000288149, A1-A3 0.000483306, A5 (Entsorgung Verpackung) 3.44186e-8, C2 1.579e-6, C3 5.08852e-5, D (energetisch) -0.00115728, D (stofflich) -2.71768e-5
- Eutrophierungspotenzial - Salzwasser (EP-marine) [kg N eqv.]: A1 0.187048, A2 0.0209562, A3 0.0906845, A1-A3 0.298689, A5 (Entsorgung Verpackung) 4.56112e-5, C2 0.00151327, C3 0.00558653, D (energetisch) -0.108291, D (stofflich) -0.0302584
- Eutrophierungspotenzial - Land (EP-terrestrial) [mol N eqv.]: A1 2.01472, A2 0.231917, A3 0.99532, A1-A3 3.24196, A5 (Entsorgung Verpackung) 0.00128927, C2 0.0167493, C3 0.0583261, D (energetisch) -0.867183, D (stofflich) -0.33316
- Bildungspotenzial für troposphärisches Ozon (POCP) [kg NMVOC eqv.]: A1 0.516977, A2 0.0395086, A3 0.265831, A1-A3 0.822316, A5 (Entsorgung Verpackung) 0.000122078, C2 0.00285394, C3 0.0138795, D (energetisch) -0.270315, D (stofflich) -0.0782782
- Potenzial für die Verknappung abiotischer Ressourcen – nicht fossile Ressourcen (ADPE) [kg Sb-Äqv.]: A1 2.34448e-5, A2 6.20616e-7, A3 2.47544e-5, A1-A3 4.88198e-5, A5 (Entsorgung Verpackung) 3.44381e-9, C2 4.04949e-8, C3 4.98206e-6, D (energetisch) -0.000117838, D (stofflich) -1.83255e-6
- Potenzial für die Verknappung abiotischer Ressourcen – fossile Brennstoffe (ADPF) [MJ]: A1 927.61, A2 98.6002, A3 805.013, A1-A3 1831.22, A5 (Entsorgung Verpackung) 0.288734, C2 7.08064, C3 153.938, D (energetisch) -4548.2, D (stofflich) -144.685
- Wasser-Entzugspotenzial (Benutzer) (WDP) [m3 world eqv.]: A1 0.182439, A2 0.00595019, A3 0.209935, A1-A3 0.398325, A5 (Entsorgung Verpackung) 0.00379773, C2 0.000452312, C3 0.0472656, D (energetisch) 0.838411, D (stofflich) -0.0160142
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
## Use advice
Aufgrund der hohen Abdeckung bildet der Datensatz die durchschnittlichen Produktionsverhältnisse und die damit verbundenen Umweltwirkungen repräsentativ für Deutschland ab. Liegen keine herstellerspezifischen Ökobilanzergebnisse des verwendeten Produkts vor, empfiehlt sich die Verwendung dieses Durchschnittsdatensatzes.

## Data sources
- Rüter S, Diederichs S (2012) Ökobilanz Basisdaten für Bauprodukte aus Holz, Hamburg, Johann Heinrich von Thünen Institut, Institut für Holztechnologie und Holzbiologie, Abschlussbericht
- GaBi database (general)
