# Tor - Lindab A/S - Sektionaltor LDC

Dataset: ILCD process, EPD, specific dataset
Geography: DK
Reference year: 2017
Valid until: 2022
Classification: OEKOBAU.DAT: Komponenten von Fenstern und Vorhangfassaden / Türen und Tore / Stahl
Synonyms: Sectional door; Combined; LDC Steel
Method details: EPD Sectional doors; Produktkategorieregeln Teil A; Produktkategorieregeln Teil B – für Türen und Tore
Owner: Lindab A/S
Compliance: EN 15804
Review: Independent external review by Patrick Wortner
Amounts: rows without a unit in brackets have none in this file; such an amount is in the reference unit of its flow, which a separate flow dataset defines
copyright: true

## General comment
Dieser Datensatz beinhaltet die Ergebnisse für die Module A1-A3 sowie die Module A4, A5, B1, B2, B3, B4, B5, B6, B7, C1, C2, C3, C4, D gemäß EN 15804. Ein Vergleich mit anderen Produkten ist nur mit einer vergleichbaren Anwendung im Gebäude zulässig. Grundsätzlich ist eine Gegenüberstellung oder die Bewertung von EPD Daten nur möglich, wenn alle zu vergleichenden Datensätze nach EN 15804 erstellt wurden und der Gebäudekontext, bzw. die produktspezifischen Leistungsmerkmale berücksichtigt werden.

## Geography
Dieser Datensatz repräsentiert die Situation des Unternehmens Lindab S/A, Dänemark im Hinblick auf die wichtigsten Technologien und die gesetzlichen Rahmenbedingungen.

## Time period
jährlicher Durchschnitt

## Technology and included processes
Die Ökobilanzergebnisse umfassen die Lebenszyklusstadien der Herstellung der Vorprodukte bis hin zur Rohstoffgewinnung und Verarbeitungsprozesse von als Input dienenden Sekundärstoffen (z.B. Recyclingprozesse), deren Transporte zum Werk sowie die Produktion selbst, einschließlich der Bereitstellung von allen Hilfs- und Betriebsstoffen, Energie, sowie die vollständige Abfallbehandlung oder die Deponierung der Restabfälle während des Stadiums der Produktion. Die Module A1, A2 und A3 sind hier als ein aggregiertes Modul A1-A3 ausgewiesen. Falls für diesen Datensatz weitere Module berechnet wurden, sind diese separat zu finden und können für eine Betrachtung des gesamten Lebenszyklus zusammengeführt werden.

## Technical purpose
LDC Sektionaltor ist für nahezu alle Gebäudetypen hinsichtlich Funktion, Design und Einbau geeignet.

## Reference product
- Tor - Lindab A/S - Sektionaltor LDC: 1

## Inputs
- Einsatz von Süßwasserressourcen (FW) / Uso neto de recursos de agua dulce (FW) [m3]: A1-A3 0.193, A4 0.000209, A5 0.00301, B1 0, B4 0, B5 0, B6 0.00709, B7 0, C1 0.00219, C2 0.000103, C3 0.000515, C4 0.00591, D -0.274
- Nicht-erneuerbare Primärenergie als Energieträger (PENRE) / Uso de energía primaria no renovable, excluyendo los recursos de energía primaria no renovable utilizada como materia prima (PENRE) [MJ]: A1-A3 708, A4 1.47, A5 7.87, B1 0, B4 0, B5 0, B6 27.8, B7 0, C1 4.28, C2 0.729, C3 1.19, C4 65.9, D -181
- Nicht-erneuerbare Primärenergie zur stofflichen Nutzung (PENRM) / Uso de la energía primaria no renovable utilizada como materia prima (PENRM) [MJ]: A1-A3 65.2, A4 0, A5 0, B1 0, B2 0, B3 0, B4 0, B5 0, B6 0, B7 0, C1 0, C2 0, C3 0, C4 -65.2, D 0
- Nicht erneuerbare Sekundärbrennstoffe (NRSF) / Uso de combustibles secundarios no renovables (NRSF) [MJ]: A1-A3 0, A4 0, A5 0, B1 0, B2 0, B3 0, B4 0, B5 0, B6 0, B7 0, C1 0, C2 0, C3 0, C4 0, D 0
- Erneuerbare Primärenergie als Energieträger (PERE) / Uso de energía primaria renovable excluyendo los recursos de energía primaria renovable utilizada como materia prima (PERE) [MJ]: A1-A3 45.4, A4 0.0834, A5 47.7, B1 0, B4 0, B5 0, B6 37.4, B7 0, C1 1.61, C2 0.0413, C3 0.334, C4 0.09, D -114
- Erneuerbare Primärenergie zur stofflichen Nutzung (PERM) / Uso de energía primaria renovable utilizada como materia prima (PERM) [MJ]: A1-A3 47.4, A4 0, A5 -47.4, B1 0, B2 0, B3 0, B4 0, B5 0, B6 0, B7 0, C1 0, C2 0, C3 0, C4 0, D 0
- Erneuerbare Sekundärbrennstoffe (RSF) / Uso de combustibles secundarios renovables (RSF) [MJ]: A1-A3 0, A4 0, A5 0, B1 0, B2 0, B3 0, B4 0, B5 0, B6 0, B7 0, C1 0, C2 0, C3 0, C4 0, D 0
- Einsatz von Sekundärstoffen (SM) / Uso de materiales secundarios (SM) [kg]: A1-A3 0, A4 0, A5 0, B1 0, B2 0, B3 0, B4 0, B5 0, B6 0, B7 0, C1 0, C2 0, C3 0, C4 0, D 0
- Total nicht erneuerbare Primärenergie (PENRT) / Uso total de la energía primaria no renovable (energía primaria y recursos de energía primaria renovable utilizada como materia prima) (PENRT) [MJ]: A1-A3 773, A4 1.47, A5 7.87, B1 0, B4 0, B5 0, B6 27.8, B7 0, C1 4.28, C2 0.729, C3 1.19, C4 0.749, D -181
- Total erneuerbare Primärenergie (PERT) / Uso total de la energía primaria renovable (energía primaria y recursos de energía primaria renovable utilizada como materia prima) (PERT) [MJ]: A1-A3 92.8, A4 0.0834, A5 0.376, B1 0, B4 0, B5 0, B6 37.4, B7 0, C1 1.61, C2 0.0413, C3 0.334, C4 0.09, D -114

## Outputs
- Komponenten für die Wiederverwendung (CRU) / Componentes para su reutilización (CRU) [kg]: A1-A3 0, A4 0, A5 0, B1 0, B2 0, B3 0, B4 0, B5 0, B6 0, B7 0, C1 0, C2 0, C3 0, C4 0, D 0
- Exportierte elektrische Energie (EEE) / Energía exportada electrica (EEE) [MJ]: A1-A3 0, A4 0, A5 0, B1 0, B2 0, B3 0, B4 0, B5 0, B6 0, B7 0, C1 0, C2 0, C3 0, C4 0, D 0
- Exportierte thermische Energie (EET) / Energía exportada termal (EET) [MJ]: A1-A3 0, A4 0, A5 0, B1 0, B2 0, B3 0, B4 0, B5 0, B6 0, B7 0, C1 0, C2 0, C3 0, C4 0, D 0
- Gefährlicher Abfall zur Deponie (HWD) / Residuos peligrosos eliminados (HWD) [kg]: A1-A3 0.00096, A4 1.11e-7, A5 5.65e-9, B1 0, B2 2.85e-9, B3 7.32e-8, B4 0, B5 0, B6 4.55e-8, B7 0, C1 2.01e-9, C2 5.51e-8, C3 7.57e-10, C4 9.83e-9, D -1.58e-5
- Stoffe für die Energierückgewinnung (MER) / Materiales para valorización energética (recuperación de energía) (MER) [kg]: A1-A3 0, A4 0, A5 0, B1 0, B2 0, B3 0, B4 0, B5 0, B6 0, B7 0, C1 0, C2 0, C3 2.59, C4 0, D 0
- Stoffe zum Recycling (MFR) / Materiales para el reciclaje (MFR) [kg]: A1-A3 0.137, A4 0, A5 0, B1 0, B2 0, B3 0, B4 0, B5 0, B6 0, B7 0, C1 0, C2 0, C3 17.5, C4 0, D 0
- Entsorgter nicht gefährlicher Abfall (NHWD) / Residuos no peligrosos eliminados (NHWD) [kg]: A1-A3 1.74, A4 0.000124, A5 0.0394, B1 0, B2 9.55e-5, B3 0.0678, B4 0, B5 0, B6 0.101, B7 0, C1 0.00301, C2 6.13e-5, C3 0.00072, C4 1.94, D -5.27
- Entsorgter radioaktiver Abfall (RWD) / Residuos radiactivos eliminados (RWD) [kg]: A1-A3 0.00892, A4 2.11e-6, A5 7.23e-5, B1 0, B2 2.47e-5, B3 0.00298, B4 0, B5 0, B6 6.99e-5, B7 0, C1 0.000709, C2 1.04e-6, C3 0.00018, C4 2.73e-5, D -0.0207

## Impact indicators
- Potenzial für den abiotischen Abbau nicht fossiler Ressourcen (ADPE) / Potencial de agotamiento de recursos abióticos para recursos no fósiles (ADPE) [kg Sb-Äqv.]: A1-A3 0.000346, A4 7.09e-9, A5 4.01e-8, B1 0, B4 0, B5 0, B6 1.67e-6, B7 0, C1 1.24e-7, C2 3.51e-9, C3 2.22e-8, C4 2.49e-8, D -9.92e-6
- Potenzial für den abiotischen Abbau fossiler Brennstoffe (ADPF) / Potencial de agotamiento de recursos abióticos para recursos fósiles (ADPF) [MJ]: A1-A3 750, A4 1.47, A5 7.69, B1 0, B4 0, B5 0, B6 27.6, B7 0, C1 2.49, C2 0.726, C3 0.741, C4 0.68, D -129
- Versauerungspotenzial von Boden und Wasser (AP) / Potencial de acidificación del suelo y de los recursos de agua (AP) [kg SO2-Äqv.]: A1-A3 0.143, A4 0.000649, A5 0.00215, B1 0, B4 0, B5 0, B6 0.00396, B7 0, C1 0.000665, C2 0.000321, C3 0.000191, C4 0.000359, D -0.0525
- Eutrophierungspotenzial (EP) / Potencial de eutrofización (EP) [kg Phosphat-Äqv.]: A1-A3 0.0148, A4 0.000162, A5 0.00023, B1 0, B4 0, B5 0, B6 0.000534, B7 0, C1 6.23e-5, C2 8.04e-5, C3 1.7e-5, C4 6.18e-5, D -0.00207
- Globales Erwärmungspotenzial (GWP) / Potencial de calentamiento global (GWP) [kg CO2-Äqv.]: A1-A3 49.2, A4 0.107, A5 1.96, B1 0, B4 0, B5 0, B6 2.79, B7 0, C1 0.234, C2 0.0528, C3 0.0684, C4 2.73, D -9.67
- Abbau Potential der stratosphärischen Ozonschicht (ODP) / Potencial de agotamiento de la capa de ozono estratosférico (ODP) [kg CFC 11 eq.]: A1-A3 2.6e-7, A4 4.9e-13, A5 9.47e-14, B1 0, B4 0, B5 0, B6 1.72e-13, B7 0, C1 1.04e-12, C2 2.42e-13, C3 4.86e-11, C4 5.91e-12, D -6.6e-9
- Bildungspotential für troposphärisches Ozon (POCP) / Potencial de formación de ozono troposférico (POCP) [kg Ethen-Äqv.]: A1-A3 0.0563, A4 -0.00027, A5 0.000268, B1 0, B4 0, B5 0, B6 0.000284, B7 0, C1 4.16e-5, C2 -0.000134, C3 1.31e-5, C4 4.01e-5, D 0.000544

## Use advice
A1-A3 sowie Module A4, A5, B1, B2, B3, B4, B5, B6, B7, C1, C2, C3, C4, D. Das Umweltprofil beinhaltet die Aufwendungen für die Lebenszyklus-Stadien cradle to gate (Modul A1-A3). Die Herstellung der Verpackung wurde innerhalb der Module A1-A3 berücksichtigt.

## Review details
Die angewendete LCI Methode ist in Übereinstimmung mit ISO 14040 und 14044. Die Dokumentation enthält alle relevanten Informationen im Hinblick auf die Datenqualität und den Umfang der Anwendung der jeweiligen LCI Ergebnisse bzw. der Datensätze. Der Datensatz repräsentiert den Stand der Technik bezogen auf die funktionelle Einheit.

## Data sources
- GaBi database (all versions)
