# Fortrac® MPT

Dataset: ILCD process, EPD, specific dataset
Geography: DE
Reference year: 2016
Valid until: 2021
Classification: OEKOBAU.DAT: Kunststoffe / Folien und Vliese / Technische Textilien
Classification: IBUCategories: 02 Bauprodukte / Bedachungen / Technische Textilien
Method details: Technische Textilien.pdf
Owner: HUESKER Synthetic GmbH
Compliance: DIN EN 15804; ISO 14025
Review: Accredited third party review by IBU
Amounts: rows without a unit in brackets have none in this file; such an amount is in the reference unit of its flow, which a separate flow dataset defines
copyright: false

## General comment
Fortrac® MPT ist ein flexibles, extrem belastbares geosynthetisches Gitter, das seit mehr als 20 Jahren zur Bewehrung von Böden verwendet wird. Fortrac® MPT-Geogitter werden aus hochmodulen, kriecharmen synthetischen Rohstoffen hergestellt, die von einem schützenden Polymermantel umgeben sind. Durch eine besondere Fertigungstechnik haben Fortrac® MPT Geogitter eine hohe Stabilität in den Kreuzungs-punkten bei einer gleichzeitigen hohen Verbund-flexibilität, d.h. Anpassungsfähigkeit an den zu bewehrenden Boden. Fortrac® MPT Geogitter werden aus Polyvinylalkohol (MD) und Polyamid (CMD) hergestellt. Außerdem wird eine Polymer-Schutzummantelung auf das Gitter aufgebracht. Polyvinylalkohol in der Hauptbewehrungsrichtung zeichnet sich durch eine hohe Dehnsteifigkeit in Kombination mit einer sehr hohen Widerstands-fähigkeit gegenüber Chemikalien im Boden aus, besonders im alkalischen Bereich.
In der hier durchgeführten Ökobilanz wird ein durchschnittliches Produkt untersucht. Betrachtet werden die Produktartikel:

Fortrac® 35/20-20/30 MPT (gewebt)
Fortrac® 55/25-20/30 MPT (gewebt)
Fortrac® R 80/25-20/30 MPT (geraschelt)
Fortrac® R 110/25-20/30 MPT (geraschelt)
Fortrac® R 150/30-30/30 MPT (geraschelt)
Fortrac® R 200/30-30/30 MPT (geraschelt)
Zur Durchschnittsbildung wurden die Ökobilanzergebnisse der einzelnen Produktartikel addiert und über die gesamte Produktionsmenge gemittelt. Die Produktartikel unterscheiden sich in ihrer Zusammensetzung. Je nach Produkt ist der Anteil an Polyvinylalkohol, an Polyamiden und an der Polymerbeschichtung unterschiedlich hoch. Außerdem wird bei den geraschelten Produkten Polyester hinzugefügt. Weitere Unterschiede bestehen in der Masse je Flächeneinheit sowie bei den technischen Eigenschaften.

## Technology and included processes
Die Herstellung der Gitterstruktur erfolgt auf Textilmaschinen. Die Querfäden (CMD) bestehen vollständig aus Polyamid, die Längsfäden (MD) aus Polyvinylalkohol.Die Produkte werden entweder gewebt, oder geraschelt. Beim Rascheln wird im Gegensatz zum Webprozess auch Polyester als Bindekette verwendet. Anschließend wird auf die Geogitter eine Polymer-Schutzummantelung aufgebracht. Die feste Rollengröße des geosynthetischen Gitters beträgt 1000m² mit einer Breite von 5 Metern. Nachdem das Garn zu einem synthetischen Maschengitter verarbeitet worden ist, wird das Garn mit Beschichtungspaste benetzt und in einem Durchlaufofen getrocknet. Dabei wird das neu entstandene Produkt Fortrac® MPT auf ein Papprohr aufgewickelt und verpackt.
Technische Daten:
Das folgende Kapitel enthält Angaben über die Leistung der Produkte in Bezug auf deren wesentliche Merkmale gemäß EN 13249 ff. soweit sie in der Leistungserklärung enthalten und spezifiziert sind.
Deklarierte Einheit:
Die Ökobilanz wurde für jeden Produktartikel einzeln aufgestellt. Die Ökobilanzergebnisse wurden anschließend summiert und über die gesamte Produktionsmenge gemittelt. Als deklarierte Einheit wurde gemäß /PCR Teil B/ 1 m2 geosynthetisches Geogitter gewählt. Der Umrechnungsfaktor und der Flächenbezug der einzelnen Produktartikel können der folgenden Tabelle entnommen werden.

## Technical purpose
Fortrac® MPT Geogitter stehen für zukunftsorientierte Bauweisen mit technischen und wirtschaftlichen Vorteilen. Die Produktgruppe Fortrac® MPT wird in die unterschiedlichsten Erdbauwerke als Primärbewehrung eingebaut und verwendet. So beispielsweise in den Einsatzgebieten:

Dammbau
Deponiebau
Grundwasserschutz
Kunststoff-Bewehrte-Erde
Schlammteichsanierungen
Tragschichtbewehrung
Wasserspeicher

## Reference product
- 1 m2 geosynthetisches Gitter: 1

## Inputs
- Erneuerbare Primärenergie als Energieträger (PERE) [MJ]: A1-A3 1.57301
- Erneuerbare Primärenergie zur stofflichen Nutzung (PERM) [MJ]
- Total erneuerbare Primärenergie (PERT) [MJ]: A1-A3 1.57301
- Nicht-erneuerbare Primärenergie als Energieträger (PENRE) [MJ]: A1-A3 23
- Nicht-erneuerbare Primärenergie zur stofflichen Nutzung (PENRM) [MJ]: A1-A3 6.07
- Total nicht erneuerbare Primärenergie (PENRT) [MJ]: A1-A3 29.1
- Einsatz von Sekundärstoffen (SM) [kg]
- Erneuerbare Sekundärbrennstoffe (RSF) [MJ]
- Nicht erneuerbare Sekundärbrennstoffe (NRSF) [MJ]
- Einsatz von Süßwasserressourcen (FW) [m^3]: A1-A3 0.00832632

## Outputs
- Gefährlicher Abfall zur Deponie (HWD) [kg]: A1-A3 4.28636e-6
- Entsorgter nicht gefährlicher Abfall (NHWD) [kg]: A1-A3 1.71676
- Entsorgter radioaktiver Abfall (RWD) [kg]: A1-A3 0.000686845
- Komponenten für die Wiederverwendung (CRU) [kg]
- Stoffe zum Recycling (MFR) [kg]
- Stoffe für die Energierückgewinnung (MER) [kg]
- Exportierte elektrische Energie (EEE) [MJ]
- Exportierte thermische Energie (EET) [MJ]

## Impact indicators
- Globales Erwärmungspotenzial (GWP) [kg CO_(2)-Äq.]: A1-A3 1.37556
- Abbau Potential der stratosphärischen Ozonschicht (ODP) [kg CFC11-Äq.]: A1-A3 2.67092e-8
- Versauerungspotenzial von Boden und Wasser (AP) [kg SO_(2)-Äq.]: A1-A3 0.00455321
- Eutrophierungspotenzial (EP) [kg PO_(4)^(3)-Äq.]: A1-A3 0.000553245
- Bildungspotential für troposphärisches Ozon (POCP) [kg Ethen-Äq.]: A1-A3 0.000688126
- Potenzial für den abiotischen Abbau nicht fossiler Ressourcen (ADPE) [kg Sb-Äq.]: A1-A3 0.0053608
- Potenzial für den abiotischen Abbau fossiler Brennstoffe (ADPF) [MJ]: A1-A3 24.6145

## Use advice
Gültigkeitsbereich:
Das geosynthetische Gitter Fortrac® MPT wird in den Werken der HUESKER Synthetic GmbH in Dülmen und Gescher gefertigt. Die EPD wurde für ein durchschnittliches Produkt der Fortrac® MPT - Produktserie erstellt.
Systemgrenze:
Bei der Umwelt-Produktdeklaration handelt es sich um eine cradle-to-gate EPD, d.h. es werden alle potenziellen Umweltauswirkungen des Produkts von der Wiege bis zum Werkstor betrachtet. Nach /DIN EN 15804/ entspricht dies den Produktphasen A1-A3.Folgende Produktionsschritte werden während der Herstellungsphase berücksichtigt:

Herstellung des synthetischen Garns
Herstellung der Beschichtungspaste

Transporte zwischen den Werken Dülmen und Gescher
Herstellung des geosynthetischen Gitters (Zwirnprozess, Kettherstellung, Web-/ Raschelprozess, Beschichtungsprozess)
Verpacken des geosynthetischen Gitters

## Data sources
- Fortrac® MPT.pdf
- GaBi Database (all versions)
- GaBi database SP29 2016
