# End of Life von Stahlprofilen

Dataset: ILCD process, EPD, generic dataset
Geography: DE
Reference year: 2018
Valid until: 2022
Classification: oekobau.dat: End of Life / Generisch / Metalle
Owner: thinkstep
Compliance: DIN EN 15804
Review: Dependent internal review by thinkstep, IABP-GaBi, IBP-GaBi; Independent external review by GaBi user forum, GaBi bug forum, GaBi user community
Amounts: rows without a unit in brackets have none in this file; such an amount is in the reference unit of its flow, which a separate flow dataset defines
copyright: true

## General comment
Dieser Datensatz wurde nach der Europäischen Norm EN 15804 modelliert. Die Ergebnisse werden entsprechend den Modulen (z.B. A1-A3) nach EN 15804 dargestellt.

## Geography
Der Datensatz bildet die länderspezifische Situation in Deutschland ab. Dabei werden Haupttechnologien, spezifische regionale Charakteristiken und ggf. Importstatistiken berücksichtigt.

## Time period
Jährlicher Durchschnitt

## Technology and included processes
Das Stahlprofil wird mit Primär- und Sekundärstahl hergestellt. 20 % stammen aus Hochöfen (primär) und 80 % aus Lichtbögenöfen (sekundär). In diesem Datensatz wird nur der Primäranteil an Stahl als Gutschrift vergeben. Der primäre Stahlanteil im Stahlprofil beträgt 12,7%, 87,3% sind Stahlschrott.
Bei den Recyclingprozessen dieses Datensatzes wurden 5% Verluste angenommen, die deponiert werden (s. Werte in Modul C4). Die restlichen 95% werden stofflich recycled (siehe Gutschriften in Modul D), es werden also 0,12kg Primärstahl gutgeschrieben.

Bei abweichendem Verhältnis von Primär-und Sekundärstahl kann die Verwendung des Datensatzes zu fehlerhaften Ergebnissen führen. Gegebenenfalls kann die Gutschrift über einen Sicherheitsabschlag vermindert werden.

## Technical purpose
End-of-life von Metallen

## Safety margin
0 %.

## Reference product
- Stahlschrott: 1

## Inputs
- Erneuerbare Primärenergie als Energieträger (PERE) [MJ]: C4 0.0013067, D 0.339114
- Erneuerbare Primärenergie zur stofflichen Nutzung (PERM) [MJ]: C4 0, D 0
- Total erneuerbare Primärenergie (PERT) [MJ]: C4 0.0013067, D 0.339114
- Nicht-erneuerbare Primärenergie als Energieträger (PENRE) [MJ]: C4 0.00995576, D -2.97201
- Nicht-erneuerbare Primärenergie zur stofflichen Nutzung (PENRM) [MJ]: C4 0, D 0
- Total nicht erneuerbare Primärenergie (PENRT) [MJ]: C4 0.00995576, D -2.97201
- Einsatz von Sekundärstoffen (SM) [kg]: C4 0, D 0
- Erneuerbare Sekundärbrennstoffe (RSF) [MJ]: C4 0, D 0
- Nicht erneuerbare Sekundärbrennstoffe (NRSF) [MJ]: C4 0, D 0
- Einsatz von Süßwasserressourcen (FW) [m3]: C4 2.50491e-6, D -0.000267727

## Outputs
- Gefährlicher Abfall zur Deponie (HWD) [kg]: C4 1.5174e-10, D -2.51716e-9
- Entsorgter nicht gefährlicher Abfall (NHWD) [kg]: C4 0.050048, D -0.00566007
- Entsorgter radioaktiver Abfall (RWD) [kg]: C4 1.1163e-7, D 5.39266e-5
- Komponenten für die Wiederverwendung (CRU) [kg]: C4 0, D 0
- Stoffe zum Recycling (MFR) [kg]: C4 0, D 0
- Stoffe für die Energierückgewinnung (MER) [kg]: C4 0, D 0
- Exportierte elektrische Energie (EEE) [MJ]: C4 0, D 0
- Exportierte thermische Energie (EET) [MJ]: C4 0, D 0

## Impact indicators
- Globales Erwärmungspotenzial (GWP) [kg CO2 Äquiv.]: C4 0.00068207, D -0.393
- Abbaupotenzial der stratosphärischen Ozonschicht (ODP) [kg R11 Äquiv.]: C4 3.78913e-18, D 2.4141e-15
- Versauerungspotential (AP) [kg SO2 Äquiv.]: C4 4.33298e-6, D -0.000906522
- Eutrophierungspotential (EP) [kg Phosphat Äquiv.]: C4 4.87507e-7, D -7.53026e-5
- Bildungspotenzial für troposphärisches Ozon (POCP) [kg Ethen Äquiv.]: C4 3.33083e-7, D -0.000118393
- Potenzial für den abiotischen Abbau nicht fossiler Ressourcen (ADPE) [kg Sb Äquiv.]: C4 6.91359e-11, D 9.35399e-9
- Potenzial für den abiotischen Abbau fossiler Brennstoffe (ADPF) [MJ]: C4 0.00967389, D -3.10861

## Data sources
- GaBi Database Edition 2020, SP40
- GaBi database (all versions)
