# Eurospan Rohspanplatten

Dataset: ILCD process, EPD, average dataset
Geography: DE
Reference year: 2021
Valid until: 2022
Classification: OEKOBAU.DAT: Holz / Holzwerkstoffe / Spanplatten
Classification: IBUCategories: 02 Bauprodukte / Holzwerkstoffe / Holzwerkstoffe
Method details: Holzwerkstoffe.pdf
Generated by: Daxner & Merl GmbH
Registration number: EPD-EGG-20200249-IBC1-DE
Owner: Fritz EGGER GmbH & Co. OG
Compliance: DIN EN 15804+A2; ISO 14025
Review: Accredited third party review by Institut Bauen und Umwelt e. V.
Amounts: rows without a unit in brackets have none in this file; such an amount is in the reference unit of its flow, which a separate flow dataset defines
copyright: true
licenseType: Free of charge for all users and uses
accessRestrictions: None

## General comment
Eurospan Rohspanplatten sind plattenförmige Holzwerkstoffe gemäß EN 312. Die Plattentypen werden in erster Linie in der Anwendung als nichttragende und tragende Elemente im trockenen und feuchten Bereich unterschieden bzw. eingeteilt:

P1: Platten für allgemeine Zwecke zur Verwendung im Trockenbereich, P2: Platten für Inneneinrichtungen (einschließlich Möbel) zur Verwendung im Trockenbereich, P3: Platten für nicht tragende Zwecke zur Verwendung im Feuchtbereich, P4: Platten für tragende Zwecke zur Verwendung im Trockenbereich, P5: Platten für tragende Zwecke zur Verwendung im Feuchtbereich, P6: hoch belastbare Platten für tragende Zwecke zur Verwendung im Trockenbereich, P7: hoch belastbare Platten für tragende Zwecke zur Verwendung im Feuchtbereich (wird nicht produziert).

Betrachtet wird die durchschnittliche Leimflotte über alle Plattentypen. Die Produktionsbedingungen des Standortes Brilon sind vergleichbar mit jenen der anderen Werke. Sie entsprechen den in allen Standorten eingesetzten Technologien und Standards.

## Technology and included processes
Der Produktionsprozess von Eurospan Rohspanplatten ist an allen produzierenden Standorten identisch und läuft nach folgenden Schritten ab: 1. Holzaufbereitung -Rundholzzerspanung -Hackschnitzelaufbereitung -Restholzaufbereitung 2. Trocknung der Späne auf ca. 2-3 % Restfeuchte 3. Sortierung der Späne 4. Beleimung der Späne 5. Streuung der beleimten Späne auf ein Formband 6. Verpressen des Spänekuchens in einer kontinuierlich arbeitenden Heißpresse 7. Formatierung der Rohplatten 8. Auskühlen der Rohplatten in Sternkühlwendern 9. Schleifen der Ober- und Unterseite 10. Abstapelung zu Großstapeln. Alle während der Produktion anfallenden Reste (Besäum-, Schneid- und Fräsreste) werden aufbereitet und erneut dem Produktionsprozess zugeführt. Alle Standorte halten ein zertifiziertes Qualitätsmanagementsystem nach ISO 9001.
Deklarierte Einheit:
Die vorliegende Umwelt-Produktdeklaration bezieht sich auf eine deklarierte Einheit von 1 m³ EGGER Rohspanplatte mit einer mittleren Dichte von 655 kg/m³ und einer Auslieferungsfeuchte von etwa 6 %.

## Technical purpose
Das Einsatzgebiet von rohen Spanplatten liegt überwiegend im dekorativen Innenausbau sowie im Möbelbau. Sie werden in Wohn- und Objekteinrichtungen eingesetzt. Rohspanplatten Eurospan E1E05 TSCA P2 und Eurospan JP F0,3 F**** MR werden speziell für Möbel und Innenausbau mit erhöhten Anforderungen an Formaldehydemissionen verwendet.

## Reference product
- Rohspanplatte (1 m3 Rohspanplatte): 1

## Inputs
- Erneuerbare Primärenergie als Energieträger (PERE) [MJ]: A1-A3 5316.42, C1 0, C2 1.58943, C3 10343.3, C4 0, D -2480.2
- Erneuerbare Primärenergie zur stofflichen Nutzung (PERM) [MJ]: A1-A3 10412.9, C1 0, C2 0, C3 -10299.9, C4 0, D 0
- Total erneuerbare Primärenergie (PERT) [MJ]: A1-A3 15729.4, C1 0, C2 1.58943, C3 43.417, C4 0, D -2480.2
- Nicht-erneuerbare Primärenergie als Energieträger (PENRE) [MJ]: A1-A3 2122.37, C1 0, C2 27.5991, C3 1188.62, C4 0, D -9851.19
- Nicht-erneuerbare Primärenergie zur stofflichen Nutzung (PENRM) [MJ]: A1-A3 1098.48, C1 0, C2 0, C3 -1090.58, C4 0, D 0
- Total nicht erneuerbare Primärenergie (PENRT) [MJ]: A1-A3 3220.86, C1 0, C2 27.5991, C3 98.0447, C4 0, D -9851.19
- Einsatz von Sekundärstoffen (SM) [kg]: A1-A3 271.33, C1 0, C2 0, C3 0, C4 0, D 0
- Erneuerbare Sekundärbrennstoffe (RSF) [MJ]: A1-A3 550.764, C1 0, C2 0, C3 0, C4 0, D 9807.63
- Nicht erneuerbare Sekundärbrennstoffe (NRSF) [MJ]: A1-A3 0, C1 0, C2 0, C3 0, C4 0, D 1038.45
- Einsatz von Süßwasserressourcen (FW) [m^3]: A1-A3 0.49613, C1 0, C2 0.00185222, C3 0.0502013, C4 0, D -2.00587

## Outputs
- Gefährlicher Abfall zur Deponie (HWD) [kg]: A1-A3 0.000137886, C1 0, C2 1.27623e-6, C3 4.05602e-8, C4 0, D -3.33399e-6
- Entsorgter nicht gefährlicher Abfall (NHWD) [kg]: A1-A3 3.6954, C1 0, C2 0.00437425, C3 0.0695115, C4 0, D 0.360149
- Entsorgter radioaktiver Abfall (RWD) [kg]: A1-A3 0.0662288, C1 0, C2 5.08678e-5, C3 0.0148663, C4 0, D -0.847969
- Komponenten für die Wiederverwendung (CRU) [kg]: A1-A3 0, C1 0, C2 0, C3 0, C4 0, D 0
- Stoffe zum Recycling (MFR) [kg]: A1-A3 0, C1 0, C2 0, C3 0, C4 0, D 0
- Stoffe für die Energierückgewinnung (MER) [kg]: A1-A3 0, C1 0, C2 0, C3 692.075, C4 0, D 0
- Exportierte elektrische Energie (EEE) [MJ]: A1-A3 0, C1 0, C2 0, C3 0, C4 0, D 0
- Exportierte thermische Energie (EET) [MJ]: A1-A3 0, C1 0, C2 0, C3 0, C4 0, D 0

## Impact indicators
- Globales Erwärmungspotenzial total (GWP-total) [kg CO_(2)-Äq.]: A1-A3 -867.775, C1 0, C2 2.08537, C3 1025.11, C4 0, D -512.698
- Globales Erwärmungspotenzial fossil (GWP-fossil) [kg CO_(2)-Äq.]: A1-A3 146.698, C1 0, C2 2.07215, C3 5.57352, C4 0, D -510.795
- Globales Erwärmungspotenzial biogen (GWP-biogenic) [kg CO_(2)-Äq.]: A1-A3 -1014.72, C1 0, C2 -0.00345871, C3 1019.53, C4 0, D -1.43688
- Globales Erwärmungspotenzial luluc (GWP-luluc) [kg CO_(2)-Äq.]: A1-A3 0.246609, C1 0, C2 0.0166768, C3 0.00807509, C4 0, D -0.465668
- Abbau Potential der stratosphärischen Ozonschicht (ODP) [kg CFC11-Äq.]: A1-A3 3.11486e-10, C1 0, C2 3.78132e-16, C3 1.2257e-13, C4 0, D -6.98589e-12
- Versauerungspotenzial von Boden und Wasser (AP) [mol H^(+)-Äq.]: A1-A3 0.424908, C1 0, C2 0.00700227, C3 0.0123055, C4 0, D 0.383657
- Eutrophierungspotenzial Süßwasser (EP-freshwater) [kg PO_(4)-Äq.]: A1-A3 0.000407494, C1 0, C2 6.2754e-6, C3 1.48869e-5, C4 0, D -0.000855624
- Eutrophierungspotenzial Salzwasser (EP-marine) [kg N-Äq.]: A1-A3 0.135373, C1 0, C2 0.00315896, C3 0.00273302, C4 0, D 0.0972996
- Eutrophierungspotenzial Land (EP-terrestrial) [mol N-Äq.]: A1-A3 1.53631, C1 0, C2 0.0352876, C3 0.0287138, C4 0, D 1.15638
- Bildungspotential für troposphärisches Ozon (POCP) [kg NMVOC-Äq.]: A1-A3 0.310579, C1 0, C2 0.00620637, C3 0.00748984, C4 0, D 0.410973
- Potenzial für den abiotischen Abbau nicht fossiler Ressourcen (ADPE) [kg Sb-Äq.]: A1-A3 9.3816e-5, C1 0, C2 1.66598e-7, C3 1.61293e-6, C4 0, D -0.000105034
- Potenzial für den abiotischen Abbau fossiler Brennstoffe (ADPF) [MJ]: A1-A3 3220.01, C1 0, C2 27.4889, C3 98.0249, C4 0, D -9850.03
- Wassernutzung (WDP) [m^(3) Welt-Äq. entzogen]: A1-A3 5.19432, C1 0, C2 0.0200899, C3 1.21453, C4 0, D -32.2376
- Auftreten von Krankheiten aufgrund von Feinstaubemissionen (PM) [Krankheitsfälle]: A1-A3 4.45442e-6, C1 0, C2 3.95647e-8, C3 1.03207e-7, C4 0, D -2.07505e-6
- Wirkung durch Exposition des Menschen mit U235 (IR) [kBq U235-Äq.]: A1-A3 6.82784, C1 0, C2 0.00750426, C3 2.43905, C4 0, D -139.117
- Toxizitätsvergleichseinheit für Ökosysteme (ETP-fw) [CTUe]: A1-A3 754.763, C1 0, C2 20.567, C3 41.9513, C4 0, D -2412.58
- Toxizitätsvergleichseinheit für Menschen (krebserregend) (HTP-c) [CTUh]: A1-A3 1.37555e-7, C1 0, C2 4.25092e-10, C3 1.15843e-9, C4 0, D -9.54159e-9
- Toxizitätsvergleichseinheit für Menschen (nicht krebserregend) (HTP-nc) [CTUh]: A1-A3 1.45298e-6, C1 0, C2 2.4494e-8, C3 4.26813e-8, C4 0, D 2.78882e-6
- Bodenqualitätsindex (SQP) [SQP]: A1-A3 24919.5, C1 0, C2 9.64892, C3 31.1978, C4 0, D -1811.52

## Use advice
Gültigkeitsbereich:
Die vorliegende Umwelt-Produktdeklaration bezieht sich auf eine deklarierte Einheit von 1 m³ Rohspanplatte mit einer mittleren Dichte von 655 kg/m³, produziert mit einer durchschnittlichen Leimflotte am Standort Brilon, Deutschland.

Die Produktionsbedingungen in Brilon sind vergleichbar mit jenen der anderen Werke. Sie entsprechen den in allen Standorten eingesetzten Technologien und Standards.
Systemgrenze:
Die Ökobilanz der durchschnittlichen EGGER Rohspanplatte beinhaltet eine cradle-to-gate Betrachtung (Wiege bis zum Werkstor) der auftretenden Umweltwirkungen mit den Modulen C1-C4 und Modul D (A1-A3,+C,+D). Die folgenden Lebenszyklusphasen werden in der Analyse berücksichtigt:

Modul A1–A3 | Produktionsstadium
Das Produktionsstadium beinhaltet die Aufwendungen der Rohstoffversorgung (Rundholz, Altholz, Sägespäne, Leimsystem, Hilfsstoffe etc.) sowie der damit verbundenen Transporte zum Produktionsstandort in Brilon. Innerhalb der Werksgrenzen werden der Holzplatz, die Nassspanaufbereitung, Trocknung, Beleimung, Streuung, das Pressen, die Schleifstraße bis zum Lager und der Versand berücksichtigt. Die Bereitstellung von thermischer und elektrischer Energie, Druckluft und Wasser erfolgt durch zentrale Versorger am Standort Brilon. Der Großteil der eingesetzten elektrischen Energie wird vom deutschen Stromnetz bezogen. Im eigenen Biomasse-Kraftwerk wird sowohl internes Restholz als auch extern bezogenes Altholz verwertet. Die Systemgrenze für in der Produktion verwendetes Altholz wird nach dem Sortieren und Hacken gesetzt. Dabei wird angenommen, dass das Ende der Abfalleigenschaft erreicht ist. Hier gilt die nach EN 15804 definierte Systemgrenze für Sekundärrohstoffe.

Modul C1 | Rückbau / Abriss

Für die Rohspanplatte wurde ein manueller Ausbau angenommen. Die damit verbundenen Aufwände sind vernachlässigbar, wodurch keine Umweltwirkungen aus dem Rückbau der Produkte deklariert werden.

Modul C2 | Transport zur Abfallbehandlung

Modul C2 beinhaltet den Transport zur Abfallbehandlung. Dazu wird der Transport via LKW über 50 km Transportdistanz als repräsentatives Szenario angesetzt.

Modul C3 | Abfallbehandlung

In Modul C3 wird das Hacken nach Ausbau der Produkte betrachtet. Die Holzprodukte und mit ihnen die materialinhärenten Eigenschaften verlassen das Produktsystem als Sekundärbrennstoff in Modul C3.

Modul C4 | Beseitigung

Das angesetzte Szenario deklariert die energetische Verwertung der Holzprodukte, wodurch keine Umweltauswirkungen aus der Abfallbehandlung der Produkte in C4 zu erwarten sind.

Modul D | Gutschriften und Lasten außerhalb der Systemgrenze

In Modul D wird die energetische Verwertung des Produktes am Lebensende inklusive der entsprechenden energetischen Substitutionspotenziale in Form eines europäischen Durchschnittsszenarios beschrieben.

## Data sources
- GaBi Database (all versions)
- GaBi database SP40 2020
