# Knauf Silentboard GKF

Dataset: ILCD process, EPD, specific dataset
Geography: DE
Reference year: 2017
Valid until: 2022
Classification: OEKOBAU.DAT: Mineralische Baustoffe / Steine und Elemente / Gipsplatten
Classification: IBUCategories: 02 Bauprodukte / Gipsprodukte / Gipsplatten
Method details: Gipsplatten.pdf
Owner: Knauf Gips KG
Compliance: DIN EN 15804; ISO 14025
Review: Accredited third party review by IBU
Amounts: rows without a unit in brackets have none in this file; such an amount is in the reference unit of its flow, which a separate flow dataset defines
copyright: true

## General comment
Knauf Silentboard GKF - Gipsplatte mit außergewöhnlichem Schallschutz. Knauf Silentboard GKF sind Gipsplatten mit hoher Flächenmasse und Biege­weichheit, bestehend aus einem kartonummantelten Spezial-Gipskern.

## Technology and included processes
Herstellung, Transport zur Baustelle, Transport von der Baustelle zur Deponie/zum Recycling sowie Behandlung am Lebenszyklusende (Deponierung bzw. Recycling) der Gipsplatte Knauf Silentbard GKF. Die Gipsplatte Knauf Silentboard GKF besteht aus einem Spezialgipskern, Additiven und Ummantelungskarton.
Technische Daten:
Folgende (bau)technische Daten im Lieferzustand sind für das deklarierte Produkt relevant:
Deklarierte Einheit:
Die deklarierte Einheit ist 1 m² der Gipsplatte Knauf Silentboard GKF mit einer Dicke von 12,5 mm, Flächengewicht ca. 17,5 kg/m².

## Technical purpose
Knauf Silentboard GKF Schallschutzplatten werden in allen Bereichen des Innenausbaus als Beplankung und Nachrüstung von Trockenbau-Systemen mit Brandschutzanforderungen und höchsten Schallschutzanforderungen eingesetzt.

Knauf Silentboard GKF sind geeignet für folgende Systeme: Metallständerwände Vorsatzschalen Unterdecken Raum in Raum System Knauf CuboAufrüstung von Bestandswänden

## Scenarios
- S1: Deponierung
- S2: Recycling

## Reference product
- 1 m² Knauf Silentboard GKF: 1

## Inputs
- Erneuerbare Primärenergie als Energieträger (PERE) [MJ]: A1-A3 8.34186, A4 0.109636, C2 0.109, C3 0.547, C4 (S1) 0.0215, C4 (S2) 0.0215, D -0.0524
- Erneuerbare Primärenergie zur stofflichen Nutzung (PERM) [MJ]: A1-A3 3.174
- Total erneuerbare Primärenergie (PERT) [MJ]: A1-A3 11.5159, A4 0.109636, C2 0.109, C3 0.547, C4 (S1) 0.44, C4 (S2) 0.0215, D -0.0524
- Nicht-erneuerbare Primärenergie als Energieträger (PENRE) [MJ]: A1-A3 60.5117, A4 1.61442, C2 1.6, C3 1.4, C4 (S1) 3.87, C4 (S2) 0.189, D -0.735
- Nicht-erneuerbare Primärenergie zur stofflichen Nutzung (PENRM) [MJ]: A1-A3 0.0291917
- Total nicht erneuerbare Primärenergie (PENRT) [MJ]: A1-A3 60.5409, A4 1.61442, C2 1.6, C3 1.4, C4 (S1) 3.87, C4 (S2) 0.189, D -0.735
- Einsatz von Sekundärstoffen (SM) [kg]: A1-A3 5.66145, D 16.2295
- Erneuerbare Sekundärbrennstoffe (RSF) [MJ]
- Nicht erneuerbare Sekundärbrennstoffe (NRSF) [MJ]
- Einsatz von Süßwasserressourcen (FW) [m^3]: A1-A3 0.0201489, A4 0.00016558, C2 0.000164, C3 0.00041, C4 (S1) 0.000788, C4 (S2) 3.85e-5, D -0.000133

## Outputs
- Gefährlicher Abfall zur Deponie (HWD) [kg]: A1-A3 8.78384e-7, A4 2.07744e-7, C2 2.06184e-7, C3 1.64607e-9, C4 (S1) 8.85586e-8, C4 (S2) 4.32898e-9, D -1.64174e-8
- Entsorgter nicht gefährlicher Abfall (NHWD) [kg]: A1-A3 9.4951, A4 0.0107457, C2 0.010665, C3 1.51749, C4 (S1) 18.5857, C4 (S2) 0.03352, D -0.13608
- Entsorgter radioaktiver Abfall (RWD) [kg]: A1-A3 0.00124731, A4 2.1858e-6, C2 2.16938e-6, C3 0.000131502, C4 (S1) 5.34864e-5, C4 (S2) 2.61456e-6, D -1.10883e-5
- Komponenten für die Wiederverwendung (CRU) [kg]
- Stoffe zum Recycling (MFR) [kg]: C3 16.6
- Stoffe für die Energierückgewinnung (MER) [kg]
- Exportierte elektrische Energie (EEE) [MJ]
- Exportierte thermische Energie (EET) [MJ]

## Impact indicators
- Globales Erwärmungspotenzial (GWP) [kg CO_(2)-Äq.]: A1-A3 4.19953, A4 0.120336, C2 0.119, C3 0.108, C4 (S1) 0.287, C4 (S2) 0.014, D -0.0675
- Abbau Potential der stratosphärischen Ozonschicht (ODP) [kg CFC11-Äq.]: A1-A3 7.62611e-11, A4 2.44854e-13, C2 2.43e-13, C3 6.49e-12, C4 (S1) 2.83e-12, C4 (S2) 1.38e-13, D -6.73e-13
- Versauerungspotenzial von Boden und Wasser (AP) [kg SO_(2)-Äq.]: A1-A3 0.0282133, A4 0.000315415, C2 0.000313, C3 0.000156, C4 (S1) 0.00172, C4 (S2) 8.42e-5, D -0.000158
- Eutrophierungspotenzial (EP) [kg PO_(4)^(3)-Äq.]: A1-A3 0.00351665, A4 7.92584e-5, C2 7.87e-5, C3 2.48e-5, C4 (S1) 0.000234, C4 (S2) 1.15e-5, D -3.4e-5
- Bildungspotential für troposphärisches Ozon (POCP) [kg Ethen-Äq.]: A1-A3 0.00141319, A4 -0.00010745, C2 -0.000107, C3 1.16e-5, C4 (S1) 0.000166, C4 (S2) 8.09e-6, D -1.76e-5
- Potenzial für den abiotischen Abbau nicht fossiler Ressourcen (ADPE) [kg Sb-Äq.]: A1-A3 0.000402607, A4 8.94874e-9, C2 8.88e-9, C3 4.83e-8, C4 (S1) 9.9e-8, C4 (S2) 4.84e-9, D -0.000305
- Potenzial für den abiotischen Abbau fossiler Brennstoffe (ADPF) [MJ]: A1-A3 57.3982, A4 1.60875, C2 1.6, C3 1.07, C4 (S1) 3.74, C4 (S2) 0.183, D -0.707

## Use advice
Gültigkeitsbereich:
Die EPD gilt für die Gipsplatte Knauf Silentboard GKF. Diese Platte wird in Deutschland gefertigt.
Systemgrenze:
Die vorliegende Umweltprodukterklärung enthält neben der Herstellung (Module A1 bis A3) auch den Transport zur Baustelle (A4), den Transport zur Sammelstelle bzw. zur Deponie (Modul C2) sowie zwei Szenarien für die Behandlung am Ende des Lebensweges (Szenario 1: Deponierung – Modul C4/1; Szenario 2: Recycling – Module C3/2, C4/2 und D/2). Es handelt sich bei der vorliegenden Umweltprodukterklärung um eine Deklaration Wiege bis Werkstor mit Optionen.

Bei der Herstellung wird die Produktion sowie der Transport der Rohstoffe, die Herstellung der Platte inklusive Energiebereitstellung und Emissionen während der Produktion sowie die Bereitstellung der Transportverpackung berücksichtigt. Im Rahmen der Modellierung des Recyclings in Szenario 2 werden die Trennung der Komponenten, die Rückführung des Kartons in den Altpapierkreislauf sowie die Aufbereitung des Gipskerns in die Betrachtungen einbezogen. Nicht verwertbare Komponenten werden der Deponierung zugeführt.

## Data sources
- Knauf Silentboard GKF.pdf
- GaBi Database (all versions)
- GaBi database SP29 2016
