# Cobiax CLS Strukturgeber

Dataset: ILCD process, EPD, average dataset
Geography: DE
Reference year: 2021
Valid until: 2026
Classification: OEKOBAU.DAT: Mineralische Baustoffe / Mörtel und Beton / Beton
Classification: IBUCategories: 02 Bauprodukte / Normal- Leicht- und Porenbeton / Betonbauteile aus Ort- oder Lieferbeton
Method details: Betonbauteile aus Ort- oder Lieferbeton.pdf
Generated by: CSD Ingenieure GmbH
Registration number: EPD-COB-20210105-IBB1-DE
Owner: Cobiax Technologies GmbH
Compliance: DIN EN 15804; ISO 14025
Review: Accredited third party review by Institut Bauen und Umwelt e. V.
Amounts: rows without a unit in brackets have none in this file; such an amount is in the reference unit of its flow, which a separate flow dataset defines
copyright: true
licenseType: Free of charge for all users and uses
accessRestrictions: None

## General comment
Die deklarierten Produkte umfassen Ortbetondecken unterschiedlicher Bauteilhöhen mit Strukturgebern aus 100% rezykliertem Kunststoff.
Die CLS Strukturgeber werden als Halbschalen vermarktet und finden bei Deckenstärken von 20 bis 80 cm Verwendung.

## Technology and included processes
Die Herstellung der Cobiax CLS Strukturgeber erfolgt im Spritzgussverfahren größtenteils am Standort Herford. Als Ausgangsstoffe werden der Spritzgussmaschine Kunststoffrezyklate in granulierter Form zugeführt und diese unter Energiezufuhr in Form von Strom thermoplastisch umgewandelt. Mithilfe von Druckluft werden Halbschalenelemente geformt, welche ohne weitere Energiezufuhr zu Hohlkörpern zusammengesetzt können. Die folgende Grafik zeigt den schematischen Produktionsablauf am Standort Herford.
Technische Daten:
Da die Hohlkörper im statisch unwirksamen Deckenbereich angeordnet sind, entsprechen die
mechanischen Stoffeigenschaften der COBIAX-Hohlkörperdecke
weitestgehend den Eigenschaften einer Stahlbeton-
Massivdecke. Es sind die aktuell gültigen
Bemessungsnormen für Stahlbetonelemente zu
berücksichtigen. Das COBIAX-Technologiehandbuch
gibt ebenfalls entsprechende Bemessungshilfen. Die in

der nachfolgenden Tabelle ausgewiesenen Kennwerte

beziehen sich ausdrücklich auf Stahlbeton-
Massivdecken.
Die Hohlkörper können ggf. eine Verbesserung der
Dämmeigenschaften der Decke hervorrufen. Aufgrund
der Wärmebrückenwirkung des umhüllenden Betons
sollte jedoch vom „worst case“ ausgegangen werden
und die bauphysikalischen Eigenschaften einer
Stahlbeton-Massivdecke verwendet werden.
Die Festigkeits- und bauphysikalischen Kennwerte
beziehen sich auf die Normalbeton-Typen C20/25 bis
C45/55 und Bewehrungsstahl BSt 500.
Deklarierte Einheit:
Als deklarierte Einheit wird 1m³ Stahlbeton-CLS-Strukturgeberdecke System COBIAX® gemäß dem Dokument PCR: Betonbauteile aus Ort- und Lieferbeton, Stand 30.11.17 gewählt.

Ein Kubikmeter COBIAX®-Decke der Deckenstärke d = 32 cm besitzt eine Masse von 2.063,1 kg. Die Umrechnung von 1 m³ in 1 kg erfolgt mit dem Faktor 4,847E-4.

Es werden keine anteiligen funktionalen Einheiten deklariert.

## Technical purpose
COBIAX-Einbauelemente werden für die Herstellung von Stahlbetondecken aus Normalbeton zur vertikalen und horizontalen Lastabtragung im Geschossbau

verwendet.
Die Einbauelemente werden mit dem Ziel eingesetzt,
die Eigenlast des Tragwerks sowie den Materialverbrauch zu reduzieren und damit materialeffizientere Tragwerke zu ermöglichen.

## Reference product
- Strukturgeber Cobiax CLS-P-200 (): 1

## Inputs
- Erneuerbare Primärenergie als Energieträger (PERE) [MJ]: A1-A3 672, A4 11.5
- Erneuerbare Primärenergie zur stofflichen Nutzung (PERM) [MJ]: A1-A3 0, A4 0
- Total erneuerbare Primärenergie (PERT) [MJ]: A1-A3 672, A4 11.5
- Nicht-erneuerbare Primärenergie als Energieträger (PENRE) [MJ]: A1-A3 1920, A4 81.5
- Nicht-erneuerbare Primärenergie zur stofflichen Nutzung (PENRM) [MJ]: A1-A3 0, A4 0
- Total nicht erneuerbare Primärenergie (PENRT) [MJ]: A1-A3 1920, A4 81.5
- Einsatz von Sekundärstoffen (SM) [kg]
- Erneuerbare Sekundärbrennstoffe (RSF) [MJ]
- Nicht erneuerbare Sekundärbrennstoffe (NRSF) [MJ]
- Einsatz von Süßwasserressourcen (FW) [m^3]: A1-A3 0.786, A4 0.00431

## Outputs
- Gefährlicher Abfall zur Deponie (HWD) [kg]: A1-A3 8.81e-6, A4 3.03e-6
- Entsorgter nicht gefährlicher Abfall (NHWD) [kg]: A1-A3 70.7, A4 0.0146
- Entsorgter radioaktiver Abfall (RWD) [kg]: A1-A3 0.0826, A4 0.000108
- Komponenten für die Wiederverwendung (CRU) [kg]
- Stoffe zum Recycling (MFR) [kg]
- Stoffe für die Energierückgewinnung (MER) [kg]
- Exportierte elektrische Energie (EEE) [MJ]
- Exportierte thermische Energie (EET) [MJ]

## Impact indicators
- Globales Erwärmungspotenzial (GWP) [kg CO_(2)-Äq.]: A1-A3 274.15, A4 6.05
- Abbau Potential der stratosphärischen Ozonschicht (ODP) [kg CFC11-Äq.]: A1-A3 3.66e-12, A4 2.78e-15
- Versauerungspotenzial von Boden und Wasser (AP) [kg SO_(2)-Äq.]: A1-A3 0.378, A4 0.0147
- Eutrophierungspotenzial (EP) [kg PO_(4)^(3)-Äq.]: A1-A3 0.0643, A4 0.00353
- Bildungspotential für troposphärisches Ozon (POCP) [kg Ethen-Äq.]: A1-A3 0.0296, A4 -0.00496
- Potenzial für den abiotischen Abbau nicht fossiler Ressourcen (ADPE) [kg Sb-Äq.]: A1-A3 4.05e-5, A4 5.31e-7
- Potenzial für den abiotischen Abbau fossiler Brennstoffe (ADPF) [MJ]: A1-A3 1706.56, A4 81.21

## Use advice
Gültigkeitsbereich:
Das vorliegende Dokument gilt für Ortbetondecken mit CLS Strukturgebern des Systems "COBIAX". Die Daten der Ökobilanz beruhen auf langjährigen Projektdaten der Heinze Cobiax Deutschland GmbH. Die Daten stammen aus dem Produktionsstandort Herford

des Kunststoffherstellers der Heinze-Gruppe. An diesem Standort werden die Strukturgeber hergestellt und für den Transport zum Einbauort verladen, wo sie dann montiert werden.

Die Deklaration gilt für sämtliche COBIAX-Standorte und Verkaufspartner, die im Umkreis von 400km der Produktionsstandorte beliefert werden.
Systemgrenze:
Typ der EPD: Wiege bis zum Werkstor mit Optionen

Es wurden folgende Module und Prozesse berücksichtigt:

Produktionsstadium A1 bis A3:

- Betonherstellungsprozess einschließlich Rohstoffversorgung und -antransport

-Stahlherstellungsprozess einschließlich Rohstoffversorgung und -antransport

- Herstellung Kunststoffrecyclat (alloziert gemäß ISO 14040)
- Strommix Deutschland für die Regranulierung von Kunststoff-Produktionsabfällen (ca. 60 % des verarbeiteten Kunststoffanteils) und für die Hohlkörperherstellung einschließlich Erzeugung und Verteilung

- Transport der Kunststoffregranulate vom Herstellungsort zur Produktionsstätte der Cobiax-Module

Transport zur Baustelle A4:

- LKW-Transport des Betons zur Baustelle
- LKW-Transport des Bewehrungsstahls zur Baustelle
- LKW-Transport der Hohlkörper zur Baustelle

## Data sources
- GaBi Database (all versions)
- GaBi database SP37 2019
