# Entrauchungsklappe EK90 (Baureihe EK92)

Dataset: ILCD process, EPD, representative dataset
Geography: DE
Reference year: 2016
Valid until: 2022
Classification: OEKOBAU.DAT: Gebäudetechnik / Klimatisierung und Lüftung / Lüftungsanlagen
Classification: IBUCategories: 03 Gebäudetechnik / Brandschutzeinrichtungen / Brandschutzklappen und Brandschutzventile und Entrauchungsklappen
Method details: Brandschutzklappen und Brandschutzventile und Entrauchungsklappen.pdf
Generated by: Wildeboer Bauteile GmbH
Registration number: EPD-WIL-20160047-ICC1-DE
Owner: Wildeboer Bauteile GmbH
Compliance: DIN EN 15804; ISO 14025
Review: Accredited third party review by Institut Bauen und Umwelt e. V.
Amounts: rows without a unit in brackets have none in this file; such an amount is in the reference unit of its flow, which a separate flow dataset defines
copyright: true
licenseType: Free of charge for all users and uses
accessRestrictions: None

## General comment
Die wartungsfreie korrosionsbeständige Entrauchungs- klappe EK90 (Baureihe EK92) besteht aus einem Gehäuse aus hochtemperaturbeständigem, abrieb- festem Kalziumsilikat mit einem innenliegenden bruchsicheren Klappenblatt. Die Entrauchungs- klappe ist mit Kantenschutzprofilen aus verzinktem Stahlblech und Anschlussbohrungen ausgeführt. Antriebsachsen sind aus Edelstahl. Schutzgitter, als optionales Zubehör für Entrauchungsklappen ohne Anschlussleitungen zum Schutz der Durchström- öffnungen, sind aus verzinktem Stahlblech. Der Antrieb zum Schließen und Öffnen der Entrauchungsklappe erfolgt mittels eines elektrischen Antriebsmotors. Spezielle Dichtungen ohne zusätzliche Anschläge

ermöglichen große freie Querschnitte, extrem geringe Druckverluste und Schallleistungspegel. Das Öffnen der Entrauchungsklappe ist auch noch nach 25 Minuten Vollbrandbeanspruchung möglich.

## Technology and included processes
Die wartungsfreie korrosionsbeständige Entrauchungsklappe EK90 (Baureihe EK92) besteht aus einem Gehäuse aus hochtemperaturbeständigem, abrieb- festem Kalziumsilikat mit einem innenliegenden bruchsicheren Klappenblatt. Die Entrauchungsklappe ist mit Kantenschutzprofilen aus verzinktem Stahlblech und Anschlussbohrungen ausgeführt. Antriebsachsen sind aus Edelstahl. Der Antrieb zum Schließen und Öffnen der Entrauchungsklappe erfolgt mittels eines elektrischen Antriebsmotors. Das Öffnen der Entrauchungsklappe ist auch noch nach 25 Minuten Vollbrandbeanspruchung möglich. Spezielle Dichtungen ohne zusätzliche Anschläge ermöglichen große freie Querschnitte, extrem geringe Druckverluste und Schallleistungspegel. Die Entrauchungsklappe EK90 (Baureihe EK92) ist geeignet zum Rauchschutz, für Entrauchungsanlagen, zur Zuluftzuführung und in kombinierten Anlagen zur Be- und Entlüftung von Gebäuden. Weitere Informationen zum Produkt sind den Herstellerunterlagen zu entnehmen. Die Produktion unterliegt einem Energieeffizienzsystem und erfolgt an einem Standort in Werk Weener. Notwendige Roh- und Halbteile, Hilfs- und Betriebsstoffe werden von Lieferanten angeliefert und fließen in die Produktion mit ein. Die Fertigung der Halbteile erfolgt in einer Vorfertigung mit üblichen Fertigungsverfahren. Metallteile werden gestanzt und in Form gekantet ggf. gefräst, Teile aus Kalziumsilikat gesägt und gefräst. Die Teile der Vorfertigung werden zusammen mit eingekauften Teilen zu Entrauchungsklappen endmontiert, im Rahmen der Qualitätssicherung nach DIN EN ISO 9001 geprüft, verpackt und ausgeliefert. Die Ökobilanz beinhaltet die Lebenszyklusstadien „von der Wiege bis zur Bahre“. Weitere und detaillierte Angaben können der EPD entnommen werden. Die vollständige erklärte Leistung des Produktes bezüglich aller wesentlicher Merkmale gemäß EN 12101-8 sind der Leistungserklärung der Wildeboer Bauteile GmbH zu entnehmen. Brandprüfungen erfolgten nach DIN EN 1366-10 und DIN EN 1366-2.
Technische Daten:
Das folgende Kapitel enthält Angaben über die Größen und die Leistung in Stufen und Klassen in Bezug auf die entsprechenden wesentlichen Merkmale der EN 12101-8. Die vollständige erklärte Leistung des Produktes bezüglich aller wesentlicher Merkmale gemäß EN 12101-8 sind der /Leistungserklärung/ der Wildeboer Bauteile GmbH zu entnehmen. Brandprüfungen erfolgten nach /DIN EN 1366-10/ und /DIN EN 1366-2/.
Deklarierte Einheit:
Die Deklaration bezieht sich auf ein Stück Entrauchungsklappe EK90 (Baureihe EK92) der Wildeboer Bauteile GmbH der Größe 200 mm x 200 mm x 350 mm (Gewicht 32,07 kg) inklusive

elektrischen Antriebsmotor (Gewicht 1,37 kg) und Standard-Beipack (Gewicht ca. 0,9 kg). Weitere Entrauchungsklappen mit abweichenden Ab- messungen als die hier betrachtete Referenz-Entrauchungsklappe können über eine Gewichts- tabelle, bereitgestellt von der Wildeboer Bauteile GmbH, durch Skalierung der Ergebnisse berechnet werden und zusätzliche Komponenten (z. B. Schutz- gitter, optionaler Beipack) können dazu addiert werden.

## Technical purpose
Die Entrauchungsklappe EK90 (Baureihe EK92) ist geeignet zum Rauchschutz, für Entrauchungs- anlagen, zur Zuluftzuführung und in kombinierten Anlagen zur Be- und Entlüftung von Gebäuden. Des Weiteren ist sie anwendbar in Anlagen mit automatisch oder manuell ausgelöstem Öffnen oder Schließen der Entrauchungsklappen. Nachgewiesen und zulässig sind die Betriebsstellungen "vollständig geöffnet", "vollständig geschlossen" und beliebige Zwischen- stellungen. Die Entrauchungsklappe kann verwendet werden zum Einbau in > 100 mm dicke massive Wände und Decken, in > 95 mm dicke Metallständer- wände, an und zwischen waagerecht liegenden oder senkrecht stehenden Entrauchungsleitungen. An die Entrauchungsklappe können Entrauchungsleitungen mit Feuerwiderstandsdauer ein- oder beidseitig angeschlossen werden; die Entrauchungsleitungen ohne Feuerwiderstandsdauer können nur einseitig angeschlossen werden; die Schutzgitter ein- oder beidseitig. Der Einbau erfolgt bauseits nass oder trocken. Für weitere Informationen siehe /Herstellerunterlagen/.

## Reference product
- 1 Stück Entrauchungsklappe EK90 (Baureihe EK92) incl. elektrischer Antriebsmotor mit 32,07 kg/Stück: 1

## Inputs
- Erneuerbare Primärenergie als Energieträger (PERE) [MJ]: A1-A3 91.3
- Erneuerbare Primärenergie zur stofflichen Nutzung (PERM) [MJ]: A1-A3 0
- Total erneuerbare Primärenergie (PERT) [MJ]: A1-A3 91.3, A4 0.0305, A5 0.0707, B1 0, B2 0, B3 0, B4 0, B5 0, B6 0, B7 0, C1 0, C2 0.00457, C3 0, C4 0.5417, D -0.0372
- Nicht-erneuerbare Primärenergie als Energieträger (PENRE) [MJ]: A1-A3 698
- Nicht-erneuerbare Primärenergie zur stofflichen Nutzung (PENRM) [MJ]: A1-A3 7.96
- Total nicht erneuerbare Primärenergie (PENRT) [MJ]: A1-A3 706, A4 11.3, A5 0.6, B1 0, B2 0, B3 0, B4 0, B5 0, B6 0, B7 0, C1 0, C2 1.7, C3 0, C4 5.59, D -185
- Einsatz von Sekundärstoffen (SM) [kg]: A1-A3 2.34, A4 0, A5 0, B1 0, B2 0, B3 0, B4 0, B5 0, B6 0, B7 0, C1 0, C2 0, C3 0, C4 0, D 0
- Erneuerbare Sekundärbrennstoffe (RSF) [MJ]: A1-A3 0, A4 0, A5 0, B1 0, B2 0, B3 0, B4 0, B5 0, B6 0, B7 0, C1 0, C2 0, C3 0, C4 0, D 0
- Nicht erneuerbare Sekundärbrennstoffe (NRSF) [MJ]: A1-A3 0, A4 0, A5 0, B1 0, B2 0, B3 0, B4 0, B5 0, B6 0, B7 0, C1 0, C2 0, C3 0, C4 0, D 0
- Einsatz von Süßwasserressourcen (FW) [m^3]: A1-A3 0.266, A4 5.32e-5, A5 0.00658, B1 0, B2 0, B3 0, B4 0, B5 0, B6 0, B7 0, C1 0, C2 7.97e-6, C3 0, C4 0.002305, D -0.0165

## Outputs
- Gefährlicher Abfall zur Deponie (HWD) [kg]: A1-A3 0.000133, A4 2.9e-7, A5 2.72e-7, B1 0, B2 0, B3 0, B4 0, B5 0, B6 0, B7 0, C1 0, C2 4.34e-8, C3 0, C4 1.74e-6, D 4.18e-6
- Entsorgter nicht gefährlicher Abfall (NHWD) [kg]: A1-A3 2.93, A4 8.19e-5, A5 0.0419, B1 0, B2 0, B3 0, B4 0, B5 0, B6 0, B7 0, C1 0, C2 1.23e-5, C3 0, C4 23.53, D -0.164
- Entsorgter radioaktiver Abfall (RWD) [kg]: A1-A3 0.0169, A4 1.2e-5, A5 2.62e-5, B1 0, B2 0, B3 0, B4 0, B5 0, B6 0, B7 0, C1 0, C2 1.8e-6, C3 0, C4 9.7e-5, D 0.00144
- Komponenten für die Wiederverwendung (CRU) [kg]: A1-A3 0, A4 0, A5 0, B1 0, B2 0, B3 0, B4 0, B5 0, B6 0, B7 0, C1 0, C2 0, C3 0, C4 0, D 0
- Stoffe zum Recycling (MFR) [kg]: A1-A3 0, A4 0, A5 0, B1 0, B2 0, B3 0, B4 0, B5 0, B6 0, B7 0, C1 0, C2 0, C3 8.66, C4 0, D 0
- Stoffe für die Energierückgewinnung (MER) [kg]: A1-A3 0, A4 0, A5 1.37, B1 0, B2 0, B3 0, B4 0, B5 0, B6 0, B7 0, C1 0, C2 0, C3 0, C4 0.38, D 0
- Exportierte elektrische Energie (EEE) [MJ]: A1-A3 0, A4 0, A5 1.38, B1 0, B2 0, B3 0, B4 0, B5 0, B6 0, B7 0, C1 0, C2 0, C3 0, C4 3.51, D 0
- Exportierte thermische Energie (EET) [MJ]: A1-A3 0, A4 0, A5 3.33, B1 0, B2 0, B3 0, B4 0, B5 0, B6 0, B7 0, C1 0, C2 0, C3 0, C4 8.62, D 0

## Impact indicators
- Globales Erwärmungspotenzial (GWP) [kg CO_(2)-Äq.]: A1-A3 53.6, A4 0.814, A5 3.8143, B1 0, B2 0, B3 0, B4 0, B5 0, B6 0, B7 0, C1 0, C2 0.122, C3 0, C4 0.79, D -19.3
- Abbau Potential der stratosphärischen Ozonschicht (ODP) [kg CFC11-Äq.]: A1-A3 2.88e-9, A4 8.23e-13, A5 1.97e-12, B1 0, B2 0, B3 0, B4 0, B5 0, B6 0, B7 0, C1 0, C2 1.23e-13, C3 0, C4 7.98e-12, D 5.56e-11
- Versauerungspotenzial von Boden und Wasser (AP) [kg SO_(2)-Äq.]: A1-A3 0.25, A4 0.0017, A5 0.000264, B1 0, B2 0, B3 0, B4 0, B5 0, B6 0, B7 0, C1 0, C2 0.000255, C3 0, C4 0.002688, D -0.0702
- Eutrophierungspotenzial (EP) [kg PO_(4)^(3)-Äq.]: A1-A3 0.0214, A4 0.000368, A5 6.26e-5, B1 0, B2 0, B3 0, B4 0, B5 0, B6 0, B7 0, C1 0, C2 5.52e-5, C3 0, C4 0.0003761, D -0.00601
- Bildungspotential für troposphärisches Ozon (POCP) [kg Ethen-Äq.]: A1-A3 0.0217, A4 -0.000566, A5 4.85e-5, B1 0, B2 0, B3 0, B4 0, B5 0, B6 0, B7 0, C1 0, C2 -8.49e-5, C3 0, C4 0.0002347, D -0.0103
- Potenzial für den abiotischen Abbau nicht fossiler Ressourcen (ADPE) [kg Sb-Äq.]: A1-A3 0.00499, A4 3.03e-8, A5 2.7e-8, B1 0, B2 0, B3 0, B4 0, B5 0, B6 0, B7 0, C1 0, C2 4.55e-9, C3 0, C4 2.064e-7, D 6.22e-5
- Potenzial für den abiotischen Abbau fossiler Brennstoffe (ADPF) [MJ]: A1-A3 663, A4 11.3, A5 0.534, B1 0, B2 0, B3 0, B4 0, B5 0, B6 0, B7 0, C1 0, C2 1.69, C3 0, C4 5.339, D -189

## Use advice
Gültigkeitsbereich:
Dieses Dokument bezieht sich auf die Herstellung, den Transport, den Einbau, den Betrieb und die Entsorgung von Entrauchungsklappen mit elektrischem Antriebsmotor in Anlagen zur Entrauchung, zum Rauchschutz, zur Zuluftzuführung und in kombinierten Anlagen zur Be- und Entlüftung von Gebäuden. Die Entrauchungsklappen werden ausschließlich in Deutschland im Werk Weener produziert, in dem die Produktionsdaten des Jahres 2014 erhoben wurden.
Systemgrenze:
Die Systemgrenze der EPD vom Typ „Wiege bis Bahre“ folgt dem modularen Aufbau der /EN 15804:2011/. Die Ökobilanz des betrachteten Produkts berücksichtigt den kompletten Lebensweg des Produktes und somit alle Module:

A1-A3 (Produktionsstadium): Rohstoffbereitstellung, Transport zum Hersteller, Herstellung (incl. Energieerzeugung, Bereitstellung von Hilfsstoffen, Verpackungsmaterialien und Entsorgung von Abfällen).

A4-A5 (Errichten des Bauwerks): Transport zur Baustelle, Verwertung von Verpackungsabfällen auf der Baustelle. Der Einbau ins Gebäude erfolgt ohne den Einsatz weiterer Ressourcen und ohne eine Entstehung von Emissionen.

B1-B5 (Nutzungsstadium): Während der Nutzung der Entrauchungsklappe (B1) auf Produktebene werden keine Emissionen freigesetzt. Die für den Betrieb im Brandfall erforderliche elektrische Energie ist dem Modul B6 zugeordnet, da diese im Zusammenhang mit dem Betrieb des Gebäudes zu sehen ist. Die Instand-

haltung (B2), eine Reparatur (B3) bzw. ein Austausch einzelner Komponenten (B4) ist während der betrachteten Nutzungsdauer nicht relevant. Während der RSL (Referenz-Nutzungsdauer) ist laut Hersteller- angaben keine Erneuerung der Entrauchungsklappe notwendig (B5). Alle Module innerhalb des Nutzungs- stadiums sind damit entweder nicht relevant oder ohne Umweltlasten verbunden und damit ökobilanziell mit dem Wert „0“ deklariert.

B6-B7 (Nutzungsstadium - Betrieb des Gebäudes): Einsatz von elektrischer Energie für den Betrieb des Produktes.

C1-C4 (Entsorgungsstadium): Rückbau des Produkts, Transport zur Abfallbehandlung, Abfallbehandlung, Entsorgung: Für den Rückbau (C1) des Produktes sind, analog zum Einbau, keine Auswirkungen auf die Umwelt zu erwarten. Die Transporte zum Entsorger (C2) wurden in der vorliegenden Studie mit 75 km abgeschätzt. Die Abfälle werden sortenrein getrennt. Die Abfallbehandlung der verschiedenen im Produkt enthaltenen Materialien wurde unter Modul C3 berücksichtigt (mit einer Verwertungsquote von 95%). Modul C4 beinhaltet die Verbrennung z.B. der Kunststoffbestandteile in einer MVA. Die Deponierung von Produktkomponenten (bspw. Kalziumsilikat und Sammelverluste) wurden ebenfalls Modul C4 zugeordnet.

D (Gutschriften und Lasten außerhalb der Systemgrenze): Entsprechend der Norm /EN 15804/ werden alle deklarierten Gutschriften und Lasten aus den Nettoflüssen, die das Produktsystem verlassen, Modul D zugeordnet, sofern sie das Ende der Abfall- eigenschaft erreicht haben. Gutschriften ergeben sich zum einen für die erzeugte elektrische und thermische Energie bei der Verbrennung von im Produkt enthaltenen Materialien wie beispielsweise Kunst- stoffen. Zum anderen ergeben sich Gutschriften für die im Produkt enthaltenen Metalle. Die Lasten für die zugehörigen Aufbereitungs- und Umschmelzprozesse sind dabei dem Modul D zugeordnet, da davon auszugehen ist, dass Metalle den End-of-waste-Status direkt nach Ablauf der Nutzungsphase erreicht haben.

## Data sources
- GaBi Database (all versions)
- GaBi database SP28 2015
