# Elastische Bodenbeläge

Dataset: ILCD process, EPD, average dataset
Geography: DE
Reference year: 2019
Valid until: 2024
Classification: OEKOBAU.DAT: Holz / Holzböden / Mehrschichtig modulare Bodenbeläge
Classification: IBUCategories: 02 Bauprodukte / Bodenbeläge / Bodenbeläge
Method details: Bodenbeläge.pdf
Generated by: brands and values GmbH
Registration number: EPD-PAR-20180164-IBC1-DE
Owner: Parador GmbH
Compliance: DIN EN 15804; ISO 14025
Review: Accredited third party review by Institut Bauen und Umwelt e. V.
Amounts: rows without a unit in brackets have none in this file; such an amount is in the reference unit of its flow, which a separate flow dataset defines
copyright: true
licenseType: Free of charge for all users and uses
accessRestrictions: None

## General comment
Modular ONE
Der mehrschichtige Aufbau der Modular ONE Böden zeichnet sich durch die Beschichtung des Dekorpapieres mit dem weichmacherfreien Werkstoff Polypropylen aus. Diese Beschichtung lässt eine authentische Strukturierung des Dekorpapieres zu und ermöglicht so die naturgetreue Nachbildung echter Holzoberflächen.

Trägermaterial der Modular ONE Böden ist eine feuchtraumgeeignete hochdichte Faserplatte, die dem Boden eine flexible Festigkeit gibt und dank Spezialbeschichtung eine Wasserresistenz des Bodens von bis zu 4 Stunden bei stehendem Wasser garantiert.

Eco Balance PUR

Ähnlich wie beim Modular ONE Boden handelt es sich bei Eco Balance PUR um eine kaschierte Hochdichte Faserplatte. Die Dekorschicht besteht aus dem weichmacherfreien Werkstoff Polyurethan, welcher aus nachwachsenden Rohstoffen hergestellt wird. Diese Beschichtung lässt eine authentische Strukturierung des Dekorpapieres zu und ermöglicht so die naturgetreue Nachbildung echter Holzoberflächen.

## Technology and included processes
The HDF core board, the wear layer, and the cork backing are pressed together using a glue. The planks are then provided with a longitudinal and transverse profile. After quality control of the individual flooring elements, they are packed in halfshell cartons and shrink-wrapped in PE film. These individual packaging units are stacked on pallets according to the different formats and made available in the warehouse for subsequent delivery. All processes are continually checked and documented as part of the in-house Factory Production Control (FPC)
Deklarierte Einheit:
Die Deklarierte Einheit ist ein Quadratmeter (1 m²) elastische Bodenbeläge inkl. Verpackungsmaterialien.

Für die gegenständige Deklaration wurden zur Durchschnittsbildung die durchschnittlichen Verkaufsanteile eines Halbjahres bestehend aus den Produkten Eco Balance PUR und Modular ONE herangezogen. Die im Durchschnitt enthaltenen Varianten unterscheiden sich in Bezug auf das Material der Nutzschicht (PUR bzw. PP).

## Technical purpose
Elastische Bodenbeläge sind geeignet für eine private und gewerbliche Nutzung im Innenbereich. Sie werden entweder auf Estrich oder bestehenden anderen Unterböden in Verbindung mit geeigneten Unterlagen (Dämmunterlagen) schwimmend verlegt oder vollflächig auf dem Estrich verklebt. Die Grundsätze ordnungsgemäßer Verlegung können der beiliegenden Verlege-Anleitung bzw. dem „Ratgeber Elastische Bodenbeläge“ entnommen werden.

## Reference product
- Elastische Bodenbeläge: 1

## Inputs
- Erneuerbare Primärenergie als Energieträger (PERE) [MJ]: A1-A3 -2.74, A4 0.24942, A5 1.49722, C2 0.030559, C3 129.75, D -11.554
- Erneuerbare Primärenergie zur stofflichen Nutzung (PERM) [MJ]: A1-A3 130.8, A4 0, A5 -1.49, C2 0, C3 -129.31, D 0
- Total erneuerbare Primärenergie (PERT) [MJ]: A1-A3 128.06, A4 0.24942, A5 0.0072209, C2 0.030559, C3 0.43974, D -11.554
- Nicht-erneuerbare Primärenergie als Energieträger (PENRE) [MJ]: A1-A3 104.45, A4 4.7786, A5 0.521769, C2 0.58548, C3 11.2002, D -60.087
- Nicht-erneuerbare Primärenergie zur stofflichen Nutzung (PENRM) [MJ]: A1-A3 8.37, A4 0, A5 -0.47, C2 0, C3 -7.9, D 0
- Total nicht erneuerbare Primärenergie (PENRT) [MJ]: A1-A3 112.82, A4 4.7786, A5 0.051769, C2 0.58548, C3 3.3002, D -60.087
- Einsatz von Sekundärstoffen (SM) [kg]: A1-A3 6.419, A4 0, A5 0, C2 0, C3 0, D 0
- Erneuerbare Sekundärbrennstoffe (RSF) [MJ]: A1-A3 0, A4 0, A5 0, C2 0, C3 0, D 0
- Nicht erneuerbare Sekundärbrennstoffe (NRSF) [MJ]: A1-A3 0, A4 0, A5 0, C2 0, C3 0, D 0
- Einsatz von Süßwasserressourcen (FW) [m^3]: A1-A3 0.4732, A4 0.00045932, A5 0.00044279, C2 5.6277e-5, C3 0.027183, D -0.015752

## Outputs
- Gefährlicher Abfall zur Deponie (HWD) [kg]: A1-A3 1.4838e-6, A4 2.5197e-7, A5 5.4291e-10, C2 3.0872e-8, C3 6.5804e-8, D -2.4469e-8
- Entsorgter nicht gefährlicher Abfall (NHWD) [kg]: A1-A3 0.069436, A4 0.00038375, A5 0.0031632, C2 4.7019e-5, C3 0.048355, D -0.025703
- Entsorgter radioaktiver Abfall (RWD) [kg]: A1-A3 0.0053041, A4 9.9847e-6, A5 2.6707e-6, C2 1.2234e-6, C3 0.00017339, D -0.0050791
- Komponenten für die Wiederverwendung (CRU) [kg]: A1-A3 0, A4 0, A5 0, C2 0, C3 0, D 0
- Stoffe zum Recycling (MFR) [kg]: A1-A3 0, A4 0, A5 0, C2 0, C3 0, D 0
- Stoffe für die Energierückgewinnung (MER) [kg]: A1-A3 0, A4 0, A5 0, C2 0, C3 0, D 0
- Exportierte elektrische Energie (EEE) [MJ]: A1-A3 0, A4 0, A5 0.27, C2 0, C3 14.27, D 0
- Exportierte thermische Energie (EET) [MJ]: A1-A3 0.66, A4 0, A5 0.48, C2 0, C3 26.03, D 0

## Impact indicators
- Globales Erwärmungspotenzial (GWP) [kg CO_(2)-Äq.]: A1-A3 -4.3791, A4 0.35069, A5 0.16138, C2 0.04281, C3 11.882, D -3.4329
- Abbau Potential der stratosphärischen Ozonschicht (ODP) [kg CFC11-Äq.]: A1-A3 3.5488e-7, A4 1.453e-14, A5 3.8231e-15, C2 1.7803e-15, C3 4.4672e-11, D -7.451e-12
- Versauerungspotenzial von Boden und Wasser (AP) [kg SO_(2)-Äq.]: A1-A3 0.018477, A4 0.0008531, A5 2.9733e-5, C2 0.00011126, C3 0.0038286, D -0.005764
- Eutrophierungspotenzial (EP) [kg PO_(4)^(3)-Äq.]: A1-A3 0.0064704, A4 0.0002153, A5 5.8079e-6, C2 2.8006e-5, C3 0.00094626, D -0.00062359
- Bildungspotential für troposphärisches Ozon (POCP) [kg Ethen-Äq.]: A1-A3 0.0044306, A4 -0.00028967, A5 1.3197e-6, C2 -3.8955e-5, C3 0.00024333, D -0.00045177
- Potenzial für den abiotischen Abbau nicht fossiler Ressourcen (ADPE) [kg Sb-Äq.]: A1-A3 1.0903e-5, A4 3.096e-8, A5 2.8032e-9, C2 3.7933e-9, C3 1.4204e-7, D -9.694e-7
- Potenzial für den abiotischen Abbau fossiler Brennstoffe (ADPF) [MJ]: A1-A3 93.89, A4 4.7531, A5 0.045036, C2 0.58236, C3 2.8627, D -47.286

## Use advice
Gültigkeitsbereich:
Die vorliegende EPD bezieht sich auf Herstellung, Transport, Installation und Entsorgung eines durchschnittlichen Quadratmeters elastischer Bodenbeläge von Parador. Die technischen Eigenschaften werden in Kapitel 2.3 dargestellt. Produktionsstandort des Produkts ist Coesfeld in Deutschland.
Systemgrenze:
Typ der EPD: Wiege bis Werkstor mit Optionen.

Module A1-3, A4 und A5

Das Produktstadium (A1-3) beginnt mit der Berücksichtigung der Produktion der notwendigen Rohstoffe und Energien inklusive aller entsprechenden Vorketten sowie der tatsächlichen Beschaffungstransporte. Weiterhin wurde die gesamte Herstellungsphase abgebildet, inkl. der Behandlung von Produktionsabfällen bis zum Erreichen des End-of-Waste Status (EoW). Ferner wurden sowohl die Distributionstransporte ab Coesfeld / DE (A4) als auch der bei der Installation (A5) entstehende Verpackungsabfall berücksichtigt. Produktverluste sowie Strom verbrauchende Werkzeuge, Hilfsstoffe, und Installationsmaterialen wurden in A5 hingegen nicht berücksichtigt.

Module C2-C3

Die Module beinhalten die Umweltwirkungen für die Behandlung der Abfallfraktionen bis zum Erreichen des End-of-Waste Status (EoW) inklusive der zugehörigen Transporte am Ende des Produktlebenswegs.

Modul D

Ausweisung der Lasten und Nutzen des Produktes außerhalb der Systemgrenze. Diese bestehen aus Energie-Gutschriften aus der thermischen Verwertung (C3) in Form vom durchschnittlichen europäischen Strommix bzw. thermischer Energie aus Erdgas.

## Data sources
- GaBi Database (all versions)
- GaBi database SP35 2018
