# Dachziegel Neufahrn

Dataset: ILCD process, EPD, average dataset
Geography: DE
Reference year: 2020
Valid until: 2025
Classification: OEKOBAU.DAT: Mineralische Baustoffe / Steine und Elemente / Dachziegel
Classification: IBUCategories: 02 Bauprodukte / Bedachungen / Dachziegel
Method details: Dachziegel.pdf
Generated by: Sphera Solutions GmbH
Registration number: EPD-ERL-20200029-IAC1-DE
Owner: ERLUS AG
Compliance: DIN EN 15804; ISO 14025
Review: Accredited third party review by Institut Bauen und Umwelt e. V.
Amounts: rows without a unit in brackets have none in this file; such an amount is in the reference unit of its flow, which a separate flow dataset defines
copyright: true
licenseType: Free of charge for all users and uses
accessRestrictions: None

## General comment
Tondachziegel inkl. dem keramischen Zubehör mit den Modellbezeichnungen E58, E58 S, E58 MAX, E58 SL, Großfalz, Großfalz XXL, Reformpfanne XXL, Reformpfanne SL, Karat und Forma.
Die Flächenziegel und das keramische Zubehör (Sonderziegel) der jeweiligen Modelle wurden nach ihrem Produktionsanteil im Betrachtungszeitraum 07/2013-06/2014 berücksichtigt. Die verschiedenen Produkte unterscheiden sich lediglich in Form und Farbe (Engobe). Die maßgebliche Zusammensetzung, d. h. der Ton- und Lehmanteil, ist weitgehend einheitlich.

## Technology and included processes
Grubenbetrieb Die Hauptbestandteile (Lößlehm und Ton) werden im Tagebaubetrieb abgebaut. Nach den geologischen Überlegungen werden höffige Gebiete abgebohrt. Stellt sich heraus, dass Rohstoffe in wirtschaftlich vertretbarer Menge vorhanden sind und diese auch abgebaut werden können, wird ein Antrag auf Abbaugenehmigung gestellt. Der Abbau erfolgt nach Abziehen des Oberbodens und ggf. Bearbeitung von archäologischen Fundstellen in der Regel mit Löffelbaggern. Der Transport wird je nach Straßenverhältnissen mit geeigneten Lkw durchgeführt. Wenn die Gruben erschöpft sind, werden sie entsprechend den Vorlagen des Naturschutzes rekultiviert und zum größten Teil der vorherigen Nutzung wieder zugeführt. Rohstoffaufbereitung Die einzelnen Rohstoffkomponenten werden beprobt und im hauseigenen Labor auf ihre keramischen Eigenschaften und ihre mineralogischen und chemischen Zusammensetzungen hin analysiert. In der Aufbereitung werden die Komponenten entsprechend ihrer keramischen Eigenschaften zur Betriebsmasse vereint, homogenisiert und gelagert. Formgebung Die Betriebsmasse wird in Strangpressen unter Vakuum zu Batzen verpresst, die anschließend in Revolver- oder Drehtischpressen mittels Gipsformen zur Ziegelform verpresst werden. Verschiedene Parameter wie Pressenvakuum, Batzeneigenschaften (Feuchte, Plastizität und Gewicht) werden regelmäßig kontrolliert. Überschüssige Betriebsmasse und fehlerhafte Pressungen werden vollständig in den Massekreislauf zurückgeführt. Trocknung Das Trocknen dient als Vorbereitung des plastischen Dachziegels für den darauf folgenden Brennvorgang und erfolgt je nach Modell über 1-2 Tage bei ca. 100-120 °C. Aufgrund des Schwindungsverhalten reagiert das keramische Material sehr empfindlich und muss deshalb unter definierten Bedingungen getrocknet werden. Verschiedene Trocknungsparameter sowie die Restfeuchte werden ständig kontrolliert. Aussortierte getrocknete Ziegel (Trockenbruch) werden in der Rohstoffaufbereitung wieder der Betriebsmasse zugeführt. Farbgebung Nach Bedarf werden die getrockneten Dachziegel mit Engoben oder Edelengoben beschichtet. Die Dichte der Engoben sowie die Auftragsstärke werden regelmäßig kontrolliert. Anfallende Engobereste und das Engobewaschwasser werden aufbereitet und dem Rohstoffkreislauf zugeführt. Brennen Die Ziegel werden in Tunnelöfen unter Verwendung von Erdgas bei ca. 1000-1100 °C gebrannt. Die Brenndauer inkl. Aufheiz- und Abkühlphase beträgt ca. 1-2 Tage. Durch den Brand erhalten die Ziegel ihre keramischen Eigenschaften, die sie äußerst langlebig und beständig machen. Aussortierte gebrannte Ziegel (Brennbruch) werden in den Gruben zur Befestigung der Fahrwege verwendet. Hydrophobierung Zur Verbesserung der Wasserdurchdringeigenschaften werden die Ziegel vor dem Verpacken in einem Tauchbad oberflächlich hydrophobiert. Qualitätskontrolle Die geforderten keramischen Qualitätseigenschaften nach /DIN EN 1304/ und die einzuhaltenen Produktmaße werden in der werkseigenen Produktionskontrolle (WPK) regelmäßig intern kontrolliert und zusätzlich mindestens halbjährlich extern überwacht. Am Produktionsstandort ist bereits seit vielen Jahren ein Qualitätsmanagementsystem nach /DIN EN ISO 9001/ eingeführt und zertifiziert.
Technische Daten:
Die deklarierten Produkte erfüllen die Anforderungen der /DIN EN 1304/. Sie tragen die CE-Kennzeichnung entsprechend der /EU-Verordnung 765/2008/.
Deklarierte Einheit:
Die Deklaration bezieht sich auf die Herstellung von 1 t durchschnittlichen Dachziegel (Flächen- und Sonderziegel). Eine durchschnittliche Engoberezeptur fließt in die Berechnung ein.

## Technical purpose
Tondachziegel werden zum Eindecken von geneigten Dächern verwendet.

## Reference product
- 1 t Tondachziegel (): 1000

## Inputs
- Erneuerbare Primärenergie als Energieträger (PERE) [MJ]: A1-A3 436.2
- Erneuerbare Primärenergie zur stofflichen Nutzung (PERM) [MJ]: A1-A3 0
- Total erneuerbare Primärenergie (PERT) [MJ]: A1-A3 436.2
- Nicht-erneuerbare Primärenergie als Energieträger (PENRE) [MJ]: A1-A3 4973
- Nicht-erneuerbare Primärenergie zur stofflichen Nutzung (PENRM) [MJ]: A1-A3 0
- Total nicht erneuerbare Primärenergie (PENRT) [MJ]: A1-A3 4973
- Einsatz von Sekundärstoffen (SM) [kg]: A1-A3 0.3678
- Erneuerbare Sekundärbrennstoffe (RSF) [MJ]: A1-A3 0
- Nicht erneuerbare Sekundärbrennstoffe (NRSF) [MJ]: A1-A3 0
- Einsatz von Süßwasserressourcen (FW) [m^3]: A1-A3 0.461

## Outputs
- Gefährlicher Abfall zur Deponie (HWD) [kg]: A1-A3 0.283
- Entsorgter nicht gefährlicher Abfall (NHWD) [kg]: A1-A3 21.9
- Entsorgter radioaktiver Abfall (RWD) [kg]: A1-A3 0.1093
- Komponenten für die Wiederverwendung (CRU) [kg]: A1-A3 0
- Stoffe zum Recycling (MFR) [kg]: A1-A3 0
- Stoffe für die Energierückgewinnung (MER) [kg]: A1-A3 0
- Exportierte elektrische Energie (EEE) [MJ]: A1-A3 0
- Exportierte thermische Energie (EET) [MJ]: A1-A3 0

## Impact indicators
- Globales Erwärmungspotenzial (GWP) [kg CO_(2)-Äq.]: A1-A3 297.3
- Abbau Potential der stratosphärischen Ozonschicht (ODP) [kg CFC11-Äq.]: A1-A3 5.21e-9
- Versauerungspotenzial von Boden und Wasser (AP) [kg SO_(2)-Äq.]: A1-A3 0.467
- Eutrophierungspotenzial (EP) [kg PO_(4)^(3)-Äq.]: A1-A3 0.047
- Bildungspotential für troposphärisches Ozon (POCP) [kg Ethen-Äq.]: A1-A3 0.0399
- Potenzial für den abiotischen Abbau nicht fossiler Ressourcen (ADPE) [kg Sb-Äq.]: A1-A3 5.21e-5
- Potenzial für den abiotischen Abbau fossiler Brennstoffe (ADPF) [MJ]: A1-A3 4699

## Use advice
Gültigkeitsbereich:
Diese EPD beruht auf den Daten der ERLUS AG aus dem Produktionszeitraum Juli 2013 bis Juni 2014. Sie gilt für durchschnittliche Tondachziegel inkl. den keramischen Zubehörziegeln, produziert in Deutschland, im Werk Neufahrn/NB.
Systemgrenze:
Die Systemgrenzen der EPD folgen dem modularen Ansatz der /EN 15804/. Betrachtet wird das aggregierte Modul (A1 - A3), bestehend aus:
- die Rohstoffbereitstellung,
- der Transport zum Werk und
- die eigentliche Herstellung und Herstellung von Verpackung.

Einflüsse von Abfällen werden in den Modulen berücksichtigt, in denen diese anfallen.

Transportaufwendungen werden für alle wesentlichen Basismaterialien eingerechnet. In der Herstellung benötigte Maschinen, Anlagen und Infrastruktur werden vernachlässigt.

## Data sources
- GaBi Database (all versions)
- GaBi database SP20 2013
