# Massivwände

Dataset: ILCD process, EPD, average dataset
Geography: RER
Reference year: 2020
Valid until: 2025
Classification: OEKOBAU.DAT: Mineralische Baustoffe / Steine und Elemente / Betonfertigteile und Betonwaren
Classification: IBUCategories: 02 Bauprodukte / Normal- Leicht- und Porenbeton / Betonfertigteile
Method details: Betonfertigteile.pdf
Generated by: myclimate Deutschland gGmbH
Registration number: EPD-THO-20200189-IBD1-DE
Owner: thomas gruppe - Geschäftsfeld Betonbauteile
Compliance: DIN EN 15804; ISO 14025
Review: Accredited third party review by Institut Bauen und Umwelt e. V.
Amounts: rows without a unit in brackets have none in this file; such an amount is in the reference unit of its flow, which a separate flow dataset defines
copyright: true
licenseType: Free of charge for all users and uses
accessRestrictions: None

## General comment
Diese Deklaration bezieht sich auf die Produktgruppe der Massivwände.

Die Herstellung von Massivwänden erfolgt auf Flachbahnen, in den automatischen Umlaufanlagen oder auf Kipptischen der Betonfertigteilwerke. Massivwände bestehen aus vorgefertigten Stahlbetonplatten und Normal- oder Leichtbeton. Die Massivwände unterscheiden sich in ihren Größen, Abmessungen und Verwendungszwecke.

## Technology and included processes
Formgebung Die Vorprodukte wie Zuschlagstoffe, Zement und Stahl für die Massivwände werden angeliefert. Nach fest vorgegebenen Rezepten wird der Beton zusammengemixt. Bevor die Massivwände gegossen werden, werden die Schalungen mit den gewünschten Abmessungen erstellt. Die Armierungseisen für die Stahlbetonplatten werden angebracht und anschließend betoniert. Aushärtung und Auslagerung Die Aushärtung der Massivwände findet bei einer Dauer von 8-10 Stunden u.a. in Trockenkammern statt. Im Anschluss werden die Massivwände entschalt und können verladen werden. Die Normfestigkeit ist nach 28 Tagen nach der Herstellung erreicht.
Technische Daten:
Es gelten die Daten entsprechend den
Leistungserklärungen nach DIN EN 14992:2012, Betonfertigteile - Wandelemente und DIN EN 1520:2011, Vorgefertigte Bauteile aus haufwerksporigem Leichtbeton und mit statisch anrechenbarer oder nicht anrechenbarer Bewehrung.
Deklarierte Einheit:
Die Produktgruppe der Massivwände variieren in Volumen, Massen und geringfügig in ihrer Zusammensetzung. Die Durchschnittsbildung erfolgte entsprechend der Gesamtproduktion der einzelnen Standorte und bildet somit den tatsächlichen Produktionsmix ab.

## Technical purpose
Massivwände der thomas gruppe aus dem Geschäftsfeld Betonbauteile finden Anwendung als Außen- und Innenwand im Wohnungs-, Industrie- und Landwirtschaftsbau als auch zur Herstellung von Keller-, Tiefgaragen- und WU-Konstruktionen.

## Reference product
- Massivwand (): 1000

## Inputs
- Erneuerbare Primärenergie als Energieträger (PERE) [MJ]: A1-A3 328, C1 0.0535, C2 1.61, C4 25.9
- Erneuerbare Primärenergie zur stofflichen Nutzung (PERM) [MJ]: A1-A3 0, C1 0, C2 0, C4 0
- Total erneuerbare Primärenergie (PERT) [MJ]: A1-A3 328, C1 0.0535, C2 1.61, C4 25.9
- Nicht-erneuerbare Primärenergie als Energieträger (PENRE) [MJ]: A1-A3 1660, C1 11.9, C2 25.8, C4 204
- Nicht-erneuerbare Primärenergie zur stofflichen Nutzung (PENRM) [MJ]: A1-A3 0, C1 0, C2 0, C4 0
- Total nicht erneuerbare Primärenergie (PENRT) [MJ]: A1-A3 1660, C1 11.9, C2 25.8, C4 204
- Einsatz von Sekundärstoffen (SM) [kg]: C1 0, C2 0, C4 0
- Erneuerbare Sekundärbrennstoffe (RSF) [MJ]: A1-A3 0, C1 0, C2 0, C4 0
- Nicht erneuerbare Sekundärbrennstoffe (NRSF) [MJ]: A1-A3 0, C1 0, C2 0, C4 0
- Einsatz von Süßwasserressourcen (FW) [m^3]: A1-A3 0.535, C1 8.45e-5, C2 0.00182, C4 0.0513

## Outputs
- Gefährlicher Abfall zur Deponie (HWD) [kg]: A1-A3 0.00151, C1 1.69e-9, C2 1.46e-6, C4 3.48e-6
- Entsorgter nicht gefährlicher Abfall (NHWD) [kg]: A1-A3 57.9, C1 0.00151, C2 0.00183, C4 947
- Entsorgter radioaktiver Abfall (RWD) [kg]: A1-A3 0.0361, C1 1.18e-5, C2 3.9e-5, C4 0.0027
- Komponenten für die Wiederverwendung (CRU) [kg]: A1-A3 0, C1 0, C2 0, C4 0
- Stoffe zum Recycling (MFR) [kg]: A1-A3 0.658, C1 0, C2 54.4, C4 0
- Stoffe für die Energierückgewinnung (MER) [kg]: A1-A3 0, C1 0, C2 0, C4 0
- Exportierte elektrische Energie (EEE) [MJ]: A1-A3 0, C1 0, C2 0, C4 0
- Exportierte thermische Energie (EET) [MJ]: A1-A3 0, C1 0, C2 0, C4 0

## Impact indicators
- Globales Erwärmungspotenzial (GWP) [kg CO_(2)-Äq.]: A1-A3 220, C1 0.863, C2 1.92, C4 14.1
- Abbau Potential der stratosphärischen Ozonschicht (ODP) [kg CFC11-Äq.]: A1-A3 1.11e-6, C1 2.84e-16, C2 9.11e-16, C4 8.26e-14
- Versauerungspotenzial von Boden und Wasser (AP) [kg SO_(2)-Äq.]: A1-A3 0.284, C1 0.000607, C2 0.00433, C4 0.0843
- Eutrophierungspotenzial (EP) [kg PO_(4)^(3)-Äq.]: A1-A3 0.0753, C1 8.7e-5, C2 0.00106, C4 0.00956
- Bildungspotential für troposphärisches Ozon (POCP) [kg Ethen-Äq.]: A1-A3 0.0329, C1 9.06e-5, C2 -0.00134, C4 0.00647
- Potenzial für den abiotischen Abbau nicht fossiler Ressourcen (ADPE) [kg Sb-Äq.]: A1-A3 5.61e-5, C1 3.02e-8, C2 1.86e-7, C4 5.18e-6
- Potenzial für den abiotischen Abbau fossiler Brennstoffe (ADPF) [MJ]: A1-A3 1570, C1 11.8, C2 25.7, C4 197

## Use advice
Gültigkeitsbereich:
Dieses Dokument bezieht sich auf Massivwände aus dem Geschäftsfeld Betonbauteile der thomas gruppe, hergestellt an den nachfolgenden 3 von insgesamt 15 Produktionsstandorten:

thomas betonbauteile Melsdorf GmbH & Co. KG

Am Ihlberg 22-24

24109 Melsdorf

thomas praefab Neubrandenburg GmbH

Ihlenfelder Straße 111

17034 Neubrandenburg

thomas praefab Międzyrzecz Sp. z o.o.

ul. Budowlanych 9

66-300 Międzyrzecz

Die deklarierte Einheit bezieht sich auf 1 t Massivwände. Die Datenerhebung für die Herstellung des deklarierten Produktes erfolgte werksspezifisch mit aktuellen Jahresdaten von 2018. Der Deklarationsinhaber ist verantwortlich für die zugrunde liegenden Daten und deren Verifizierung.
Systemgrenze:
Die Ökobilanz betrachtet die Systemgrenzen "von der Wiege bis zum Werkstor - mit Optionen" und folgt dem modularen Aufbau nach EN 15804. Die Ökobilanz berücksichtigt folgende Module:

A1: Rohstoffgewinnung und –verarbeitung, Verarbeitungsprozesse von Zement und Zuschlagstoffen, Stahlerzeugung, -guß und -produktion; Aufbereitung von Recyclingmaterialien
A2: Transport zum Hersteller: Transport der Rohstoffe zum Herstellungswerk
A3: Herstellungsprozesse und -aufwendungen: Herstellung der Betonfertigteile C1: Rückbau & Abriss der Betonfertigteile
C2: Transport zur Abfallbewirtschaftung
C4: Beseitigung der Betonfertigteile zur Deponie

## Data sources
- ecoinvent database (all versions)
- ecoinvent 3.6 database
