# Elastomer Fugenbänder, Polysulfid; polysulphide

Dataset: ILCD process, EPD, generic dataset
Geography: DE
Reference year: 2018
Valid until: 2022
Classification: oekobau.dat: Komponenten von Fenstern und Vorhangfassaden / Dichtungskomponenten / -materialien / Elastomer-Fugenbänder
Owner: thinkstep
Compliance: DIN EN 15804
Review: Dependent internal review by thinkstep, IABP-GaBi, IBP-GaBi; Independent external review by GaBi user forum, GaBi bug forum, GaBi user community
Amounts: rows without a unit in brackets have none in this file; such an amount is in the reference unit of its flow, which a separate flow dataset defines
copyright: true

## General comment
Dieser Datensatz wurde nach dem European Standard EN 15804 für Nachhaltiges Bauen modelliert. Ergebnisse werden in Modulen abgebildet, die den strukturierten Ausdruck von Ergebnissen über den gesamten Lebenszyklus zulassen.

## Geography
Der Datensatz bildet die länderspezifische Situation in Deutschland ab. Dabei werden Haupttechnologien, spezifische regionale Charakteristiken und ggf. Importstatistiken berücksichtigt.

## Time period
Jährlicher Durchschnitt

## Technology and included processes
Die Ökobilanz von Elastomer-Fugenbändern aus Polyphenylensulfid (PPS) beinhaltet hauptsächlich den Extrusionsprozess. Die Systemgrenze bildet das verkaufsfertige Produkt.
Zur Herstellung von PPS-Granulat: Polyphenylensulfid wird durch die Polykondensation von 1,4 Butandiol mit Natriumsulfid hergestellt. Im ersten Schritt wird eine wässrige Lösung aus Natriumhydrosulfid und Natronlauge erzeugt, die unter Stickstoff-Einfluss zu einer Lösung aus Natriumsulfid reagiert. Im zweiten Schritt wird diese Lösung mit dem Lösemittel n-Methylpyrrolidon versetzt. Aus dieser Lösung wird Wasser abdestilliert, um zu gleichen Teilen Wasser und Lösemittel zu erhalten. Unter Stickstoff-Atmosphäre wird während der Polymerisation p-Dichlorobenzen zugefügt, wobei Druck und Hitze eingesetzt werden. Danach wird Wasser, nicht umgesetztes Dichlorbenzol (DCB) und etwa ein Drittel der Lösung abgelassen. Der Rest des Gemisches wird aufgeheizt und in einen sogenannten Entspanner gegeben. Ein Großteil des entstandenen N-Methyl-2-pyrrolidon (NMP) entgast dort und Flüssigkeit sowie Feststoffe fallen in eine Förderschnecke. Das extrahierte PPS wird gewaschen und getrocknet, anschließend extrudiert und konfektioniert.
Transporte vom Werk zum Einbauort sind nicht berücksichtigt und sollten nach Bedarf nachträglich einbezogen werden.

Hintergrundsystem:
Strom: Die Stromerzeugung wird entsprechend der länderspezifischen Randbedingungen modelliert. Die landesspezifische Analyse beinhaltet:
1.: Spezifische Kraftwerke der verschiedenen fossilen Energieträger und der Einsatz erneuerbarer Energien sind entsprechend der länderspezifischen Energieträgermixe modelliert. Die Analyse bezieht Stromimporte aus den Nachbarländern, Transmissions-und Verteilungsverluste und den Eigenverbrauch im Kraftwerk und bei der Verteilung bzw. Speicherung, z. B. durch Pumpspeicherwerke, ein.
2.: Die landes-/regionalspezifischen Technologiestandards sowie die Erzeugung in Elektrizitätskraftwerken und/oder in speziellen Kraftwerken mit Kraft-Wärme-Kopplung (KWK) sind berücksichtigt.
3.: Die länderspezifische Energieträgerbereitstellung (mit Anteil der Importe und/oder Eigenversorgung) einschließlich der Energieträger-Eigenschaften (z. B. Elementar- und Energiegehalte) werden berücksichtigt.
4.: Die Förderung, Produktion, Verarbeitung und Transportprozesse werden entsprechend der Situation im jeweiligen Stromerzeugerland modelliert. Die unterschiedlichen Produktions- und Verarbeitungsverfahren (Emissionen und Wirkungsgrade) in den verschiedenen Energieerzeugerländern werden einbezogen, z. B. Rohöl-Veredelungsverfahren oder Abfackel-Raten an den Ölplattformen.
Thermische Energie, Prozessdampf: Die Erzeugung von Dampf und thermischer Energie in Heizkraftwerken wird entsprechend der landesspezifischen Situation (Emissionsgrenzwerte, Energieträgerbasis) modelliert.
Der Wirkungsgrad für die thermische Energieerzeugung beträgt per Definition 100% des Energieträgereinsatzes. Für Prozessdampf liegt der Wirkungsgrad im Bereich von 85-95%. Die zur Heizenergie-Erzeugung verwendeten Energieträger werden entsprechend der nationalen Situation modelliert (siehe Kapitel Strom oben).
Transporte: Alle relevanten und bekannten Transportprozesse in Form von See- und Binnenschiffsverkehr sowie Bahn-, Lkw- und der Leitungstransport sind enthalten.
Energieträger: Die Energieträger werden entsprechend der spezifischen Versorgungslage modelliert (siehe Kapitel Strom oben).
Raffinerieprodukte: Diesel, Benzin, technische Gase, Heizöl, Schmierstoffe und Rückstände, wie Bitumen, werden mit einem parametrierten länderspezifische Raffineriemodell modelliert. Das Raffinerie-Modell bezieht die länderspezifischen Veredelungsverfahren (z. B. Emissionspegel, interner Energieverbrauch etc.) und das länderspezifische Produktspektrum ein, das sich je nach Land stark unterscheiden kann. Die Rohöl-Förderung wird gemäß der länderspezifischen Situation mit den jeweiligen Energieträger-Eigenschaften modelliert.

## Technical purpose
Dieses Produkt kann im Baubereich verwendet werden.

## Safety margin
20 %. Produktsystem bis auf wenige Prozesse/Flüsse abgebildet. Technologische, zeitliche und geographische Repräsentativität teilweise gegeben.

## Reference product
- Elastomer Fugenband (Polysulphid): 1

## Inputs
- Erneuerbare Primärenergie als Energieträger (PERE) [MJ]: A1-A3 25.7289, C1 0, C2 0.0021792, C3 0.156186, D -2.29088
- Erneuerbare Primärenergie zur stofflichen Nutzung (PERM) [MJ]: A1-A3 0, C1 0, C2 0, C3 0, D 0
- Total erneuerbare Primärenergie (PERT) [MJ]: A1-A3 25.7289, C1 0, C2 0.0021792, C3 0.156186, D -2.29088
- Nicht-erneuerbare Primärenergie als Energieträger (PENRE) [MJ]: A1-A3 174.405, C1 0, C2 0.037433, C3 16.9889, D -7.99594
- Nicht-erneuerbare Primärenergie zur stofflichen Nutzung (PENRM) [MJ]: A1-A3 16.416, C1 0, C2 0, C3 -16.416, D 0
- Total nicht erneuerbare Primärenergie (PENRT) [MJ]: A1-A3 190.821, C1 0, C2 0.037433, C3 0.57292, D -7.99594
- Einsatz von Sekundärstoffen (SM) [kg]: A1-A3 0, C1 0, C2 0, C3 0, D 0
- Erneuerbare Sekundärbrennstoffe (RSF) [MJ]: A1-A3 0, C1 0, C2 0, C3 0, D 0
- Nicht erneuerbare Sekundärbrennstoffe (NRSF) [MJ]: A1-A3 0, C1 0, C2 0, C3 0, D 0
- Einsatz von Süßwasserressourcen (FW) [m3]: A1-A3 0.0512179, C1 0, C2 1.95166e-6, C3 0.00290886, D -0.00106861

## Outputs
- Gefährlicher Abfall zur Deponie (HWD) [kg]: A1-A3 1.60425e-7, C1 0, C2 1.39883e-9, C3 2.11116e-9, D -4.22925e-9
- Entsorgter nicht gefährlicher Abfall (NHWD) [kg]: A1-A3 0.181514, C1 0, C2 6.57015e-6, C3 0.123206, D -0.00376607
- Entsorgter radioaktiver Abfall (RWD) [kg]: A1-A3 0.00365058, C1 0, C2 3.94093e-8, C3 2.23236e-5, D -0.000276775
- Komponenten für die Wiederverwendung (CRU) [kg]: A1-A3 0, C1 0, C2 0, C3 0, D 0
- Stoffe zum Recycling (MFR) [kg]: A1-A3 0, C1 0, C2 0, C3 0, D 0
- Stoffe für die Energierückgewinnung (MER) [kg]: A1-A3 0, C1 1.2, C2 0, C3 0, D 0
- Exportierte elektrische Energie (EEE) [MJ]: A1-A3 0, C1 0, C2 0, C3 2.19676, D 0
- Exportierte thermische Energie (EET) [MJ]: A1-A3 0, C1 0, C2 0, C3 5.04359, D 0

## Impact indicators
- Globales Erwärmungspotenzial (GWP) [kg CO2 Äquiv.]: A1-A3 9.16153, C1 0, C2 0.00278506, C3 1.18129, D -0.546557
- Abbaupotenzial der stratosphärischen Ozonschicht (ODP) [kg R11 Äquiv.]: A1-A3 1.44328e-13, C1 0, C2 9.21867e-19, C3 8.72859e-16, D -1.26676e-14
- Versauerungspotential (AP) [kg SO2 Äquiv.]: A1-A3 0.0201368, C1 0, C2 5.62553e-6, C3 0.000133099, D -0.000461702
- Eutrophierungspotential (EP) [kg Phosphat Äquiv.]: A1-A3 0.00210684, C1 0, C2 1.33734e-6, C3 2.96023e-5, D -8.75025e-5
- Bildungspotenzial für troposphärisches Ozon (POCP) [kg Ethen Äquiv.]: A1-A3 0.00180713, C1 0, C2 -1.6854e-6, C3 1.23183e-5, D -4.70099e-5
- Potenzial für den abiotischen Abbau nicht fossiler Ressourcen (ADPE) [kg Sb Äquiv.]: A1-A3 1.78435e-6, C1 0, C2 2.34365e-10, C3 9.03102e-9, D -1.35949e-7
- Potenzial für den abiotischen Abbau fossiler Brennstoffe (ADPF) [MJ]: A1-A3 181.606, C1 0, C2 0.0373323, C3 0.516568, D -7.29723

## Use advice
Der Datensatz repräsentiert ein Cradle to Gate Inventar. Er kann verwendet werden, um die Lieferkette des jeweiligen Produktes in einer repräsentativen Weise zu charakterisieren. Die Kombination mit einzelnen Einheitenprozessen und diesem Produkt ermöglicht die Erstellung von anwenderspezifischen (Produkt-) LCAs.

## Data sources
- GaBi Database Edition 2020, SP40
- GaBi database (all versions)
