# STEICO joist/wall Stegträger

Dataset: ILCD process, EPD, specific dataset
Geography: RER
Reference year: 2019
Valid until: 2024
Classification: OEKOBAU.DAT: Holz / Holzwerkstoffe / Laminated Veneer Lumber (LVL)
Classification: IBUCategories: 02 Bauprodukte / Produkte aus Bauholz / Vorgefertigte tragende Elemente aus Holz und Holzwerkstoffen
Method details: Vorgefertigte tragende Elemente aus Holz und Holzwerkstoffen .pdf
Registration number: EPD-STE-20190106-IBC1-DE
Owner: STEICO SE
Compliance: DIN EN 15804; ISO 14025
Review: Accredited third party review by Institut Bauen und Umwelt e. V.
Amounts: rows without a unit in brackets have none in this file; such an amount is in the reference unit of its flow, which a separate flow dataset defines
copyright: true

## General comment
STEICOwall und STEICOjoist Stegträger sind industriell gefertigte Produkte für tragende und nicht tragende Konstruktionen, bei denen ein schlanker Steg aus einer hoch tragfähigen Hartfaserplatte (Hartfasersteg) oder OSB (en: Oriented Strand Board, de: Grobspanplatte) zwei Gurte aus STEICO LVL R oder Vollholz miteinander verbindet. Die LVL-Gurte (LVL - en: Laminated Veneer Lumber, de: Furnierschichtholz) bestehen aus mehreren, miteinander verklebten Lagen aus Nadelholzfurnier. Die natürlichen Fehlstellen des Holzes, wie zum Beispiel Äste, werden durch den Produktionsprozess auf das einzelne Furnierblatt reduziert und gleichmäßig über den Querschnitt verteilt. Es entsteht ein annähernd homogener Querschnitt mit hohen Festigkeiten und Steifigkeiten.

Die Produkte STEICOwall und STEICOjoist sind identisch in der Herstellung. Sie unterscheiden sich in ihrem Einsatzbereich je nach Art der Belastung.

## Technology and included processes
Bei der Herstellung von STEICO LVL Gurten werden Nadelholzstämme (Kiefer, Fichte) entrindet und mit warmem Wasser für den Schälprozess durchwärmt. Die durchwärmten Stämme werden abgeschält und aus einem langen Furnierblatt die einzelnen Furnierblätter geschnitten. Die Furnierblätter werden in einem Durchlauftrockner getrocknet und anschließend nach Qualitäten sortiert. Auf der Lege- und Pressenline werden die einzelnen Furnierlagen nach Rezeptur aufgelegt und zu einer Platte gepresst. Die Platten werden zu Streifen geschnitten und als Gurte mit dem Stegmaterial (Hartfaserplatte oder OSB) verbunden. Alternativ kann zu STEICO LVL auch Vollholz verwendet werden. Die Produktion ist über ein Qualitätsmanagementsystem nach /ISO 9001/ zertifiziert.
Technische Daten:
Die technischen Daten der Produkte, die im Geltungsbereich der EPD liegen sind folgend aufgelistet:
Deklarierte Einheit:
Die deklarierte Einheit der ökologischen Betrachtung ist ein Laufmeter (1 lfm) Stegträger unter Berücksichtigung des Mixes der verwendeten Holzhalbwaren und Klebstoffe nach Kapitel 2.5 und einer Masse von 4,4 kg je Laufmeter bei einer Holzfeuchte von 7,38 %, was einem Wasseranteil von 6,9 % entspricht. Der Anteil der Klebstoffe liegt bei 4,98 % und die Dichte des durchschnittlichen Produktes beträgt 619,47 kg/m³.

Alle Angaben zu eingesetzten Halbwaren und Klebstoffen wurden auf Grundlage spezifischer Daten berechnet. Die Ökobilanzergebnisse beziehen sich auf die durchschnittliche Produktion aller Stegträger im Referenzzeitraum und lassen sich über die Masse auf die jeweiligen Ausführungen des Produktes skalieren.

## Technical purpose
STEICO Stegträgerprodukte finden Anwendung als Dachsparren, Deckenbalken, Wandstützen, in der Fassade oder als Distanzhalter.

## Reference product
- STEICO joist/wall: 1

## Inputs
- Erneuerbare Primärenergie als Energieträger (PERE) [MJ]: A1 33.3605, A2 0.0974199, A3 1.71497, A5 1.07614, C2 0.00411457, C3 0.210447, D -14.8024
- Erneuerbare Primärenergie zur stofflichen Nutzung (PERM) [MJ]: A1 74.7142, A2 0, A3 1.0628, A5 -1.0628, C2 0, C3 -74.7142, D 0
- Total erneuerbare Primärenergie (PERT) [MJ]: A1 108.075, A2 0.0974199, A3 2.77777, A5 0.013342, C2 0.00411457, C3 -74.5038, D -14.8024
- Nicht-erneuerbare Primärenergie als Energieträger (PENRE) [MJ]: A1 41.8223, A2 1.67948, A3 10.9362, A5 1.6406, C2 0.0709335, C3 0.389777, D -56.3283
- Nicht-erneuerbare Primärenergie zur stofflichen Nutzung (PENRM) [MJ]: A1 2.1931, A2 0, A3 1.57194, A5 -1.57194, C2 0, C3 -2.1931, D 0
- Total nicht erneuerbare Primärenergie (PENRT) [MJ]: A1 44.0154, A2 1.67948, A3 12.5082, A5 0.0686694, C2 0.0709335, C3 -1.80332, D -56.3283
- Einsatz von Sekundärstoffen (SM) [kg]: A1 0, A2 0, A3 0, A5 0, C2 0, C3 0, D 0
- Erneuerbare Sekundärbrennstoffe (RSF) [MJ]: A1 0.0233439, A2 0, A3 0.20283, A5 0, C2 0, C3 0, D 74.4881
- Nicht erneuerbare Sekundärbrennstoffe (NRSF) [MJ]: A1 0, A2 0, A3 0, A5 0, C2 0, C3 0, D 2.1931
- Einsatz von Süßwasserressourcen (FW) [m^3]: A1 0.0323263, A2 0.000164702, A3 0.00270535, A5 0.000512135, C2 6.95625e-6, C3 0.000113434, D 0.00990924

## Outputs
- Gefährlicher Abfall zur Deponie (HWD) [kg]: A1 0.000220084, A2 9.38161e-8, A3 6.6332e-7, A5 3.14656e-10, C2 3.96236e-9, C3 3.02876e-10, D -3.17725e-8
- Entsorgter nicht gefährlicher Abfall (NHWD) [kg]: A1 0.0315016, A2 0.000136526, A3 0.00569574, A5 0.0112379, C2 5.76622e-6, C3 0.000403098, D 0.0360514
- Entsorgter radioaktiver Abfall (RWD) [kg]: A1 0.000260051, A2 2.27872e-6, A3 9.98443e-5, A5 2.84535e-6, C2 9.62425e-8, C3 3.66973e-5, D -0.00262634
- Komponenten für die Wiederverwendung (CRU) [kg]: A1 0, A2 0, A3 0, A5 0, C2 0, C3 0, D 0
- Stoffe zum Recycling (MFR) [kg]: A1 0, A2 0, A3 0, A5 0, C2 0, C3 0, D 0
- Stoffe für die Energierückgewinnung (MER) [kg]: A1 0, A2 0, A3 0, A5 0, C2 0, C3 4.4, D 0
- Exportierte elektrische Energie (EEE) [MJ]: A1 0, A2 0, A3 0, A5 0.363915, C2 0, C3 0, D 0
- Exportierte thermische Energie (EET) [MJ]: A1 0, A2 0, A3 0, A5 0.722144, C2 0, C3 0, D 0

## Impact indicators
- Globales Erwärmungspotenzial (GWP) [kg CO_(2)-Äq.]: A1 -3.71016, A2 0.121713, A3 0.770728, A5 0.21187, C2 0.00514059, C3 7.13325, D -3.47499
- Abbau Potential der stratosphärischen Ozonschicht (ODP) [kg CFC11-Äq.]: A1 4.31263e-10, A2 2.0397e-17, A3 3.33182e-12, A5 7.25442e-17, C2 8.61473e-19, C3 1.27602e-15, D -8.62313e-15
- Versauerungspotenzial von Boden und Wasser (AP) [kg SO_(2)-Äq.]: A1 0.0124286, A2 0.000514043, A3 0.00261951, A5 3.81909e-5, C2 2.17108e-5, C3 4.71755e-5, D -0.00357601
- Eutrophierungspotenzial (EP) [kg PO_(4)^(3)-Äq.]: A1 0.00146341, A2 0.000130834, A3 0.000218747, A5 4.78338e-6, C2 5.52582e-6, C3 7.66848e-6, D -0.000568044
- Bildungspotential für troposphärisches Ozon (POCP) [kg Ethen-Äq.]: A1 0.00184661, A2 -0.000212261, A3 0.000217149, A5 1.59283e-6, C2 -8.96491e-6, C3 3.11649e-6, D -0.000319287
- Potenzial für den abiotischen Abbau nicht fossiler Ressourcen (ADPE) [kg Sb-Äq.]: A1 6.46155e-7, A2 9.51557e-9, A3 6.75555e-8, A5 8.69586e-9, C2 4.01894e-10, C3 1.27499e-8, D -8.61754e-7
- Potenzial für den abiotischen Abbau fossiler Brennstoffe (ADPF) [MJ]: A1 43.3625, A2 1.67363, A3 10.6862, A5 0.0614873, C2 0.0706865, C3 0.297097, D -51.0321

## Use advice
Gültigkeitsbereich:
Diese Deklaration gilt für STEICOwall und STEICOjoist Stegträger, welche in folgenden Varianten hergestellt werden:

STEICOjoist

STEICOjoist HB

STEICOjoist OSB

STEICOjoist LVL

STEICOjoist LVL OSB

STEICOwall

STEICOwall LVL HB

STEICOwall LVL OSB

STEICOwall HB

STEICOwall OSB

Herstellwerk:
STEICO Sp. z o.o.

Ul. Przemyslowa 2

64-700 Czarnkow

Polen
Systemgrenze:
Der Deklarationstyp entspricht einer EPD „Wiege bis Werkstor – mit Optionen“. Inhalte sind das Stadium der Produktion, also von der Bereitstellung der Rohstoffe bis zum Werkstor der Produktion (cradle-to-gate, Module A1 bis A3), sowie das Modul A5 und Teile des Endes des Lebensweges (Modul C2 und C3). Darüber hinaus erfolgt eine Betrachtung der potenziellen Nutzen und Lasten über den Lebensweg des Produktes hinaus (Modul D).

Im Einzelnen werden in Modul A1 die Bereitstellung der Holzhalbwaren sowie die Bereitstellung der Klebstoffe bilanziert. Die Transporte dieser Stoffe werden in Modul A2 berücksichtigt. Modul A3 umfasst die Bereitstellung der Brennstoffe, Betriebsmittel und Strom sowie die Herstellungsprozesse vor Ort. Diese sind im Wesentlichen die Verklebung und der Zuschnitt sowie die Verpackung des Produktes. In Modul A5 wird ausschließlich die Entsorgung der Produktverpackung abgebildet, welche den Ausgang des enthaltenen biogenen Kohlenstoffs sowie der enthaltenen erneuerbaren und nicht erneuerbaren Primärenergie (PERM und PENRM) einschließt.

Modul C2 berücksichtigt den Transport zum Entsorger und Modul C3 die Aufbereitung und Sortierung des Altholzes. Zudem werden in Modul C3 gemäß /EN 16485/ die CO2-Äquivalente des im Produkt befindlichen holzinhärenten Kohlenstoffs sowie die im Produkt enthaltene erneuerbare und nicht erneuerbare Primärenergie (PERM und PENRM) als Abgänge verbucht.

Modul D bilanziert die thermische Verwertung des Produktes am Ende seines Lebenswegs sowie die daraus resultierenden potenziellen Nutzen und Lasten in Form einer Systemerweiterung.

## Data sources
- STEICO joist/wall Stegträger.pdf
- GaBi Database (all versions)
- GaBi database SP37 2019
