# Meister Longlife Parkett

Dataset: ILCD process, EPD, specific dataset
Geography: DE
Reference year: 2016
Valid until: 2021
Classification: OEKOBAU.DAT: Holz / Holzböden / Parkett
Classification: IBUCategories: 02 Bauprodukte / Produkte aus Bauholz / Vollholzprodukte
Method details: Vollholzprodukte.pdf
Owner: MeisterWerke Schulte GmbH
Compliance: DIN EN 15804; ISO 14025
Review: Accredited third party review by IBU
Amounts: rows without a unit in brackets have none in this file; such an amount is in the reference unit of its flow, which a separate flow dataset defines
copyright: false

## General comment
Es handelt sich um einen dreilagig aufgebauten Mehrschicht-Parkettboden mit einer hochdichten Faserplatte (HDF) als Mittellage, einer Vollholz-Deckschicht aus Eiche und einem Gegenzug. Je nach Ausführungsform besteht die Deckschicht aus einer einzelnen Lamelle (Landhausdiele) oder aus aufgesägten Abschnitten (Schiffsboden). Die Produkte sind mit einer wohnfertig geölten oder lackierten Oberfläche ausgestattet und lassen sich als Elemente mittels spezieller Nut-Federgeometrie leimfrei miteinander verbinden. Die MeisterWerke vermarkten Parkettprodukte unter der Bezeichnung LonglifeParkett mit der Vertriebsmarke MEISTER (http://www.meister.com) bzw. (http://markenboden.de) oder Schulte Räume (http://schulte-raeume.de).
Für das Inverkehrbringen des Produkts in der EU/EFTA (mit Ausnahme der Schweiz) gilt die Verordnung /(EU) Nr. 305/2011/. Die Produkte haben eine Leistungserklärung (DOP) unter Berück- sichtigung der harmonisierten Norm /EN 14342:2012/ ("Holzfußböden und Parkett - Eigenschaften, Bewertung der Konformität und Kennzeichnung") und die CE-Kennzeichnung.

## Technology and included processes
Flächengewicht: 11 kg/m² Arithmetischer Durchschnitt aus den zwei Longlife-Parkett Produkten Landhausdiele & Schiffsboden. Die Herstellung des Bodenbelags umfasst die folgenden Prozesse: - Einkauf - ggfs. Trockungsprozesse der Deckschicht - Aushoblen und Ablängen (Deckschicht) - Auftrennen in Lamellen (Deckschicht) - Technische Trocknen der Lamellen (Deckschicht) - Aufleimen der Deckschichten und Gegenzüge auf HDF Platte - Auftrennen in Dielenformate - Schleifen + Lackieren / Ölen der Dielenformate - Einfräsen des Klicksystems - Verpacken
Technische Daten:
Wesentliche Merkmale und Leistung gemäß Leistungserklärung und zugrunde liegender harmonisierter Produktnorm /EN 14342:2012/:

Rohdichte und Dicke >500 kg/m³, >10 mm
Brandverhalten Dfl-s1
Formaldehydemissionen E1
Gehalt an Pentachlorphenol ≤ 5 ppm
Bruchfestigkeit NPD*
Rutschverhalten NPD*
Wärmeleitfähigkeit [W/mK] ≤ 0,14 W/mK
Biologische Dauerhaftigkeit NPD*
* NPD = keine Leistungsbestimmung

Weiter sind folgende bautechnischen Daten relevant:

Gesamtstärke: 13 mm (+/- 1 mm)
Länge (min. - max.): 700 - 2400 mm
Breite (min. - max.): 140 - 255 mm
Nutzschichtstärke: ≥2,5 mm
Flächengewicht: ca. 11 kg/m² (+/- 0,5 kg/m²)

Holzfeuchte der Deckschicht /EN 13183-1/:
7 % (+/- 2 %)
Deklarierte Einheit:
1 m² Mehrschicht-Parkettboden „Longlife-Parkett“ (Flächengewicht 11 kg/m², Feuchte 7 %). Es wurde ein arithmetischer Durchschnitt aus den zwei Produkten Landhausdiele & Schiffsboden gebildet (EPD Klasse 1c), da sich die Produktionsmengen nur geringfügig unterscheiden. Die Abweichungen der Ökobilanzergebnisse beider Produktvarianten gegenüber dem deklarierten Durchschnitt betragen max. 5 %, nur bei ADPE und ADPF 13 % sowie bei PENRT 8 %.

## Technical purpose
MeisterWerke-LonglifeParkett sind Holzbodenprodukte nach /EN 13489/ die, je nach Ausführungsform, für die private und gewerbliche Nutzung im Innenbereich geeignet sind. Die Bodenbeläge werden auf Estrichen oder Holzunterkonstruktionen in Verbindung mit geeigneten Unterlagen (Dämmunterlagen) schwimmend verlegt oder vollflächig auf dem Estrich geklebt. In allen Fällen sind die entsprechenden MeisterWerke-Einbaubedingungen und Unterbodenanforderungen zu beachten.

## Reference product
- 1m² Longlife-Parkett: 1

## Inputs
- Erneuerbare Primärenergie als Energieträger (PERE) [MJ]: A1-A3 101, A4 0.103, A5 0.0248, B2 0.847, D -35.2
- Erneuerbare Primärenergie zur stofflichen Nutzung (PERM) [MJ]: A1-A3 167, A4 0, A5 0, B2 0, D 0
- Total erneuerbare Primärenergie (PERT) [MJ]: A1-A3 268, A4 0.103, A5 0.0248, B2 0.847, D -35.2
- Nicht-erneuerbare Primärenergie als Energieträger (PENRE) [MJ]: A1-A3 108, A4 1.82, A5 0.19, B2 3.5, D -198
- Nicht-erneuerbare Primärenergie zur stofflichen Nutzung (PENRM) [MJ]: A1-A3 32, A4 0, A5 0, B2 0, D 0
- Total nicht erneuerbare Primärenergie (PENRT) [MJ]: A1-A3 140, A4 1.82, A5 0.19, B2 3.5, D -198
- Einsatz von Sekundärstoffen (SM) [kg]: A1-A3 0, A4 0, A5 0, B2 0, D 0
- Erneuerbare Sekundärbrennstoffe (RSF) [MJ]: A1-A3 0, A4 0, A5 0, B2 0, D 0
- Nicht erneuerbare Sekundärbrennstoffe (NRSF) [MJ]: A1-A3 0, A4 0, A5 0, B2 0, D 0
- Einsatz von Süßwasserressourcen (FW) [m^3]: A1-A3 0.0415, A4 0.000259, A5 0.00194, B2 0.00167, D -0.0395

## Outputs
- Gefährlicher Abfall zur Deponie (HWD) [kg]: A1-A3 2.04e-6, A4 1.38e-7, A5 4.57e-10, B2 5.52e-5, D -7.82e-8
- Entsorgter nicht gefährlicher Abfall (NHWD) [kg]: A1-A3 0.125, A4 0.000153, A5 0.0105, B2 0.0125, D 0.0096
- Entsorgter radioaktiver Abfall (RWD) [kg]: A1-A3 0.00577, A4 2.61e-6, A5 1.15e-5, B2 0.000115, D -0.019
- Komponenten für die Wiederverwendung (CRU) [kg]: A1-A3 0, A4 0, A5 0, B2 0, D 0
- Stoffe zum Recycling (MFR) [kg]: A1-A3 0, A4 0, A5 0, B2 0, D 0
- Stoffe für die Energierückgewinnung (MER) [kg]: A1-A3 0, A4 0, A5 0, B2 0, D 0
- Exportierte elektrische Energie (EEE) [MJ]: A1-A3 0, A4 0, A5 1.06, B2 0, D 54
- Exportierte thermische Energie (EET) [MJ]: A1-A3 0, A4 0, A5 2.47, B2 0, D 64.7

## Impact indicators
- Globales Erwärmungspotenzial (GWP) [kg CO_(2)-Äq.]: A1-A3 -7.59, A4 0.133, A5 0.961, B2 0.19, C3 16.8, D -9.84
- Abbau Potential der stratosphärischen Ozonschicht (ODP) [kg CFC11-Äq.]: A1-A3 1.19e-9, A4 6.06e-13, A5 2.79e-12, B2 1.09e-8, D -5.12e-9
- Versauerungspotenzial von Boden und Wasser (AP) [kg SO_(2)-Äq.]: A1-A3 0.032, A4 0.000574, A5 9.34e-5, B2 0.000442, D 0.00824
- Eutrophierungspotenzial (EP) [kg PO_(4)^(3)-Äq.]: A1-A3 0.00605, A4 0.000141, A5 1.63e-5, B2 0.000157, D -9.86e-5
- Bildungspotential für troposphärisches Ozon (POCP) [kg Ethen-Äq.]: A1-A3 0.0103, A4 -0.000196, A5 7.71e-6, B2 0.000132, D 0.00152
- Potenzial für den abiotischen Abbau nicht fossiler Ressourcen (ADPE) [kg Sb-Äq.]: A1-A3 2.63e-6, A4 8.78e-9, A5 1.29e-8, B2 -1.78e-8, D -2.49e-6
- Potenzial für den abiotischen Abbau fossiler Brennstoffe (ADPF) [MJ]: A1-A3 125, A4 1.82, A5 0.161, B2 3.21, D -150

## Use advice
Gültigkeitsbereich:
Diese Kern-EPD gilt für einen Quadratmeter Longlife-Parkett in den Varianten Landhausdiele und Schiffsboden, hergestellt in 59602 Rüthen-Meiste, Deutschland. Es wird ein Durchschnitt dieser beiden Produkte deklariert.
Systemgrenze:
Typ der EPD: Wiege bis Werkstor mit Optionen.

Module A1-A3:
Die Herstellungsphase umfasst:
A1: Rohstoffgewinnung und –verarbeitung und
A2: Transport zum Hersteller;
A3: Herstellung;
einschließlich der Bereitstellung von allen Stoffen, Produkten und Energie, sowie die vollständige Abfallbehandlung.

Modul A4 betrachtet den Transport zur Baustelle.

Modul A5 berücksichtigt die an der Baustelle anfallenden Produktverpackungen. Der Entsorgungsweg ist eine thermische Verwertung, Nutzenpotentiale aus der Energiesubstitution sind in Modul D deklariert. Es wird angenommen, dass keine Abfälle bei der Verlegung anfallen.

Modul B2 betrachtet die regelmäßige Reinigung der Bodenbeläge. Hier wird sowohl eine Nass- als auch eine Trockenreinigung (Staubsaugen) berücksichtigt. Die Ergebnisse des Modul B2 werden für ein Jahr in dieser EPD deklariert.

Am Produktlebensende erreicht der Parkettboden direkt nach dem Ausbau aus dem Gebäude das Ende des Abfallstatus. Parkettboden kann in einer Biomasseanlage thermisch verwertet werden. Die daraus resultierenden potentiellen Gutschriften aus der Energiesubstitution werden in Modul D deklariert. Lediglich die biogenen CO2-Emissionen, die bei der Verbrennung entstehen, werden in C3 ausgewiesen.

## Data sources
- Meister Longlife Parkett.pdf
- GaBi Database (all versions)
- GaBi database SP29 2016
