# Ytong® - Granulat

Dataset: ILCD process, EPD, average dataset
Geography: DE
Reference year: 2017
Valid until: 2022
Classification: OEKOBAU.DAT: Mineralische Baustoffe / Steine und Elemente / Porenbeton
Classification: IBUCategories: 01 Grundstoffe und Vorprodukte / Produkte für Beton, Mörtel und Einpressmörtel / Leichtzuschlag / Schüttgranulat
Method details: Leichtzuschlag / Schüttgranulat.pdf
Generated by: Sphera Solutions GmbH
Registration number: EPD-XEL-20170148-IAD1-DE
Owner: Xella Deutschland GmbH
Compliance: DIN EN 15804; ISO 14025
Review: Accredited third party review by Institut Bauen und Umwelt e. V.
Amounts: rows without a unit in brackets have none in this file; such an amount is in the reference unit of its flow, which a separate flow dataset defines
copyright: true
licenseType: Free of charge for all users and uses
accessRestrictions: None

## General comment
Die genannten Produkte sind gebrochene Granulate verschiedener Korngrößen aus Porenbeton. Porenbeton gehört zur Gruppe der porosierten dampfgehärteten Leichtbetone.

## Technology and included processes
Der gemahlene Quarzsand wird mit Kalk, Zement und zerkleinertem Porenbeton-Recyclingmaterial, unter Zugabe von Wasser und Aluminiumpulver oder -paste, in einem Mischer zu einer wässrigen Suspension gemischt und in Gießformen gegossen. Das Wasser löscht unter Wärmeentwicklung den Kalk. Das Aluminium reagiert im alkalischen Milieu. Dabei bildet sich gasförmiger Wasserstoff, der die Poren in der Masse erzeugt und ohne Rückstände entweicht. Die Poren besitzen meist einen Durchmesser von 0,5 – 1,5 mm und sind ausschließlich mit Luft gefüllt. Nach dem ersten Abbinden entstehen halbfeste Rohblöcke, aus denen maschinell und mit hoher Genauigkeit die Porenbetonbauteile geschnitten werden. Die Ausbildung der endgültigen Porenbetoneigenschaften erfolgt während der anschließenden Dampfhärtung über 5 – 12 Stunden bei etwa 190 °C und einem Druck von ca. 12 bar in Dampfdruckkesseln, den sog. Autoklaven. Hier bilden sich aus den eingesetzten Stoffen Calcium-Silikathydrate, die dem in der Natur vorkommenden Mineral Tobermorit entsprechen. Die Reaktion des Materials ist mit der Entnahme aus dem Autoklav abgeschlossen. Der Dampf wird nach Abschluss des Härtungsprozesses für weitere Autoklavzyklen verwandt. Das anfallende Kondensat wird als Prozesswasser genutzt. Auf diese Weise wird Energie eingespart und eine Belastung der Umwelt mit heißem Abdampf und Abwasser vermieden. Die anfallenden Deck- und Bodenschichten sowie Produktionsbruch werden in elektrisch betriebenen Aufbereitungsaggregaten zerkleinert und klassiert. Die Feuchte wird dem so entstandenen Granulat bei niedriger Temperatur in einem kontinuierlich arbeitenden, mit Gas betriebenen Trockner entzogen. Die endgültige Einstellung der Kornfraktionen erfolgt in einem abschließenden Klassiervorgang. Danach wird das Granulat in Silos überführt und später in die Einzelgebinde abgefüllt.
Deklarierte Einheit:
Die Umweltproduktdeklaration bezieht sich auf das Produktionsstadium (Modul A1-A3) von 1 m³ Ytong®-Porenbetongranulat der Xella Baustoffe GmbH. Die durchschnittliche Schüttdichte beträgt 360kg/m³. Die Ergebnisse repräsentieren den durchschnittlichen Produktionsmix von Xella (Deutschland).

## Technical purpose
Ausgleichsschüttung für alle Trocken-Unterboden-Systeme und herkömmliche Estriche.

## Reference product
- 1m³ Ytong® Porenbetongranulat: 1

## Inputs
- Erneuerbare Primärenergie als Energieträger (PERE) [MJ]: A1-A3 330.2
- Erneuerbare Primärenergie zur stofflichen Nutzung (PERM) [MJ]: A1-A3 16.8
- Total erneuerbare Primärenergie (PERT) [MJ]: A1-A3 347
- Nicht-erneuerbare Primärenergie als Energieträger (PENRE) [MJ]: A1-A3 1963.9
- Nicht-erneuerbare Primärenergie zur stofflichen Nutzung (PENRM) [MJ]: A1-A3 46.1
- Total nicht erneuerbare Primärenergie (PENRT) [MJ]: A1-A3 2010
- Einsatz von Sekundärstoffen (SM) [kg]: A1-A3 0
- Erneuerbare Sekundärbrennstoffe (RSF) [MJ]: A1-A3 0
- Nicht erneuerbare Sekundärbrennstoffe (NRSF) [MJ]: A1-A3 0
- Einsatz von Süßwasserressourcen (FW) [m^3]: A1-A3 0.301

## Outputs
- Gefährlicher Abfall zur Deponie (HWD) [kg]: A1-A3 4.29e-6
- Entsorgter nicht gefährlicher Abfall (NHWD) [kg]: A1-A3 12.3
- Entsorgter radioaktiver Abfall (RWD) [kg]: A1-A3 0.0545
- Komponenten für die Wiederverwendung (CRU) [kg]: A1-A3 0
- Stoffe zum Recycling (MFR) [kg]: A1-A3 0
- Stoffe für die Energierückgewinnung (MER) [kg]: A1-A3 0
- Exportierte elektrische Energie (EEE) [MJ]: A1-A3 0
- Exportierte thermische Energie (EET) [MJ]: A1-A3 0

## Impact indicators
- Globales Erwärmungspotenzial (GWP) [kg CO_(2)-Äq.]: A1-A3 216
- Abbau Potential der stratosphärischen Ozonschicht (ODP) [kg CFC11-Äq.]: A1-A3 2.77e-10
- Versauerungspotenzial von Boden und Wasser (AP) [kg SO_(2)-Äq.]: A1-A3 0.219
- Eutrophierungspotenzial (EP) [kg PO_(4)^(3)-Äq.]: A1-A3 0.0303
- Bildungspotential für troposphärisches Ozon (POCP) [kg Ethen-Äq.]: A1-A3 0.023
- Potenzial für den abiotischen Abbau nicht fossiler Ressourcen (ADPE) [kg Sb-Äq.]: A1-A3 0.000383
- Potenzial für den abiotischen Abbau fossiler Brennstoffe (ADPF) [MJ]: A1-A3 1870

## Use advice
Gültigkeitsbereich:
Die Ökobilanz beruht auf der Berücksichtigung aller 10 deutschen Porenbeton-Werke der Xella-Gruppe und der Datenbasis des Jahres 2016.
Systemgrenze:
Typ der EPD: Wiege bis Werkstor. Die Ökobilanz für Ytong®-Porenbetongranulat berücksichtigt die Lebenszyklusphasen der Produkt-Herstellung (A1-A3).

Der Produkteinbau (Modul A4-A5) sowie das Nutzungsstadium (Modul B) ist in dieser Studie nicht berücksichtigt. Die Entsorgung (Modul C) ist in dieser Studie ebenfalls nicht berücksichtigt. Aus der Bilanzierung der betrachteten Module ergeben sich keine Gutschriften und Lasten außerhalb der Systemgrenze.

Im Einzelnen wurden folgende Prozesse im Produktstadium A1-A3 des Porenbetongranulats einbezogen:

- Betrachtung der Vorkette des Porenbeton-Bruchs (Bereitstellungsprozesse von Hilfsstoffen und Energie für den Werksbetrieb, Herstellung aller Vorprodukte, Transporte der Vorprodukte, Ressourcen und Hilfsstoffe zum Werk)

- Veredlungsprozess des Porenbeton-Bruchs zu Porenbetongranulat, d.h. Brechen und Trocknen inklusive energetischen Aufwendungen

- Herstellung der Verpackungen (PE-Tüten, Papiertüten, Bigbags)

## Data sources
- GaBi Database (all versions)
- GaBi database SP29 2016
