# Brettschichtholz, Balkenschichtholz, Verbundbauteile aus Brettschichtholz

Dataset: ILCD process, EPD, average dataset
Geography: EU-27
Reference year: 2021
Valid until: 2026
Classification: OEKOBAU.DAT: Holz / Vollholz / Brettschichtholz (BSH)
Classification: IBUCategories: 02 Bauprodukte / Produkte aus Bauholz / Vollholzprodukte
Method details: Vollholzprodukte.pdf
Generated by: Daxner & Merl GmbH
Registration number: EPD-HAS-20210171-IBD1-DE
Owner: HASSLACHER Holding GmbH
Compliance: DIN EN 15804+A2; ISO 14025
Review: Accredited third party review by Institut Bauen und Umwelt e. V.
Amounts: rows without a unit in brackets have none in this file; such an amount is in the reference unit of its flow, which a separate flow dataset defines
copyright: true
licenseType: Free of charge for all users and uses
accessRestrictions: None

## General comment
Brettschichtholz (der Begriff umfasst im gesamten weiteren Dokument ebenso Balkenschichtholz, Verbundbauteile aus Brettschichtholz und Sonderbauteile) der HASSLACHER Holding GmbH ist ein massives, stabförmiges Holzbauteil, welches aus mindestens zwei faserparallel miteinander verklebten, getrockneten Nadelholzbrettlamellen besteht. Hergestellt wird das Brettschichtholz nach der EN 14080.

Durch eine visuelle oder maschinelle Festigkeitssortierung der Brettlamellen sowie eine Homogenisierung der optischen und physikalischen Materialeigenschaften wird ein hohes Maß an Formstabilität und Tragfähigkeit erzielt.

Brettschichtholz wird üblicherweise aus Fichten-, Tannen-, Kiefer- oder Lärchenholz hergestellt. Die Standardfestigkeitsklassen sind GL24h, GL24c bis GL32h und GL32c.

Brettschichtholz ist sowohl als Standard- oder Kommissionsware als auch in Sonderdimensionen und Sonderaufbauten bzw. in Form von Sonderbauteilen verfügbar.

Aufgrund der vorhandenen, in die Produktionswerke integrierten maschinellen Abbundmöglichkeiten kann ein hoher Vorfertigungsgrad und somit eine massiv verkürzte Bauzeit erreicht werden.

Die Herstellung unterliegt einer Eigen- und Fremdüberwachung gemäß EN 14080.

## Technology and included processes
Für die Herstellung von Brettschichtholz wird konventionelles Schnittholz zunächst auf unter 15 % Holzfeuchte (Zielfeuchte: ca. 12 ± 2 %) getrocknet, vorgehobelt und visuell bzw. maschinell nach Festigkeit sortiert. Identifizierte Brettabschnitte mit festigkeitsmindernden oder optisch nicht entsprechenden Stellen werden in Abhängigkeit von den erforderlichen bzw. gewünschten Festigkeitsklassen oder Qualitätsansprüchen ausgekappt und die entstandenen Bretter durch Keilzinkenverbindungen zu endlos langen Lamellen verbunden. Im anschließenden Vorhobelprozess werden die Brettlamellen auf die gewünschte Endstärke von > 6 bis 45 bis < 85 mm) gehobelt, um nach dem Klebstoffauftrag auf die Breitseite im geraden oder gekrümmten Pressbett zu mindestens zweilagigen Brettschichtholzrohlingen verpresst zu werden. Nach erfolgter Aushärtung wird der Rohling gehobelt, gefast, abgebunden und verpackt. Bei Bedarf kann vor dem Verpacken eine Behandlung mit Oberflächenveredelungen (Hirnholzschutz, UV-Schutz, Lasuren, Montage- und Hydrophobierungsschutz etc.) erfolgen.
Technische Daten:
Angegeben sind die bautechnischen Daten für Brettschichtholz nach EN 14080.
Deklarierte Einheit:
Die vorliegende Umwelt-Produktdeklaration bezieht sich auf eine deklarierte Einheit von 1 m³ HASSLACHER Brettschichtholz mit einer durchschnittlichen Rohdichte von 470 kg/m³ und einer Auslieferungsfeuchte von 13 %.

## Technical purpose
Brettschichtholz findet Anwendung in allen konstruktiven Bereichen des modernen Holzbaus, d. h. vom ingenieursmäßigen Wohn- und Industriebau bis hin zum Brückenbau. Brettschichtholz, mit Ausnahme von Balkenschichtholz (nur Nutzungsklassen 1 und 2), kann gemäß EN 1995-1-1 in den Nutzungsklassen 1 bis 3 verwendet werden.

Die Verwendung eines vorbeugenden chemischen Holzschutzes nach DIN 68800-3, ist unüblich und nur zulässig, wenn der bauliche Holzschutz nach DIN 68800-2, alleine nicht ausreichend ist. Sofern in Ausnahmefällen ein vorbeugendes chemisches Holzschutzmittel zum Einsatz kommt, muss dieses über eine allgemeine bauaufsichtliche Zulassung oder Zulassung nach Biozidrichtlinie geregelt sein.

## Reference product
- Brettschichtholz (): 1

## Inputs
- Erneuerbare Primärenergie als Energieträger (PERE) [MJ]: A1-A3 1703.57, C1 0, C2 1.07706, C3 7682.24, C4 0, D -1826.45
- Erneuerbare Primärenergie zur stofflichen Nutzung (PERM) [MJ]: A1-A3 7655.92, C1 0, C2 0, C3 -7651.6, C4 0, D 0
- Total erneuerbare Primärenergie (PERT) [MJ]: A1-A3 9359.49, C1 0, C2 1.07706, C3 30.6381, C4 0, D -1826.45
- Nicht-erneuerbare Primärenergie als Energieträger (PENRE) [MJ]: A1-A3 2004.33, C1 0, C2 18.7859, C3 66.5405, C4 0, D -7167.85
- Nicht-erneuerbare Primärenergie zur stofflichen Nutzung (PENRM) [MJ]: A1-A3 85.1021, C1 0, C2 0, C3 0, C4 0, D 0
- Total nicht erneuerbare Primärenergie (PENRT) [MJ]: A1-A3 2089.43, C1 0, C2 18.7859, C3 66.5405, C4 0, D -7167.85
- Einsatz von Sekundärstoffen (SM) [kg]: A1-A3 0.00301875, C1 0, C2 0, C3 0, C4 0, D 0
- Erneuerbare Sekundärbrennstoffe (RSF) [MJ]: A1-A3 0, C1 0, C2 0, C3 0, C4 0, D 7651.6
- Nicht erneuerbare Sekundärbrennstoffe (NRSF) [MJ]: A1-A3 0, C1 0, C2 0, C3 0, C4 0, D 0
- Einsatz von Süßwasserressourcen (FW) [m^3]: A1-A3 0.804158, C1 0, C2 0.00123359, C3 0.0298324, C4 0, D -1.20244

## Outputs
- Gefährlicher Abfall zur Deponie (HWD) [kg]: A1-A3 1.97746e-6, C1 0, C2 9.89869e-10, C3 1.75785e-8, C4 0, D -1.60827e-6
- Entsorgter nicht gefährlicher Abfall (NHWD) [kg]: A1-A3 1.99473, C1 0, C2 0.00294728, C3 0.0471551, C4 0, D 0.271643
- Entsorgter radioaktiver Abfall (RWD) [kg]: A1-A3 0.072997, C1 0, C2 3.40762e-5, C3 0.00990141, C4 0, D -0.588619
- Komponenten für die Wiederverwendung (CRU) [kg]: A1-A3 0, C1 0, C2 0, C3 0, C4 0, D 0
- Stoffe zum Recycling (MFR) [kg]: A1-A3 0, C1 0, C2 0, C3 0, C4 0, D 0
- Stoffe für die Energierückgewinnung (MER) [kg]: A1-A3 0, C1 0, C2 0, C3 470, C4 0, D 0
- Exportierte elektrische Energie (EEE) [MJ]: A1-A3 0, C1 0, C2 0, C3 0, C4 0, D 0
- Exportierte thermische Energie (EET) [MJ]: A1-A3 0, C1 0, C2 0, C3 0, C4 0, D 0

## Impact indicators
- Globales Erwärmungspotenzial total (GWP-total) [kg CO_(2)-Äq.]: A1-A3 -608.415, C1 0, C2 1.42131, C3 753.425, C4 0, D -409.858
- Globales Erwärmungspotenzial fossil (GWP-fossil) [kg CO_(2)-Äq.]: A1-A3 143.985, C1 0, C2 1.4115, C3 3.73757, C4 0, D -408.123
- Globales Erwärmungspotenzial biogen (GWP-biogenic) [kg CO_(2)-Äq.]: A1-A3 -753.181, C1 0, C2 -0.00167377, C3 749.682, C4 0, D -1.41598
- Globales Erwärmungspotenzial luluc (GWP-luluc) [kg CO_(2)-Äq.]: A1-A3 0.780701, C1 0, C2 0.0114864, C3 0.00529095, C4 0, D -0.319425
- Abbau Potential der stratosphärischen Ozonschicht (ODP) [kg CFC11-Äq.]: A1-A3 6.84403e-8, C1 0, C2 2.7744e-16, C3 8.94654e-14, C4 0, D -5.31659e-12
- Versauerungspotenzial von Boden und Wasser (AP) [mol H^(+)-Äq.]: A1-A3 0.667163, C1 0, C2 0.00466067, C3 0.00777939, C4 0, D 0.304727
- Eutrophierungspotenzial Süßwasser (EP-freshwater) [kg PO_(4)-Äq.]: A1-A3 0.00164158, C1 0, C2 4.1749e-6, C3 1.00274e-5, C4 0, D -0.000604653
- Eutrophierungspotenzial Salzwasser (EP-marine) [kg N-Äq.]: A1-A3 0.294923, C1 0, C2 0.00214084, C3 0.00184769, C4 0, D 0.0577358
- Eutrophierungspotenzial Land (EP-terrestrial) [mol N-Äq.]: A1-A3 3.00587, C1 0, C2 0.0238971, C3 0.0193988, C4 0, D 0.697954
- Bildungspotential für troposphärisches Ozon (POCP) [kg NMVOC-Äq.]: A1-A3 0.84653, C1 0, C2 0.00420231, C3 0.00501477, C4 0, D 0.261618
- Potenzial für den abiotischen Abbau nicht fossiler Ressourcen (ADPE) [kg Sb-Äq.]: A1-A3 3.81439e-5, C1 0, C2 1.24556e-7, C3 1.0996e-6, C4 0, D -7.47094e-5
- Potenzial für den abiotischen Abbau fossiler Brennstoffe (ADPF) [MJ]: A1-A3 2087.21, C1 0, C2 18.7177, C3 66.5249, C4 0, D -7166.89
- Wassernutzung (WDP) [m^(3) Welt-Äq. entzogen]: A1-A3 11.7159, C1 0, C2 0.0130405, C3 0.59968, C4 0, D -10.4912
- Auftreten von Krankheiten aufgrund von Feinstaubemissionen (PM) [Krankheitsfälle]
- Wirkung durch Exposition des Menschen mit U235 (IR) [kBq U235-Äq.]
- Toxizitätsvergleichseinheit für Ökosysteme (ETP-fw) [CTUe]
- Toxizitätsvergleichseinheit für Menschen (krebserregend) (HTP-c) [CTUh]
- Toxizitätsvergleichseinheit für Menschen (nicht krebserregend) (HTP-nc) [CTUh]
- Bodenqualitätsindex (SQP) [SQP]

## Use advice
Gültigkeitsbereich:
Dieses Dokument bezieht sich auf von der HASSLACHER Gruppe an den folgenden Standorten gefertigtes, durchschnittliches HASSLACHER Brettschichtholz, Balkenschichtholz und Verbundbauteile aus Brettschichtholz sowie Sonderbauteile:

- NORITEC Holzindustrie GmbH in Sachsenburg (Österreich),

- HASSLACHER Holzbausysteme GmbH in Hermagor (Österreich),

- HASSLACHER Holzbauteile GmbH & Co. KG in Kleinheubach (Deutschland) und

- NORDLAM GmbH in Magdeburg (Deutschland).
Systemgrenze:
Die Ökobilanz von HASSLACHER Brettschichtholz beinhaltet eine cradle-to-gate-Betrachtung (Wiege bis zum Werkstor) der auftretenden Umweltwirkungen mit den Modulen C1-C4 und Modul D (A1-A3, +C, +D). Die folgenden Lebenszyklusphasen werden in der Analyse berücksichtigt:

Modul A1-A3 | Produktionsstadium

Das Produktionsstadium beinhaltet die Aufwendungen der Rohstoffversorgung (Schnittholz, Herstellung des Leimsystems etc.) sowie der damit verbundenen Transporte bezogen auf die Produktionsstandorte in Sachsenburg, Hermagor, Kleinheubach und Magdeburg. Innerhalb der Werksgrenzen werden die Sortierung, das Hobeln, das Keilzinken, das Verpressen und der Abbund inklusive der Verpackung des Produkts berücksichtigt. Die österreichischen Standorte Sachsenburg und Hermagor beziehen 100 % Ökostrom (Emissionsfaktor GWP-Gesamt: 13 g CO2-Äquivalent/kWh). Die Wärmebereitstellung an den Standorten erfolgt durch die energetische Nutzung der hölzernen Reststoffe aus der Produktion. In Magdeburg wird Wärme aus der benachbarten Abfallverbrennungsanlage bezogen. Die aus der Verbrennung der Abfälle entstandenen Emissionen werden jenem Produktsystem, aus dem der Abfall stammt, angerechnet. Damit geht die Wärme lastenfrei in die Berechnung ein.

Modul C1 | Rückbau/Abriss

Nach dem Ablösen der auf dem Produkt liegenden

Bauteilschichten können die Verbindungen durch Schrauben oder Sägen einfach gelöst und mittels Kränen zum Ort des Abtransports gehoben werden. Der dafür anfallende Energieaufwand ist gering und kann vernachlässigt werden. Der tatsächliche Energieeinsatz ist abhängig vom Einbau der Produkte und kann damit im jeweiligen Gebäudekontext stark variieren.

Modul C2 | Transport zur Abfallbehandlung

Modul C2 beinhaltet den Transport zur Abfallbehandlung. Dazu wird der Transport via LKW über 50 km Transportdistanz als repräsentatives Szenario angesetzt.

Modul C3 | Abfallbehandlung

In Modul C3 wird das Hacken nach Ausbau der Produkte betrachtet. Die Holzprodukte und mit ihnen die materialinhärenten Eigenschaften verlassen das Produktsystem als Sekundärbrennstoff in Modul C3.

Modul C4 | Beseitigung

Das angesetzte Szenario deklariert die energetische Verwertung der Holzprodukte, wodurch keine Umweltauswirkungen aus der Abfallbehandlung der Produkte in C4 zu erwarten sind.

Modul D | Nutzen und Lasten außerhalb der Systemgrenze

In Modul D wird die energetische Verwertung des Produktes am Lebensende inklusive den entsprechenden energetischen Substitutionspotenzialen in Form eines europäischen Durchschnittsszenarios beschrieben.

## Data sources
- GaBi Database (all versions)
- GaBi Database Edition 2021, CUP 2021.01
