# Geotextilien

Dataset: ILCD process, EPD, average dataset
Geography: RER
Reference year: 2021
Valid until: 2026
Classification: OEKOBAU.DAT: Kunststoffe / Folien und Vliese / Technische Textilien
Classification: IBUCategories: 02 Bauprodukte / Geotextilien und - Membrane / Technische Textilien
Method details: Technische Textilien.pdf
Generated by: SKZ - Das Kunststoff-Zentrum
Registration number: EPD-TNC-20200161-CBD1-DE
Owner: TenCate Geosynthetics
Compliance: DIN EN 15804+A2; ISO 14025
Review: Accredited third party review by Institut Bauen und Umwelt e. V.
Amounts: rows without a unit in brackets have none in this file; such an amount is in the reference unit of its flow, which a separate flow dataset defines
copyright: true
licenseType: Free of charge for all users and uses
accessRestrictions: None

## General comment
Das TenCate Geotextil ist ein mechanisch verfestigtes Polypropylen- Endlosfaser-Spinnvlies. Die Formmasse, die mit speziellen Stabilisatoren versehen wird, wird im Schmelzspinnverfahren kontinuierlich geschmolzen, extrudiert und zu endlosen Fasern gesponnen. Die abgelegten Endlosfasern werden anschließend mechanisch verfestigt, in die benötigte Breite verstreckt (patentiert) und aufgewickelt.

## Technology and included processes
Das TenCate Geotextil ist ein mechanisch verfestigtes Polypropylen Endlosfaser-Spinnvlies. Die Formmasse, die mit speziellen Stabilisatoren versehen wird, wird im Schmelzspinnverfahren kontinuierlich geschmolzen, extrudiert und zu endlosen Fasern gesponnen. Die abgelegten Endlosfasern werden anschließend mechanisch verfestigt, in die benötigte Breite verstreckt (patentiert) und aufgewickelt.
Deklarierte Einheit:
Die deklarierte Einheit ist 1 m² Geotextil, die Masse je Flächengewicht nach EN ISO 9864 beträgt 0,07 bis 1,3 kg/m². Im Zuge der Ökobilanzierung dieser EPD wurde mit dem Flächengewicht 0,195 kg/m² gerechnet.

## Technical purpose
Das deklarierte Produkt findet Anwendung im geotechnischen und bautechnischen Bereich und erfüllt die Funktionen Trennen, Filtern, Drainen und Schutz. Durch den Einsatz des Geotextils wird eine Vermischung verschiedener Böden und/oder Füllmaterialien dauerhaft verhindert. Auch ein unkontrolliertes Passieren von Partikeln oder Störstoffen bei gleichzeitigem Durchgang von Flüssigkeit wird verhindert, wodurch eine optimale Filterwirkung gegeben ist. Das Geotextil findet zudem Anwendung als Schutzmaterial von bestimmten Elementen, wie beispielsweise Dichtungsbahnen, und bewahrt diese vor mechanischer Schädigung.

TenCate Geotextilien gibt es in verschiedenen Marken und Ausführungen, die vollständig auf der Website von TenCate einsehbar sind. Ein Beispiel für ein TenCate Geotextil ist das Produkt TenCate Polyfelt TS, welches in 9 verschiedenen Ausführungen angeboten wird (TS 10, TS 20, TS 30, TS 40, TS 50, TS 60, TS 65, TS 70, TS 80). Die Produkte finden in unterschiedlichen Bereichen Anwendung, welche in nachstehender Abbildung dargestellt sind.

## Reference product
- Geotextil: 1

## Inputs
- Erneuerbare Primärenergie als Energieträger (PERE) [MJ]: A1-A3 1.2326, C1 0.0246, C2 0.00050549, C3 0, C4 0.013498, D 0
- Erneuerbare Primärenergie zur stofflichen Nutzung (PERM) [MJ]: A1-A3 0, C1 0, C2 0, C3 0, C4 0, D 0
- Total erneuerbare Primärenergie (PERT) [MJ]: A1-A3 1.2326, C1 0.0246, C2 0.00050549, C3 0, C4 0.013498, D 0
- Nicht-erneuerbare Primärenergie als Energieträger (PENRE) [MJ]: A1-A3 16.419, C1 0.438, C2 0.0074071, C3 0, C4 0.19249, D 0
- Nicht-erneuerbare Primärenergie zur stofflichen Nutzung (PENRM) [MJ]: A1-A3 8.05, C1 0, C2 0, C3 0, C4 0, D 0
- Total nicht erneuerbare Primärenergie (PENRT) [MJ]: A1-A3 24.4, C1 0.438, C2 0.0074071, C3 0, C4 0.19249, D 0
- Einsatz von Sekundärstoffen (SM) [kg]: A1-A3 0, C1 0, C2 0, C3 0, C4 0, D 0
- Erneuerbare Sekundärbrennstoffe (RSF) [MJ]: A1-A3 0, C1 0, C2 0, C3 0, C4 0, D 0
- Nicht erneuerbare Sekundärbrennstoffe (NRSF) [MJ]: A1-A3 0, C1 0, C2 0, C3 0, C4 0, D 0
- Einsatz von Süßwasserressourcen (FW) [m^3]: A1-A3 0.0079304, C1 2.84e-5, C2 7.0931e-7, C3 0, C4 2.3578e-6, D 0

## Outputs
- Gefährlicher Abfall zur Deponie (HWD) [kg]: A1-A3 6.7947e-9, C1 2.04e-8, C2 6.1072e-10, C3 0, C4 7.0197e-10, D 0
- Entsorgter nicht gefährlicher Abfall (NHWD) [kg]: A1-A3 0.0019851, C1 6.7e-5, C2 1.3615e-6, C3 0, C4 0.18438, D 0
- Entsorgter radioaktiver Abfall (RWD) [kg]: A1-A3 0.000558034, C1 5.42e-7, C2 2.3762e-8, C3 0, C4 2.3204e-6, D 0
- Komponenten für die Wiederverwendung (CRU) [kg]: A1-A3 0, C1 0, C2 0, C3 0, C4 0, D 0
- Stoffe zum Recycling (MFR) [kg]: A1-A3 0.0083404, C1 0, C2 0, C3 0, C4 0, D 0
- Stoffe für die Energierückgewinnung (MER) [kg]: A1-A3 0, C1 0, C2 0, C3 0, C4 0, D 0
- Exportierte elektrische Energie (EEE) [MJ]: A1-A3 0, C1 0, C2 0, C3 0, C4 0, D 0
- Exportierte thermische Energie (EET) [MJ]: A1-A3 0, C1 0, C2 0, C3 0, C4 0, D 0

## Impact indicators
- Globales Erwärmungspotenzial total (GWP-total) [kg CO_(2)-Äq.]: A1-A3 0.39326, C1 0.0335, C2 0.00055929, C3 0, C4 0.013024, D 0
- Globales Erwärmungspotenzial fossil (GWP-fossil) [kg CO_(2)-Äq.]: A1-A3 0.39604, C1 0.0332, C2 0.00056073, C3 0, C4 0.013398, D 0
- Globales Erwärmungspotenzial biogen (GWP-biogenic) [kg CO_(2)-Äq.]: A1-A3 -0.00299407, C1 -2.55e-5, C2 -6.90311e-6, C3 0, C4 -0.00040731, D 0
- Globales Erwärmungspotenzial luluc (GWP-luluc) [kg CO_(2)-Äq.]: A1-A3 0.00025821, C1 0.000266, C2 5.5346e-6, C3 0, C4 1.08847e-5, D 0
- Abbau Potential der stratosphärischen Ozonschicht (ODP) [kg CFC11-Äq.]: A1-A3 3.8259e-10, C1 3.95e-18, C2 9.7053e-20, C3 0, C4 3.0377e-17, D 0
- Versauerungspotenzial von Boden und Wasser (AP) [mol H^(+)-Äq.]: A1-A3 0.0012254, C1 0.000442, C2 1.19759e-6, C3 0, C4 4.0594e-5, D 0
- Eutrophierungspotenzial Süßwasser (EP-freshwater) [kg PO_(4)-Äq.]: A1-A3 1.15287e-5, C1 9.98e-8, C2 2.7154e-9, C3 0, C4 2.4526e-6, D 0
- Eutrophierungspotenzial Salzwasser (EP-marine) [kg N-Äq.]: A1-A3 0.00027345, C1 0.000199, C2 4.7155e-7, C3 0, C4 9.0131e-6, D 0
- Eutrophierungspotenzial Land (EP-terrestrial) [mol N-Äq.]: A1-A3 0.0029282, C1 0.00219, C2 5.4564e-6, C3 0, C4 9.8926e-5, D 0
- Bildungspotential für troposphärisches Ozon (POCP) [kg NMVOC-Äq.]: A1-A3 0.001188, C1 0.000646, C2 1.00595e-6, C3 0, C4 2.9329e-5, D 0
- Potenzial für den abiotischen Abbau nicht fossiler Ressourcen (ADPE) [kg Sb-Äq.]: A1-A3 1.08633e-7, C1 2.35e-9, C2 4.8649e-11, C3 0, C4 9.0446e-10, D 0
- Potenzial für den abiotischen Abbau fossiler Brennstoffe (ADPF) [MJ]: A1-A3 24.4, C1 0.437, C2 0.007366, C3 0, C4 0.19249, D 0
- Wassernutzung (WDP) [m^(3) Welt-Äq. entzogen]: A1-A3 0.29999, C1 0.000293, C2 6.7649e-6, C3 0, C4 -0.0001502, D 0
- Auftreten von Krankheiten aufgrund von Feinstaubemissionen (PM) [Krankheitsfälle]: A1-A3 1.37e-8, C1 1.78e-8, C2 6.86e-12, C3 0, C4 3.96e-10, D 0
- Wirkung durch Exposition des Menschen mit U235 (IR) [kBq U235-Äq.]: A1-A3 0.147, C1 7.83e-5, C2 2.03e-6, C3 0, C4 0.000329, D 0
- Toxizitätsvergleichseinheit für Ökosysteme (ETP-fw) [CTUe]: A1-A3 3.77, C1 0.31, C2 0.00556, C3 0, C4 0.189, D 0
- Toxizitätsvergleichseinheit für Menschen (krebserregend) (HTP-c) [CTUh]: A1-A3 8.55e-11, C1 6.47e-12, C2 1.15e-13, C3 0, C4 8.56e-12, D 0
- Toxizitätsvergleichseinheit für Menschen (nicht krebserregend) (HTP-nc) [CTUh]: A1-A3 2.99e-9, C1 6.11e-10, C2 6.13e-12, C3 0, C4 6.88e-10, D 0
- Bodenqualitätsindex (SQP) [SQP]: A1-A3 1.93, C1 0.153, C2 0.0026, C3 0, C4 0.0135, D 0

## Use advice
Gültigkeitsbereich:
Die Deklaration gilt für den TenCate Polyfelt® Vliesstoff und den TenCate Bidim® Vliesstoff der Firma TenCate (Geotextilien). Die Produkte werden in Österreich im Werk Linz sowie in Frankreich im Werk Bezons der Firma TenCate Geosynthetics gefertigt. Die zu Grunde liegende EPD stützt sich auf den Hintergrundbericht, der für das deklarierte Produkt erstellt worden ist.
Systemgrenze:
Die Art der EPD nach einbezogenen Phasen des Lebenszyklus entspricht einer Betrachtung von der Wiege bis zum Werkstor mit den Modulen A1-A3, C1-C4 und dem Modul D.

Im Folgenden sind die berücksichtigten Lebenswegabschnitte bzw. Prozessmodule für die Herstellung der TenCate Geotextilien detailliert aufgelistet:

A1-A3:

Produktion der Roh-, Hilfs- und Betriebsstoffe inkl. Transport zum Werk
Produktion der Verpackungsmaterialien für das Endprodukt inkl. Transport zum Werk
Wasser- und Wasserdampfverbrauch
Energiebereitstellung für die Produktion
Interne Transporte (innerhalb eines Firmenstandorts, sowie zwischen Produktionsstandorten der Firma TenCate)
Produktion der Verpackungsmaterialien der Rohstoffe inklusive Transport zur Verwertung mit anschließender Verwertung
Transport der Produktionsabfälle zum Ort der Verwertung inklusive Verwertung

C1 – C4:

Rückbau des Geokunststoffes mittels Bagger
Transport zum Ort der Verwertung
Deponierung
Das Modul Abfallbehandlung (C3) ist nicht relevant, da die Geokunststoffe keiner Abfallbehandlung unterzogen werden.

D:

Wiederverwendungs- Rückgewinnungs- und Recyclingpotential

## Data sources
- GaBi Database (all versions)
- GaBi database SP40 2020
