# Sarnafil TG 76 Felt PS

Dataset: ILCD process, EPD, specific dataset
Geography: DE
Reference year: 2020
Valid until: 2025
Classification: OEKOBAU.DAT: Kunststoffe / Dachbahnen / TPO-Dachbahnen (FPO)
Classification: IBUCategories: 02 Bauprodukte / Abdichtungen / Dach- und Dichtungsbahnsysteme aus Kunststoffen und Elastomeren
Method details: Dach- und Dichtungsbahnsysteme aus Kunststoffen und Elastomeren.pdf
Generated by: Sika Services AG
Registration number: EPD-SIK-20190170-IBA1-DE
Owner: Sika Deutschland GmbH
Compliance: DIN EN 15804; ISO 14025
Review: Accredited third party review by Institut Bauen und Umwelt e. V.
Amounts: rows without a unit in brackets have none in this file; such an amount is in the reference unit of its flow, which a separate flow dataset defines
copyright: true
licenseType: Free of charge for all users and uses
accessRestrictions: None

## General comment
Sarnafil® TG 76 Felt PS Kunststoffabdichtungsbahnen bestehen aus flexiblen Polyolefinen (FPO) und werden zusätzlich mit UV-Lichtschutzmittel, Flammschutz-mittel und einer unterseitigen Kaschierung aus Glas-polyestermischvlies ausgerüstet. Sie sind jeweils mit einer innenliegenden Einlage aus Glasvlies versehen. Die unterseitige Glaspolyestermischvlieskaschierung dient als Haftbrücke und Ausgleichslage für die direkte flächige Verklebung auf Wärmedämmung aus expan-diertem Polystyrol (EPS) und Polyurethan (PU).

Die Sarnafil® TG 76 Felt PS Kunststoffabdichtungs-bahnen sind in den Dicken 1,5 mm (TG 76-15 Felt PS), 1,8 mm (TG 76-18 Felt PS) und 2,0 mm (TG 76-20 Felt PS) erhältlich.

## Technology and included processes
Der Herstellungsprozess der Sarnafil® TG 76 Felt PS Kunststoffabdichtungsbahnen verläuft auf eigens entwickelten Produktionsanlagen in folgenden Schritten: Aufschmelzen der Kunststoffkomponenten sowie ihrer Additive in ExtrudernDispergieren der aufgeschmolzenen MaterialienAufbringen der Schichten auf den Träger bzw. die Armierung, so dass eine homogene Einbettung erfolgtAufbringen der unterseitigen VlieskaschierungKühlen der KunststoffabdichtungsbahnAufwickeln der Kunststoffabdichtungsbahn auf Rollenkerne aus AltpapierkartonageVerpacken der einzelnen Rollen mit einer PE-Folie Das Werk Sarnen verfügt seit 1993 über ein zertifizier-tes Qualitätsmanagementsystem nach /ISO 9001/.
Deklarierte Einheit:
Diese Deklaration bezieht sich auf 1 m2 verlegte Sarnafil® TG 76 Felt PS Kunststoffabdichtungsbahn mit der Dicke 2,0 mm.

Für andere Dicken wird in Kapitel 5 eine Formel zur eigenständigen Berechnung der Werte angegeben.

## Technical purpose
Sarnafil® TG 76 Felt PS Kunststoffabdichtungsbahnen dienen hauptsächlich der Abdichtung von Flach-dächern. Die Dachbahnen können auf Dächern ohne Auflast bis zu einer Dachneigung < 20° flächig verklebt werden. Für die Verklebung werden vom Hersteller die Sika Klebstoffe Sarnacol® 2142 S empfohlen. Die Ver-legung auf Dächern mit Kiesauflast und Begrünung ist ebenfalls möglich.

## Reference product
- 1 m² Dachbahn (): 1

## Inputs
- Erneuerbare Primärenergie als Energieträger (PERE) [MJ]: A1-A3 9.22, A4 0.0862, A5 1.13, C1 0, C2 0.00704, C3 0.17, C4 0, D -17.8
- Erneuerbare Primärenergie zur stofflichen Nutzung (PERM) [MJ]: A1-A3 1.99, A4 0, A5 -0.159, C1 0, C2 0, C3 0, C4 0, D 0
- Total erneuerbare Primärenergie (PERT) [MJ]: A1-A3 11.2, A4 0.0862, A5 0.971, C1 0, C2 0.00704, C3 0.17, C4 0, D -17.8
- Nicht-erneuerbare Primärenergie als Energieträger (PENRE) [MJ]: A1-A3 52.1, A4 1.42, A5 4.46, C1 0, C2 0.121, C3 68.3, C4 0, D -57.2
- Nicht-erneuerbare Primärenergie zur stofflichen Nutzung (PENRM) [MJ]: A1-A3 63.7, A4 0, A5 5.07, C1 0, C2 0, C3 -67.4, C4 0, D 0
- Total nicht erneuerbare Primärenergie (PENRT) [MJ]: A1-A3 116, A4 1.42, A5 9.53, C1 0, C2 0.121, C3 0.957, C4 0, D -57.2
- Einsatz von Sekundärstoffen (SM) [kg]: A1-A3 0.0569, A4 0, A5 0.00455, C1 0, C2 0, C3 0, C4 0, D 0
- Erneuerbare Sekundärbrennstoffe (RSF) [MJ]: A1-A3 1.94e-21, A4 0, A5 1.56e-22, C1 0, C2 0, C3 0, C4 0, D 0
- Nicht erneuerbare Sekundärbrennstoffe (NRSF) [MJ]: A1-A3 2.29e-20, A4 0, A5 1.83e-21, C1 0, C2 0, C3 0, C4 0, D 0
- Einsatz von Süßwasserressourcen (FW) [m^3]: A1-A3 0.0191, A4 9.91e-5, A5 0.00205, C1 0, C2 1.19e-5, C3 0.0165, C4 0, D -0.0186

## Outputs
- Gefährlicher Abfall zur Deponie (HWD) [kg]: A1-A3 2.43e-6, A4 8.06e-8, A5 2.01e-7, C1 0, C2 6.78e-9, C3 7.62e-10, C4 0, D -2.47e-8
- Entsorgter nicht gefährlicher Abfall (NHWD) [kg]: A1-A3 0.512, A4 9.54e-5, A5 0.043, C1 0, C2 9.86e-6, C3 0.0303, C4 0, D -0.0394
- Entsorgter radioaktiver Abfall (RWD) [kg]: A1-A3 0.00253, A4 1.69e-6, A5 0.000215, C1 0, C2 1.65e-7, C3 6.13e-5, C4 0, D -0.00666
- Komponenten für die Wiederverwendung (CRU) [kg]: A1-A3 0, A4 0, A5 0, C1 0, C2 0, C3 0, C4 0, D 0
- Stoffe zum Recycling (MFR) [kg]: A1-A3 0, A4 0, A5 0, C1 0, C2 0, C3 0, C4 0, D 0
- Stoffe für die Energierückgewinnung (MER) [kg]: A1-A3 0, A4 0, A5 0, C1 0, C2 0, C3 0, C4 0, D 0
- Exportierte elektrische Energie (EEE) [MJ]: A1-A3 0, A4 0, A5 0.411, C1 0, C2 0, C3 16.7, C4 0, D 0
- Exportierte thermische Energie (EET) [MJ]: A1-A3 0, A4 0, A5 0.733, C1 0, C2 0, C3 29.7, C4 0, D 0

## Impact indicators
- Globales Erwärmungspotenzial (GWP) [kg CO_(2)-Äq.]: A1-A3 3.48, A4 0.106, A5 0.505, C1 0, C2 0.00893, C3 7.64, C4 0, D -2.76
- Abbau Potential der stratosphärischen Ozonschicht (ODP) [kg CFC11-Äq.]: A1-A3 6.18e-9, A4 3.61e-17, A5 4.94e-10, C1 0, C2 1.47e-18, C3 7.09e-16, C4 0, D -2.4e-9
- Versauerungspotenzial von Boden und Wasser (AP) [kg SO_(2)-Äq.]: A1-A3 0.00972, A4 0.000234, A5 0.000832, C1 0, C2 2.08e-5, C3 0.000492, C4 0, D -0.0039
- Eutrophierungspotenzial (EP) [kg PO_(4)^(3)-Äq.]: A1-A3 0.00115, A4 5.85e-5, A5 0.000103, C1 0, C2 5.2e-6, C3 0.000104, C4 0, D -0.000418
- Bildungspotential für troposphärisches Ozon (POCP) [kg Ethen-Äq.]: A1-A3 0.001, A4 -8.32e-5, A5 7.53e-5, C1 0, C2 -6.94e-6, C3 5.04e-5, C4 0, D -0.000417
- Potenzial für den abiotischen Abbau nicht fossiler Ressourcen (ADPE) [kg Sb-Äq.]: A1-A3 1.88e-5, A4 1e-8, A5 1.51e-6, C1 0, C2 6.87e-10, C3 4.18e-8, C4 0, D -7.44e-7
- Potenzial für den abiotischen Abbau fossiler Brennstoffe (ADPF) [MJ]: A1-A3 109, A4 1.41, A5 8.98, C1 0, C2 0.121, C3 0.802, C4 0, D -40

## Use advice
Gültigkeitsbereich:
Dieses Dokument bezieht sich auf die von der Sika AG in CH-6060 Sarnen (Schweiz) hergestellten Sarnafil® TG 76 Felt PS Kunststoffabdichtungsbahnen in den Dicken 1,5, 1,8 und 2,0 mm.

Die EPD umfasst die Produktion der Dachbahn, den Transport des Produkts zur Baustelle, die Installation der Dachbahn, die Entsorgung sowie Potenziale und Lasten außerhalb der Systemgrenze. Das Modell wurde auf Basis der Produktionsdaten aus dem Jahr 2018 von der Sika Services AG für die Dicke 2,0 mm modelliert.
Systemgrenze:
Typ der EPD: Wiege bis Werkstor - mit Optionen

Die Systemgrenze der EPD folgt dem modularen Auf-bau gemäß EN 15804. In der Ökobilanz werden die folgenden Module berücksichtigt:

A1–A3: Gewinnung, Verarbeitung und Transport von Rohstoffen (u.a. Polymere, Pigmente, Verar-beitungshilfsmittel, Stabilisatoren, Füllstoffe, Flammschutzmittel und Trägermaterialien), die für die Herstellung der Vorprodukte und der Dach-bahnen verwendet werden sowie der Verpack-ungsmaterialien, die zum Verpacken der Dach-bahnen verwendet werden, wie z. B. Holzpalet-ten, Karton und PE-Folie, zum Werk. Abfallverarbeitung von Produktionsabfällen (Randbeschnitt), die bei der Herstellung der Dachbahnen anfallen.
A4: Transport der Kunststoffabdichtungs-bahnen zur Baustelle
A5: Einbau der Kunststoffabdichtungsbahnen ins Gebäude mittels Heißluftschweißen (inkl. Schweißenergie und Wasserverbrauch), Entsorgung bzw. stoffliches Recycling von Verpackung und Verschnitt der Dachbahn
C1: Manueller Rückbau der Dachabdichtung
C2: Transport der rückgebauten Abdichtungs-bahnen zur Abfallbewirtschaftung
C3: Abfallverarbeitung der rückgebauten Abdichtungsbahnen über thermische Verwertung
C4: Abfallentsorgung der rückgebauten Abdichtungsbahnen auf Deponien
D: Wiederverwendungs-, Rückgewinnungs- und Recyclingpotenziale (aus der thermi-schen Verwertung der Kunststoffabdichtungs-bahnen sowie der Wiederverwendung der Holzpaletten)

## Data sources
- GaBi Database (all versions)
- GaBi database SP39 2019
