# Pulverlackierung (Industrie, Außenbereich, weiß); 1 kg

Dataset: ILCD process, EPD, generic dataset
Geography: DE
Reference year: 2018
Valid until: 2022
Classification: oekobau.dat: Beschichtungen / Lacke und Lasuren / Lacksysteme Metall
Owner: thinkstep
Compliance: DIN EN 15804
Review: Dependent internal review by thinkstep, IABP-GaBi, IBP-GaBi; Independent external review by GaBi user forum, GaBi bug forum, GaBi user community
Amounts: rows without a unit in brackets have none in this file; such an amount is in the reference unit of its flow, which a separate flow dataset defines
copyright: true

## General comment
Dieser Datensatz wurde nach dem European Standard EN 15804 für Nachhaltiges Bauen modelliert. Ergebnisse werden in Modulen abgebildet, die den strukturierten Ausdruck von Ergebnissen über den gesamten Lebenszyklus zulassen.

## Geography
Der Datensatz bildet die länderspezifische Situation in Deutschland ab. Dabei werden Haupttechnologien, spezifische regionale Charakteristiken und ggf. Importstatistiken berücksichtigt.

## Time period
Jährlicher Durchschnitt

## Technology and included processes
Pulverbeschichtung ist in der industriellen Metallbeschichtung weit verbreitet, mit einem großen Markt vertreten durch die Bauindustrie, sowohl für die Außen- als auch für die Innen-Anwendung. Aufgrund ihrer hervorragenden Witterungsbeständigkeit und robusten Oberfläche können Pulverlacke auch für die Färbung von Metallfassaden, Platten und Profilen eingesetzt werden. Typische Bestandteile einer Pulverbeschichtung sind Bindemittel, Pigmente, Zusatzstoffe/Additive und in manchen Fällen Streckmittel, wobei Bindemittel die wichtigsten Komponenten darstellen. Im Fall von Außenanwendung basieren Bindemittel vorwiegend auf Polyesterharzen. Duroplastische/Wärmehärtende Pulverschichten werden vor allem wegen ihrer Anwendbarkeit und Flexibilität durch Extruderverfahren hergestellt. Die Produktion umfasst die folgenden Schritte: Nach genauem Wiegen werden Bindemittel, Härtemittel und Zusatzstoffe/Additive über einen Containermischer (Mixer) zugeführt und für eine temperaturgeregelte Extruder bzw. eine Knetmaschine ausgemessen. Danach wird die Masse gewalzt und gleichzeitig gekühlt, gefolgt vom Zerkleinerungs- und Pulverisierungsprozess mittels Druckluft in einer Klassierungsmühle/Sichtermühle, bis zu einem definierten Pulverspektrum. In einem Zyklon wird die Korngröße klassifiziert und am Ende das gewonnene Pulver in einer Senke zu einer Abfüllanlage geleitet.

Hintergrundsystem:
Strom: Die Stromerzeugung wird entsprechend der länderspezifischen Randbedingungen modelliert. Die landesspezifische Analyse beinhaltet:
1.: Spezifische Kraftwerke der verschiedenen fossilen Energieträger und der Einsatz erneuerbarer Energien sind entsprechend der länderspezifischen Energieträgermixe modelliert. Die Analyse bezieht Stromimporte aus den Nachbarländern, Transmissions-und Verteilungsverluste und den Eigenverbrauch im Kraftwerk und bei der Verteilung bzw. Speicherung, z. B. durch Pumpspeicherwerke, ein.
2.: Die landes-/regionalspezifischen Technologiestandards sowie die Erzeugung in Elektrizitätskraftwerken und/oder in speziellen Kraftwerken mit Kraft-Wärme-Kopplung (KWK) sind berücksichtigt.
3.: Die länderspezifische Energieträgerbereitstellung (mit Anteil der Importe und/oder Eigenversorgung) einschließlich der Energieträger-Eigenschaften (z. B. Elementar- und Energiegehalte) werden berücksichtigt.
4.: Die Förderung, Produktion, Verarbeitung und Transportprozesse werden entsprechend der Situation im jeweiligen Stromerzeugerland modelliert. Die unterschiedlichen Produktions- und Verarbeitungsverfahren (Emissionen und Wirkungsgrade) in den verschiedenen Energieerzeugerländern werden einbezogen, z. B. Rohöl-Veredelungsverfahren oder Abfackel-Raten an den Ölplattformen.
Thermische Energie, Prozessdampf: Die Erzeugung von Dampf und thermischer Energie in Heizkraftwerken wird entsprechend der landesspezifischen Situation (Emissionsgrenzwerte, Energieträgerbasis) modelliert.
Der Wirkungsgrad für die thermische Energieerzeugung beträgt per Definition 100% des Energieträgereinsatzes. Für Prozessdampf liegt der Wirkungsgrad im Bereich von 85-95%. Die zur Heizenergie-Erzeugung verwendeten Energieträger werden entsprechend der nationalen Situation modelliert (siehe Kapitel Strom oben).
Transporte: Alle relevanten und bekannten Transportprozesse in Form von See- und Binnenschiffsverkehr sowie Bahn-, Lkw- und der Leitungstransport sind enthalten.
Energieträger: Die Energieträger werden entsprechend der spezifischen Versorgungslage modelliert (siehe Kapitel Strom oben).
Raffinerieprodukte: Diesel, Benzin, technische Gase, Heizöl, Schmierstoffe und Rückstände, wie Bitumen, werden mit einem parametrierten länderspezifische Raffineriemodell modelliert. Das Raffinerie-Modell bezieht die länderspezifischen Veredelungsverfahren (z. B. Emissionspegel, interner Energieverbrauch etc.) und das länderspezifische Produktspektrum ein, das sich je nach Land stark unterscheiden kann. Die Rohöl-Förderung wird gemäß der länderspezifischen Situation mit den jeweiligen Energieträger-Eigenschaften modelliert.

## Technical purpose
Dieses Produkt kann im Baubereich verwendet werden.

## Safety margin
10 %. Produktsystem weitgehend vollständig abgebildet. Gute technologische, zeitliche und geographische Repräsentativität.

## Reference product
- Pulverlackierung: 1

## Inputs
- Erneuerbare Primärenergie als Energieträger (PERE) [MJ]: A1-A3 8.13205, C1 0, C2 0.0019976, C3 0.216339, D -1.25764
- Erneuerbare Primärenergie zur stofflichen Nutzung (PERM) [MJ]: A1-A3 0, C1 0, C2 0, C3 0, D 0
- Total erneuerbare Primärenergie (PERT) [MJ]: A1-A3 8.13205, C1 0, C2 0.0019976, C3 0.216339, D -1.25764
- Nicht-erneuerbare Primärenergie als Energieträger (PENRE) [MJ]: A1-A3 78.9003, C1 0, C2 0.0343136, C3 11.8217, D -4.74195
- Nicht-erneuerbare Primärenergie zur stofflichen Nutzung (PENRM) [MJ]: A1-A3 11, C1 0, C2 0, C3 -11, D 0
- Total nicht erneuerbare Primärenergie (PENRT) [MJ]: A1-A3 89.9003, C1 0, C2 0.0343136, C3 0.821692, D -4.74195
- Einsatz von Sekundärstoffen (SM) [kg]: A1-A3 0, C1 0, C2 0, C3 0, D 0
- Erneuerbare Sekundärbrennstoffe (RSF) [MJ]: A1-A3 0, C1 0, C2 0, C3 0, D 0
- Nicht erneuerbare Sekundärbrennstoffe (NRSF) [MJ]: A1-A3 0, C1 0, C2 0, C3 0, D 0
- Einsatz von Süßwasserressourcen (FW) [m3]: A1-A3 0.0211782, C1 0, C2 1.78902e-6, C3 0.00471995, D -0.000587358

## Outputs
- Gefährlicher Abfall zur Deponie (HWD) [kg]: A1-A3 5.01962e-8, C1 0, C2 1.28226e-9, C3 4.98542e-9, D -2.4668e-9
- Entsorgter nicht gefährlicher Abfall (NHWD) [kg]: A1-A3 0.0648163, C1 0, C2 6.02263e-6, C3 0.129894, D -0.00215242
- Entsorgter radioaktiver Abfall (RWD) [kg]: A1-A3 0.00136672, C1 0, C2 3.61252e-8, C3 3.05472e-5, D -0.000151912
- Komponenten für die Wiederverwendung (CRU) [kg]: A1-A3 0, C1 0, C2 0, C3 0, D 0
- Stoffe zum Recycling (MFR) [kg]: A1-A3 0, C1 0, C2 0, C3 0, D 0
- Stoffe für die Energierückgewinnung (MER) [kg]: A1-A3 0, C1 1.1, C2 0, C3 0, D 0
- Exportierte elektrische Energie (EEE) [MJ]: A1-A3 0, C1 0, C2 0, C3 1.10488, D 0
- Exportierte thermische Energie (EET) [MJ]: A1-A3 0, C1 0, C2 0, C3 2.89417, D 0

## Impact indicators
- Globales Erwärmungspotenzial (GWP) [kg CO2 Äquiv.]: A1-A3 4.73516, C1 0, C2 0.00255297, C3 1.04568, D -0.321226
- Abbaupotenzial der stratosphärischen Ozonschicht (ODP) [kg R11 Äquiv.]: A1-A3 4.23497e-14, C1 0, C2 8.45044e-19, C3 1.19318e-15, D -6.95174e-15
- Versauerungspotential (AP) [kg SO2 Äquiv.]: A1-A3 0.00690861, C1 0, C2 5.15673e-6, C3 0.000196665, D -0.000264345
- Eutrophierungspotential (EP) [kg Phosphat Äquiv.]: A1-A3 0.00103287, C1 0, C2 1.2259e-6, C3 4.61625e-5, D -4.98741e-5
- Bildungspotenzial für troposphärisches Ozon (POCP) [kg Ethen Äquiv.]: A1-A3 0.00257931, C1 0, C2 -1.6854e-6, C3 1.69733e-5, D -2.73826e-5
- Potenzial für den abiotischen Abbau nicht fossiler Ressourcen (ADPE) [kg Sb Äquiv.]: A1-A3 6.07739e-7, C1 0, C2 2.14835e-10, C3 1.28464e-8, D -7.58483e-8
- Potenzial für den abiotischen Abbau fossiler Brennstoffe (ADPF) [MJ]: A1-A3 86.4535, C1 0, C2 0.0342213, C3 0.74458, D -4.35845

## Use advice
Der Datensatz repräsentiert ein Cradle to Gate Inventar. Er kann verwendet werden, um die Lieferkette des jeweiligen Produktes in einer repräsentativen Weise zu charakterisieren. Die Kombination mit einzelnen Einheitenprozessen und diesem Produkt ermöglicht die Erstellung von anwenderspezifischen (Produkt-) LCAs.

## Data sources
- GaBi Database Edition 2020, SP40
- GaBi database (all versions)
- Lackformulierung und Lackrezeptur
- Lackrohstoffkunde
- Farben und Lacke
- BASF Handbuch Lackiertechnik
