# Lehmbauplatte

Dataset: ILCD process, EPD, generic dataset
Geography: DE
Reference year: 2021
Valid until: 2022
Classification: oekobau.dat: Mineralische Baustoffe / Steine und Elemente / Lehmsteine
Owner: Sphera Solutions GmbH
Compliance: EN 15804+A2
Review: Dependent internal review by Sphera Solutions GmbH; Independent external review by GaBi user forum
Amounts: rows without a unit in brackets have none in this file; such an amount is in the reference unit of its flow, which a separate flow dataset defines
copyright: true
licenseType: Free of charge for all users and uses
accessRestrictions: The license conditions as stated on https://www.oekobaudat.de/ apply.
accessRestrictions: Es gelten die Lizenzbedingungen wie sie auf https://www.oekobaudat.de/ genannt sind.

## General comment
Dieser Datensatz wurde nach dem European Standard EN 15804+A2 für Nachhaltiges Bauen modelliert. Ergebnisse werden in Modulen abgebildet, die den strukturierten Ausdruck von Ergebnissen über den gesamten Lebenszyklus zulassen.

## Geography
Der Datensatz bildet die länderspezifische Situation in Deutschland ab. Dabei werden Haupttechnologien, spezifische regionale Charakteristiken und ggf. Importstatistiken berücksichtigt.

## Time period
Jährlicher Durchschnitt

## Technology and included processes
Für die Herstellung der Lehmbauplatten werden die Rohstoffe Lehm und Sand unter Zugabe von Wasser gemischt. Zur Bewehrung werden Schilfrohrmatten eingesetzt und beidseitig Jutegewebe (auf den Oberseiten) eingebracht. Nach dem Formen findet eine technische Trocknung statt (hier unter Verwendung von thermischer Energie aus Erdgas). Dieser Energieeinsatz dominiert auch die Ökobilanzergebnisse. Die Einbindung von CO2 durch Photosynthese beim Schilf- und Jutewachstums ist berücksichtigt. Es ist zu beachten, dass das eingebundene CO2 am Ende des Lebensweges wieder frei wird (z.B. nach thermischer Behandlung oder Verrottung).

In der Entsorgungsphase wird in Modul C1 für Putze, Mörtel und Bauplatten aus Lehm ein manueller Rückbau, für Stapflehmwände und Lehmmauerwerk ein maschineller Rückbau berücksichtigt.
Der Transport in Modul C2 zur Aufbereitungsanlage erfolgt mit einem LKW (50km).
In Modul C3 wird eine Aufbereitung des Lehmprodukts bilanziert, wobei 3% Material verloren gehen.
In Modul D erfolgt eine Gutschrift für die Netto-Materialmenge (zurückgebaute Menge abzüglich Aufbereitungsverluste, inkl. eventueller Faserbewehrungen) für die Substitution von Lehmpulver.

## Technical purpose
Lehmbauplatten werden im Innenraum als Wand, oder Deckenbauplatte eingesetzt. Je nach Untergrund können die Platten geklebt, geklammert oder geschraubt werden. Hohe Feuchteaufnahme- und abgabefähigkeit.

## Safety margin
20 %. Produktsystem bis auf wenige Prozesse/Flüsse abgebildet. Technologische, zeitliche und geographische Repräsentativität teilweise gegeben.

## Reference product
- Lehmbauplatte: 1

## Inputs
- Erneuerbare Primärenergie als Energieträger (PERE) [MJ]: A1-A3 24.0578, C2 0.0306063, C3 0.0747449, D -0.013738
- Erneuerbare Primärenergie zur stofflichen Nutzung (PERM) [MJ]: A1-A3 0, C2 0, C3 0, D 0
- Total erneuerbare Primärenergie (PERT) [MJ]: A1-A3 24.0578, C2 0.0306063, C3 0.0747449, D -0.013738
- Nicht-erneuerbare Primärenergie als Energieträger (PENRE) [MJ]: A1-A3 34.5366, C2 0.527348, C3 0.845888, D -0.236706
- Nicht-erneuerbare Primärenergie zur stofflichen Nutzung (PENRM) [MJ]: A1-A3 0, C2 0, C3 0, D 0
- Total nicht-erneuerbare Primärenergie (PENRT) [MJ]: A1-A3 34.5366, C2 0.527348, C3 0.845888, D -0.236706
- Einsatz von Sekundärstoffen (SM) [kg]: A1-A3 0, C2 0, C3 0, D 0
- Erneuerbare Sekundärbrennstoffe (SF) [MJ]: A1-A3 0, C2 0, C3 0, D 0
- Nicht erneuerbare Sekundärbrennstoffe (NRSF) [MJ]: A1-A3 0, C2 0, C3 0, D 0
- Nettoeinsatz von Süßwasserressourcen (FW) [m3]: A1-A3 0.0237186, C2 2.72014e-5, C3 0.000219349, D -1.22096e-5

## Outputs
- Gefährlicher Abfall zur Deponie (HWD) [kg]: A1-A3 8.1887e-9, C2 2.20414e-11, C3 4.91336e-11, D -9.89354e-12
- Entsorgter nicht gefährlicher Abfall (NHWD) [kg]: A1-A3 0.0131476, C2 8.51259e-5, C3 0.000243594, D -3.82097e-5
- Entsorgter radioaktiver Abfall (RWD) [kg]: A1-A3 0.000163331, C2 5.06059e-7, C3 6.22762e-6, D -2.2715e-7
- Komponenten für die Wiederverwendung (CRU) [kg]: A1-A3 0, C2 0, C3 0, D 0
- Stoffe zum Recycling (MFR) [kg]: A1-A3 0, C2 0, C3 13.579, D 0
- Stoffe für die Energierückgewinnung (MER) [kg]: A1-A3 0, C2 0, C3 0, D 0
- Exportierte elektrische Energie (EEE) [MJ]: A1-A3 0, C2 0, C3 0, D 0
- Exportierte thermische Energie (EET) [MJ]: A1-A3 0, C2 0, C3 0, D 0

## Impact indicators
- Globales Erwärmungspotenzial - total (GWP-total) [kg CO2 eq.]: A1-A3 0.545377, C2 0.0400562, C3 1.81518, D -0.0177037
- Globales Erwärmungspotenzial - fossil (GWP-fossil) [kg CO2 eq.]: A1-A3 2.23684, C2 0.0397843, C3 0.0448392, D -0.0175835
- Globales Erwärmungspotenzial - biogen (GWP-biogenic) [kg CO2 eq.]: A1-A3 -1.76907, C2 1.64802e-5, C3 1.7701, D -5.55901e-6
- Globales Erwärmungspotenzial - luluc (GWP-luluc) [kg CO2 eq.]: A1-A3 0.0776113, C2 0.000255505, C3 0.000245592, D -0.000114686
- Abbaupotenzial der stratosphärischen Ozonschicht (ODP) [kg CFC-11 eq.]: A1-A3 5.88853e-15, C2 1.01798e-17, C3 1.99946e-16, D -4.5693e-18
- Versauerungspotenzial, kumulierte Überschreitung (AP) [Mole of H+ eq.]: A1-A3 0.00706563, C2 0.000112797, C3 0.000417873, D -0.000197487
- Eutrophierungspotenzial - Süßwasser (EP-freshwater) [kg P eq.]: A1-A3 9.95659e-5, C2 8.18209e-8, C3 1.0211e-7, D -3.67262e-8
- Eutrophierungspotenzial - Salzwasser (EP-marine) [kg N eq.]: A1-A3 0.00229986, C2 5.19634e-5, C3 0.000206714, D -0.000100613
- Eutrophierungspotenzial - Land (EP-terrestrial) [Mole of N eq.]: A1-A3 0.0213757, C2 0.000581376, C3 0.00227173, D -0.00110657
- Bildungspotenzial für troposphärisches Ozon (POCP) [kg NMVOC eq.]: A1-A3 0.00494151, C2 0.00010133, C3 0.000600852, D -0.000291198
- Potenzial für die Verknappung abiotischer Ressourcen nicht fossile Ressourcen (ADPE) [kg Sb eq.]: A1-A3 2.07354e-7, C2 3.46068e-9, C3 4.94133e-8, D -1.55336e-9
- Potenzial für die Verknappung abiotischer Ressourcen fossile Brennstoffe (ADPF) [MJ]: A1-A3 34.5329, C2 0.527326, C3 0.845837, D -0.236696
- Wasser-Entzugspotenzial (Benutzer) (WDP) [m³ world equiv.]: A1-A3 0.159531, C2 0.000154655, C3 0.00753045, D -6.94187e-5

## Use advice
Dieser Datensatz bezieht sich auf die Herstellung von 1 m² Lehmbauplatte mit einer Dicke von 2 cm. Die Rohdichte beträgt 700 kg/m³. Die Wärmeleitfähigkeit beträgt 0,12 - 0,14 W/mK.

Der Datensatz repräsentiert ein Cradle to Gate Inventar. Er kann verwendet werden, um die Lieferkette des jeweiligen Produktes in einer repräsentativen Weise zu charakterisieren. Die Kombination mit einzelnen Einheitenprozessen und diesem Produkt ermöglicht die Erstellung von anwenderspezifischen (Produkt-) LCAs

## Data sources
- GaBi databases
- Documentation of data quality management
- GaBi Database Edition 2021, CUP2021.01
- GaBi database (all versions)
