# ECB Kunststoff-Dachbahn nach DIN 16729 (mit PES Vlies)

Dataset: ILCD process, EPD, generic dataset
Geography: DE
Reference year: 2021
Valid until: 2022
Classification: oekobau.dat: Kunststoffe / Dachbahnen / ECB-Dachbahnen (Ethylen-Copolymer-Bitumen)
Owner: Sphera Solutions GmbH
Compliance: EN 15804+A2
Review: Dependent internal review by Sphera Solutions GmbH; Independent external review by GaBi user forum
Amounts: rows without a unit in brackets have none in this file; such an amount is in the reference unit of its flow, which a separate flow dataset defines
copyright: true
licenseType: Free of charge for all users and uses
accessRestrictions: The license conditions as stated on https://www.oekobaudat.de/ apply.
accessRestrictions: Es gelten die Lizenzbedingungen wie sie auf https://www.oekobaudat.de/ genannt sind.

## General comment
Dieser Datensatz wurde nach dem European Standard EN 15804+A2 für Nachhaltiges Bauen modelliert. Ergebnisse werden in Modulen abgebildet, die den strukturierten Ausdruck von Ergebnissen über den gesamten Lebenszyklus zulassen.

## Geography
Der Datensatz bildet die länderspezifische Situation in Deutschland ab. Dabei werden Haupttechnologien, spezifische regionale Charakteristiken und ggf. Importstatistiken berücksichtigt.

## Time period
Jährlicher Durchschnitt

## Technology and included processes
Im Hintergrundsystem der ECB Dachbahn wurde eine Glasfaserverstärkung, ein PES-Vlies sowie eine Transportverpackung berücksichtigt. Die Bahnen werden über einen Extrusionsprozess hergestellt. Die Vorkette der ECB Herstellung dominiert dabei die Ökobilanz.

In Modul C1 wird ein manueller Rückbau (lastenfrei) angenommen. Sammelverluste werden vernachlässigt.
Der Transport in Modul C2 zur Verwertungsanlage erfolgt mit einem LKW (50km).
In Modul C3 wird die Zerkleinerung und thermische Behandlung (Verbrennung) des Materials berücksichtigt. Bei der Berechnung der Verbrennungsemissionen und Gutschriften wird der spezifische Heizwert des jeweiligen Materials sowie die Materialzusammensetzung berücksichtigt.
In Modul D erfolgen Gutschriften für die Substitution von Strom (deutscher Strommix) und thermischer Energie (aus Erdgas).

## Technical purpose
ECB Dachbahnen werden als Dach- und Abdichtungsbahn eingesetzt. Die Verlegung kann lose, beschwert oder mechanisch befestigt erfolgen. Die Polyestervlieskaschierung sorgt dafür, dass die Bahn auf anderen Werkstoffen verklebt oder auf rauen Oberflächen verlegt werden kann. Die Galsfaserverstärkung sorgt für eine höhere mechanische Stabilität.

## Safety margin
20 %. Produktsystem bis auf wenige Prozesse/Flüsse abgebildet. Technologische, zeitliche und geographische Repräsentativität teilweise gegeben.

## Reference product
- ECB Kunststoff-Dachbahn nach DIN 16729 (mit PES Vlies): 1

## Inputs
- Erneuerbare Primärenergie als Energieträger (PERE) [MJ]: A1-A3 21.0276, C2 0.0050719, C3 0.958652, D -13.6327
- Erneuerbare Primärenergie zur stofflichen Nutzung (PERM) [MJ]: A1-A3 0, C2 0, C3 0, D 0
- Total erneuerbare Primärenergie (PERT) [MJ]: A1-A3 21.0276, C2 0.0050719, C3 0.958652, D -13.6327
- Nicht-erneuerbare Primärenergie als Energieträger (PENRE) [MJ]: A1-A3 119.83, C2 0.087389, C3 103.533, D -40.3205
- Nicht-erneuerbare Primärenergie zur stofflichen Nutzung (PENRM) [MJ]: A1-A3 83.5, C2 0, C3 -83.5, D 0
- Total nicht-erneuerbare Primärenergie (PENRT) [MJ]: A1-A3 203.33, C2 0.087389, C3 20.0333, D -40.3205
- Einsatz von Sekundärstoffen (SM) [kg]: A1-A3 0, C2 0, C3 0, D 0
- Erneuerbare Sekundärbrennstoffe (SF) [MJ]: A1-A3 0, C2 0, C3 0, D 0
- Nicht erneuerbare Sekundärbrennstoffe (NRSF) [MJ]: A1-A3 0, C2 0, C3 0, D 0
- Nettoeinsatz von Süßwasserressourcen (FW) [m3]: A1-A3 0.0285333, C2 4.50765e-6, C3 0.0173018, D -0.00507136

## Outputs
- Gefährlicher Abfall zur Deponie (HWD) [kg]: A1-A3 5.53002e-8, C2 3.65258e-12, C3 7.22692e-10, D -1.3998e-8
- Entsorgter nicht gefährlicher Abfall (NHWD) [kg]: A1-A3 0.0923515, C2 1.41066e-5, C3 0.734995, D -0.0212662
- Entsorgter radioaktiver Abfall (RWD) [kg]: A1-A3 0.00319446, C2 8.38612e-8, C3 0.000116, D -0.00146621
- Komponenten für die Wiederverwendung (CRU) [kg]: A1-A3 0, C2 0, C3 0, D 0
- Stoffe zum Recycling (MFR) [kg]: A1-A3 0, C2 0, C3 0, D 0
- Stoffe für die Energierückgewinnung (MER) [kg]: A1-A3 0, C2 0, C3 2.32, D 0
- Exportierte elektrische Energie (EEE) [MJ]: A1-A3 0, C2 0, C3 10.921, D 0
- Exportierte thermische Energie (EET) [MJ]: A1-A3 0, C2 0, C3 25.0738, D 0

## Impact indicators
- Globales Erwärmungspotenzial - total (GWP-total) [kg CO2 eq.]: A1-A3 7.71403, C2 0.00663789, C3 7.07631, D -2.59471
- Globales Erwärmungspotenzial - fossil (GWP-fossil) [kg CO2 eq.]: A1-A3 7.81622, C2 0.00659282, C3 7.07515, D -2.56333
- Globales Erwärmungspotenzial - biogen (GWP-biogenic) [kg CO2 eq.]: A1-A3 -0.109108, C2 2.73101e-6, C3 0.00072582, D -0.0276181
- Globales Erwärmungspotenzial - luluc (GWP-luluc) [kg CO2 eq.]: A1-A3 0.00691879, C2 4.23409e-5, C3 0.000441276, D -0.00376596
- Abbaupotenzial der stratosphärischen Ozonschicht (ODP) [kg CFC-11 eq.]: A1-A3 5.49798e-12, C2 1.68693e-18, C3 3.88535e-15, D -5.95146e-14
- Versauerungspotenzial, kumulierte Überschreitung (AP) [Mole of H+ eq.]: A1-A3 0.0139004, C2 1.86922e-5, C3 0.00122702, D -0.00263023
- Eutrophierungspotenzial - Süßwasser (EP-freshwater) [kg P eq.]: A1-A3 1.79978e-5, C2 1.35589e-8, C3 5.62839e-7, D -6.26557e-6
- Eutrophierungspotenzial - Salzwasser (EP-marine) [kg N eq.]: A1-A3 0.00333685, C2 8.61108e-6, C3 0.00027681, D -0.000967402
- Eutrophierungspotenzial - Land (EP-terrestrial) [Mole of N eq.]: A1-A3 0.0361753, C2 9.63423e-5, C3 0.00565701, D -0.0103063
- Bildungspotenzial für troposphärisches Ozon (POCP) [kg NMVOC eq.]: A1-A3 0.0123715, C2 1.67918e-5, C3 0.00077079, D -0.00253366
- Potenzial für die Verknappung abiotischer Ressourcen nicht fossile Ressourcen (ADPE) [kg Sb eq.]: A1-A3 1.94564e-6, C2 5.73484e-10, C3 5.27647e-8, D -8.04034e-7
- Potenzial für die Verknappung abiotischer Ressourcen fossile Brennstoffe (ADPF) [MJ]: A1-A3 219.98, C2 0.0873854, C3 3.33249, D -40.3148
- Wasser-Entzugspotenzial (Benutzer) (WDP) [m³ world equiv.]: A1-A3 0.704655, C2 2.56286e-5, C3 0.72357, D -0.0307876

## Use advice
Dieser Datensatz bezieht sich auf 1 m² Kunstsoffdachbahn aus Ethylen-Copolymer-Bitumen (ECB) mit einer Dicke von 2 mm. Es wurde eine Kaschierung mit einem PES-Vlies, sowie eine Glasfaserverstärkung berücksichtigt. Das Flächengewicht ist 2,32 kg/m². Der Datensatz kann näherungsweise für die Abschätzung von Flächengewichten von 1,5 - 3 kg/m², sowie für die Abschätzung von ECB Dachbahnen ohne PES-Vlies verwendet werden.

Der Datensatz repräsentiert ein Cradle to Gate Inventar. Er kann verwendet werden, um die Lieferkette des jeweiligen Produktes in einer repräsentativen Weise zu charakterisieren. Die Kombination mit einzelnen Einheitenprozessen und diesem Produkt ermöglicht die Erstellung von anwenderspezifischen (Produkt-) LCAs

## Data sources
- GaBi databases
- Documentation of data quality management
- GaBi Database Edition 2021, CUP2021.01
- GaBi database (all versions)
