# noraplan® 913

Dataset: ILCD process, EPD, specific dataset
Geography: GLO
Reference year: 2018
Valid until: 2023
Classification: OEKOBAU.DAT: Kunststoffe / Bodenbeläge / Gummi-/Kautschuk-Bodenbeläge
Classification: IBUCategories: 02 Bauprodukte / Bodenbeläge / Bodenbeläge
Method details: Bodenbeläge.pdf
Registration number: EPD-NOR-20180125-IBA1-DE
Owner: nora systems GmbH
Compliance: DIN EN 15804; ISO 14025
Review: Accredited third party review by Institut Bauen und Umwelt e. V.
Amounts: rows without a unit in brackets have none in this file; such an amount is in the reference unit of its flow, which a separate flow dataset defines
copyright: true

## General comment
In dieser Umwelt-Produktdeklaration (EPD) werden
elastische Kautschuk-Bodenbeläge der Produktfamilie
noraplan® 913 der nora systems GmbH abgebildet:

rezepturgleiche Designs und Oberflächenstrukturen.

Besondere Merkmale der noraplan® 913 Beläge sind:
Herstellungsart: kontinuierlich vulkanisierte Kautschukbeläge in Bahnen
Belagsaufbau: einschichtig
Zusammensetzung: Natur- und Synthesekautschuk, Mineralien aus natürlichen Vorkommen, Farbpigmente und Verarbeitungshilfsmittel

## Technology and included processes
Die Produktionsstufen sind Einwiegen, Mischen und Ausziehen der unvulkanisierten Rohlinge auf einem Kalander. Die anschließende Vulkanisation erfolgt kontinuierlich auf Fertigungslinien mit dampfbeheizten Trommel- oder Doppelbandpressen unter hohem Druck bei einer Temperatur von ca. 180°C zu 1,22 m breiten Bahnen. Hinter der Vulkanisationsmaschine werden die Bahnen rückseitig geschliffen und entweder als Rollenware aufgewickelt oder für Fliesenware abgelängt und gestanzt. Das Flächengewicht beträgt 3,36 kg/m². Die nora systems GmbH bezieht ihre gesamte elektrische Energie für Produktion und Verwaltung am Standort Weinheim aus erneuerbaren Energien aus den Ørsted Offshore-Windparks in der dänischen Nord- und Ostsee. Entsprechende Nachweise liegen dem IBU vor. Thermische Energie wird zentral bzw. in Heizkesseln an einzelnen Anlagen über Erdgas erzeugt. Das Qualitäts- und Energiemanagement der nora Systems GmbH ist nach /DIN EN ISO 9001/ bzw. /DIN EN ISO 50001/ zertifiziert.
Technische Daten:
Auszug aus technischen Datenblättern: (abrufbar auf

www.nora.com)
Deklarierte Einheit:
Als Referenzgröße wird 1 m² Bodenbelag betrachtet. Die Werte des Moduls A1-A3 beziehen sich auf 1 m² produziert.

Es handelt sich um eine Produktdeklaration, d.h. die Herstellung und Beseitigung der Verschnitte bei der Installation werden dem Modul A5 zugeordnet. Die Module A1-A3, A4 und A5 beziehen sich gesamt auf 1m² installiert.

Die zur Installation notwendigen Materialien zur Vorbereitung des Untergrunds und Klebung werden nicht berücksichtigt. Für den vollständigen Bodenaufbau können Umweltproduktdeklarationen
nach den PCR „Dispersionsklebstoffe und –voranstriche“ sowie „Mineralische Werkmörtel“ herangezogen werden.

## Technical purpose
Für die Verwendung und Anwendung gelten die jeweiligen nationalen Bestimmungen.

Die Bodenbeläge werden gemäß /DIN EN ISO 10874/
klassifiziert.
Bodenbeläge für starke Beanspruchung im Privat- und

Objektbereich:

## Reference product
- noraplan® 913/ 1 m2: 1

## Inputs
- Erneuerbare Primärenergie als Energieträger (PERE) [MJ]: A1-A3 29.004, A4 0.113, A5 2.13, B2 0.422, C1 0.285, C2 0.00561, C3 12.1615, D -3.25
- Erneuerbare Primärenergie zur stofflichen Nutzung (PERM) [MJ]: A1-A3 12.096, A4 0, A5 0, B2 0, C1 0, C2 0, C3 -12.096, D 0
- Total erneuerbare Primärenergie (PERT) [MJ]: A1-A3 41.1, A4 0.113, A5 2.13, B2 0.422, C1 0.285, C2 0.00561, C3 0.0655, D -3.25
- Nicht-erneuerbare Primärenergie als Energieträger (PENRE) [MJ]: A1-A3 99.104, A4 2.44, A5 6.76, B2 8.09, C1 0.758, C2 0.108, C3 29.291, D -16.8
- Nicht-erneuerbare Primärenergie zur stofflichen Nutzung (PENRM) [MJ]: A1-A3 28.896, A4 0, A5 0, B2 0, C1 0, C2 0, C3 -28.896, D 0
- Total nicht erneuerbare Primärenergie (PENRT) [MJ]: A1-A3 128, A4 2.44, A5 6.76, B2 8.09, C1 0.758, C2 0.108, C3 0.395, D -16.8
- Einsatz von Sekundärstoffen (SM) [kg]: A1-A3 0.0846, A4 0, A5 0, B2 0, C1 0, C2 0, C3 0, D 0
- Erneuerbare Sekundärbrennstoffe (RSF) [MJ]: A1-A3 0, A4 0, A5 0, B2 0, C1 0, C2 0, C3 0, D 0
- Nicht erneuerbare Sekundärbrennstoffe (NRSF) [MJ]: A1-A3 0, A4 0, A5 0, B2 0, C1 0, C2 0, C3 0, D 0
- Einsatz von Süßwasserressourcen (FW) [m^3]: A1-A3 1.11, A4 0.000209, A5 0.0577, B2 0.00209, C1 0.000388, C2 1.03e-5, C3 0.005, D -0.00443

## Outputs
- Gefährlicher Abfall zur Deponie (HWD) [kg]: A1-A3 4.6e-5, A4 1.13e-7, A5 2.38e-6, B2 0.000414, C1 3.56e-10, C2 5.67e-9, C3 1.15e-9, D -6.84e-9
- Entsorgter nicht gefährlicher Abfall (NHWD) [kg]: A1-A3 2.49, A4 0.000175, A5 0.132, B2 0.0278, C1 0.000534, C2 8.64e-6, C3 0.0663, D -0.00721
- Entsorgter radioaktiver Abfall (RWD) [kg]: A1-A3 0.00147, A4 4.84e-6, A5 7.74e-5, B2 0.000222, C1 0.000126, C2 2.25e-7, C3 2.54e-5, D -0.00143
- Komponenten für die Wiederverwendung (CRU) [kg]: A1-A3 0, A4 0, A5 0, B2 0, C1 0, C2 0, C3 0, D 0
- Stoffe zum Recycling (MFR) [kg]: A1-A3 0, A4 0, A5 0.215, B2 0, C1 0, C2 0, C3 0, D 0
- Stoffe für die Energierückgewinnung (MER) [kg]: A1-A3 0, A4 0, A5 0, B2 0, C1 0, C2 0, C3 0, D 0
- Exportierte elektrische Energie (EEE) [MJ]: A1-A3 0, A4 0, A5 0.24, B2 0, C1 0, C2 0, C3 3.85, D 0
- Exportierte thermische Energie (EET) [MJ]: A1-A3 0, A4 0, A5 0.43, B2 0, C1 0, C2 0, C3 6.9, D 0

## Impact indicators
- Globales Erwärmungspotenzial (GWP) [kg CO_(2)-Äq.]: A1-A3 5.87, A4 0.182, A5 0.464, B2 0.399, C1 0.0415, C2 0.00788, C3 2.48, D -0.957
- Abbau Potential der stratosphärischen Ozonschicht (ODP) [kg CFC11-Äq.]: A1-A3 1.9e-8, A4 7.06e-15, A5 9.8e-10, B2 5.07e-11, C1 1.84e-13, C2 3.27e-16, C3 3.64e-14, D -2.1e-12
- Versauerungspotenzial von Boden und Wasser (AP) [kg SO_(2)-Äq.]: A1-A3 0.0328, A4 0.00107, A5 0.00176, B2 0.000941, C1 0.000108, C2 1.73e-5, C3 0.000163, D -0.0015
- Eutrophierungspotenzial (EP) [kg PO_(4)^(3)-Äq.]: A1-A3 0.00593, A4 0.000156, A5 0.000316, B2 0.000189, C1 1.07e-5, C2 4.15e-6, C3 3.46e-5, D -0.000169
- Bildungspotential für troposphärisches Ozon (POCP) [kg Ethen-Äq.]: A1-A3 0.00218, A4 -7.28e-5, A5 0.00011, B2 0.000297, C1 7.38e-6, C2 -5.58e-6, C3 1.56e-5, D -0.000126
- Potenzial für den abiotischen Abbau nicht fossiler Ressourcen (ADPE) [kg Sb-Äq.]: A1-A3 0.000141, A4 1.34e-8, A5 7.3e-6, B2 7.14e-8, C1 2.11e-8, C2 6.42e-10, C3 5.72e-9, D -2.61e-7
- Potenzial für den abiotischen Abbau fossiler Brennstoffe (ADPF) [MJ]: A1-A3 125, A4 2.43, A5 6.59, B2 7.54, C1 0.442, C2 0.107, C3 0.331, D -13.2

## Use advice
Gültigkeitsbereich:
Produktfamilie noraplan® 913

Kontinuierlich in Bahnen vulkanisierte Bodenbeläge
aus Kautschuk in verschiedenen Farben und Designs.
Diese Deklaration ist eine Umweltproduktdeklaration
gemäß ISO 14025 und beschreibt die spezifische
Umweltleistung der hier genannten Bauprodukte in
Deutschland am Produktionsstandort Weinheim
(Bergstrasse).
Systemgrenze:
Typ der EPD: von der Wiege bis zum Fabriktor mit Optionen

Die ökobilanzielle Berechnung umfasst folgende
Phasen:

Herstellungsphase A1-A3: Berücksichtigung der Vorkette und der Produktion des Bodenbelags, inkl. Verpackung (Input von Altpapier bei der Papier-/Kartonherstellung).
Transport A4: Annahme für den Transport der Produkte zur Baustelle.
Installationsphase A5: Berücksichtigung der Herstellung und des Transports der Verschnittmenge, Verbrennung des Verschnitts (gewonnene Energie wird in D als vermiedene Umweltlasten deklariert), Entsorgung der Verpackungsmaterialien (Verbrennung von PE-Folie). Die Untergrundvorbehandlung (Grundierung, Spachtelmasse, Klebstoff) bleibt unberücksichtigt. Diese ist abhängig vom Gebäude und der Anwendung und muss im Einzelfall spezifiziert werden.
Nutzungsphase B2: Szenario für die Reinigung entsprechend den Herstellerempfehlungen (siehe 4.).
End-of-Life Phase C1, C2, C3: Szenario für die Verbrennung des Bodenbelags inkl. Ausbau aus dem Gebäude und Transport zum Verbrennungsort (gewonnene Energie wird in D als vermiedene Umweltlasten deklariert).

Nutzen und Lasten für das nächste System D: Gewinnung von elektrischer und thermischer Energie aus der thermischen Verwertung des Produkts, des Installationsverschnitts und der VerpackungEinflüsse von Abfällen werden in den Modulen berücksichtigt, in denen diese anfallen.

## Data sources
- noraplan® 913.pdf
- GaBi Database (all versions)
- GaBi database SP36 2018
