# Stahlrohr; Steel pipe

Dataset: ILCD process, EPD, generic dataset
Geography: DE
Reference year: 2021
Valid until: 2022
Classification: oekobau.dat: Gebäudetechnik / Heizung / Wärmeverteilung und Abgabe
Owner: Sphera Solutions GmbH
Compliance: EN 15804+A2
Review: Dependent internal review by Sphera Solutions GmbH; Independent external review by GaBi user forum
Amounts: rows without a unit in brackets have none in this file; such an amount is in the reference unit of its flow, which a separate flow dataset defines
copyright: true
licenseType: Free of charge for all users and uses
accessRestrictions: The license conditions as stated on https://www.oekobaudat.de/ apply.
accessRestrictions: Es gelten die Lizenzbedingungen wie sie auf https://www.oekobaudat.de/ genannt sind.

## General comment
Dieser Datensatz wurde nach dem European Standard EN 15804+A2 für Nachhaltiges Bauen modelliert. Ergebnisse werden in Modulen abgebildet, die den strukturierten Ausdruck von Ergebnissen über den gesamten Lebenszyklus zulassen.

## Geography
Der Datensatz bildet die länderspezifische Situation in Deutschland ab. Dabei werden Haupttechnologien, spezifische regionale Charakteristiken und ggf. Importstatistiken berücksichtigt.

## Time period
Jährlicher Durchschnitt

## Technology and included processes
Die Ökobilanz bezieht sich auf Stahlrohre für die Verwendung in Heizungen und Gasleitungen. Nach VDI-Richtlinie 2067 gilt für Stahlrohre in Heizungen sowie zur Gas- und Wasserdurchleitung eine Lebensdauer von 40 Jahren, für Leitungen zur Warmwasserführung wird eine Lebensdauer von 25 Jahren veranschlagt.
Zur Stahlproduktion: Das Eisenerz als Basismaterial zur Stahlproduktion wird aufbereitet. In diesem Zusammenhang ist die Zerkleinerung und deren Energieaufwendung umweltseitig relevant. Der durchschnittliche Eisengehalt im Erz beträgt 60%. Als Zwischenprodukt auf dem Weg zum Stahl werden Eisenerzkügelchen (Pellets) erzeugt. Der Pelletierungsprozess besteht aus Mahlung, Trocknung, eigentlicher Pelletierung und Härtung. Die entstandenen Pellets werden anschließend gesiebt und aufbereitet. Die Dokumentation der Steinkohlegewinnung ist angehängt (siehe Link). Der Rohstofftransport ist für jedes Vorprodukt im Datensatz enthalten. Die Beförderung schließt neben LKW-, auch den Schiffs- und Bahntransport ein, soweit benötigt. Die Kokerei produziert als Hauptprodukt Koks aus Steinkohle. Als hauptsächliches Nebenprodukt fällt in der Kokerei Koksofengas (COG-Gas) an, das als Energieträger im Stahlwerk genutzt wird. Als weitere Nebenprodukte entstehen Teer, Benzol und Schwefel. Diese werden verkauft und verlassen das betrachtete System. Die Lastenverteilung erfolgt auf der Basis des unteren Heizwertes. In der Sinteranlage wird auf Basis von Koks, Eisenerz und Zusatzstoffen Sintermaterial hergestellt. Sintern ist ein Agglomerationsverfahren, das bei hohen Temperaturen stattfindet. Zuerst werden die Rohstoffe (Feineisenerz, Koks, Zusatzstoffe) gemischt und das Koks entzündet. Das Produkt des Sinterprozesses ist der sogenannte Sinterkuchen, der anschließend gebrochen, gesiebt und abgekühlt wird. Im Hochofen wird das eisenhaltige Material (Eisenerzklumpen, sintermaterial und Pellets) sowie Zusatzstoffe (z. B. Kalkstein als Schlackenbildner) und Reduktionsmittel (Koks) kontinuierlich von der Spitze des Ofenschachtes eingespeist. Ein Heißluftstrom, der zusätzlich mit Sauerstoff und Reduktionsmitteln (z. B. Kohlenstaub) versetzt ist, wirkt der Bildung reduzierender Gase entgegen. Der Sauerstoff reagiert mit den Reduktionsmitteln hauptsächlich zu Kohlenmonoxid. Dieses reduziert wiederum Eisenoxide, um Eisen zu erhalten. Hauptprodukt des Hochofenbetriebes ist Roheisen, als Nebenprodukte fallen Hochofengas und Hochofenschlacke an. Das Gas wird zur Beheizung oder Stromerzeugung im Werk genutzt.
Das Sauerstoffblasverfahren, der nächste Schritt in der Stahlherstellung, dient zur Entfernung unerwünschter Verunreinigungen aus dem Roheisen. Die hauptsächlich in Oxide umgewandelten Elemente sind Kohlenstoff, Silizium, Mangan, Phosphor und Schwefel. Der Kohlenstoffgehalt soll auf ein bestimmtes Niveau reduziert werden, um den Gehalt erwünschter Stoffe anzupassen und unerwünschte Verunreinigungen weitestgehend zu entfernen. Die Herstellung von Stahl durch den Sauerstoffaufblas-Konverter ist ein diskontinuierliches Verfahren, das folgende Prozessschritte beinhaltet: den Transfer des heißen Roheisens, die Vorbehandlung (z. B. Entschwefelung), die Oxidation im Konverter durch Entkohlung und Oxidation von Verunreinigungen und die sekundäre metallurgische Behandlung, z. B. durch Vakuum-Behandlung und Zugabe von Legierungselementen. Eingespeist wird sowohl Primär- als auch Sekundärmetall. Hauptprodukt des Konverterprozesses ist flüssiger Stahl. Außerdem entstehen Konvertergase und Schlacke. Das Gas wird zur Energieerzeugung in der Stahlproduktion genutzt.
Als nächster Schritt zum fertigen Stahlprodukt erfolgt das Stranggießen. Hier wird flüssiger Stahl zu einem kontinuierlichen Strang gegossen und anschließend geteilt, um Brammen zu erzeugen.
Der darauffolgende Walzprozess wird unterschieden nach Kalt- und Warmwalzverfahren. Beim Warmwalzen werden die Brammen oberhalb der Rekristallisationstemperatur verformt, um die Festigkeit und Oberflächenqualität zu verbessern. Das Metall wird dabei mittels Erdgas vorgewärmt. Dies ist nicht notwendig, wenn die noch heißen Brammen aus dem Konverterprozess direkt in das Walzwerk gelangen. Das Formen erfolgt über verschiedene Walzgerüste, bis die endgültige Dicke und Ausformung erreicht ist. Oft werden sogenannte Coils (Rollen, Spulen) erzeugt, die anschließend im Kaltwalzverfahren weiterverarbeitet werden. Anfallender Stahlschrott kann direkt recycelt werden. Das Kaltwalzen erfolgt unterhalb der Rekristallisationstemperatur bei Temperaturen um die 20°C. Dadurch kann eine bessere Oberflächenqualität, eine bessere Maßgenauigkeit und höhere Festigkeit erzielt werden als beim Warmwalzverfahren. Das Vormaterial wird zuerst von Rost und Zunder befreit. Das geschieht in den Verfahrensschritten Streckbiegen und Beizen. Das Streckbiegen bricht grobe Zunderschichten, Säuren entfernen Verunreinigungen der Bandoberfläche. Anschließend erfolgt das eigentliche Walzen. Oft ist dennoch eine zeitweise Wärmebehandlung, das sogenannte Zwischenglühen, notwendig, um die Kaltverfestigung des Metalls zu beseitigen.
Das kaltgewalzte fertige Blech wird anschließend feuerverzinkt. Die Zinkbeschichtung wird durch Eintauchen in ein heißes Zinkbad aufgebracht. Beim Feuerverzinken durchläuft das Blech folgende Verarbeitungsschritte: 1. Vorwärmofen (Abbrennen organischer Verunreinigungen), 2. Reduktionszone (Erhitzung, um Rekristallisation auszulösen), 3. Kühlung und Homogenisierung sowie 4. Beschichtung im Metallbad und Fertiggerüst.

Es wurde davon ausgegangen, dass große Geräte wie Heizkessel, Klima- und Lüftungsanlagen oder Fahrstühle zu 95% einem Recycling zugeführt werden. Für Rohre oder Kabel, die oft unterputzt sind wurde eine Recyclingrate von 90% angenommen. Die Recyclingquoten beziehen sich ausschließlich auf Metalle und Kunststoffe. Für mineralische Materialien wie Mineralwolle, Beton oder Keramik wurde eine Ablagerung auf einer Inertstoffdeponie angenommen. Es wurde angenommen das der Anteil an Metallen und Kunststoffen, der nicht einem Recycling zugeführt wird (5-10%) ebenfalls auf einer Inertstoffdeponie entsorgt wird (z.B. Kabelreste oder Rohrstücke im Bauschutt). Für die Kunststoffe wird davon ausgegangen, dass aufgrund der oft langen Lebensdauer und den verbundenen Verunreinigung nicht von einer stofflichen Verwertung ausgegangen werden kann und daher die Kunststoffe einer energetischen Verwertung in Müllverbrennungsanlagen (MVA) zugeführt werden. Für die Müllverbrennung wurde ein MVA-Modell mit durchschnittlichen europäischen Emissionswerten und Energieproduktion verwendet. In Abhängigkeit des zu verbrennenden Kunststoffes wurden unterschiedliche Prozesse mit den entsprechenden Elementarzusammensetzungen verwendet. Die Datensätze wurden in Zusammenarbeit mit der Confederation of European Waste-to-Energy Plants (CEWEP) erstellt und sind auf der Homepage der European Platform on LCA [EC 2008] verfügbar. Der aus der Kunststoffverbrennung erzeugte Strom sowie die erzeugte thermische Energie wurden mit dem europäischen Strom-bzw. Wärmemix gutgeschrieben. Die Gutschriften für das Recycling von Metallen oder der energetischen Verwertung von Kunststoffen, sowie die mit der Verwertung verbundenen Emissionen und Ressourcenverbräuche (Energie für Einschmelzen, Verbrennungsemissionen, Deponie) sind in den Datensätzen enthalten. Bei Materialen aus Eisen (Stahlbleche, Rohre, Grauguss) werden bei der Herstellung der Materialien bereits unterschiedliche Mengen an Stahlschrott eingesetzt. Diese Mengen wurden der recycelten Stahlmenge vor Zuführung in die Einschmelzung abgezogen, um keine Überwertung der Gutschriften zu erzeugen. Die Gutschrift wurde dann entsprechend mit primärem Stahl durchgeführt. Gutschriften für das Recycling von seltenen Erden oder Quecksilberemissionen aus Leuchtstofflampen konnten wegen fehlenden Daten nicht berücksichtigt werden. Es wurde davon ausgegangen, dass große Geräte wie Heizkessel, Klima- und Lüftungsanlagen oder Fahrstühle zu 95% einem Recycling zugeführt werden. Für Rohre oder Kabel, die oft unterputzt sind wurde eine Recyclingrate von 90% angenommen. Die Recyclingquoten beziehen sich ausschließlich auf Metalle und Kunststoffe. Für mineralische Materialien wie Mineralwolle, Beton oder Keramik wurde eine Ablagerung auf einer Inertstoffdeponie angenommen. Es wurde angenommen das der Anteil an Metallen und Kunststoffen, der nicht einem Recycling zugeführt wird (5-10%) ebenfalls auf einer Inertstoffdeponie entsorgt wird (z.B. Kabelreste oder Rohrstücke im Bauschutt). Für die Kunststoffe wird davon ausgegangen, dass aufgrund der oft langen Lebensdauer und den verbundenen Verunreinigung nicht von einer stofflichen Verwertung ausgegangen werden kann und daher die Kunststoffe einer energetischen Verwertung in Müllverbrennungsanlagen (MVA) zugeführt werden. Für die Müllverbrennung wurde ein MVA-Modell mit durchschnittlichen europäischen Emissionswerten und Energieproduktion verwendet. In Abhängigkeit des zu verbrennenden Kunststoffes wurden unterschiedliche Prozesse mit den entsprechenden Elementarzusammensetzungen verwendet. Die Datensätze wurden in Zusammenarbeit mit der Confederation of European Waste-to-Energy Plants (CEWEP) erstellt und sind auf der Homepage der European Platform on LCA [EC 2008] verfügbar. Der aus der Kunststoffverbrennung erzeugte Strom sowie die erzeugte thermische Energie wurden mit dem europäischen Strom-bzw. Wärmemix gutgeschrieben. Die Gutschriften für das Recycling von Metallen oder der energetischen Verwertung von Kunststoffen, sowie die mit der Verwertung verbundenen Emissionen und Ressourcenverbräuche (Energie für Einschmelzen, Verbrennungsemissionen, Deponie) sind in den Datensätzen enthalten. Bei Materialen aus Eisen (Stahlbleche, Rohre, Grauguss) werden bei der Herstellung der Materialien bereits unterschiedliche Mengen an Stahlschrott eingesetzt. Diese Mengen wurden der recycelten Stahlmenge vor Zuführung in die Einschmelzung abgezogen, um keine Überwertung der Gutschriften zu erzeugen. Die Gutschrift wurde dann entsprechend mit primärem Stahl durchgeführt. Gutschriften für das Recycling von seltenen Erden oder Quecksilberemissionen aus Leuchtstofflampen konnten wegen fehlenden Daten nicht berücksichtigt werden.

Hintergrundsystem:
Strom: Die Stromerzeugung wird entsprechend der länderspezifischen Randbedingungen modelliert. Die landesspezifische Analyse beinhaltet:
1.: Spezifische Kraftwerke der verschiedenen fossilen Energieträger und der Einsatz erneuerbarer Energien sind entsprechend der länderspezifischen Energieträgermixe modelliert. Die Analyse bezieht Stromimporte aus den Nachbarländern, Transmissions-und Verteilungsverluste und den Eigenverbrauch im Kraftwerk und bei der Verteilung bzw. Speicherung, z. B. durch Pumpspeicherwerke, ein.
2.: Die landes-/regionalspezifischen Technologiestandards sowie die Erzeugung in Elektrizitätskraftwerken und/oder in speziellen Kraftwerken mit Kraft-Wärme-Kopplung (KWK) sind berücksichtigt.
3.: Die länderspezifische Energieträgerbereitstellung (mit Anteil der Importe und/oder Eigenversorgung) einschließlich der Energieträger-Eigenschaften (z. B. Elementar- und Energiegehalte) werden berücksichtigt.
4.: Die Förderung, Produktion, Verarbeitung und Transportprozesse werden entsprechend der Situation im jeweiligen Stromerzeugerland modelliert. Die unterschiedlichen Produktions- und Verarbeitungsverfahren (Emissionen und Wirkungsgrade) in den verschiedenen Energieerzeugerländern werden einbezogen, z. B. Rohöl-Veredelungsverfahren oder Abfackel-Raten an den Ölplattformen.
Thermische Energie, Prozessdampf: Die Erzeugung von Dampf und thermischer Energie in Heizkraftwerken wird entsprechend der landesspezifischen Situation (Emissionsgrenzwerte, Energieträgerbasis) modelliert.
Der Wirkungsgrad für die thermische Energieerzeugung beträgt per Definition 100% des Energieträgereinsatzes. Für Prozessdampf liegt der Wirkungsgrad im Bereich von 85-95%. Die zur Heizenergie-Erzeugung verwendeten Energieträger werden entsprechend der nationalen Situation modelliert (siehe Kapitel Strom oben).
Transporte: Alle relevanten und bekannten Transportprozesse in Form von See- und Binnenschiffsverkehr sowie Bahn-, Lkw- und der Leitungstransport sind enthalten.
Energieträger: Die Energieträger werden entsprechend der spezifischen Versorgungslage modelliert (siehe Kapitel Strom oben).
Raffinerieprodukte: Diesel, Benzin, technische Gase, Heizöl, Schmierstoffe und Rückstände, wie Bitumen, werden mit einem parametrierten länderspezifische Raffineriemodell modelliert. Das Raffinerie-Modell bezieht die länderspezifischen Veredelungsverfahren (z. B. Emissionspegel, interner Energieverbrauch etc.) und das länderspezifische Produktspektrum ein, das sich je nach Land stark unterscheiden kann. Die Rohöl-Förderung wird gemäß der länderspezifischen Situation mit den jeweiligen Energieträger-Eigenschaften modelliert.

## Technical purpose
Dieses Produkt kann im Baubereich verwendet werden.

## Safety margin
10 %. Produktsystem weitgehend vollständig abgebildet. Gute technologische, zeitliche und geographische Repräsentativität.

## Reference product
- Stahlrohr: 1

## Inputs
- Erneuerbare Primärenergie als Energieträger (PERE) [MJ]: A1-A3 1.9287, C2 0.0354246, C4 0.00298181, D 1.46998
- Erneuerbare Primärenergie zur stofflichen Nutzung (PERM) [MJ]: A1-A3 0, C2 0, C4 0, D 0
- Total erneuerbare Primärenergie (PERT) [MJ]: A1-A3 1.9287, C2 0.0354246, C4 0.00298181, D 1.46998
- Nicht-erneuerbare Primärenergie als Energieträger (PENRE) [MJ]: A1-A3 23.0123, C2 0.117212, C4 0.0220791, D -9.63875
- Nicht-erneuerbare Primärenergie zur stofflichen Nutzung (PENRM) [MJ]: A1-A3 0, C2 0, C4 0, D 0
- Total nicht-erneuerbare Primärenergie (PENRT) [MJ]: A1-A3 23.0123, C2 0.117212, C4 0.0220791, D -9.63875
- Einsatz von Sekundärstoffen (SM) [kg]: A1-A3 0.181928, C2 0, C4 0, D 0
- Erneuerbare Sekundärbrennstoffe (SF) [MJ]: A1-A3 0, C2 0, C4 0, D 0
- Nicht erneuerbare Sekundärbrennstoffe (NRSF) [MJ]: A1-A3 0, C2 0, C4 0, D 0
- Nettoeinsatz von Süßwasserressourcen (FW) [m3]: A1-A3 0.00166681, C2 1.55192e-5, C4 5.43855e-6, D -0.000879378

## Outputs
- Gefährlicher Abfall zur Deponie (HWD) [kg]: A1-A3 1.18097e-9, C2 1.90222e-11, C4 2.34898e-12, D 1.41414e-9
- Entsorgter nicht gefährlicher Abfall (NHWD) [kg]: A1-A3 0.0293068, C2 4.35662e-5, C4 0.110108, D -0.0189014
- Entsorgter radioaktiver Abfall (RWD) [kg]: A1-A3 0.00021431, C2 3.37437e-6, C4 2.27928e-7, D 0.000189727
- Komponenten für die Wiederverwendung (CRU) [kg]: A1-A3 0, C2 0, C4 0, D 0
- Stoffe zum Recycling (MFR) [kg]: A1-A3 0, C2 0, C4 0, D 0
- Stoffe für die Energierückgewinnung (MER) [kg]: A1-A3 0, C2 0, C4 0, D 0
- Exportierte elektrische Energie (EEE) [MJ]: A1-A3 0, C2 0, C4 0, D 0
- Exportierte thermische Energie (EET) [MJ]: A1-A3 0, C2 0, C4 0, D 0

## Impact indicators
- Globales Erwärmungspotenzial - total (GWP-total) [kg CO2 eq.]: A1-A3 2.54122, C2 0.00881088, C4 0.00162553, D -1.30415
- Globales Erwärmungspotenzial - fossil (GWP-fossil) [kg CO2 eq.]: A1-A3 2.53765, C2 0.00872266, C4 0.00166455, D -1.30663
- Globales Erwärmungspotenzial - biogen (GWP-biogenic) [kg CO2 eq.]: A1-A3 0.00236185, C2 3.98524e-5, C4 -4.39177e-5, D 0.00250585
- Globales Erwärmungspotenzial - luluc (GWP-luluc) [kg CO2 eq.]: A1-A3 0.00120367, C2 4.8366e-5, C4 4.89387e-6, D -3.07085e-5
- Abbaupotenzial der stratosphärischen Ozonschicht (ODP) [kg CFC-11 eq.]: A1-A3 6.48184e-15, C2 1.35629e-16, C4 6.53135e-18, D 7.39702e-15
- Versauerungspotenzial, kumulierte Überschreitung (AP) [Mole of H+ eq.]: A1-A3 0.00642729, C2 5.4537e-5, C4 1.18483e-5, D -0.00360964
- Eutrophierungspotenzial - Süßwasser (EP-freshwater) [kg P eq.]: A1-A3 2.22488e-6, C2 2.66303e-8, C4 2.80155e-9, D -2.25818e-7
- Eutrophierungspotenzial - Salzwasser (EP-marine) [kg N eq.]: A1-A3 0.00148036, C2 2.66934e-5, C4 3.07591e-6, D -0.000749618
- Eutrophierungspotenzial - Land (EP-terrestrial) [Mole of N eq.]: A1-A3 0.0159783, C2 0.000293784, C4 3.3794e-5, D -0.0081215
- Bildungspotenzial für troposphärisches Ozon (POCP) [kg NMVOC eq.]: A1-A3 0.00483376, C2 5.06157e-5, C4 9.32028e-6, D -0.00250581
- Potenzial für die Verknappung abiotischer Ressourcen nicht fossile Ressourcen (ADPE) [kg Sb eq.]: A1-A3 1.78081e-7, C2 2.10354e-9, C4 1.57775e-10, D 3.38183e-8
- Potenzial für die Verknappung abiotischer Ressourcen fossile Brennstoffe (ADPF) [MJ]: A1-A3 22.8536, C2 0.117197, C4 0.0220674, D -9.53001
- Wasser-Entzugspotenzial (Benutzer) (WDP) [m³ world equiv.]: A1-A3 -0.0299466, C2 9.1827e-5, C4 0.000178142, D 0.0324961

## Use advice
Der Datensatz repräsentiert ein Cradle to Gate Inventar. Er kann verwendet werden, um die Lieferkette des jeweiligen Produktes in einer repräsentativen Weise zu charakterisieren. Die Kombination mit einzelnen Einheitenprozessen und diesem Produkt ermöglicht die Erstellung von anwenderspezifischen (Produkt-) LCAs.

## Data sources
- VDI 2067
- EC 2001
- BRENSING 1995
- DICKINSON 2008
- Documentation of data quality management
- GaBi Database Edition 2021, CUP2021.01
- GaBi database (all versions)
