# Spannbeton-Weichenschwellen, voestalpine

Dataset: ILCD process, EPD, average dataset
Geography: EU-27
Reference year: 2021
Valid until: 2026
Classification: OEKOBAU.DAT: Mineralische Baustoffe / Mörtel und Beton / Beton
Classification: IBUCategories: 02 Bauprodukte / Normal- Leicht- und Porenbeton / Betonfertigteile
Method details: Betonfertigteile.pdf
Generated by: Daxner & Merl GmbH
Registration number: EPD-VRS-20210079-ICD1-DE
Owner: voestalpine AG
Compliance: DIN EN 15804+A2; ISO 14025
Review: Accredited third party review by Institut Bauen und Umwelt e. V.
Amounts: rows without a unit in brackets have none in this file; such an amount is in the reference unit of its flow, which a separate flow dataset defines
copyright: true
licenseType: Free of charge for all users and uses
accessRestrictions: None

## General comment
Die voestalpine Railway Systems ist ein weltweit führender Anbieter von Systemlösungen für die Bahninfrastruktur. Durch die jahrzehntelange Erfahrung der einzelnen Unternehmen in den unterschiedlichsten Fachbereichen der Bahninfrastruktur - können Synergien bestens genutzt und Weichenbetonschwellen im Gesamtsystem gestaltet, optimiert und weiterentwickelt werden.

Die Produktion der Spannbeton-Weichenschwellen erfolgt an den folgenden drei Produktionsstandorten:

TSF-A GmbH, Sollenau (Österreich),
voestalpine Turnout Technology Germany GmbH, Butzbach (Deutschland) und
Travertec S.R.L., Buzau (Rumänien).

Die Produktgruppe der Spannbeton-Weichenschwellen umfasst unterschiedliche Typen hochqualitativer, vorgespannter Betonschwellen, wahlweise mit Besohlung ausgeführt und mit vormontierten Befestigungssystemen ausgeliefert.

Bei den deklarierten Produkten handelt es sich um vorgespannte Fertigteile aus Beton in unterschiedlichen Größen und Ausführungen zur Verwendung als Weichenbetonschwellen. Weichenbetonschwellen stützen und halten die Schienen und Weichenkomponenten in der richtigen Position und übertragen die Lasten auf den Bahnoberbau.

Der Spannbeton wird aus

vorgespanntem Spannstahl,
Zement (hydraulisches Bindemittel),
Splitt und Sand unterschiedlicher Gesteinskörnungen (Zuschlagsstoffe),
Wasser und
Zusatzmitteln und Zusatzstoffen hergestellt.

Einbetonierte Kunststoffteile der Dübelbefestigung bilden die Anker für die Verschraubung der Schienenbefestigungssysteme. Je nach Ausführung sind zusätzliche Bewehrungselemente wie Endbügel bzw. Dübelbewehrungen aus Stahl nötig.

Je nach Bedarf werden die Weichenbetonschwellen besohlt oder unbesohlt beziehungsweise mit montierten Rippenplatten und/oder Befestigungsmaterial geliefert.

Die Grundgeometrie der Weichenschwelle kann in Höhe, Sohlenbreite und Ausführung variieren. Eine mögliche Vor-Montage mit Komponenten von Befestigungssystemen erfolgt in einem separaten Arbeitsgang innerhalb der Werke und wird in der vorliegenden EPD nicht berücksichtigt.

Die deklarierten Produkte werden nach den gültigen europäischen und internationalen Normen, Richtlinien und div. Kundenspezifikationen gefertigt und ausgeliefert.

## Technology and included processes
Der Beton wird aus Splitt und Sand (Zuschlagsstoffe), Wasser, Zement (hydraulisches Bindemitteln), Zusatzmitteln und Zusatzstoffen hergestellt. Die Kunststoffdübel werden in der Schalungsbahn fixiert und der Spannstahl vorgespannt. Anschließend wird der Beton von der Zentralmischanlage mittels Kübelbahn zur jeweiligen Schalungsbahn transportiert. Die Betoniermaschine befüllt die Schalungsbahn mit dem Beton. Bei Bedarf wird anschließend die Besohlung auf der Unterseite der Schwelle aufgebracht (eingerüttelt). Nach der entsprechenden Aushärtezeit des Betons, Vorgabe ist die Erreichung der Mindestdruckfestigkeit, werden die Weichenbetonschwellen entschalt und auf die geforderten, über den Schalungsplan vorab definierten Längen geschnitten. Anschließend erfolgt die Zwischenlagerung auf dem Werksgelände. Die Herstellung der Weichenbetonschwellen findet in geschlossenen Gebäuden bei Raumtemperatur statt.
Technische Daten:
Die vorliegende EPD bezieht sich auf die deklarierten Spannbeton-Weichenschwellen der voestalpine Railway Systems GmbH.
Deklarierte Einheit:
Die vorliegende Umwelt-Produktdeklaration bezieht sich auf eine deklarierte Einheit von 1 lfm durchschnittliche Spannbeton-Weichenschwelle mit einem Gewicht von 166 kg/lfm und einem Volumen von 0,065 m³.

## Technical purpose
Die deklarierten Spannbeton-Weichenschwellen finden vorwiegend in folgenden Bereichen eine Anwendung:

im Hochgeschwindigkeitsverkehr
im Mischverkehr (Personen- und Güterverkehr)
im städtischen Nahverkehr (U-Bahn, Straßenbahn).

## Reference product
- Spannbeton-Weichenschwelle: 1

## Inputs
- Erneuerbare Primärenergie als Energieträger (PERE) [MJ]: A1-A3 46.0921, C1 0, C2 0.381237, C3 1.04137, C4 0.224024, D -4.04295
- Erneuerbare Primärenergie zur stofflichen Nutzung (PERM) [MJ]: A1-A3 0, C1 0, C2 0, C3 0, C4 0, D 0
- Total erneuerbare Primärenergie (PERT) [MJ]: A1-A3 46.0921, C1 0, C2 0.381237, C3 1.04137, C4 0.224024, D -4.04295
- Nicht-erneuerbare Primärenergie als Energieträger (PENRE) [MJ]: A1-A3 361.494, C1 0, C2 6.61987, C3 2.34993, C4 1.82078, D -89.3101
- Nicht-erneuerbare Primärenergie zur stofflichen Nutzung (PENRM) [MJ]: A1-A3 4.59221, C1 0, C2 0, C3 0, C4 0, D 0
- Total nicht erneuerbare Primärenergie (PENRT) [MJ]: A1-A3 366.086, C1 0, C2 6.61987, C3 2.34993, C4 1.82078, D -89.3101
- Einsatz von Sekundärstoffen (SM) [kg]: A1-A3 2.09989, C1 0, C2 0, C3 0, C4 0, D 153.5
- Erneuerbare Sekundärbrennstoffe (RSF) [MJ]: A1-A3 0, C1 0, C2 0, C3 0, C4 0, D 0
- Nicht erneuerbare Sekundärbrennstoffe (NRSF) [MJ]: A1-A3 0, C1 0, C2 0, C3 0, C4 0, D 0
- Einsatz von Süßwasserressourcen (FW) [m^3]: A1-A3 0.0611204, C1 0, C2 0.000444269, C3 0.00120409, C4 0.000402972, D -0.0503769

## Outputs
- Gefährlicher Abfall zur Deponie (HWD) [kg]: A1-A3 1.82931e-6, C1 0, C2 3.06114e-7, C3 9.72664e-10, C4 2.52425e-8, D -2.40045e-7
- Entsorgter nicht gefährlicher Abfall (NHWD) [kg]: A1-A3 0.328121, C1 0, C2 0.0010492, C3 0.00166709, C4 8.30832, D 0.73035
- Entsorgter radioaktiver Abfall (RWD) [kg]: A1-A3 0.0110606, C1 0, C2 1.22011e-5, C3 0.000356572, C4 2.07947e-5, D -0.00324019
- Komponenten für die Wiederverwendung (CRU) [kg]: A1-A3 0, C1 0, C2 0, C3 0, C4 0, D 0
- Stoffe zum Recycling (MFR) [kg]: A1-A3 0, C1 0, C2 0, C3 155.6, C4 0, D 0
- Stoffe für die Energierückgewinnung (MER) [kg]: A1-A3 0, C1 0, C2 0, C3 0, C4 0, D 0
- Exportierte elektrische Energie (EEE) [MJ]: A1-A3 0, C1 0, C2 0, C3 0, C4 0, D 0
- Exportierte thermische Energie (EET) [MJ]: A1-A3 0, C1 0, C2 0, C3 0, C4 0, D 0

## Impact indicators
- Globales Erwärmungspotenzial total (GWP-total) [kg CO_(2)-Äq.]: A1-A3 43.6132, C1 0, C2 0.500192, C3 0.134288, C4 0.12752, D -8.79044
- Globales Erwärmungspotenzial fossil (GWP-fossil) [kg CO_(2)-Äq.]: A1-A3 43.4467, C1 0, C2 0.497022, C3 0.133649, C4 0.137224, D -8.77878
- Globales Erwärmungspotenzial biogen (GWP-biogenic) [kg CO_(2)-Äq.]: A1-A3 0.134943, C1 0, C2 -0.000829601, C3 0.000445512, C4 -0.0100673, D -0.00769277
- Globales Erwärmungspotenzial luluc (GWP-luluc) [kg CO_(2)-Äq.]: A1-A3 0.0315591, C1 0, C2 0.00400007, C3 0.000193682, C4 0.000363776, D -0.00396959
- Abbau Potential der stratosphärischen Ozonschicht (ODP) [kg CFC11-Äq.]: A1-A3 3.72828e-9, C1 0, C2 9.06981e-17, C3 2.93988e-15, C4 4.84195e-16, D -3.86393e-14
- Versauerungspotenzial von Boden und Wasser (AP) [mol H^(+)-Äq.]: A1-A3 0.103396, C1 0, C2 0.00167955, C3 0.000295034, C4 0.000919672, D -0.0169622
- Eutrophierungspotenzial Süßwasser (EP-freshwater) [kg PO_(4)-Äq.]: A1-A3 0.000132671, C1 0, C2 1.50521e-6, C3 3.56974e-7, C4 2.20097e-7, D -5.94065e-6
- Eutrophierungspotenzial Salzwasser (EP-marine) [kg N-Äq.]: A1-A3 0.0320592, C1 0, C2 0.000757703, C3 6.55357e-5, C4 0.000235956, D -0.0031094
- Eutrophierungspotenzial Land (EP-terrestrial) [mol N-Äq.]: A1-A3 0.347156, C1 0, C2 0.00846401, C3 0.000688522, C4 0.00259256, D -0.0321453
- Bildungspotential für troposphärisches Ozon (POCP) [kg NMVOC-Äq.]: A1-A3 0.0964811, C1 0, C2 0.00148865, C3 0.000179561, C4 0.000716311, D -0.0128936
- Potenzial für den abiotischen Abbau nicht fossiler Ressourcen (ADPE) [kg Sb-Äq.]: A1-A3 2.32551e-5, C1 0, C2 3.996e-8, C3 3.86832e-8, C4 1.1959e-8, D -1.59054e-5
- Potenzial für den abiotischen Abbau fossiler Brennstoffe (ADPF) [MJ]: A1-A3 365.515, C1 0, C2 6.59344, C3 2.34946, C4 1.81999, D -89.2815
- Wassernutzung (WDP) [m^(3) Welt-Äq. entzogen]: A1-A3 1.96861, C1 0, C2 0.00481874, C3 0.0291307, C4 0.0124905, D -1.99663
- Auftreten von Krankheiten aufgrund von Feinstaubemissionen (PM) [Krankheitsfälle]: A1-A3 3.7702e-7, C1 0, C2 4.27554e-9, C3 6.37327e-10, C4 1.49345e-8, D 3.36777e-9
- Wirkung durch Exposition des Menschen mit U235 (IR) [kBq U235-Äq.]: A1-A3 2.46132e-9, C1 0, C2 3.44456e-11, C3 1.12262e-11, C4 1.54382e-11, D -9.66672e-10
- Toxizitätsvergleichseinheit für Ökosysteme (ETP-fw) [CTUe]: A1-A3 1.43814e-6, C1 0, C2 9.48992e-9, C3 2.47476e-9, C4 1.1301e-8, D -3.21294e-7
- Toxizitätsvergleichseinheit für Menschen (krebserregend) (HTP-c) [CTUh]: A1-A3 1.62646, C1 0, C2 0.00179996, C3 0.0585015, C4 0.00224576, D -0.344593
- Toxizitätsvergleichseinheit für Menschen (nicht krebserregend) (HTP-nc) [CTUh]: A1-A3 161.226, C1 0, C2 4.93317, C3 1.00505, C4 0.9756, D -12.9426
- Bodenqualitätsindex (SQP) [SQP]: A1-A3 5.996e-9, C1 0, C2 1.01962e-10, C3 2.77627e-11, C4 1.42278e-10, D 2.04505e-9

## Use advice
Gültigkeitsbereich:
Die vorliegende Umwelt-Produktdeklaration bezieht sich auf einen gewichteten Gruppendurchschnitt mit einer deklarierten Einheit von 1 lfm durchschnittliche Spannbeton-Weichenschwelle produziert an den Standorten

- TSF-A GmbH, Sollenau (Österreich),

- voestalpine Turnout Technology Germany GmbH, Butzbach (Deutschland) und

- Travertec S.R.L., Buzau (Rumänien).
Systemgrenze:
Die Ökobilanz der Spannbeton-Weichenschwellen beinhaltet eine cradle-to-gate (Wiege bis zum Werkstor) ­Betrachtung mit Modulen. Die folgenden Lebenszyklusphasen werden in der Analyse berücksichtigt:

Modul A1-A3 | Produktionsstadium

Das Produktionsstadium beinhaltet die Aufwendungen der Rohstoffversorgung (Beton, Splitt, Sand, Wasser, Spannstahl etc.) sowie der damit verbundenen Transporte bezogen auf die drei Produktionsstandorte: TSF-A GmbH in Sollenau, Österreich, voestalpine Turnout Technology Germany GmbH in Butzbach, Deutschland und Travertec S.R.L. in Butzau, Rumänien. Die Produktionsstätten werden mit Strom aus dem regionalen Stromnetz und thermischer Energie aus Erdgas versorgt. Der Spannstahl wird von vorgelagerten Organisationen geliefert, die Teil des voestalpine-Konzerns sind. Somit werden die vorgelagerten Umweltwirkungen des gelieferten Stahls durch Primärdaten der jeweiligen Produktionsstandorte abgebildet.

Modul C1 | Rückbau/Abriss

Der Energiebedarf für den Rückbau der

Weichenschwellen aus dem Gleis (z. B. Lösen von Schrauben) ist stark von den Gegebenheiten vor Ort abhängig und wird als vernachlässigbar angesehen, wodurch keine Umweltwirkungen aus dem Rückbau der Produkte deklariert werden.

Modul C2 | Transport zur Abfallbehandlung

Modul C2 beinhaltet den Transport zur Abfallbehandlung. Dazu wird der Transport via LKW über 50 km Transportdistanz angesetzt. Dieses Szenario kann abhängig vom Ort des Rückbaus und der entsprechenden Abfallbehandlung variieren.

Modul C3 | Abfallbehandlung

Das deklarierte Szenario geht von der Verarbeitung der Weichenschwellen in einem Betonbrecher aus. Es wird eine Verlustrate aus der Abfallverarbeitung von

5 % angenommen. Entsprechende Umweltwirkungen werden in Modul C4 berücksichtigt. Die getrennten Materialfraktionen Stahl und Beton werden weiterverwertet.

Modul C4 | Beseitigung

Modul C4 beinhaltet die durch die Deponierung der Verluste aus der Abfallverarbeitung entstehenden Umweltwirkungen. Das gewählte Szenario beinhaltet daher die Umweltbelastungen der Deponierung von

5 % des Materials.

Modul D | Gutschriften und Lasten außerhalb der Systemgrenzen

Modul D deklariert das Recycling des zurückgewonnenen Stahls und Betons (95 % des Produkts). Es beinhaltet das Potenzial zur Substitution von Primärstahl und Kies.

## Data sources
- GaBi Database (all versions)
- GaBi database SP40 2020
