# Massivholzparkett (Durchschnitt DE)

Dataset: ILCD process, EPD, representative dataset
Geography: DE
Reference year: 2021
Valid until: 2026
Classification: OEKOBAU.DAT: Holz / Holzböden / Parkett
Method details: EN 15804; ILCD format
Generated by: Thünen-Institut für Holzforschung
Owner: Thünen-Institut für Holzforschung
Compliance: EN 15804+A2; EN 16485
Review: Independent external review by Dr. Frank Werner - Umwelt & Entwicklung
Amounts: rows without a unit in brackets have none in this file; such an amount is in the reference unit of its flow, which a separate flow dataset defines
copyright: true

## General comment
Weitere Informationen zur deklarierten Einheit (Zusammensetzung) und die auf Herstellerangaben beruhende Sachbilanz (In- und Output der Stoff- und Energieströme) stehen als Excel-Datei unter dem Unterpunkt Hintergrund-Bericht zum Download bereit.
Der Datensatz wurde 2021 als Aktualisierung mit gleichbleibendem Vordergrundsystem erstellt. Alle Hintergrunddaten entstammen der GaBi Professional Datenbank in der Content Version 2021.1. Die Modellierung und Berechnung der Ökobilanz basiert auf den europäischen Normen EN 15804:2012+A2:2019 und EN 16485:2014. Bei Rückfragen wenden Sie sich bitte an holzundklima@thuenen.de.

## Geography
Im Bereich der Parkettproduktion werden durch das Statistische Bundesamt nur 2 Meldenummern gelistet, die insgesamt eine Produktion von 9,6 Mio. m² angeben, wobei hier zwischen Mosaikparkett (1622 10 300) und Anderen (1622 10 600) unterschieden wird. Die Erhebung im Parkettbereich lieferte aussagekräftige Zahlen für 315.000 m² Massivholzbodenbeläge, die im Wesentlichen Stabparkett und Massivholzdielen, aber auch Hochkantlamellen und Mosaikparkett repräsentieren. Daneben wurde die Produktion von insgesamt 7,9 Mio. m² Mehrschichtparkett analysiert. Die Bilanzierung der Parkettproduktion konnten etwa 88 % der unter Meldenummer 1622 10 600 gelisteten Produktion und 12 % der unter Meldenummer 1622 10 300 gelisteten Produktionsmengen abdecken.
Holzfeuchte 9%

## Time period
Der Datensatz basiert auf Produktionsdaten aus den Jahren 2009 bis 2011 (Vordergrundsystem).
Eine Aktualisierung des Hintergrundsystems erfolgte 2021.

## Technology and included processes
Einschichtige Holzböden sind einschichtige Bodenbeläge aus massivem Holz in Form von Massivholz-parkett, Massivholzdielen oder Holzpflaster. Die Böden haben Dicken zwischen 8 und 40 mm und werden teilweise schwimmend, teilweise fest mit dem Untergrund verklebt, verlegt. Die hier betrachteten Produkte sind Massivholzböden am Werkstor der Herstellung ohne Oberflächenbeschichtung. Zur Herstellung von einschichtigen Massivholzböden wird getrocknetes Schnittholz oder Hobelware in mehreren Schritten zu verlegbaren, massiven Einzelelementen verarbeitet. Teilweise werden Rundhölzer eingekauft, die analog zur Herstellung von Schnittholz zunächst aufgetrennt und getrocknet werden. Je nach erwünschter Dimension der Einzelelemente werden je m² Bodenfläche verschieden viele Sägeschnitte und Hobelprozesse durchgeführt. Bei Stabparkett wird zusätzlich eine umlaufende Nut oder Nut und Feder angebracht. Grundsätzlich gilt, je kleiner die Einzelteile sind, desto höher wird der Prozessaufwand je m² Bodenfläche. Das Produkt wird nach Fertigstellung für den Transport zur Baustelle verpackt.

## Technical purpose
Massivholzparkett kommt als Fußbodenbelag zum Einsatz.

## Scenarios
- energetisch (Modul D): therm. Verwertung
- stofflich (Modul D): stoffl. Verwertung
- Entsorgung Verpackung (Modul A5): Das Modul A5 enthält ausschließlich die Entsorgung der Verpackungsmaterialien

## Reference product
- Massivholzparkett: 1

## Inputs
- Erneuerbare Primärenergie als Energieträger (PERE) / Uso de energía primaria renovable excluyendo los recursos de energía primaria renovable utilizada como materia prima (PERE) [MJ]: A1 76.4355, A2 0.000140175, A3 474.997, A1-A3 551.433, A5 (Entsorgung Verpackung) 0.0106833, C2 0.00973266, C3 1.76729, D (energetisch) 150.31, D (stofflich) -1.03071
- Erneuerbare Primärenergie zur stofflichen Nutzung (PERM) / Uso de energía primaria renovable utilizada como materia prima (PERM) [MJ]: A1 208.875, A2 0, A3 0.205617, A1-A3 209.081, A5 (Entsorgung Verpackung) -0.205617, C2 0, C3 -208.875, D (energetisch) 0, D (stofflich) 0
- Total erneuerbare Primärenergie (PERT) / Uso total de la energía primaria renovable (energía primaria y recursos de energía primaria renovable utilizada como materia prima) (PERT) [MJ]: A1 285.311, A2 0.000140175, A3 475.203, A1-A3 760.514, A5 (Entsorgung Verpackung) -0.194934, C2 0.00973266, C3 -207.108, D (energetisch) 150.31, D (stofflich) -1.03071
- Nicht-erneuerbare Primärenergie als Energieträger (PENRE) / Uso de energía primaria no renovable, excluyendo los recursos de energía primaria no renovable utilizada como materia prima (PENRE) [MJ]: A1 12.644, A2 0.00251513, A3 74.6032, A1-A3 87.2498, A5 (Entsorgung Verpackung) 0.0488628, C2 0.174631, C3 2.70949, D (energetisch) -117.077, D (stofflich) -4.7877
- Nicht-erneuerbare Primärenergie zur stofflichen Nutzung (PENRM) / Uso de la energía primaria no renovable utilizada como materia prima (PENRM) [MJ]: A1 0, A2 0, A3 0.0155376, A1-A3 0.0155376, A5 (Entsorgung Verpackung) -0.0155376, C2 0, C3 0, D (energetisch) 0, D (stofflich) 0
- Total nicht erneuerbare Primärenergie (PENRT) / Uso total de la energía primaria no renovable (energía primaria y recursos de energía primaria renovable utilizada como materia prima) (PENRT) [MJ]: A1 12.644, A2 0.00251513, A3 74.6187, A1-A3 87.2653, A5 (Entsorgung Verpackung) 0.0333252, C2 0.174631, C3 2.70949, D (energetisch) -117.077, D (stofflich) -4.7877
- Einsatz von Sekundärstoffen (SM) / Uso de materiales secundarios (SM) [kg]: A1 0, A2 0, A3 0, A1-A3 0, A5 (Entsorgung Verpackung) 0, C2 0, C3 0, D (energetisch) 0, D (stofflich) 11.705
- Erneuerbare Sekundärbrennstoffe (RSF) / Uso de combustibles secundarios renovables (RSF) [MJ]: A1 0, A2 0, A3 0.254271, A1-A3 0.254271, A5 (Entsorgung Verpackung) 0, C2 0, C3 0, D (energetisch) 0, D (stofflich) 0
- Nicht erneuerbare Sekundärbrennstoffe (NRSF) / Uso de combustibles secundarios no renovables (NRSF) [MJ]: A1 0, A2 0, A3 0, A1-A3 0, A5 (Entsorgung Verpackung) 0, C2 0, C3 0, D (energetisch) 0, D (stofflich) 0
- Einsatz von Süßwasserressourcen (FW) / Uso neto de recursos de agua dulce (FW) [m3]: A1 0.00261355, A2 1.60452e-7, A3 0.020343, A1-A3 0.0229567, A5 (Entsorgung Verpackung) 0.000482568, C2 1.11406e-5, C3 0.00083167, D (energetisch) 0.0194423, D (stofflich) -0.000550329

## Outputs
- Gefährlicher Abfall zur Deponie (HWD) / Residuos peligrosos eliminados (HWD) [kg]: A1 3.17167e-8, A2 1.26736e-13, A3 4.55329e-7, A1-A3 4.87046e-7, A5 (Entsorgung Verpackung) 1.0204e-11, C2 8.79953e-12, C3 9.85168e-10, D (energetisch) -4.02858e-8, D (stofflich) -5.70578e-9
- Entsorgter nicht gefährlicher Abfall (NHWD) / Residuos no peligrosos eliminados (NHWD) [kg]: A1 0.0616937, A2 3.73626e-7, A3 0.48987, A1-A3 0.551564, A5 (Entsorgung Verpackung) 0.0027514, C2 2.59417e-5, C3 0.00211095, D (energetisch) 0.0548122, D (stofflich) -0.000962354
- Entsorgter radioaktiver Abfall (RWD) / Residuos radiactivos eliminados (RWD) [kg]: A1 0.000609627, A2 3.04236e-9, A3 0.00509521, A1-A3 0.00570484, A5 (Entsorgung Verpackung) 1.48497e-6, C2 2.11238e-7, C3 0.000217055, D (energetisch) -0.0071602, D (stofflich) -0.000111239
- Komponenten für die Wiederverwendung (CRU) / Componentes para su reutilización (CRU) [kg]: A1 0, A2 0, A3 0, A1-A3 0, A5 (Entsorgung Verpackung) 0, C2 0, C3 0, D (energetisch) 0, D (stofflich) 0
- Stoffe zum Recycling (MFR) / Materiales para el reciclaje (MFR) [kg]: A1 0, A2 0, A3 0, A1-A3 0, A5 (Entsorgung Verpackung) 0, C2 0, C3 11.705, D (energetisch) 0, D (stofflich) 0
- Stoffe für die Energierückgewinnung (MER) / Materiales para valorización energética (recuperación de energía) (MER) [kg]: A1 0, A2 0, A3 0, A1-A3 0, A5 (Entsorgung Verpackung) 0.0106698, C2 0, C3 11.705, D (energetisch) 0, D (stofflich) 0
- Exportierte elektrische Energie (EEE) / Energía exportada electrica (EEE) [MJ]: A1 0, A2 0, A3 0.0285201, A1-A3 0.0285201, A5 (Entsorgung Verpackung) 0.312747, C2 0, C3 0, D (energetisch) 0, D (stofflich) 0
- Exportierte thermische Energie (EET) / Energía exportada termal (EET) [MJ]: A1 0, A2 0, A3 0.0662557, A1-A3 0.0662557, A5 (Entsorgung Verpackung) 0.70278, C2 0, C3 0, D (energetisch) 0, D (stofflich) 0

## Impact indicators
- Globales Erwärmungspotenzial - total (GWP-total) [kg CO2-Äqv.]: A1 -18.7442, A2 0.000188871, A3 5.95731, A1-A3 -12.7867, A5 (Entsorgung Verpackung) 0.126613, C2 0.0125999, C3 20.0848, D (energetisch) -8.61855, D (stofflich) -0.357141
- Globales Erwärmungspotenzial - fossil (GWP-fossil) [kg CO2-Äqv.]: A1 1.12702, A2 0.000188871, A3 5.97688, A1-A3 7.10408, A5 (Entsorgung Verpackung) 0.107052, C2 0.0125999, C3 0.213576, D (energetisch) -8.61855, D (stofflich) -0.357141
- Globales Erwärmungspotenzial - biogen (GWP-biogenic) [kg CO2-Äqv.]: A1 -19.8712, A2 0, A3 -0.0195613, A1-A3 -19.8908, A5 (Entsorgung Verpackung) 0.0195613, C2 0, C3 19.8712, D (energetisch) 0, D (stofflich) 0
- Abbaupotenzial der stratosphärischen Ozonschicht (ODP) [kg CFC 11-Äquiv.]: A1 2.03647e-14, A2 2.41074e-20, A3 6.84034e-13, A1-A3 7.04399e-13, A5 (Entsorgung Verpackung) 4.22926e-17, C2 1.67383e-18, C3 7.3107e-15, D (energetisch) -2.41091e-13, D (stofflich) -3.70952e-15
- Versauerungspotenzial, kumulierte Überschreitung (AP) [mol H+ eqv.]: A1 0.014587, A2 1.36745e-6, A3 0.0473989, A1-A3 0.0619872, A5 (Entsorgung Verpackung) 4.17696e-5, C2 7.60682e-5, C3 0.00030736, D (energetisch) -0.00783761, D (stofflich) -0.00167939
- Eutrophierungspotenzial - Süßwasser (EP-freshwater) [kg P eqv.]: A1 3.50973e-6, A2 5.60134e-10, A3 0.000102623, A1-A3 0.000106133, A5 (Entsorgung Verpackung) 6.7178e-9, C2 3.88913e-8, C3 8.95358e-7, D (energetisch) -2.96193e-5, D (stofflich) -8.43772e-7
- Eutrophierungspotenzial - Salzwasser (EP-marine) [kg N eqv.]: A1 0.00636341, A2 6.79063e-7, A3 0.0198276, A1-A3 0.0261916, A5 (Entsorgung Verpackung) 1.13784e-5, C2 3.72722e-5, C3 9.82988e-5, D (energetisch) -0.00280025, D (stofflich) -0.000790735
- Eutrophierungspotenzial - Land (EP-terrestrial) [mol N eqv.]: A1 0.0721823, A2 7.49485e-6, A3 0.22679, A1-A3 0.29898, A5 (Entsorgung Verpackung) 0.000194767, C2 0.000412539, C3 0.00102629, D (energetisch) -0.0228442, D (stofflich) -0.00869696
- Bildungspotenzial für troposphärisches Ozon (POCP) [kg NMVOC eqv.]: A1 0.0171632, A2 1.64972e-6, A3 0.0529884, A1-A3 0.0701532, A5 (Entsorgung Verpackung) 2.98607e-5, C2 7.02934e-5, C3 0.000244218, D (energetisch) -0.00700381, D (stofflich) -0.00204718
- Potenzial für die Verknappung abiotischer Ressourcen – nicht fossile Ressourcen (ADPE) [kg Sb-Äqv.]: A1 7.13793e-7, A2 1.43651e-11, A3 2.61037e-6, A1-A3 3.32418e-6, A5 (Entsorgung Verpackung) 6.15175e-10, C2 9.97399e-10, C3 8.76626e-8, D (energetisch) -3.01716e-6, D (stofflich) -6.43253e-8
- Potenzial für die Verknappung abiotischer Ressourcen – fossile Brennstoffe (ADPF) [MJ]: A1 12.6411, A2 0.00251178, A3 74.5823, A1-A3 87.2259, A5 (Entsorgung Verpackung) 0.0488479, C2 0.174398, C3 2.70865, D (energetisch) -117.05, D (stofflich) -4.78706
- Wasser-Entzugspotenzial (Benutzer) (WDP) [m3 world eqv.]: A1 0.00261355, A2 1.60452e-7, A3 0.020343, A1-A3 0.0229567, A5 (Entsorgung Verpackung) 0.000482568, C2 1.11406e-5, C3 0.00083167, D (energetisch) 0.0194423, D (stofflich) -0.000550329
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
## Use advice
Aufgrund der hohen Abdeckung bildet der Datensatz die durchschnittlichen Produktionsverhältnisse und die damit verbundenen Umweltwirkungen repräsentativ für Deutschland ab. Liegen keine herstellerspezifischen Ökobilanzergebnisse des verwendeten Produkts vor, empfiehlt sich die Verwendung dieses Durchschnittsdatensatzes.

## Data sources
- Rüter S, Diederichs S (2012) Ökobilanz Basisdaten für Bauprodukte aus Holz, Hamburg, Johann Heinrich von Thünen Institut, Institut für Holztechnologie und Holzbiologie, Abschlussbericht
- GaBi database (general)
