# Butyl Dichtungsbahn NovoProof® (FAI)

Dataset: ILCD process, EPD, average dataset
Geography: DE
Reference year: 2017
Valid until: 2022
Classification: OEKOBAU.DAT: Kunststoffe / Dachbahnen / Elastomer-Dachbahnen
Classification: IBUCategories: 02 Bauprodukte / Abdichtungen / Dach- und Dichtungsbahnsysteme aus Kunststoffen und Elastomeren
Method details: Dach- und Dichtungsbahnsysteme aus Kunststoffen und Elastomeren.pdf
Generated by: brands and values GmbH
Registration number: EPD-DUR-20170092-IBD1-DE
Owner: CQLT SaarGummi Deutschland GmbH
Compliance: DIN EN 15804; ISO 14025
Review: Accredited third party review by Institut Bauen und Umwelt e. V.
Amounts: rows without a unit in brackets have none in this file; such an amount is in the reference unit of its flow, which a separate flow dataset defines
copyright: true
licenseType: Free of charge for all users and uses
accessRestrictions: None

## General comment
NovoProof®-Dichtungssysteme bestehen aus voll vernetzten Elastomerbahnen auf Basis von Butyl (IIR).

Die NovoProof® Familie umfasst vielfältige Varianten. Hier wird folgende Variante betrachtet:

NovoProof® FAI

Homogene Butyl-Bauwerksdichtung

Die Durchschnittsbildung basiert auf den entsprechenden Produktionsmengen für das Kalenderjahr 2014.

## Technology and included processes
Grundlage der Produktion von Gummimischungen als Werkstoff für die Herstellung von Butyl Dichtungsbahnen ist eine Rezeptur, die die eingesetzten Rohstoffe qualitativ als auch quantitativ festschreibt. Der Herstellprozess in Wadern-Büschfeld ist ein klassischer Batchprozess. Die benötigten Rohstoffe werden gemäß der Rezepturrechner gesteuert in automatische Waagen dosiert und über geeignete Fördereinrichtungen in einem Innenmischer bereitgestellt. Das Ergebnis des Mischprozesses ist eine homogene Rohgummimischung. Produktionsbegleitend werden die Qualitätsmerkmale wie zum Beispiel Festigkeit, Dehnung, Härte, Dichte, Rheometer-Kurve an allen fertigen Rohmischungen geprüft. Die so hergestellte Rohgummimischung wird in nächstem Schritt auf einer Roller-Head-Anlage weiterverarbeitet. Der kontinuierliche Produktionsprozess beginnt mit der Extrusion, dabei wird das Material mithilfe von Breitspritzkopf und Kalander auf die gewünschte Dicke (0,6 – 2,5 mm) und Breite (max. 1400 mm) gebracht. Danach durchläuft die unvulkanisierte Bahn Prägewalzen. Bei der Butyl-Dichtungsbahn wird der Schriftzug „IIR“ mit eingeprägt. Im weiteren Prozessverlauf wird die so geformte Bahn in einem Heißluftkanal in einem kontinuierlichen Prozess vulkanisiert (vernetzt). Nach der Vulkanisation wird die Bahn über eine Abkühlstrecke auf Raumtemperatur gebracht und als Rollenware aufgewickelt. Bei Bedarf können die Bahnen vorkonfektioniert werden. Die Entwicklung und Herstellung erfolgt gemäß den Anforderungen des Qualitätsmanagementsystems nach /DIN EN ISO 9001:2008/. Die Qualität der fertigen Produkte wird regelmäßig durch die werkseigene Produktionskontrolle und durch externe Qualitätsüberwachungen gesichert.
Technische Daten:
Leistungswerte des Produkts entsprechend der Leistungserklärung in Bezug auf dessen Wesentliche Merkmale gemäß - DIN EN 13859-2:2014 „Abdichtungsbahnen – Definitionen und Eigenschaften von Unterdeck- und Unterspannbahnen – Teil 2: Unterdeck- und Unterspannbahnen für WändeNovoProof® FAI
Deklarierte Einheit:
Die deklarierte Einheit ist 1 m² der verklebten NovoProof Dichtungsbahn FAI, inklusive Verpackungsmaterialien und Befestigungsmaterial (Klebstoff).

## Technical purpose
NovoProof® FAI wird zur dauerelastischen, luft- und wasserdampfdichten Abdichtung von Fenster- und Fassadenanschlüsse eingesetzt. Die Bahn wird dabei mit der Innenwand und/oder Fenster verklebt.

## Scenarios
- S1: recycling
- S2: thermische Verwertung

## Reference product
- 1 m² Durchschnittsdichtungsbahn (FAI) inkl. Verpackungsmaterialien und Befestigungsmitteln: 1

## Inputs
- Erneuerbare Primärenergie als Energieträger (PERE) [MJ]: A1-A3 7.17932, A4 0.0209726, A5 0.523367, C2 0.0126979, C3 (S1) 0.0420622, C3 (S2) 0.0628688, D (S1) -1.86103, D (S2) -0.0572284
- Erneuerbare Primärenergie zur stofflichen Nutzung (PERM) [MJ]: A1-A3 0.0845, A4 0, A5 -0.097, C2 0, C3 (S1) 0, C3 (S2) 0, D (S1) 0, D (S2) 0
- Total erneuerbare Primärenergie (PERT) [MJ]: A1-A3 7.26382, A4 0.0209726, A5 0.426367, C2 0.0126979, C3 (S1) 0.0420622, C3 (S2) 0.0628688, D (S1) -1.86103, D (S2) -0.0572284
- Nicht-erneuerbare Primärenergie als Energieträger (PENRE) [MJ]: A1-A3 49.8623, A4 0.370327, A5 15.8517, C2 0.224216, C3 (S1) 27.1702, C3 (S2) 0.720722, D (S1) -34.2612, D (S2) -24.3871
- Nicht-erneuerbare Primärenergie zur stofflichen Nutzung (PENRM) [MJ]: A1-A3 40.121, A4 0, A5 -1.77, C2 0, C3 (S1) -27.02, C3 (S2) -27.02, D (S1) -27.02, D (S2) 0
- Total nicht erneuerbare Primärenergie (PENRT) [MJ]: A1-A3 89.9833, A4 0.370327, A5 14.0817, C2 0.224216, C3 (S1) 0.150222, C3 (S2) 0.720743, D (S1) -61.2812, D (S2) -24.3871
- Einsatz von Sekundärstoffen (SM) [kg]: A1-A3 0, A4 0, A5 0, C2 0, C3 (S1) 0, C3 (S2) 0, D (S1) 0.599, D (S2) 0
- Erneuerbare Sekundärbrennstoffe (RSF) [MJ]: A1-A3 0, A4 0, A5 0, C2 0, C3 (S1) 0, C3 (S2) 0, D (S1) 0, D (S2) 0
- Nicht erneuerbare Sekundärbrennstoffe (NRSF) [MJ]: A1-A3 0, A4 0, A5 0, C2 0, C3 (S1) 0, C3 (S2) 0, D (S1) 0, D (S2) 0
- Einsatz von Süßwasserressourcen (FW) [m^3]: A1-A3 0.472994, A4 5.25318e-5, A5 0.0205873, C2 3.18056e-5, C3 (S1) 6.48931e-5, C3 (S2) 0.00654256, D (S1) -0.00719157, D (S2) -0.00079997

## Outputs
- Gefährlicher Abfall zur Deponie (HWD) [kg]: A1-A3 1.86987e-7, A4 2.80057e-8, A5 7.67312e-9, C2 1.69561e-8, C3 (S1) 9.53736e-11, C3 (S2) 5.08683e-9, D (S1) -2.97164e-7, D (S2) -4.35766e-9
- Entsorgter nicht gefährlicher Abfall (NHWD) [kg]: A1-A3 0.0262244, A4 3.11181e-5, A5 0.00393291, C2 1.88406e-5, C3 (S1) 9.06663e-5, C3 (S2) 5.65217e-6, D (S1) -0.0247106, D (S2) -0.00262891
- Entsorgter radioaktiver Abfall (RWD) [kg]: A1-A3 0.0016922, A4 5.29466e-7, A5 0.00015954, C2 3.20567e-7, C3 (S1) 2.26654e-5, C3 (S2) 9.617e-8, D (S1) -0.000442876, D (S2) -1.30679e-5
- Komponenten für die Wiederverwendung (CRU) [kg]: A1-A3 0, A4 0, A5 0, C2 0, C3 (S1) 0, C3 (S2) 0, D (S1) 0, D (S2) 0
- Stoffe zum Recycling (MFR) [kg]: A1-A3 0, A4 0, A5 0, C2 0, C3 (S1) 1.1875, C3 (S2) 0, D (S1) 0, D (S2) 0
- Stoffe für die Energierückgewinnung (MER) [kg]: A1-A3 0, A4 0, A5 0, C2 0, C3 (S1) 0, C3 (S2) 0, D (S1) 0, D (S2) 0
- Exportierte elektrische Energie (EEE) [MJ]: A1-A3 0, A4 0, A5 0.294, C2 0, C3 (S1) 0, C3 (S2) 4.59, D (S1) 0, D (S2) 0
- Exportierte thermische Energie (EET) [MJ]: A1-A3 0, A4 0, A5 0.676, C2 0, C3 (S1) 0, C3 (S2) 11.076, D (S1) 0, D (S2) 0

## Impact indicators
- Globales Erwärmungspotenzial (GWP) [kg CO_(2)-Äq.]: A1-A3 3.71219, A4 0.0267871, A5 0.694583, C2 0.016226, C3 (S1) 0.00861801, C3 (S2) 2.58857, D (S1) -2.21734, D (S2) -1.49982
- Abbau Potential der stratosphärischen Ozonschicht (ODP) [kg CFC11-Äq.]: A1-A3 2.49198e-7, A4 1.23126e-13, A5 1.09708e-8, C2 7.45468e-14, C3 (S1) 6.11946e-12, C3 (S2) 5.55734e-10, D (S1) -2.59062e-11, D (S2) -6.71559e-13
- Versauerungspotenzial von Boden und Wasser (AP) [kg SO_(2)-Äq.]: A1-A3 0.00836794, A4 0.000116657, A5 0.000952976, C2 0.000101378, C3 (S1) 2.39954e-5, C3 (S2) 0.000198207, D (S1) -0.00278884, D (S2) -0.00101631
- Eutrophierungspotenzial (EP) [kg PO_(4)^(3)-Äq.]: A1-A3 0.000942306, A4 2.85897e-5, A5 0.000104595, C2 2.54186e-5, C3 (S1) 2.14693e-6, C3 (S2) 4.33667e-5, D (S1) -0.000334858, D (S2) -0.000152232
- Bildungspotential für troposphärisches Ozon (POCP) [kg Ethen-Äq.]: A1-A3 0.00091133, A4 -3.99434e-5, A5 0.000169796, C2 -4.24951e-5, C3 (S1) 1.65385e-6, C3 (S2) 2.25994e-5, D (S1) -0.000484782, D (S2) -0.000190775
- Potenzial für den abiotischen Abbau nicht fossiler Ressourcen (ADPE) [kg Sb-Äq.]: A1-A3 1.25134e-5, A4 1.78385e-9, A5 5.8029e-7, C2 1.08004e-9, C3 (S1) 2.81434e-9, C3 (S2) -1.83977e-8, D (S1) -1.61286e-6, D (S2) -6.99001e-8
- Potenzial für den abiotischen Abbau fossiler Brennstoffe (ADPF) [MJ]: A1-A3 85.2044, A4 0.36897, A5 13.6656, C2 0.223394, C3 (S1) 0.0933598, C3 (S2) 0.642542, D (S1) -60.1653, D (S2) -24.354

## Use advice
Gültigkeitsbereich:
Die vorliegende EPD bezieht sich auf den gesamten Lebensweg einer Durchschnittsdichtungsbahn von SaarGummi Construction Deutschland der Variante FAI. Die unterschiedlichen technischen Eigenschaften werden in Kapitel 2.3 dargestellt.

Die Produkte werden am SaarGummi Construction Deutschland Produktionsstandort in Wadern-Büschfeld, Deutschland, produziert.
Systemgrenze:
Typ der EPD: Wiege bis Werkstor – mit Optionen

Module A1-A3

Die Herstellungsphase enthält die Produktion der notwendigen Rohstoffe inklusive aller Vorketten sowie der notwendigen Beschaffungstransporte. Für die Produktion der deklarierten Einheit wurden auch die hierfür notwendige elektrische und thermische Energie sowie Hilfs- und Betriebsstoffe inklusive deren Vorketten betrachtet. Anfallende Abfälle und Abwässer werden bis zu deren vollständigen Beseitigung berücksichtigt.

Modul A4

Dieses Modul betrachtet die ökologischen Auswirkungen des Transportes der deklarierten Einheit vom Werkstor bis zur Baustelle.

Modul A5

Hier wurden die entstehenden Umweltwirkungen bei der Entsorgung der Produktverpackungsmaterialien berücksichtigt. In diesem wird der Installationsaufwand betrachtet.

Module C2-3

Die Module beinhalten die Umweltwirkungen der Abfallbehandlung am Ende der Produktnutzung sowie die zugehörigen Transporte. In Szenario 1 wird hier der Aufwand für das Aufbereiten, in Szenario 2 der Aufwand für die Verbrennung der Dichtungsbahn modelliert.

Modul D

Die aus der Abfallbehandlung (aus A5 und C3) resultierenden Wertströme, die wiederum potenziell als energetischer (Verbrennung mit Energierückgewinnung, Szenario 2) oder werkstofflicher Input (Recycling, Szenario 1) für ein nachgelagertes Produktsystem dienen können, werden hier als Gutschriften ausgewiesen.

## Data sources
- GaBi Database (all versions)
- GaBi database SP27 2015
