# voestalpine Schienen

Dataset: ILCD process, EPD, average dataset
Geography: AT
Reference year: 2019
Valid until: 2024
Classification: OEKOBAU.DAT: Metalle / Stahl und Eisen / Stahlprofile
Classification: IBUCategories: 02 Bauprodukte / Tiefbauprodukte / Schienen, die eine Spur für Fahrzeuge bilden
Method details: Schienen, die eine Spur für Fahrzeuge bilden.pdf
Registration number: EPD-VOE-20190094-IAC1-DE
Owner: voestalpine AG
Compliance: DIN EN 15804; ISO 14025
Review: Accredited third party review by Institut Bauen und Umwelt e. V.
Amounts: rows without a unit in brackets have none in this file; such an amount is in the reference unit of its flow, which a separate flow dataset defines
copyright: true

## General comment
Die Produkte der voestalpine Rail Technology GmbH werden in rund 120 verschiedenen Profilen und unterschiedlichen Güten nach den gültigen europäischen und internationalen Normen, Richtlinien und Spezifikationen gefertigt und ausgeliefert.

## Technology and included processes
Das Ausgangsmaterial für die Herstellung von Schienenprodukten der voestalpine bildet Rohstahl, der über die Primärroute (Hochofen, LD-Stahlwerk) am Standort Donawitz hergestellt wird. Der flüssige Rohstahl wird mittels Stranggussverfahren zu Vorblöcken gegossen. Die Vorblöcke werden im Vorblocklager bzw. in den Warmhaltegruben zwischengelagert und anschließend im Hubbalkenofen eingesetzt und kontrolliert auf Walztemperatur erwärmt. Danach werden die Schienen in der Vorprofilstraße (BDM - "Break-Down-Mill") reversierend vorgewalzt. Im Anschluss erfolgt die endgültige Formgebung in der Profilfertigstraße (UFR - "Ultra-Flexible-Rail-Mill"). Je nach Kundenwunsch findet eine natürliche Abkühlung oder eine Wärmebehandlung der Schiene statt. Weitere Fertigungsstufen: vertikales und horizontales Richten, zerstörungsfreie Prüfung (Visual Testing, Ebenheitsprüfung, Wirbelstromprüfung und Ultraschallprüfung), Endenrichten, Sägen, Bohren, Endabnahme, Lagerung und Versand.
Technische Daten:
Die vorliegende EPD bezieht sich auf alle Produkte der voestalpine Rail Technology GmbH in unterschiedlichen Stahlgüten, Abmessungen, Profilen und Auslieferungszuständen.
Deklarierte Einheit:
Die vorliegende Umweltproduktdeklaration bezieht sich auf eine deklarierte Einheit von 1 t durchschnittlicher voestalpine Schiene.

## Technical purpose
Die Produkte der voestalpine Rail Technology GmbH finden im Schienenverkehr vorwiegend in folgenden Bereichen Anwendung:

- im Hochgeschwindigkeitsverkehr

- im Mischverkehr (Personen- und Güterverkehr)

- im Schwerlastbereich (z.B. Erzbahnen)

- im städtischen Nahverkehr (U-Bahn, Straßenbahn)

- im Weichenbau (Einzelteile für die

Weichenherstellung)

## Reference product
- voestalpine Schiene: 1000

## Inputs
- Erneuerbare Primärenergie als Energieträger (PERE) [MJ]: A1-A3 1046.69, C3 0, C4 2.66125, D 821.182
- Erneuerbare Primärenergie zur stofflichen Nutzung (PERM) [MJ]: A1-A3 0, C3 0, C4 0, D 0
- Total erneuerbare Primärenergie (PERT) [MJ]: A1-A3 1046.69, C3 0, C4 2.66125, D 821.182
- Nicht-erneuerbare Primärenergie als Energieträger (PENRE) [MJ]: A1-A3 21796.5, C3 0, C4 35.9682, D -11941.2
- Nicht-erneuerbare Primärenergie zur stofflichen Nutzung (PENRM) [MJ]: A1-A3 0, C3 0, C4 0, D 0
- Total nicht erneuerbare Primärenergie (PENRT) [MJ]: A1-A3 21796.5, C3 0, C4 35.9682, D -11941.2
- Einsatz von Sekundärstoffen (SM) [kg]: A1-A3 156.08, C3 0, C4 0, D 794
- Erneuerbare Sekundärbrennstoffe (RSF) [MJ]: A1-A3 0, C3 0, C4 0, D 0
- Nicht erneuerbare Sekundärbrennstoffe (NRSF) [MJ]: A1-A3 0, C3 0, C4 0, D 0
- Einsatz von Süßwasserressourcen (FW) [m^3]: A1-A3 5.83237, C3 0, C4 -1.69202e-5, D 1.71248

## Outputs
- Gefährlicher Abfall zur Deponie (HWD) [kg]: A1-A3 0.000399103, C3 0, C4 1.92332e-7, D -0.000834485
- Entsorgter nicht gefährlicher Abfall (NHWD) [kg]: A1-A3 19.925, C3 0, C4 50.1116, D 137.119
- Entsorgter radioaktiver Abfall (RWD) [kg]: A1-A3 0.176228, C3 0, C4 0.000501383, D 0.000410665
- Komponenten für die Wiederverwendung (CRU) [kg]: A1-A3 0, C3 0, C4 0, D 0
- Stoffe zum Recycling (MFR) [kg]: A1-A3 0, C3 950, C4 0, D 0
- Stoffe für die Energierückgewinnung (MER) [kg]: A1-A3 0, C3 0, C4 0, D 0
- Exportierte elektrische Energie (EEE) [MJ]: A1-A3 0, C3 0, C4 0, D 0
- Exportierte thermische Energie (EET) [MJ]: A1-A3 0, C3 0, C4 0, D 0

## Impact indicators
- Globales Erwärmungspotenzial (GWP) [kg CO_(2)-Äq.]: A1-A3 2626.12, C3 0, C4 2.42346, D -1284.21
- Abbau Potential der stratosphärischen Ozonschicht (ODP) [kg CFC11-Äq.]: A1-A3 7.18279e-9, C3 0, C4 6.33761e-13, D 7.11936e-6
- Versauerungspotenzial von Boden und Wasser (AP) [kg SO_(2)-Äq.]: A1-A3 6.73365, C3 0, C4 0.00673847, D -2.50644
- Eutrophierungspotenzial (EP) [kg PO_(4)^(3)-Äq.]: A1-A3 0.795688, C3 0, C4 0.000853818, D -0.187182
- Bildungspotential für troposphärisches Ozon (POCP) [kg Ethen-Äq.]: A1-A3 1.16818, C3 0, C4 0.000598699, D -0.58942
- Potenzial für den abiotischen Abbau nicht fossiler Ressourcen (ADPE) [kg Sb-Äq.]: A1-A3 0.0288942, C3 0, C4 5.11093e-7, D -0.00368889
- Potenzial für den abiotischen Abbau fossiler Brennstoffe (ADPF) [MJ]: A1-A3 21351.4, C3 0, C4 34.6914, D -12391.1

## Use advice
Gültigkeitsbereich:
Die vorliegende Umweltproduktdeklaration bezieht sich auf eine deklarierte Einheit von 1 t durchschnittlicher voestalpine Schiene produziert am Standort Donawitz. Bei dem betrachteten Produkt handelt es sich um naturharte und wärmebehandelte Schienen.
Systemgrenze:
Die Ökobilanz der durchschnittlichen voestalpine Schiene beinhaltet eine cradle-to-gate (Wiege bis zum Werkstor) Betrachtung der auftretenden Umweltwirkungen mit Optionen. Die folgenden Lebenszyklusphasen werden in der Analyse berücksichtigt:

Modul A1-A3 | Produktstadium

Das Produktstadium beinhaltet die Aufwendungen der benötigten Vorprodukte (hauptsächlich Stahlvorblöcke) und eingesetzten Betriebsstoffe sowie der damit verbundenen Transporte am Produktionsstandort Donawitz. Am Standort wurden die für die Stahlproduktion sowie die anschließende Schienenproduktion im Walzwerk und der Adjustage benötigten Material- und Energieflüsse erfasst. Die Energiebereitstellung am Standort Donawitz erfolgt über ein zentrales Kraftwerk in dem Hüttengase zur Energiegewinnung verwertet werden. Da mehr Energie verbraucht wird als durch das eigene Kraftwerk zur Verfügung steht, werden zusätzlich Erdgas und elektrische Energie vom österreichischen Netz bezogen. Das deklarierte Produkt wird gänzlich unverpackt ausgeliefert.

Modul C3 | Abfallbehandlung

Nach der Nutzung verlässt das ausgebaute Produkt das Produktsystem in C3 und erreicht das Modul D zum Recycling. Aufwendungen für die Zerkleinerung und Sortierung des Stahlschrottes sind nicht enthalten.

Modul C4 | Entsorgung

Das Modul C4 deklariert die durch die Deponierung

(5 % des Produktes) entstehenden Umweltwirkungen.

Modul D | Gutschriften und Lasten außerhalb der Systemgrenzen

Im Modul D werden die Substitutionspotentiale von Primärstahl durch ein Recyclingszenario (95 % des Produkts) dargestellt.

## Data sources
- voestalpine Schienen.pdf
- GaBi Database (all versions)
- GaBi database SP29 2016
