# Blähton Körnung; grain size 4/16

Dataset: ILCD process, EPD, generic dataset
Geography: DE
Reference year: 2018
Valid until: 2022
Classification: oekobau.dat: Mineralische Baustoffe / Zuschläge / Blähton
Owner: thinkstep
Compliance: DIN EN 15804
Review: Dependent internal review by thinkstep, IABP-GaBi, IBP-GaBi; Independent external review by GaBi user forum, GaBi bug forum, GaBi user community
Amounts: rows without a unit in brackets have none in this file; such an amount is in the reference unit of its flow, which a separate flow dataset defines
copyright: true

## General comment
Dieser Datensatz wurde nach dem European Standard EN 15804 für Nachhaltiges Bauen modelliert. Ergebnisse werden in Modulen abgebildet, die den strukturierten Ausdruck von Ergebnissen über den gesamten Lebenszyklus zulassen.

## Geography
Der Datensatz bildet die länderspezifische Situation in Deutschland ab. Dabei werden Haupttechnologien, spezifische regionale Charakteristiken und ggf. Importstatistiken berücksichtigt.

## Time period
Jährlicher Durchschnitt

## Technology and included processes
Blähton ist ein Zusatzstoff, dessen Produktion besonders geeignete Tone/Tonarten mit einheitlichen und fein geriebenen organischen Bestandteilen erfordert. Der Ton aus dem Tagebau wird zu Shots geformt und in einem trommelartigen Ofensystem bei 1.200 °C gebrannt. Die Zuführung von Eisenoxid oder Bleicherde können die Quellung mittels Sauerstoffspaltung bis zu 7 % unterstützen. Die organischen Bestandteile im Ton werden abgebrannt und die shots quellen auf. Der Blähton kann in einer sichtbaren Dichte von ungefähr 300 - 800 kg/m3 produziert werden, entsprechend seiner erforderlichen Anwendung. Blähtonkörner und Sand werden für Ziegelsteine, Wandelemente, Leichtputze, Leichtbeton und als Schüttgut auf Baugeländen und in Grünanlagen verwendet.

Hintergrundsystem:

Strom: Die Stromerzeugung wird entsprechend der länderspezifischen Randbedingungen modelliert. Die landesspezifische Analyse beinhaltet:
1.: Spezifische Kraftwerke der verschiedenen fossilen Energieträger und der Einsatz erneuerbarer Energien sind entsprechend der länderspezifischen Energieträgermixe modelliert. Die Analyse bezieht Stromimporte aus den Nachbarländern, Transmissions-und Verteilungsverluste und den Eigenverbrauch im Kraftwerk und bei der Verteilung bzw. Speicherung, z. B. durch Pumpspeicherwerke, ein.
2.: Die landes-/regionalspezifischen Technologiestandards sowie die Erzeugung in Elektrizitätskraftwerken und/oder in speziellen Kraftwerken mit Kraft-Wärme-Kopplung (KWK) sind berücksichtigt.
3.: Die länderspezifische Energieträgerbereitstellung (mit Anteil der Importe und/oder Eigenversorgung) einschließlich der Energieträger-Eigenschaften (z. B. Elementar- und Energiegehalte) werden berücksichtigt.
4.: Die Förderung, Produktion, Verarbeitung und Transportprozesse werden entsprechend der Situation im jeweiligen Stromerzeugerland modelliert. Die unterschiedlichen Produktions- und Verarbeitungsverfahren (Emissionen und Wirkungsgrade) in den verschiedenen Energieerzeugerländern werden einbezogen, z. B. Rohöl-Veredelungsverfahren oder Abfackel-Raten an den Ölplattformen.
Thermische Energie, Prozessdampf: Die Erzeugung von Dampf und thermischer Energie in Heizkraftwerken wird entsprechend der landesspezifischen Situation (Emissionsgrenzwerte, Energieträgerbasis) modelliert.
Der Wirkungsgrad für die thermische Energieerzeugung beträgt per Definition 100% des Energieträgereinsatzes. Für Prozessdampf liegt der Wirkungsgrad im Bereich von 85-95%. Die zur Heizenergie-Erzeugung verwendeten Energieträger werden entsprechend der nationalen Situation modelliert (siehe Kapitel Strom oben).
Transporte: Alle relevanten und bekannten Transportprozesse in Form von See- und Binnenschiffsverkehr sowie Bahn-, Lkw- und der Leitungstransport sind enthalten.
Energieträger: Die Energieträger werden entsprechend der spezifischen Versorgungslage modelliert (siehe Kapitel Strom oben).
Raffinerieprodukte: Diesel, Benzin, technische Gase, Heizöl, Schmierstoffe und Rückstände, wie Bitumen, werden mit einem parametrierten länderspezifische Raffineriemodell modelliert. Das Raffinerie-Modell bezieht die länderspezifischen Veredelungsverfahren (z. B. Emissionspegel, interner Energieverbrauch etc.) und das länderspezifische Produktspektrum ein, das sich je nach Land stark unterscheiden kann. Die Rohöl-Förderung wird gemäß der länderspezifischen Situation mit den jeweiligen Energieträger-Eigenschaften modelliert.
"

## Technical purpose
Dieses Produkt kann im Baubereich verwendet werden.

## Safety margin
20 %. Produktsystem bis auf wenige Prozesse/Flüsse abgebildet. Technologische, zeitliche und geographische Repräsentativität teilweise gegeben.

## Reference product
- Blähton Korn: 1

## Inputs
- Erneuerbare Primärenergie als Energieträger (PERE) [MJ]: A1-A3 0.897537
- Erneuerbare Primärenergie zur stofflichen Nutzung (PERM) [MJ]: A1-A3 0
- Total erneuerbare Primärenergie (PERT) [MJ]: A1-A3 0.897537
- Nicht-erneuerbare Primärenergie als Energieträger (PENRE) [MJ]: A1-A3 4.90305
- Nicht-erneuerbare Primärenergie zur stofflichen Nutzung (PENRM) [MJ]: A1-A3 0
- Total nicht erneuerbare Primärenergie (PENRT) [MJ]: A1-A3 4.90305
- Einsatz von Sekundärstoffen (SM) [kg]: A1-A3 0
- Erneuerbare Sekundärbrennstoffe (RSF) [MJ]: A1-A3 0.0010229
- Nicht erneuerbare Sekundärbrennstoffe (NRSF) [MJ]: A1-A3 0.000520406
- Einsatz von Süßwasserressourcen (FW) [m3]: A1-A3 0.000848316

## Outputs
- Gefährlicher Abfall zur Deponie (HWD) [kg]: A1-A3 6.02001e-9
- Entsorgter nicht gefährlicher Abfall (NHWD) [kg]: A1-A3 0.0102204
- Entsorgter radioaktiver Abfall (RWD) [kg]: A1-A3 7.18667e-5
- Komponenten für die Wiederverwendung (CRU) [kg]: A1-A3 0
- Stoffe zum Recycling (MFR) [kg]: A1-A3 0
- Stoffe für die Energierückgewinnung (MER) [kg]: A1-A3 0
- Exportierte elektrische Energie (EEE) [MJ]: A1-A3 0
- Exportierte thermische Energie (EET) [MJ]: A1-A3 0

## Impact indicators
- Globales Erwärmungspotenzial (GWP) [kg CO2 Äquiv.]: A1-A3 0.331909
- Abbaupotenzial der stratosphärischen Ozonschicht (ODP) [kg R11 Äquiv.]: A1-A3 2.91514e-15
- Versauerungspotential (AP) [kg SO2 Äquiv.]: A1-A3 0.00240273
- Eutrophierungspotential (EP) [kg Phosphat Äquiv.]: A1-A3 0.000119069
- Bildungspotenzial für troposphärisches Ozon (POCP) [kg Ethen Äquiv.]: A1-A3 0.000152077
- Potenzial für den abiotischen Abbau nicht fossiler Ressourcen (ADPE) [kg Sb Äquiv.]: A1-A3 3.96251e-8
- Potenzial für den abiotischen Abbau fossiler Brennstoffe (ADPF) [MJ]: A1-A3 4.72156

## Use advice
Der Datensatz repräsentiert ein Cradle to Gate Inventar. Er kann verwendet werden, um die Lieferkette des jeweiligen Produktes in einer repräsentativen Weise zu charakterisieren. Die Kombination mit einzelnen Einheitenprozessen und diesem Produkt ermöglicht die Erstellung von anwenderspezifischen (Produkt-) LCAs.

## Data sources
- GaBi Database Edition 2020, SP40
- GaBi database (all versions)
- AUB-Zertifkat Liapor: Blähton (Zertifikat-Nr.: Z.LIA102), 2002
- Ganzheitliche Bilanzierung Gips-Baustoffe , 2001
