# Vormauerziegel; clay- based

Dataset: ILCD process, EPD, generic dataset
Geography: DE
Reference year: 2018
Valid until: 2022
Classification: oekobau.dat: Mineralische Baustoffe / Steine und Elemente / Ziegel
Owner: thinkstep
Compliance: DIN EN 15804
Review: Dependent internal review by thinkstep, IABP-GaBi, IBP-GaBi; Independent external review by GaBi user forum, GaBi bug forum, GaBi user community
Amounts: rows without a unit in brackets have none in this file; such an amount is in the reference unit of its flow, which a separate flow dataset defines
copyright: true

## General comment
Dieser Datensatz wurde nach dem European Standard EN 15804 für Nachhaltiges Bauen modelliert. Ergebnisse werden in Modulen abgebildet, die den strukturierten Ausdruck von Ergebnissen über den gesamten Lebenszyklus zulassen.

## Geography
Der Datensatz bildet die länderspezifische Situation in Deutschland ab. Dabei werden Haupttechnologien, spezifische regionale Charakteristiken und ggf. Importstatistiken berücksichtigt.

## Time period
Jährlicher Durchschnitt

## Technology and included processes
Ziegelsteine/Backsteine werden aus Ton hergestellt. Die Produktionsschritte sind wie folgt: Ton wird beim Tagebau extrahiert. Das feuchte Material wird durch Bagger entnommen und unerwünschte Schichten (Kies/Schotter, Kreide usw.) entfernt. Ton wird mechanisch verarbeitet, um die gewünschten Formeigenschaften zu erhalten. Die mechanische Verarbeitung tritt bei der Verwendung verschiedener Mühlen und Walzen auf, Wasser wird dem ohnehin feuchten Ton beigemischt, um die Formeigenschaften zu verbessern. Der nass verarbeitete Ton kann in Silos gelagert werden, um Entflockung und Homogenisierung zu erreichen. Wenn der Ton die gewünschte Konsistenz hat, wird er mittels Extruder oder Formkästen in die gewünschte Form gebracht. Vor dem Brennvorgang, wird dem Ton so viel Flüssigkeit wie möglich entzogen, andernfalls würde der Ton im Ofen explodieren. Das Trocknen entsteht durch das Aufheizen des Tons auf ca. 80 - 120 °C, die Trockenzeit beträgt ungefähr 18 - 40 Stunden. Wenn der Ton trocken genug ist, wird er in einen Ofen gesteckt, um ihn zu brennen. Die Ofentemperatur beträgt ungefähr 900 - 1200 °C. Bei solch hohen Temperaturen finden Sinterprozesse statt, die den Ton schrumpfen lassen, und der Rest der Flüssigkeit verdampft. Die Ziegelsteine/Backsteine können dann verpackt und verkauft werden/sind dann bereit für Verpackung und Verkauf.

Hintergrundsystem:
Strom: Die Stromerzeugung wird entsprechend der länderspezifischen Randbedingungen modelliert. Die landesspezifische Analyse beinhaltet:
1.: Spezifische Kraftwerke der verschiedenen fossilen Energieträger und der Einsatz erneuerbarer Energien sind entsprechend der länderspezifischen Energieträgermixe modelliert. Die Analyse bezieht Stromimporte aus den Nachbarländern, Transmissions-und Verteilungsverluste und den Eigenverbrauch im Kraftwerk und bei der Verteilung bzw. Speicherung, z. B. durch Pumpspeicherwerke, ein.
2.: Die landes-/regionalspezifischen Technologiestandards sowie die Erzeugung in Elektrizitätskraftwerken und/oder in speziellen Kraftwerken mit Kraft-Wärme-Kopplung (KWK) sind berücksichtigt.
3.: Die länderspezifische Energieträgerbereitstellung (mit Anteil der Importe und/oder Eigenversorgung) einschließlich der Energieträger-Eigenschaften (z. B. Elementar- und Energiegehalte) werden berücksichtigt.
4.: Die Förderung, Produktion, Verarbeitung und Transportprozesse werden entsprechend der Situation im jeweiligen Stromerzeugerland modelliert. Die unterschiedlichen Produktions- und Verarbeitungsverfahren (Emissionen und Wirkungsgrade) in den verschiedenen Energieerzeugerländern werden einbezogen, z. B. Rohöl-Veredelungsverfahren oder Abfackel-Raten an den Ölplattformen.
Thermische Energie, Prozessdampf: Die Erzeugung von Dampf und thermischer Energie in Heizkraftwerken wird entsprechend der landesspezifischen Situation (Emissionsgrenzwerte, Energieträgerbasis) modelliert.
Der Wirkungsgrad für die thermische Energieerzeugung beträgt per Definition 100% des Energieträgereinsatzes. Für Prozessdampf liegt der Wirkungsgrad im Bereich von 85-95%. Die zur Heizenergie-Erzeugung verwendeten Energieträger werden entsprechend der nationalen Situation modelliert (siehe Kapitel Strom oben).
Transporte: Alle relevanten und bekannten Transportprozesse in Form von See- und Binnenschiffsverkehr sowie Bahn-, Lkw- und der Leitungstransport sind enthalten.
Energieträger: Die Energieträger werden entsprechend der spezifischen Versorgungslage modelliert (siehe Kapitel Strom oben).
Raffinerieprodukte: Diesel, Benzin, technische Gase, Heizöl, Schmierstoffe und Rückstände, wie Bitumen, werden mit einem parametrierten länderspezifische Raffineriemodell modelliert. Das Raffinerie-Modell bezieht die länderspezifischen Veredelungsverfahren (z. B. Emissionspegel, interner Energieverbrauch etc.) und das länderspezifische Produktspektrum ein, das sich je nach Land stark unterscheiden kann. Die Rohöl-Förderung wird gemäß der länderspezifischen Situation mit den jeweiligen Energieträger-Eigenschaften modelliert.

## Technical purpose
Dieses Produkt kann im Baubereich verwendet werden.

## Safety margin
20 %. Produktsystem bis auf wenige Prozesse/Flüsse abgebildet. Technologische, zeitliche und geographische Repräsentativität teilweise gegeben.

## Reference product
- Vormauerziegel m3: 1

## Inputs
- Erneuerbare Primärenergie als Energieträger (PERE) [MJ]: A1-A3 574.788, C1 1.01962, C2 3.92256, C3 23.6714, D -14.0717
- Erneuerbare Primärenergie zur stofflichen Nutzung (PERM) [MJ]: A1-A3 0, C1 0, C2 0, C3 0, D 0
- Total erneuerbare Primärenergie (PERT) [MJ]: A1-A3 574.788, C1 1.01962, C2 3.92256, C3 23.6714, D -14.0717
- Nicht-erneuerbare Primärenergie als Energieträger (PENRE) [MJ]: A1-A3 8150.76, C1 17.5144, C2 67.3794, C3 219.3, D -49.3369
- Nicht-erneuerbare Primärenergie zur stofflichen Nutzung (PENRM) [MJ]: A1-A3 0, C1 0, C2 0, C3 0, D 0
- Total nicht erneuerbare Primärenergie (PENRT) [MJ]: A1-A3 8150.76, C1 17.5144, C2 67.3794, C3 219.3, D -49.3369
- Einsatz von Sekundärstoffen (SM) [kg]: A1-A3 0, C1 0, C2 0, C3 0, D 0
- Erneuerbare Sekundärbrennstoffe (RSF) [MJ]: A1-A3 0, C1 0, C2 0, C3 0, D 0
- Nicht erneuerbare Sekundärbrennstoffe (NRSF) [MJ]: A1-A3 0, C1 0, C2 0, C3 0, D 0
- Einsatz von Süßwasserressourcen (FW) [m3]: A1-A3 0.509721, C1 0.000913152, C2 0.00351298, C3 0.0562663, D -0.00912554

## Outputs
- Gefährlicher Abfall zur Deponie (HWD) [kg]: A1-A3 1.65476e-5, C1 6.54493e-7, C2 2.5179e-6, C3 3.97235e-6, D -9.2992e-7
- Entsorgter nicht gefährlicher Abfall (NHWD) [kg]: A1-A3 3.74538, C1 0.00307408, C2 0.0118263, C3 557.284, D -29
- Entsorgter radioaktiver Abfall (RWD) [kg]: A1-A3 0.0672778, C1 1.8439e-5, C2 7.09367e-5, C3 0.0021135, D -0.001837
- Komponenten für die Wiederverwendung (CRU) [kg]: A1-A3 0, C1 0, C2 0, C3 0, D 0
- Stoffe zum Recycling (MFR) [kg]: A1-A3 0, C1 0, C2 0, C3 1670.1, D 0
- Stoffe für die Energierückgewinnung (MER) [kg]: A1-A3 0, C1 0, C2 0, C3 0, D 0
- Exportierte elektrische Energie (EEE) [MJ]: A1-A3 0, C1 0, C2 0, C3 0, D 0
- Exportierte thermische Energie (EET) [MJ]: A1-A3 0, C1 0, C2 0, C3 0, D 0

## Impact indicators
- Globales Erwärmungspotenzial (GWP) [kg CO2 Äquiv.]: A1-A3 528.541, C1 1.29397, C2 5.01311, C3 13.207, D -3.69717
- Abbaupotenzial der stratosphärischen Ozonschicht (ODP) [kg R11 Äquiv.]: A1-A3 3.03841e-12, C1 4.31328e-16, C2 1.65936e-15, C3 7.48137e-14, D -7.13553e-14
- Versauerungspotential (AP) [kg SO2 Äquiv.]: A1-A3 0.451819, C1 0.00451329, C2 0.0101259, C3 0.0854102, D -0.00873075
- Eutrophierungspotential (EP) [kg Phosphat Äquiv.]: A1-A3 0.083933, C1 0.00106489, C2 0.00240722, C3 0.0145329, D -0.00169886
- Bildungspotenzial für troposphärisches Ozon (POCP) [kg Ethen Äquiv.]: A1-A3 0.0798845, C1 0.000445959, C2 -0.00303373, C3 0.00775107, D 0.00080257
- Potenzial für den abiotischen Abbau nicht fossiler Ressourcen (ADPE) [kg Sb Äquiv.]: A1-A3 5.4421e-5, C1 1.09656e-7, C2 4.21858e-7, C3 7.09668e-6, D -8.21695e-7
- Potenzial für den abiotischen Abbau fossiler Brennstoffe (ADPF) [MJ]: A1-A3 7980.87, C1 17.4672, C2 67.1981, C3 213.962, D -44.6993

## Use advice
Der Datensatz repräsentiert ein Cradle to Gate Inventar. Er kann verwendet werden, um die Lieferkette des jeweiligen Produktes in einer repräsentativen Weise zu charakterisieren. Die Kombination mit einzelnen Einheitenprozessen und diesem Produkt ermöglicht die Erstellung von anwenderspezifischen (Produkt-) LCAs.

## Data sources
- GaBi Database Edition 2020, SP40
- GaBi database (all versions)
- HOW CLAY BRICKS ARE MADE
