# Pfosten/Riegel System aus Stahl mit Dreifachverglasung Fassade

Dataset: ILCD process, EPD, generic dataset
Geography: DE
Reference year: 2018
Valid until: 2022
Classification: oekobau.dat: Komponenten von Fenstern und Vorhangfassaden / Rahmen / Profile / Stahl
Owner: thinkstep
Compliance: DIN EN 15804
Review: Dependent internal review by thinkstep, IABP-GaBi, IBP-GaBi; Independent external review by GaBi user forum, GaBi bug forum, GaBi user community
Amounts: rows without a unit in brackets have none in this file; such an amount is in the reference unit of its flow, which a separate flow dataset defines
copyright: true

## General comment
Dieser Datensatz wurde nach dem European Standard EN 15804 für Nachhaltiges Bauen modelliert. Ergebnisse werden in Modulen abgebildet, die den strukturierten Ausdruck von Ergebnissen über den gesamten Lebenszyklus zulassen.

## Geography
Der Datensatz bildet die länderspezifische Situation in Deutschland ab. Dabei werden Haupttechnologien, spezifische regionale Charakteristiken und ggf. Importstatistiken berücksichtigt.

## Time period
Jährlicher Durchschnitt

## Technology and included processes
Vordergrundsystem
Dieser Datensatz beschreibt die Herstellung bis zum Werkstor eines Pfosten- Riegel- Systems aus Stahl mit Dreifachisolierverglasung. Dieser Datensatz basiert auf einer Fassade mit 3,5m Höhe und 4m Breite und wurde auf 1m² skaliert.

Das betrachtete Pfosten- Riegel- System hat einen rechteckigen Querschnitt mit den Abmessungen 125mm*50mm. Der LCI- Datensatz berücksichtigt die Herstellung und die Montage aller Stahlbauteile, der Befestigungs- und Abdichtungsmaterialien, sowie der Dreifachverglasung mit einem U-Wert von 0,7 W/m²*K. Transportprozesse für die Rohstoffe wurden berücksichtigt. Alle wichtigen Energie- und Stoffflüsse sind im System inbegriffen. Die Wirkungsbilanz der Produktionsanlagen und der Infrastruktur wurde im System nicht berücksichtigt.

Wenden Sie diesen Datensatz an, indem Sie die Gesamtfläche Ihres Pfosten- Riegel- Systems mit dem Ergebnis dieses Datensatzes multiplizieren.

Hintergrundsystem:
Strom: Die Stromerzeugung wird entsprechend der länderspezifischen Randbedingungen modelliert. Die landesspezifische Analyse beinhaltet:
1.: Spezifische Kraftwerke der verschiedenen fossilen Energieträger und der Einsatz erneuerbarer Energien sind entsprechend der länderspezifischen Energieträgermixe modelliert. Die Analyse bezieht Stromimporte aus den Nachbarländern, Transmissions-und Verteilungsverluste und den Eigenverbrauch im Kraftwerk und bei der Verteilung bzw. Speicherung, z. B. durch Pumpspeicherwerke, ein.
2.: Die landes-/regionalspezifischen Technologiestandards sowie die Erzeugung in Elektrizitätskraftwerken und/oder in speziellen Kraftwerken mit Kraft-Wärme-Kopplung (KWK) sind berücksichtigt.
3.: Die länderspezifische Energieträgerbereitstellung (mit Anteil der Importe und/oder Eigenversorgung) einschließlich der Energieträger-Eigenschaften (z. B. Elementar- und Energiegehalte) werden berücksichtigt.
4.: Die Förderung, Produktion, Verarbeitung und Transportprozesse werden entsprechend der Situation im jeweiligen Stromerzeugerland modelliert. Die unterschiedlichen Produktions- und Verarbeitungsverfahren (Emissionen und Wirkungsgrade) in den verschiedenen Energieerzeugerländern werden einbezogen, z. B. Rohöl-Veredelungsverfahren oder Abfackel-Raten an den Ölplattformen.
Thermische Energie, Prozessdampf: Die Erzeugung von Dampf und thermischer Energie in Heizkraftwerken wird entsprechend der landesspezifischen Situation (Emissionsgrenzwerte, Energieträgerbasis) modelliert.
Der Wirkungsgrad für die thermische Energieerzeugung beträgt per Definition 100% des Energieträgereinsatzes. Für Prozessdampf liegt der Wirkungsgrad im Bereich von 85-95%. Die zur Heizenergie-Erzeugung verwendeten Energieträger werden entsprechend der nationalen Situation modelliert (siehe Kapitel Strom oben).
Transporte: Alle relevanten und bekannten Transportprozesse in Form von See- und Binnenschiffsverkehr sowie Bahn-, Lkw- und der Leitungstransport sind enthalten.
Energieträger: Die Energieträger werden entsprechend der spezifischen Versorgungslage modelliert (siehe Kapitel Strom oben).
Raffinerieprodukte: Diesel, Benzin, technische Gase, Heizöl, Schmierstoffe und Rückstände, wie Bitumen, werden mit einem parametrierten länderspezifische Raffineriemodell modelliert. Das Raffinerie-Modell bezieht die länderspezifischen Veredelungsverfahren (z. B. Emissionspegel, interner Energieverbrauch etc.) und das länderspezifische Produktspektrum ein, das sich je nach Land stark unterscheiden kann. Die Rohöl-Förderung wird gemäß der länderspezifischen Situation mit den jeweiligen Energieträger-Eigenschaften modelliert.

## Technical purpose
Dieses Produkt kann im Baubereich verwendet werden.

## Safety margin
10 %. Produktsystem weitgehend vollständig abgebildet. Gute technologische, zeitliche und geographische Repräsentativität.

## Reference product
- Stahl-Pfosten-Riegelfassaden: 1

## Inputs
- Erneuerbare Primärenergie als Energieträger (PERE) [MJ]: A1-A3 124.919, C1 0.00426303, C2 0.0907303, C3 0.778616, C4 0.804928, D -2.49609
- Erneuerbare Primärenergie zur stofflichen Nutzung (PERM) [MJ]: A1-A3 0, C1 0, C2 0, C3 0, C4 0, D 0
- Total erneuerbare Primärenergie (PERT) [MJ]: A1-A3 124.919, C1 0.00426303, C2 0.0907303, C3 0.778616, C4 0.804928, D -2.49609
- Nicht-erneuerbare Primärenergie als Energieträger (PENRE) [MJ]: A1-A3 1166.16, C1 0.0732278, C2 1.55851, C3 90.9379, C4 6.13275, D -139.105
- Nicht-erneuerbare Primärenergie zur stofflichen Nutzung (PENRM) [MJ]: A1-A3 88, C1 0, C2 0, C3 -88, C4 0, D 0
- Total nicht erneuerbare Primärenergie (PENRT) [MJ]: A1-A3 1254.16, C1 0.0732278, C2 1.55851, C3 2.93785, C4 6.13275, D -139.105
- Einsatz von Sekundärstoffen (SM) [kg]: A1-A3 1.91825, C1 0, C2 0, C3 0, C4 0, D 0
- Erneuerbare Sekundärbrennstoffe (RSF) [MJ]: A1-A3 0, C1 0, C2 0, C3 0, C4 0, D 0
- Nicht erneuerbare Sekundärbrennstoffe (NRSF) [MJ]: A1-A3 0, C1 0, C2 0, C3 0, C4 0, D 0
- Einsatz von Süßwasserressourcen (FW) [m3]: A1-A3 0.194924, C1 3.8179e-6, C2 8.12566e-5, C3 0.0152673, C4 0.00154302, D -0.0145282

## Outputs
- Gefährlicher Abfall zur Deponie (HWD) [kg]: A1-A3 2.61687e-6, C1 2.73645e-9, C2 5.82399e-8, C3 1.10476e-8, C4 9.34718e-8, D -1.03233e-7
- Entsorgter nicht gefährlicher Abfall (NHWD) [kg]: A1-A3 4.69092, C1 1.28528e-5, C2 0.000273546, C3 0.647565, C4 30.8304, D -0.199193
- Entsorgter radioaktiver Abfall (RWD) [kg]: A1-A3 0.0166875, C1 7.70939e-8, C2 1.64079e-6, C3 0.000111185, C4 6.87641e-5, D 0.000104963
- Komponenten für die Wiederverwendung (CRU) [kg]: A1-A3 0, C1 0, C2 0, C3 0, C4 0, D 0
- Stoffe zum Recycling (MFR) [kg]: A1-A3 0, C1 9.031, C2 0, C3 0, C4 0, D 0
- Stoffe für die Energierückgewinnung (MER) [kg]: A1-A3 0, C1 2.453, C2 0, C3 0, C4 0, D 0
- Exportierte elektrische Energie (EEE) [MJ]: A1-A3 0, C1 0, C2 0, C3 11.5471, C4 0, D 0
- Exportierte thermische Energie (EET) [MJ]: A1-A3 0, C1 0, C2 0, C3 26.5112, C4 0, D 0

## Impact indicators
- Globales Erwärmungspotenzial (GWP) [kg CO2 Äquiv.]: A1-A3 97.0738, C1 0.0054101, C2 0.11612, C3 6.20355, C4 0.420155, D -15.4654
- Abbaupotenzial der stratosphärischen Ozonschicht (ODP) [kg R11 Äquiv.]: A1-A3 6.32267e-13, C1 1.80339e-18, C2 3.83816e-17, C3 4.34633e-15, C4 2.3341e-15, D 3.10817e-15
- Versauerungspotential (AP) [kg SO2 Äquiv.]: A1-A3 0.282745, C1 1.88701e-5, C2 0.000252921, C3 0.000692707, C4 0.00266911, D -0.0310917
- Eutrophierungspotential (EP) [kg Phosphat Äquiv.]: A1-A3 0.0513091, C1 4.45232e-6, C2 6.05971e-5, C3 0.000154235, C4 0.000300304, D -0.00286456
- Bildungspotenzial für troposphärisches Ozon (POCP) [kg Ethen Äquiv.]: A1-A3 0.0232182, C1 1.86456e-6, C2 -8.53574e-5, C3 6.41803e-5, C4 0.000202386, D -0.00398442
- Potenzial für den abiotischen Abbau nicht fossiler Ressourcen (ADPE) [kg Sb Äquiv.]: A1-A3 0.00109715, C1 4.58474e-10, C2 9.75773e-9, C3 4.521e-8, C4 4.25877e-8, D -4.86067e-7
- Potenzial für den abiotischen Abbau fossiler Brennstoffe (ADPF) [MJ]: A1-A3 1212.09, C1 0.0730308, C2 1.55432, C3 2.65718, C4 5.95911, D -139.384

## Use advice
Der Datensatz repräsentiert ein Cradle to Gate Inventar. Er kann verwendet werden, um die Lieferkette des jeweiligen Produktes in einer repräsentativen Weise zu charakterisieren. Die Kombination mit einzelnen Einheitenprozessen und diesem Produkt ermöglicht die Erstellung von anwenderspezifischen (Produkt-) LCAs.

## Data sources
- GaBi Database Edition 2020, SP40
- GaBi database (all versions)
