# PerfectSense Lackplatten

Dataset: ILCD process, EPD, average dataset
Geography: DE
Reference year: 2021
Valid until: 2026
Classification: OEKOBAU.DAT: Holz / Holzwerkstoffe / Holzfaserplatten
Classification: IBUCategories: 02 Bauprodukte / Holzwerkstoffe / Holzwerkstoffe
Method details: Holzwerkstoffe.pdf
Generated by: Daxner & Merl GmbH
Registration number: EPD-EGG-20200253-IBC1-DE
Owner: Fritz EGGER GmbH & Co. OG
Compliance: DIN EN 15804+A2; ISO 14025
Review: Accredited third party review by Institut Bauen und Umwelt e. V.
Amounts: rows without a unit in brackets have none in this file; such an amount is in the reference unit of its flow, which a separate flow dataset defines
copyright: true
licenseType: Free of charge for all users and uses
accessRestrictions: None

## General comment
PerfectSense Lackplatten sind plattenförmige Werkstoffe gemäß

EN 622-5 Faserplatten Anforderungen - Teil 5: Anforderungen an Platten nach dem Trockenverfahren (MDF),

welche für allgemeine Zwecke im Trockenbereich klassifiziert sind.

Für das Vorprodukt wird die MDF-Trägerplatte gemäß

EN 14322 Holzwerkstoffe - Melaminbeschichtete Platten zur Verwendung im Innenbereich - Definition, Anforderungen und Klassifizierung

mit einer Melaminharzbeschichtung versehen.

Die PerfectSense Lackplatten werden standardmäßig mit einer einseitigen UV-Lackierung versehen*. Durch die Homogenität des Trägermaterials kann eine Hochglanzoberfläche mit einem Spiegelglanzeffekt erzeugt werden (PerfectSense Gloss), oder eine besonders matte Oberfläche mit samtiger Haptik und Anti-Fingerprint Eigenschaft (PerfectSense Matt).

Zum Schutz der lackierten Oberfläche wird die PerfectSense Lackplatte mit einer Schutzfolie versehen, welche nach der endgültigen Verarbeitung von der Oberfläche abgezogen wird.

*Die optional verfügbare beidseitige Lackierung ist von der Gültigkeit dieser EPD ausgenommen.

## Technology and included processes
Als Basismaterial einer PerfectSense Lackplatte dient eine melaminharzbeschichtete MDF Platte (Egger Eurodekor MDF). Herstellung der Rohplatten (EGGER MDF): 1. Holzaufbereitung - Rundholzzerspanung - Hackschnitzelaufbereitung - Restholzaufbereitung 2. Kochen der Späne 3. Zerfaserung im Refiner 4. Trockung der Fasern auf ca. 2-3 % Restfeuchte 5. Beleimung der Fasern mit Harzen 6. Streuung der beleimten Fasern auf ein Formband 7. Verpressen der Fasermatte in einer kontinuierlich arbeitenden Heißpresse 8. Aufteilen und Besäumen des Faserstranges zu Rohplattenformaten 9. Auskühlen der Rohplatten in Sternkühlwendern 10. Abstapelung zu Großstapeln 11. Nach Klimatisierungsphase Schleifen der Ober- und Unterseite Herstellung der Imprägnate für die Beschichtung: 1. Abwicklung der Rohpapiere 2. Aufnahme von Imprägnierharz (MUF) in der Anlage 3. Trocknung des imprägnierten Papiers in beheizten Trocknern 4. Formatierung des endlosen Papiers mittels Querschneider 5. Abstapelung der formatierten Bögen auf Paletten Beschichtung der MDF Rohplatte (EGGER Eurodekor): 1. Legung der Imprägnate auf die Ober- und Unterseite der Rohplatte 2. Verpressung der Platte in der Heißpresse mit verschieden strukturierten Pressblechen 3. Qualitätssortierung und Abstapelung 4. Klimatisierungsphase von bis zu 14 Tagen Lackierung der beschichteten MDF-Platte: 1. 2. ... Alle während der Produktion anfallenden Reste (Besäum-, Schneid- und Fräsreste) werden ausnahmslos einer thermischen Verwertung zugeführt. Das Qualitätsmanagementsystem ist nach den Anforderungen der ISO 9001 implementiert und zertifiziert.
Technische Daten:
Die lackierte PerfectSense Platte hat eine melaminharzbeschichtete Platte als Trägerplatte. Definition, Anforderung und Klassifizierung von melaminharzbeschichteten Platten zur Verwendung im Innenbereich sowie Maßtoleranzen liefert die Norm EN 14323.

Die Oberflächeneigenschaften der lackierten Platte werden über eine Vielzahl weiterer Normen geregelt, z.B. das Verhalten bei Kratzbeanspruchung nach EN 15186 oder Oberflächenfehler laut AMK Merkblatt AMK-MB-009.

Detaillierte Angaben entnehmen Sie bitte den Technischen Datenblättern, verfügbar auf www.egger.com.
Deklarierte Einheit:
Die vorliegende Umwelt-Produktdeklaration bezieht sich auf eine deklarierte Einheit von 1 m² EGGER PerfectSense Gloss und Matt Lackplatte mit einem durchschnittlichen Flächengewicht von 13,2 kg/m².

## Technical purpose
PerfectSense Lackplatten mit matter und hochglänzender Oberfläche werden im gehobenen Möbelsegment eingesetzt. Gerne werden PerfectSense Lackplatten in der Inneneinrichtung für Küchenfronten und Schiebetürelemente sowie für Bad- und Wohnmöbel verwendet.

## Reference product
- PerfectSense Lackplatte: 1

## Inputs
- Erneuerbare Primärenergie als Energieträger (PERE) [MJ]: A1-A3 31.7676, C1 0, C2 0.0319584, C3 195.75, C4 0, D -49.353
- Erneuerbare Primärenergie zur stofflichen Nutzung (PERM) [MJ]: A1-A3 234.424, C1 0, C2 0, C3 -194.877, C4 0, D 0
- Total erneuerbare Primärenergie (PERT) [MJ]: A1-A3 266.192, C1 0, C2 0.0319584, C3 0.87298, C4 0, D -49.353
- Nicht-erneuerbare Primärenergie als Energieträger (PENRE) [MJ]: A1-A3 126.663, C1 0, C2 0.554932, C3 34.5638, C4 0, D -196.027
- Nicht-erneuerbare Primärenergie zur stofflichen Nutzung (PENRM) [MJ]: A1-A3 33.6375, C1 0, C2 0, C3 -32.5924, C4 0, D 0
- Total nicht erneuerbare Primärenergie (PENRT) [MJ]: A1-A3 160.301, C1 0, C2 0.554932, C3 1.97137, C4 0, D -196.027
- Einsatz von Sekundärstoffen (SM) [kg]: A1-A3 0, C1 0, C2 0, C3 0, C4 0, D 0
- Erneuerbare Sekundärbrennstoffe (RSF) [MJ]: A1-A3 13.385, C1 0, C2 0, C3 0, C4 0, D 183.457
- Nicht erneuerbare Sekundärbrennstoffe (NRSF) [MJ]: A1-A3 0, C1 0, C2 0, C3 0, C4 0, D 30.6825
- Einsatz von Süßwasserressourcen (FW) [m^3]: A1-A3 0.0351131, C1 0, C2 3.72423e-5, C3 0.00100939, C4 0, D -0.0399145

## Outputs
- Gefährlicher Abfall zur Deponie (HWD) [kg]: A1-A3 2.06398e-5, C1 0, C2 2.56609e-8, C3 8.15539e-10, C4 0, D -6.63425e-8
- Entsorgter nicht gefährlicher Abfall (NHWD) [kg]: A1-A3 0.14355, C1 0, C2 8.79524e-5, C3 0.00139766, C4 0, D 0.00716653
- Entsorgter radioaktiver Abfall (RWD) [kg]: A1-A3 0.0052486, C1 0, C2 1.02279e-6, C3 0.000298914, C4 0, D -0.0168736
- Komponenten für die Wiederverwendung (CRU) [kg]: A1-A3 0, C1 0, C2 0, C3 0, C4 0, D 0
- Stoffe zum Recycling (MFR) [kg]: A1-A3 0, C1 0, C2 0, C3 0, C4 0, D 0
- Stoffe für die Energierückgewinnung (MER) [kg]: A1-A3 0, C1 0, C2 0, C3 13.9155, C4 0, D 0
- Exportierte elektrische Energie (EEE) [MJ]: A1-A3 0, C1 0, C2 0, C3 0, C4 0, D 0
- Exportierte thermische Energie (EET) [MJ]: A1-A3 0, C1 0, C2 0, C3 0, C4 0, D 0

## Impact indicators
- Globales Erwärmungspotenzial total (GWP-total) [kg CO_(2)-Äq.]: A1-A3 -10.209, C1 0, C2 0.0419302, C3 19.4259, C4 0, D -9.40338
- Globales Erwärmungspotenzial fossil (GWP-fossil) [kg CO_(2)-Äq.]: A1-A3 8.87149, C1 0, C2 0.0416644, C3 0.112066, C4 0, D -9.36552
- Globales Erwärmungspotenzial biogen (GWP-biogenic) [kg CO_(2)-Äq.]: A1-A3 -19.1216, C1 0, C2 -6.95439e-5, C3 19.3137, C4 0, D -0.0285922
- Globales Erwärmungspotenzial luluc (GWP-luluc) [kg CO_(2)-Äq.]: A1-A3 0.04114, C1 0, C2 0.000335318, C3 0.000162365, C4 0, D -0.00926623
- Abbau Potential der stratosphärischen Ozonschicht (ODP) [kg CFC11-Äq.]: A1-A3 2.20905e-8, C1 0, C2 7.60305e-18, C3 2.46449e-15, C4 0, D -1.39011e-13
- Versauerungspotenzial von Boden und Wasser (AP) [mol H^(+)-Äq.]: A1-A3 0.027675, C1 0, C2 0.000140794, C3 0.000247426, C4 0, D 0.00763432
- Eutrophierungspotenzial Süßwasser (EP-freshwater) [kg PO_(4)-Äq.]: A1-A3 3.41954e-5, C1 0, C2 1.26179e-7, C3 2.99329e-7, C4 0, D -1.70259e-5
- Eutrophierungspotenzial Salzwasser (EP-marine) [kg N-Äq.]: A1-A3 0.0118303, C1 0, C2 6.35169e-5, C3 5.49525e-5, C4 0, D 0.00193615
- Eutrophierungspotenzial Land (EP-terrestrial) [mol N-Äq.]: A1-A3 0.11563, C1 0, C2 0.000709523, C3 0.000577344, C4 0, D 0.0230106
- Bildungspotential für troposphärisches Ozon (POCP) [kg NMVOC-Äq.]: A1-A3 0.0307761, C1 0, C2 0.000124791, C3 0.000150597, C4 0, D 0.00817787
- Potenzial für den abiotischen Abbau nicht fossiler Ressourcen (ADPE) [kg Sb-Äq.]: A1-A3 4.61334e-6, C1 0, C2 3.34977e-9, C3 3.2431e-8, C4 0, D -2.09006e-6
- Potenzial für den abiotischen Abbau fossiler Brennstoffe (ADPF) [MJ]: A1-A3 160.262, C1 0, C2 0.552716, C3 1.97097, C4 0, D -196.004
- Wassernutzung (WDP) [m^(3) Welt-Äq. entzogen]: A1-A3 0.446595, C1 0, C2 0.000403946, C3 0.0244204, C4 0, D -0.64149
- Auftreten von Krankheiten aufgrund von Feinstaubemissionen (PM) [Krankheitsfälle]: A1-A3 2.80445e-7, C1 0, C2 7.95522e-10, C3 2.07517e-9, C4 0, D -4.12911e-8
- Wirkung durch Exposition des Menschen mit U235 (IR) [kBq U235-Äq.]: A1-A3 0.528358, C1 0, C2 0.000150887, C3 0.0490416, C4 0, D -2.76826
- Toxizitätsvergleichseinheit für Ökosysteme (ETP-fw) [CTUe]: A1-A3 49.1913, C1 0, C2 0.413539, C3 0.843509, C4 0, D -48.0075
- Toxizitätsvergleichseinheit für Menschen (krebserregend) (HTP-c) [CTUh]: A1-A3 4.34153e-8, C1 0, C2 8.54727e-12, C3 2.32924e-11, C4 0, D -1.89866e-10
- Toxizitätsvergleichseinheit für Menschen (nicht krebserregend) (HTP-nc) [CTUh]: A1-A3 8.92754e-8, C1 0, C2 4.92497e-10, C3 8.58186e-10, C4 0, D 5.54942e-8
- Bodenqualitätsindex (SQP) [SQP]: A1-A3 1463.32, C1 0, C2 0.19401, C3 0.627291, C4 0, D -36.047

## Use advice
Gültigkeitsbereich:
Dieses Dokument bezieht sich auf EGGER PerfectSense Gloss und Matt Lackplatten, produziert in Brilon, Deutschland.
Systemgrenze:
Die Ökobilanz der EGGER PerfectSense Gloss und Matt Lackplatte beinhaltet eine cradle-to-gate (Wiege bis zum Werkstor) Betrachtung der auftretenden Umweltwirkungen mit den Modulen C1-C4 und Modul D (A1-A3, +C, +D). Die folgenden Lebenszyklusphasen werden in der Analyse berücksichtigt:

Modul A1–A3 | Produktionsstadium
Das Produktionsstadium beinhaltet die Aufwendungen der Rohstoffversorgung (Rundholz, Herstellung der eingesetzten Basischemikalien für die Leimsysteme der Holzwerkstoffe, die Komponenten der Imprägnierung wie Dekor- und Kraftpapier, Produktion der Lacke, Hilfsstoffe, etc.) sowie der damit verbundenen Transporte zum Produktionsstandort in Brilon. Innerhalb der Werksgrenzen werden der Holzplatz, die Nassspanaufbereitung, Trocknung, Beleimung, Streuung, Pressen, Schleifstraße bis zum Lager und Versand berücksichtigt. Die EURODEKOR Produkte werden darüber hinaus durch das Aufbringen einer Imprägnierung in den Kurztaktpressen veredelt und anschließend verpackt. Bei den PerfectSense Lackplatten werden die EURODEKOR Produkte zusätzlich mit einer Lackschicht versehen. Das eingesetzte Leimsystem wird nicht am Standort hergestellt. Die Bereitstellung thermischer und elektrischer Energie, Druckluft und Wasser erfolgt durch zentrale Versorger am Standort Brilon. Der Großteil der eingesetzten elektrischen Energie wird vom deutschen Stromnetz bezogen. Im eigenen Biomasse­-Kraftwerk wird sowohl internes Restholz als auch extern bezogenes Altholz verwertet. Die Systemgrenze für in der Produktion verwendetes Altholz wird nach dem Sortieren und Hacken gesetzt. Dabei wird angenommen, dass das Ende der Abfalleigenschaft erreicht ist. Hier gilt die nach EN 15804 definierte Systemgrenze für Sekundärrohstoffe.

Modul C1 | Rückbau / Abriss
Für die PerfectSense Lackplatte wurde ein manueller Ausbau angenommen. Die damit verbundenen Aufwände sind vernachlässigbar, wodurch keine Umweltwirkungen aus dem Rückbau der Produkte deklariert werden.

Modul C2 | Transport zur Abfallbehandlung
Modul C2 beinhaltet den Transport zur Abfallbehandlung. Dazu wird der Transport via LKW über 50 km Transportdistanz als repräsentatives Szenario angesetzt.

Modul C3 | Abfallbehandlung
In Modul C3 wird das Hacken nach Ausbau der Produkte betrachtet. Die Holzprodukte und mit ihnen die materialinhärenten Eigenschaften verlassen das Produktsystem als Sekundärbrennstoff in Modul C3.

Modul C4 | Beseitigung
Das angesetzte Szenario deklariert die energetische Verwertung der Holzprodukte, wodurch keine Umweltauswirkungen aus der Abfallbehandlung der Produkte in C4 zu erwarten sind.

Modul D | Gutschriften und Lasten außerhalb der Systemgrenze
In Modul D wird die energetische Verwertung des Produktes am Lebensende inklusive den entsprechenden energetischen Substitutionspotenzialen in Form eines europäischen Durchschnittsszenarios beschrieben.

## Data sources
- GaBi Database (all versions)
- GaBi database SP40 2020
