# Mineralwolle (Innenausbau-Dämmung); 26 kg/m3

Dataset: ILCD process, EPD, generic dataset
Geography: DE
Reference year: 2018
Valid until: 2022
Classification: oekobau.dat: Dämmstoffe / Mineralwolle / Mineralwolle
Owner: thinkstep
Compliance: DIN EN 15804
Review: Dependent internal review by thinkstep, IABP-GaBi, IBP-GaBi; Independent external review by GaBi user forum, GaBi bug forum, GaBi user community
Amounts: rows without a unit in brackets have none in this file; such an amount is in the reference unit of its flow, which a separate flow dataset defines
copyright: true

## General comment
Dieser Datensatz wurde nach dem European Standard EN 15804 für Nachhaltiges Bauen modelliert. Ergebnisse werden in Modulen abgebildet, die den strukturierten Ausdruck von Ergebnissen über den gesamten Lebenszyklus zulassen.

## Geography
Der Datensatz bildet die länderspezifische Situation in Deutschland ab. Dabei werden Haupttechnologien, spezifische regionale Charakteristiken und ggf. Importstatistiken berücksichtigt.

## Time period
Jährlicher Durchschnitt

## Technology and included processes
Als Mineralwolle werden Dämmstoffe aus Steinwolle- und Glaswollefasern bezeichnet. Steinwolle besteht aus Sedimentgestein oder magmatischem Gestein, vorwiegend Basalt und verschiedenen Sekundärrohstoffen. Das Material wird in Kupolschmelzöfen bei Temperaturen zwischen 1.400 und 1.500°C geschmolzen und anschließend über schnell rotierende Walzen geführt. Bindemittel wird hinzugefügt, das flüssige Gestein wird zu Fasern versponnen und imprägniert. Das Bindemittel härtet anschließend in kontinuierlich betriebenen Tunnelöfen. Für die Glaswolleherstellung wird pures Primärglas in einer Schmelzwanne bei etwa 1400°C geschmolzen. Für diesen Prozess wird Strom benötigt. Das geschmolzene Flüssigglas wird in einer Rotationstrommel geschleudert, durch einen gelochten Sekundärcontainer. In einem Heißluftstrom verdampft das Wasser und die Fasern verfestigen sich. Die Rohfasern werden über Laufbänder durch einen Tunnelofen geführt. Das Bindemittel härtet bei etwa 200°C. Die Dämmung wird nach Bedarfsgröße zugeschnitten und verpackt.

Hintergrundsystem:
Strom: Die Stromerzeugung wird entsprechend der länderspezifischen Randbedingungen modelliert. Die landesspezifische Analyse beinhaltet:
1.: Spezifische Kraftwerke der verschiedenen fossilen Energieträger und der Einsatz erneuerbarer Energien sind entsprechend der länderspezifischen Energieträgermixe modelliert. Die Analyse bezieht Stromimporte aus den Nachbarländern, Transmissions-und Verteilungsverluste und den Eigenverbrauch im Kraftwerk und bei der Verteilung bzw. Speicherung, z. B. durch Pumpspeicherwerke, ein.
2.: Die landes-/regionalspezifischen Technologiestandards sowie die Erzeugung in Elektrizitätskraftwerken und/oder in speziellen Kraftwerken mit Kraft-Wärme-Kopplung (KWK) sind berücksichtigt.
3.: Die länderspezifische Energieträgerbereitstellung (mit Anteil der Importe und/oder Eigenversorgung) einschließlich der Energieträger-Eigenschaften (z. B. Elementar- und Energiegehalte) werden berücksichtigt.
4.: Die Förderung, Produktion, Verarbeitung und Transportprozesse werden entsprechend der Situation im jeweiligen Stromerzeugerland modelliert. Die unterschiedlichen Produktions- und Verarbeitungsverfahren (Emissionen und Wirkungsgrade) in den verschiedenen Energieerzeugerländern werden einbezogen, z. B. Rohöl-Veredelungsverfahren oder Abfackel-Raten an den Ölplattformen.
Thermische Energie, Prozessdampf: Die Erzeugung von Dampf und thermischer Energie in Heizkraftwerken wird entsprechend der landesspezifischen Situation (Emissionsgrenzwerte, Energieträgerbasis) modelliert.
Der Wirkungsgrad für die thermische Energieerzeugung beträgt per Definition 100% des Energieträgereinsatzes. Für Prozessdampf liegt der Wirkungsgrad im Bereich von 85-95%. Die zur Heizenergie-Erzeugung verwendeten Energieträger werden entsprechend der nationalen Situation modelliert (siehe Kapitel Strom oben).
Transporte: Alle relevanten und bekannten Transportprozesse in Form von See- und Binnenschiffsverkehr sowie Bahn-, Lkw- und der Leitungstransport sind enthalten.
Energieträger: Die Energieträger werden entsprechend der spezifischen Versorgungslage modelliert (siehe Kapitel Strom oben).
Raffinerieprodukte: Diesel, Benzin, technische Gase, Heizöl, Schmierstoffe und Rückstände, wie Bitumen, werden mit einem parametrierten länderspezifische Raffineriemodell modelliert. Das Raffinerie-Modell bezieht die länderspezifischen Veredelungsverfahren (z. B. Emissionspegel, interner Energieverbrauch etc.) und das länderspezifische Produktspektrum ein, das sich je nach Land stark unterscheiden kann. Die Rohöl-Förderung wird gemäß der länderspezifischen Situation mit den jeweiligen Energieträger-Eigenschaften modelliert.

## Technical purpose
Dieses Produkt kann im Baubereich verwendet werden.

## Safety margin
10 %. Produktsystem weitgehend vollständig abgebildet. Gute technologische, zeitliche und geographische Repräsentativität.

## Reference product
- Mineralwolle (Innenausbau-Dämmung) (m3): 1

## Inputs
- Erneuerbare Primärenergie als Energieträger (PERE) [MJ]: A1-A3 78.0446, C2 0.0656329, C3 1.16436, C4 0.765508
- Erneuerbare Primärenergie zur stofflichen Nutzung (PERM) [MJ]: A1-A3 0, C2 0, C3 0, C4 0
- Total erneuerbare Primärenergie (PERT) [MJ]: A1-A3 78.0446, C2 0.0656329, C3 1.16436, C4 0.765508
- Nicht-erneuerbare Primärenergie als Energieträger (PENRE) [MJ]: A1-A3 481.157, C2 1.1274, C3 26.302, C4 5.83241
- Nicht-erneuerbare Primärenergie zur stofflichen Nutzung (PENRM) [MJ]: A1-A3 0, C2 0, C3 0, C4 0
- Total nicht erneuerbare Primärenergie (PENRT) [MJ]: A1-A3 481.157, C2 1.1274, C3 26.302, C4 5.83241
- Einsatz von Sekundärstoffen (SM) [kg]: A1-A3 5.64769, C2 0, C3 0, C4 0
- Erneuerbare Sekundärbrennstoffe (RSF) [MJ]: A1-A3 0.00680612, C2 0, C3 0, C4 0
- Nicht erneuerbare Sekundärbrennstoffe (NRSF) [MJ]: A1-A3 0, C2 0, C3 0, C4 0
- Einsatz von Süßwasserressourcen (FW) [m3]: A1-A3 0.103197, C2 5.87798e-5, C3 0.00304094, C4 0.00146746

## Outputs
- Gefährlicher Abfall zur Deponie (HWD) [kg]: A1-A3 6.61294e-7, C2 4.21299e-8, C3 1.2079e-8, C4 8.88941e-8
- Entsorgter nicht gefährlicher Abfall (NHWD) [kg]: A1-A3 7.43229, C2 0.000197879, C3 0.0070195, C4 29.3206
- Entsorgter radioaktiver Abfall (RWD) [kg]: A1-A3 0.00853664, C2 1.18692e-6, C3 0.000219852, C4 6.53965e-5
- Komponenten für die Wiederverwendung (CRU) [kg]: A1-A3 0, C2 0, C3 0, C4 0
- Stoffe zum Recycling (MFR) [kg]: A1-A3 0, C2 0, C3 0, C4 0
- Stoffe für die Energierückgewinnung (MER) [kg]: A1-A3 0, C2 0, C3 0, C4 0
- Exportierte elektrische Energie (EEE) [MJ]: A1-A3 2.49031, C2 0, C3 0, C4 0
- Exportierte thermische Energie (EET) [MJ]: A1-A3 5.79025, C2 0, C3 0, C4 0

## Impact indicators
- Globales Erwärmungspotenzial (GWP) [kg CO2 Äquiv.]: A1-A3 40.3055, C2 0.0840353, C3 0.72123, C4 0.399579
- Abbaupotenzial der stratosphärischen Ozonschicht (ODP) [kg R11 Äquiv.]: A1-A3 6.18115e-13, C2 2.77647e-17, C3 6.156e-15, C4 2.2198e-15
- Versauerungspotential (AP) [kg SO2 Äquiv.]: A1-A3 0.180454, C2 0.000186997, C3 0.00107825, C4 0.0025384
- Eutrophierungspotential (EP) [kg Phosphat Äquiv.]: A1-A3 0.0261136, C2 4.48966e-5, C3 0.000134021, C4 0.000285597
- Bildungspotenzial für troposphärisches Ozon (POCP) [kg Ethen Äquiv.]: A1-A3 0.00972905, C2 -6.36476e-5, C3 0.000207753, C4 0.000192475
- Potenzial für den abiotischen Abbau nicht fossiler Ressourcen (ADPE) [kg Sb Äquiv.]: A1-A3 8.53378e-6, C2 7.05859e-9, C3 1.21182e-7, C4 4.05021e-8
- Potenzial für den abiotischen Abbau fossiler Brennstoffe (ADPF) [MJ]: A1-A3 459.604, C2 1.12437, C3 25.7459, C4 5.66728

## Use advice
Der Datensatz repräsentiert ein Cradle to Gate Inventar. Er kann verwendet werden, um die Lieferkette des jeweiligen Produktes in einer repräsentativen Weise zu charakterisieren. Die Kombination mit einzelnen Einheitenprozessen und diesem Produkt ermöglicht die Erstellung von anwenderspezifischen (Produkt-) LCAs.

## Data sources
- GaBi Database Edition 2020, SP40
- GaBi database (all versions)
