# Nutzung - 1 kWh Endenergie aus Holzpellets (entspr. EnEV)

Dataset: ILCD process, EPD, generic dataset
Geography: DE
Reference year: 2018
Valid until: 2022
Classification: oekobau.dat: Gebäudetechnik / Nutzung / Nutzung Wärmeerzeuger (EnEV)
Owner: thinkstep
Compliance: DIN EN 15804
Review: Dependent internal review by thinkstep, IABP-GaBi, IBP-GaBi; Independent external review by GaBi user forum, GaBi bug forum, GaBi user community
Amounts: rows without a unit in brackets have none in this file; such an amount is in the reference unit of its flow, which a separate flow dataset defines
copyright: true

## General comment
Dieser Datensatz wurde nach dem European Standard EN 15804 für Nachhaltiges Bauen modelliert. Ergebnisse werden in Modulen abgebildet, die den strukturierten Ausdruck von Ergebnissen über den gesamten Lebenszyklus zulassen.

## Geography
Der Datensatz bildet die länderspezifische Situation in Deutschland ab. Dabei werden Haupttechnologien, spezifische regionale Charakteristiken und ggf. Importstatistiken berücksichtigt.

## Time period
Jährlicher Durchschnitt

## Technology and included processes
In diesem Datensatz ist die Holzgewinnung, die Herstellung der Holzpellets, Transporte und die Verbrennung der Pellets, sowie die Deponierung der Verbrennungsrückstände (Asche) inbegriffen. Im Sägewerk wurde eine ökonomische Allokation für die Zuordnung der Lasten der unterschiedlichen Sägewerksprodukte verwendet. Für die Trocknung derholzpellets auf 10 M.% Wassergehalt wurde eine technische Trocknung (thermische Energie aus Biomasse) angesetzt. Da Endenergie gem. EnEV als Bezugsgröße vorgesehen ist, wurde eine Kesseleffizienz von 100% bilanziert, d.h. üblicherweise auftretende Anlagenverluste, sowie Hilfsenergie und Stromverbrauch in Bezug auf den Kesselbetrieb sind in diesem Datensatz nicht enthalten.
Die Ökobilanz wird durch den Verbrennungsprozess, die technische Trocknung sowie die Sägewerksprozesse und Transporte dominiert. Die CO2 Bilanz des Brennstoffs ist weitgehend neutral, d.h. die während des Bauwuchses gebundene Menge an CO2 wird beim Verbrennungsprozess wieder frei.

## Technical purpose
Thermische Energie aus Holzpellets wird für die Beheizung eines Gebäudes oder technische Prozesse (z.B. Trocknung) verwendet.

## Safety margin
0 %.

## Reference product
- Thermische Energie (MJ): 3.6

## Inputs
- Erneuerbare Primärenergie als Energieträger (PERE) [MJ]: B6 4.55095
- Erneuerbare Primärenergie zur stofflichen Nutzung (PERM) [MJ]: B6 0
- Total erneuerbare Primärenergie (PERT) [MJ]: B6 4.55095
- Nicht-erneuerbare Primärenergie als Energieträger (PENRE) [MJ]: B6 0.272247
- Nicht-erneuerbare Primärenergie zur stofflichen Nutzung (PENRM) [MJ]: B6 0
- Total nicht erneuerbare Primärenergie (PENRT) [MJ]: B6 0.272247
- Einsatz von Sekundärstoffen (SM) [kg]: B6 0
- Erneuerbare Sekundärbrennstoffe (RSF) [MJ]: B6 0
- Nicht erneuerbare Sekundärbrennstoffe (NRSF) [MJ]: B6 0
- Einsatz von Süßwasserressourcen (FW) [m3]: B6 3.609e-5

## Outputs
- Gefährlicher Abfall zur Deponie (HWD) [kg]: B6 1.56745e-9
- Entsorgter nicht gefährlicher Abfall (NHWD) [kg]: B6 0.00491467
- Entsorgter radioaktiver Abfall (RWD) [kg]: B6 7.40417e-6
- Komponenten für die Wiederverwendung (CRU) [kg]: B6 0
- Stoffe zum Recycling (MFR) [kg]: B6 0
- Stoffe für die Energierückgewinnung (MER) [kg]: B6 0
- Exportierte elektrische Energie (EEE) [MJ]: B6 0
- Exportierte thermische Energie (EET) [MJ]: B6 0

## Impact indicators
- Globales Erwärmungspotenzial (GWP) [kg CO2 Äquiv.]: B6 0.0210824
- Abbaupotenzial der stratosphärischen Ozonschicht (ODP) [kg R11 Äquiv.]: B6 3.35473e-16
- Versauerungspotential (AP) [kg SO2 Äquiv.]: B6 0.000307213
- Eutrophierungspotential (EP) [kg Phosphat Äquiv.]: B6 7.22066e-5
- Bildungspotenzial für troposphärisches Ozon (POCP) [kg Ethen Äquiv.]: B6 3.34966e-5
- Potenzial für den abiotischen Abbau nicht fossiler Ressourcen (ADPE) [kg Sb Äquiv.]: B6 3.77212e-9
- Potenzial für den abiotischen Abbau fossiler Brennstoffe (ADPF) [MJ]: B6 0.253553

## Use advice
Dieser Datensatz bezieht sich auf die Gewinnung von 1 kWh thermischer Energie aus Holzpellets. Der Datensatz ist für die Verwendung von Endenergie gem. EnEV als Bezugsgröße vorgesehen. Bei der Berechnung der Endenergie gem. EnEV werden Anlagenverluste und Anlageneffizienz, sowie Hilfsenergie und Stromverbrauch bereits berücksichtigt, weshalb Sie in diesem Datensatz nicht einberechnet sind. Der Verbrennungsprozess ist entsprechend mit 100% Wirkungsgrad bilanziert. Zur Berechnung der Ökobilanzergebnisse auf Gebäudeebene müssen die Indikatorergebnisse mit dem Endenergiebedarf gem. EnEV multipliziert werden.

## Data sources
- GaBi Database Edition 2020, SP40
- GaBi database (all versions)
