# Kältemaschine (500kW); 1 piece

Dataset: ILCD process, EPD, generic dataset
Geography: DE
Reference year: 2021
Valid until: 2022
Classification: oekobau.dat: Gebäudetechnik / Klimatisierung und Lüftung / Klimatisierung/Kältemaschinen
Owner: Sphera Solutions GmbH
Compliance: EN 15804+A2
Review: Dependent internal review by Sphera Solutions GmbH; Independent external review by GaBi user forum
Amounts: rows without a unit in brackets have none in this file; such an amount is in the reference unit of its flow, which a separate flow dataset defines
copyright: true
licenseType: Free of charge for all users and uses
accessRestrictions: The license conditions as stated on https://www.oekobaudat.de/ apply.
accessRestrictions: Es gelten die Lizenzbedingungen wie sie auf https://www.oekobaudat.de/ genannt sind.

## General comment
Dieser Datensatz wurde nach dem European Standard EN 15804+A2 für Nachhaltiges Bauen modelliert. Ergebnisse werden in Modulen abgebildet, die den strukturierten Ausdruck von Ergebnissen über den gesamten Lebenszyklus zulassen.

## Geography
Der Datensatz bildet die länderspezifische Situation in Deutschland ab. Dabei werden Haupttechnologien, spezifische regionale Charakteristiken und ggf. Importstatistiken berücksichtigt.

## Time period
Jährlicher Durchschnitt

## Technology and included processes
Der Datensatz beinhaltet ausschließlich die Herstellung und Entsorgung der Kältemaschine, nicht deren Betrieb und auch nicht das benötigte Kältemittel. Hauptrohstoffe der Anlage sind Stahl (ca. 45 M.%) Kupfer (ca. 29 M.%) und Gusseisen (ca. 22 M.%).
Für diese Metalle (Stahl, Kupfer und Gusseisen) wurden im Sinne eines koservativen Ansatzes die Primärvorketten verwendet (z.B. im Falle von Stahl die Hochofenroute). Die Ökobilanz wird von der Herstellung der o.g. Metalle dominiert.

Beschreibung EoL Prozesse:
In Modul C1 wird ein maschineller Rückbau angenommen. Sammelverluste werden vernachlässigt.
Der Transport in Modul C2 zur Verwertungsanlage erfolgt mit einem LKW (50km).

Behandlung Metallkomponenten:
Es wird angenommen, dass alle Metalle das Ende der Abfalleigenschaft direkt nach dem Ausbau erreichen. Das heißt die Lasten für die Aufbereitung und die Gutschriften für die Substitution von Primärmaterial werden in Modul D ausgewiesen.
In Modul D sind die Lasten für die Sortierung, Umschmelzen, Schlackebehandlung, Deponierung von Reststoffen, Behandlung von Filterstäuben und Krätzebehandlung enthalten. Die Gutschriften werden für die Nettoschrottmenge (zurückgebaute Menge abzüglich ggfs. enthaltenes Sekundärmaterial, abzüglich Aufbereitungsverluste) für den durchschnittlich vorhandenen Materialmix (aus verschiedenen Legierungen) vergeben.

Kunststoffkomponten:
In Modul C3 wird die Zerkleinerung und thermische Behandlung (Verbrennung) des Materials berücksichtigt. Bei der Berechnung der Verbrennungsemissionen und Gutschriften wird der spezifische Heizwert des jeweiligen Materials sowie die Materialzusammensetzung berücksichtigt.
In Modul D erfolgen Gutschriften für die Substitution von Strom (deutscher Strommix) und thermischer Energie (aus Erdgas).

## Technical purpose
Kompressionskältemaschinen werden für die Kühlung von Gebäuden oder technischen Anlagen verwendet.

## Safety margin
20 %. Produktsystem bis auf wenige Prozesse/Flüsse abgebildet. Technologische, zeitliche und geographische Repräsentativität teilweise gegeben.

## Reference product
- Kältemaschine (500kW): 1

## Inputs
- Erneuerbare Primärenergie als Energieträger (PERE) [MJ]: A1-A3 322928, C1 6.03087, C2 77.1279, D -74644.9
- Erneuerbare Primärenergie zur stofflichen Nutzung (PERM) [MJ]: A1-A3 0, C1 0, C2 0, D 0
- Total erneuerbare Primärenergie (PERT) [MJ]: A1-A3 322928, C1 6.03087, C2 77.1279, D -74644.9
- Nicht-erneuerbare Primärenergie als Energieträger (PENRE) [MJ]: A1-A3 1.43882e6, C1 103.912, C2 1328.92, D -515608
- Nicht-erneuerbare Primärenergie zur stofflichen Nutzung (PENRM) [MJ]: A1-A3 0, C1 0, C2 0, D 0
- Total nicht-erneuerbare Primärenergie (PENRT) [MJ]: A1-A3 1.43882e6, C1 103.912, C2 1328.92, D -515608
- Einsatz von Sekundärstoffen (SM) [kg]: A1-A3 11263.2, C1 0, C2 0, D 0
- Erneuerbare Sekundärbrennstoffe (SF) [MJ]: A1-A3 0, C1 0, C2 0, D 0
- Nicht erneuerbare Sekundärbrennstoffe (NRSF) [MJ]: A1-A3 0, C1 0, C2 0, D 0
- Nettoeinsatz von Süßwasserressourcen (FW) [m3]: A1-A3 755.376, C1 0.00535994, C2 0.0685474, D -397.749

## Outputs
- Gefährlicher Abfall zur Deponie (HWD) [kg]: A1-A3 0.000274532, C1 4.34319e-9, C2 5.55444e-8, D -4.52932e-5
- Entsorgter nicht gefährlicher Abfall (NHWD) [kg]: A1-A3 24562.2, C1 0.0167738, C2 0.214517, D -14201.9
- Entsorgter radioaktiver Abfall (RWD) [kg]: A1-A3 27.9896, C1 9.97172e-5, C2 0.00127527, D 0.988762
- Komponenten für die Wiederverwendung (CRU) [kg]: A1-A3 0, C1 0, C2 0, D 0
- Stoffe zum Recycling (MFR) [kg]: A1-A3 0, C1 35280, C2 0, D 0
- Stoffe für die Energierückgewinnung (MER) [kg]: A1-A3 0, C1 0, C2 0, D 0
- Exportierte elektrische Energie (EEE) [MJ]: A1-A3 0, C1 0, C2 0, D 0
- Exportierte thermische Energie (EET) [MJ]: A1-A3 0, C1 0, C2 0, D 0

## Impact indicators
- Globales Erwärmungspotenzial - total (GWP-total) [kg CO2 eq.]: A1-A3 134912, C1 7.77401, C2 100.942, D -57040.4
- Globales Erwärmungspotenzial - fossil (GWP-fossil) [kg CO2 eq.]: A1-A3 134340, C1 7.72199, C2 100.256, D -57062
- Globales Erwärmungspotenzial - biogen (GWP-biogenic) [kg CO2 eq.]: A1-A3 225.507, C1 0.00167326, C2 0.0415301, D 203.065
- Globales Erwärmungspotenzial - luluc (GWP-luluc) [kg CO2 eq.]: A1-A3 347.1, C1 0.0503465, C2 0.643873, D -181.491
- Abbaupotenzial der stratosphärischen Ozonschicht (ODP) [kg CFC-11 eq.]: A1-A3 9.64009e-10, C1 2.00589e-15, C2 2.5653e-14, D 1.4854e-9
- Versauerungspotenzial, kumulierte Überschreitung (AP) [Mole of H+ eq.]: A1-A3 1110.01, C1 0.103967, C2 0.28425, D -664.608
- Eutrophierungspotenzial - Süßwasser (EP-freshwater) [kg P eq.]: A1-A3 0.214734, C1 1.61225e-5, C2 0.000206189, D -0.0703925
- Eutrophierungspotenzial - Salzwasser (EP-marine) [kg N eq.]: A1-A3 94.3272, C1 0.0472986, C2 0.130948, D -46.6217
- Eutrophierungspotenzial - Land (EP-terrestrial) [Mole of N eq.]: A1-A3 990.427, C1 0.520054, C2 1.46507, D -487.059
- Bildungspotenzial für troposphärisches Ozon (POCP) [kg NMVOC eq.]: A1-A3 311.659, C1 0.141654, C2 0.255351, D -160.038
- Potenzial für die Verknappung abiotischer Ressourcen nicht fossile Ressourcen (ADPE) [kg Sb eq.]: A1-A3 41.3485, C1 6.81915e-7, C2 8.72091e-6, D -26.3544
- Potenzial für die Verknappung abiotischer Ressourcen fossile Brennstoffe (ADPF) [MJ]: A1-A3 1.43553e6, C1 103.908, C2 1328.86, D -513689
- Wasser-Entzugspotenzial (Benutzer) (WDP) [m³ world equiv.]: A1-A3 34774.1, C1 0.0304743, C2 0.389731, D -20531.2

## Use advice
Dieser Datensatz bezieht sich auf die Herstellung einer Kompressionskältemaschine mit einer Kälteleistung von 500 kW. Das Gesamtgewicht der Anlage beträgt 36.000 kg. Der Datensatz kann näherungsweise für die Abschätzung anderer Anlagengewichte zwischen 30.000 und 40.000 kg verwendet werden.

## Data sources
- VDI 2067
- ADNOT 2006
- EECCAC 2003
- MEEUP 2005
- RIVIERE 2007
- Documentation of data quality management
- GaBi Database Edition 2021, CUP2021.01
- GaBi database (all versions)
