# PKW (Diesel) EURO 4

Dataset: ILCD process, EPD, generic dataset
Geography: DE
Reference year: 2018
Valid until: 2022
Classification: oekobau.dat: Sonstige / Personen - Transporte[Personen km] / PKW
Owner: thinkstep
Compliance: DIN EN 15804
Review: Dependent internal review by thinkstep, IABP-GaBi, IBP-GaBi; Independent external review by GaBi user forum, GaBi bug forum, GaBi user community
Amounts: rows without a unit in brackets have none in this file; such an amount is in the reference unit of its flow, which a separate flow dataset defines
copyright: true

## General comment
Dieser Datensatz wurde nach dem European Standard EN 15804 für Nachhaltiges Bauen modelliert. Ergebnisse werden in Modulen abgebildet, die den strukturierten Ausdruck von Ergebnissen über den gesamten Lebenszyklus zulassen.

## Geography
Der Datensatz bildet die länderspezifische Situation in Deutschland ab. Dabei werden Haupttechnologien, spezifische regionale Charakteristiken und ggf. Importstatistiken berücksichtigt.

## Time period
Jährlicher Durchschnitt

## Technology and included processes
Der Datensatz bezieht sich auf 1 km Transport per PKW. Das Transportgewicht ist dabei variabel. Es wurde eine typische Verteilung von Innerorts-, Außerorts- und Autobahnstrecken angenommen. Der Hubraum des Fahrzeugs beträgt 1,4 - 2,0 l, EURO 3. Die Herstellung des Treibstoffes (Diesel) ist einbezogen. Die Herstellung des Fahrzeugs ist nicht in der Bilanz enthalten.

Hintergrundsystem:

Strom: Die Stromerzeugung wird entsprechend der länderspezifischen Randbedingungen modelliert. Die landesspezifische Analyse beinhaltet:
1.: Spezifische Kraftwerke der verschiedenen fossilen Energieträger und der Einsatz erneuerbarer Energien sind entsprechend der länderspezifischen Energieträgermixe modelliert. Die Analyse bezieht Stromimporte aus den Nachbarländern, Transmissions-und Verteilungsverluste und den Eigenverbrauch im Kraftwerk und bei der Verteilung bzw. Speicherung, z. B. durch Pumpspeicherwerke, ein.
2.: Die landes-/regionalspezifischen Technologiestandards sowie die Erzeugung in Elektrizitätskraftwerken und/oder in speziellen Kraftwerken mit Kraft-Wärme-Kopplung (KWK) sind berücksichtigt.
3.: Die länderspezifische Energieträgerbereitstellung (mit Anteil der Importe und/oder Eigenversorgung) einschließlich der Energieträger-Eigenschaften (z. B. Elementar- und Energiegehalte) werden berücksichtigt.
4.: Die Förderung, Produktion, Verarbeitung und Transportprozesse werden entsprechend der Situation im jeweiligen Stromerzeugerland modelliert. Die unterschiedlichen Produktions- und Verarbeitungsverfahren (Emissionen und Wirkungsgrade) in den verschiedenen Energieerzeugerländern werden einbezogen, z. B. Rohöl-Veredelungsverfahren oder Abfackel-Raten an den Ölplattformen.
Thermische Energie, Prozessdampf: Die Erzeugung von Dampf und thermischer Energie in Heizkraftwerken wird entsprechend der landesspezifischen Situation (Emissionsgrenzwerte, Energieträgerbasis) modelliert.
Der Wirkungsgrad für die thermische Energieerzeugung beträgt per Definition 100% des Energieträgereinsatzes. Für Prozessdampf liegt der Wirkungsgrad im Bereich von 85-95%. Die zur Heizenergie-Erzeugung verwendeten Energieträger werden entsprechend der nationalen Situation modelliert (siehe Kapitel Strom oben).
Transporte: Alle relevanten und bekannten Transportprozesse in Form von See- und Binnenschiffsverkehr sowie Bahn-, Lkw- und der Leitungstransport sind enthalten.
Energieträger: Die Energieträger werden entsprechend der spezifischen Versorgungslage modelliert (siehe Kapitel Strom oben).
Raffinerieprodukte: Diesel, Benzin, technische Gase, Heizöl, Schmierstoffe und Rückstände, wie Bitumen, werden mit einem parametrierten länderspezifische Raffineriemodell modelliert. Das Raffinerie-Modell bezieht die länderspezifischen Veredelungsverfahren (z. B. Emissionspegel, interner Energieverbrauch etc.) und das länderspezifische Produktspektrum ein, das sich je nach Land stark unterscheiden kann. Die Rohöl-Förderung wird gemäß der länderspezifischen Situation mit den jeweiligen Energieträger-Eigenschaften modelliert.
"

## Technical purpose
Dieses Produkt kann im Baubereich verwendet werden.

## Safety margin
10 %. Produktsystem weitgehend vollständig abgebildet. Gute technologische, zeitliche und geographische Repräsentativität.

## Reference product
- Fahrzeugkilometer: 1000

## Inputs
- Erneuerbare Primärenergie als Energieträger (PERE) [MJ]: A4 0.13649
- Erneuerbare Primärenergie zur stofflichen Nutzung (PERM) [MJ]: A4 0
- Total erneuerbare Primärenergie (PERT) [MJ]: A4 0.13649
- Nicht-erneuerbare Primärenergie als Energieträger (PENRE) [MJ]: A4 2.34454
- Nicht-erneuerbare Primärenergie zur stofflichen Nutzung (PENRM) [MJ]: A4 0
- Total nicht erneuerbare Primärenergie (PENRT) [MJ]: A4 2.34454
- Einsatz von Sekundärstoffen (SM) [kg]: A4 0
- Erneuerbare Sekundärbrennstoffe (RSF) [MJ]: A4 0
- Nicht erneuerbare Sekundärbrennstoffe (NRSF) [MJ]: A4 0
- Einsatz von Süßwasserressourcen (FW) [m3]: A4 0.000122238

## Outputs
- Gefährlicher Abfall zur Deponie (HWD) [kg]: A4 8.76131e-8
- Entsorgter nicht gefährlicher Abfall (NHWD) [kg]: A4 0.000411508
- Entsorgter radioaktiver Abfall (RWD) [kg]: A4 2.46832e-6
- Komponenten für die Wiederverwendung (CRU) [kg]: A4 0
- Stoffe zum Recycling (MFR) [kg]: A4 0
- Stoffe für die Energierückgewinnung (MER) [kg]: A4 0
- Exportierte elektrische Energie (EEE) [MJ]: A4 0
- Exportierte thermische Energie (EET) [MJ]: A4 0

## Impact indicators
- Globales Erwärmungspotenzial (GWP) [kg CO2 Äquiv.]: A4 0.173176
- Abbaupotenzial der stratosphärischen Ozonschicht (ODP) [kg R11 Äquiv.]: A4 5.77393e-17
- Versauerungspotential (AP) [kg SO2 Äquiv.]: A4 0.000538069
- Eutrophierungspotential (EP) [kg Phosphat Äquiv.]: A4 0.000130809
- Bildungspotenzial für troposphärisches Ozon (POCP) [kg Ethen Äquiv.]: A4 -0.000116719
- Potenzial für den abiotischen Abbau nicht fossiler Ressourcen (ADPE) [kg Sb Äquiv.]: A4 1.4679e-8
- Potenzial für den abiotischen Abbau fossiler Brennstoffe (ADPF) [MJ]: A4 2.33823

## Use advice
Der Datensatz repräsentiert ein Cradle to Gate Inventar. Er kann verwendet werden, um die Lieferkette des jeweiligen Produktes in einer repräsentativen Weise zu charakterisieren. Die Kombination mit einzelnen Einheitenprozessen und diesem Produkt ermöglicht die Erstellung von anwenderspezifischen (Produkt-) LCAs.

## Data sources
- GaBi Database Edition 2020, SP40
- GaBi database (all versions)
