# Gipsfaserplatte (10mm); 10 kg/m2

Dataset: ILCD process, EPD, generic dataset
Geography: DE
Reference year: 2021
Valid until: 2022
Classification: oekobau.dat: Mineralische Baustoffe / Steine und Elemente / Gipsplatten
Owner: Sphera Solutions GmbH
Compliance: EN 15804+A2
Review: Dependent internal review by Sphera Solutions GmbH; Independent external review by GaBi user forum
Amounts: rows without a unit in brackets have none in this file; such an amount is in the reference unit of its flow, which a separate flow dataset defines
copyright: true
licenseType: Free of charge for all users and uses
accessRestrictions: The license conditions as stated on https://www.oekobaudat.de/ apply.
accessRestrictions: Es gelten die Lizenzbedingungen wie sie auf https://www.oekobaudat.de/ genannt sind.

## General comment
Dieser Datensatz wurde nach dem European Standard EN 15804+A2 für Nachhaltiges Bauen modelliert. Ergebnisse werden in Modulen abgebildet, die den strukturierten Ausdruck von Ergebnissen über den gesamten Lebenszyklus zulassen.

## Geography
Der Datensatz bildet die länderspezifische Situation in Deutschland ab. Dabei werden Haupttechnologien, spezifische regionale Charakteristiken und ggf. Importstatistiken berücksichtigt.

## Time period
Jährlicher Durchschnitt

## Technology and included processes
Gips (chemische Bezeichnung Calciumsulfat) ist in verschiedenen Hydrationsstufen erhältlich, wasserhaltig und wasserfrei. Natürlicher Gipsstein ist Calciumsulfat-Dihydrat (CaSO4*2H2O). Das in der Natur vorzufindende wasserfreie Calciumsulfat ist auch als Anhydrit (CaSO4) bekannt. Gips fällt auch in großen Mengen als Nebenprodukt in der Industrie an. Gipsfaserplatten sind mit Fasern armierte Gipsplatten ohne Karton-Beschichtung. Fasern aus Kunststoff, Glas oder Zellulose werden dabei in den Gips eingemischt. Die Gipsfaser-Platten zeichnen sich so durch höhere statische Belastbarkeiten aus und sind auch in Feuchträumen zu verwenden. Die Systemgrenze bildet das fertige Produkt am Werkstor. Transporte vom Werk zur Baustelle sind nicht berücksichtigt und müssen bei Systembetrachtungen eingerechnet werden.

In der Entsorgungsphase wird ein manueller Rückbau (lastenfrei) in Modul C1 angenommen. Der Transport in Modul C2 zur Deponie erfolgt mit einem LKW (50km). In C3 wird, sofern relevant, eine Verpackung mit PE-Folie berücksichtigt (z.B. bei Mineralfaserprodukten, 0,0125 kg Folie je kg entsorgtes Material). In Modul C4 werden dem Produkt entsprechende, durchschnittliche Deponieemissionen (Bezugsraum Deutschland) ausgewiesen. Die Nutzung von Deponiegas wird nicht berücksichtigt.

## Technical purpose
Dieses Produkt kann im Baubereich verwendet werden.

## Safety margin
10 %. Produktsystem weitgehend vollständig abgebildet. Gute technologische, zeitliche und geographische Repräsentativität.

## Reference product
- Gipsfaserplatte (10mm): 1

## Inputs
- Erneuerbare Primärenergie als Energieträger (PERE) [MJ]: A1-A3 20.232, C2 0.0250352, C4 0.298181
- Erneuerbare Primärenergie zur stofflichen Nutzung (PERM) [MJ]: A1-A3 0, C2 0, C4 0
- Total erneuerbare Primärenergie (PERT) [MJ]: A1-A3 20.232, C2 0.0250352, C4 0.298181
- Nicht-erneuerbare Primärenergie als Energieträger (PENRE) [MJ]: A1-A3 51.7626, C2 0.431358, C4 2.20791
- Nicht-erneuerbare Primärenergie zur stofflichen Nutzung (PENRM) [MJ]: A1-A3 0, C2 0, C4 0
- Total nicht-erneuerbare Primärenergie (PENRT) [MJ]: A1-A3 51.7626, C2 0.431358, C4 2.20791
- Einsatz von Sekundärstoffen (SM) [kg]: A1-A3 0.85, C2 0, C4 0
- Erneuerbare Sekundärbrennstoffe (SF) [MJ]: A1-A3 0, C2 0, C4 0
- Nicht erneuerbare Sekundärbrennstoffe (NRSF) [MJ]: A1-A3 0, C2 0, C4 0
- Nettoeinsatz von Süßwasserressourcen (FW) [m3]: A1-A3 0.00785552, C2 2.22501e-5, C4 0.000543855

## Outputs
- Gefährlicher Abfall zur Deponie (HWD) [kg]: A1-A3 1.43764e-8, C2 1.80294e-11, C4 2.34898e-10
- Entsorgter nicht gefährlicher Abfall (NHWD) [kg]: A1-A3 0.365655, C2 6.9631e-5, C4 11.0108
- Entsorgter radioaktiver Abfall (RWD) [kg]: A1-A3 0.000668323, C2 4.13944e-7, C4 2.27928e-5
- Komponenten für die Wiederverwendung (CRU) [kg]: A1-A3 0, C2 0, C4 0
- Stoffe zum Recycling (MFR) [kg]: A1-A3 0, C2 0, C4 0
- Stoffe für die Energierückgewinnung (MER) [kg]: A1-A3 0, C2 0, C4 0
- Exportierte elektrische Energie (EEE) [MJ]: A1-A3 0, C2 0, C4 0
- Exportierte thermische Energie (EET) [MJ]: A1-A3 0, C2 0, C4 0

## Impact indicators
- Globales Erwärmungspotenzial - total (GWP-total) [kg CO2 eq.]: A1-A3 3.20113, C2 0.0328302, C4 0.162553
- Globales Erwärmungspotenzial - fossil (GWP-fossil) [kg CO2 eq.]: A1-A3 3.18386, C2 0.0326065, C4 0.166455
- Globales Erwärmungspotenzial - biogen (GWP-biogenic) [kg CO2 eq.]: A1-A3 0.0153208, C2 1.47059e-5, C4 -0.00439177
- Globales Erwärmungspotenzial - luluc (GWP-luluc) [kg CO2 eq.]: A1-A3 0.00194899, C2 0.000208997, C4 0.000489387
- Abbaupotenzial der stratosphärischen Ozonschicht (ODP) [kg CFC-11 eq.]: A1-A3 2.68023e-14, C2 8.3268e-18, C4 6.53135e-16
- Versauerungspotenzial, kumulierte Überschreitung (AP) [Mole of H+ eq.]: A1-A3 0.00332283, C2 0.000102241, C4 0.00118483
- Eutrophierungspotenzial - Süßwasser (EP-freshwater) [kg P eq.]: A1-A3 3.57303e-6, C2 6.69276e-8, C4 2.80155e-7
- Eutrophierungspotenzial - Salzwasser (EP-marine) [kg N eq.]: A1-A3 0.00118139, C2 4.77293e-5, C4 0.000307591
- Eutrophierungspotenzial - Land (EP-terrestrial) [Mole of N eq.]: A1-A3 0.0129824, C2 0.000532938, C4 0.0033794
- Bildungspotenzial für troposphärisches Ozon (POCP) [kg NMVOC eq.]: A1-A3 0.00324774, C2 9.20431e-5, C4 0.000932028
- Potenzial für die Verknappung abiotischer Ressourcen nicht fossile Ressourcen (ADPE) [kg Sb eq.]: A1-A3 5.0257e-7, C2 2.83075e-9, C4 1.57775e-8
- Potenzial für die Verknappung abiotischer Ressourcen fossile Brennstoffe (ADPF) [MJ]: A1-A3 51.7579, C2 0.43134, C4 2.20674
- Wasser-Entzugspotenzial (Benutzer) (WDP) [m³ world equiv.]: A1-A3 0.232283, C2 0.000126504, C4 0.0178142

## Use advice
Der Datensatz repräsentiert ein Cradle to Gate Inventar. Er kann verwendet werden, um die Lieferkette des jeweiligen Produktes in einer repräsentativen Weise zu charakterisieren. Die Kombination mit einzelnen Einheitenprozessen und diesem Produkt ermöglicht die Erstellung von anwenderspezifischen (Produkt-) LCAs.

## Data sources
- Ökologische Bilanzierung von Baustoffen und Gebäuden, 2000
- Gips-Datenbuch, 1995
- Ganzheitliche Bilanzierung Gips-Baustoffe , 2001
- Documentation of data quality management
- GaBi Database Edition 2021, CUP2021.01
- GaBi database (all versions)
