# KXT Combar

Dataset: ILCD process, EPD, specific dataset
Geography: DE
Reference year: 2017
Valid until: 2022
Classification: OEKOBAU.DAT: Dämmstoffe / Dämmelemente / Isokörbe
Classification: IBUCategories: 02 Bauprodukte / Wärmedämmungsprodukte / Tragende Wärmedämmelemente
Method details: Tragende Wärmedämmelemente.pdf
Owner: Schöck Bauteile GmbH
Compliance: DIN EN 15804; ISO 14025
Review: Accredited third party review by IBU
Amounts: rows without a unit in brackets have none in this file; such an amount is in the reference unit of its flow, which a separate flow dataset defines
copyright: true

## General comment
Der Schöck Isokorb® Typ KXT15-Combar-CV26-V6-H200-REI120 ist ein tragendes Wärmedämmelement zur thermischen Trennung auskragender Stahlbetonbauteile von der Deckenkonstruktion. Er besteht aus einer 120mm dicken Wärmedämmschicht aus Polystyrol-Hartschaum (Neopor®) sowie aus einem statisch wirksamen Fachwerksystem aus Zugstäben aus glasfaserverstärktem Kunststoff (Combar), geschweißten Stahlstäben (Querkraftstäbe) und einem System von Drucklagern aus ultrahochfestem Beton (HTE Compact Drucklager). Die Kräfte werden durch Verbundspannungen und Flächenpressung an die jeweiligen angrenzenden Bauteile übertragen.

Der Schöck Isokorb® Typ KXT ist in unterschiedlichen Tragstufen erhältlich. Die Tragstufen richten sich nach der erforderlichen Beanspruchung. Je nach Tragstufe variiert die Anzahl der Zugstäbe, Querkraftstäbe und HTE Compact Drucklager. Die genaue Bestückung des Schöck Isokorb® Typ KXT15-Combar-CV26-V6-H200-REI120 ist in der Tabelle unter Abschnitt 2.3 aufgeführt.

Das deklarierte Produkt wird in einer Brandschutzausführung mit werkseitig an der Ober- und Unterseite angebrachten Brandschutzplatten ausgeliefert und weist eine Feuerwiderstandsdauer von 120 Minuten (REI120) auf.

Die EPD Ergebnisse für die Herstellung von Schöck Isokorb® Typ KXT15-Combar-CV26-V6-H200-REI120 sind auf alle Isokorb® Typen weiterer Tragstufen anwendbar: Die Produkte der Tragstufen (KXT15-Combar bis KXT95-Combar) haben identische Komponenten, die aufgrund ihrer Bestückung variieren (Anzahl Stäbe und Drucklager). Der Herstellungsprozess der Produkte der Tragstufen (KXT15-Combar bis KXT95-Combar) ist der gleiche.

## Technology and included processes
Verarbeitung Vormaterial: Die Stäbe aus glasfaserverstärktem Kunststoff (Combar) werden bei der Firma Fiberline in Dänemark produziert und von dort in das Werk Landsberg (Halle) transportiert, wo sie auf Maß zugeschnitten und als Vormaterial in das Werk Baden-Baden transportiert werden.Das Ausgangsmaterial für die geschweißten Betonstahl-Edelstahlverbindungen im Schöck Isokorb® wird als „Metalldraht“ auf Spulen (Coils) aufgewickelt, angeliefert und in speziellen Anlagen abgehaspelt, gerichtet und auf die benötigte Länge geschnitten oder direkt vom Coil mittels anerkannten und zertifizierten Schweißverfahren auf speziellen Schweißautomaten in der eigenen Produktion in Baden-Baden hergestellt. Die Querkraftstäbe werden auf eigenen Biegemaschinen gebogen und mit einem Halteclip versehen. Das HTE-Compact Drucklager aus Hochleistungs- feinbeton wird im Werk in Landsberg entsprechend den beim Deutschen Institut für Bautechnik hinterlegten Rezepturen in vorgefertigten Schalen aus Kunststoff gegossen, die als verlorene Schalung dienen. Endmontage: Die für die Endmontage der Schöck Isokorb® Typen benötigten Materialien werden sowohl eigengefertigt als auch von ausgewählten Lieferanten bezogen. Die Montage der Schöck Isokorb® Typen erfolgt auf speziellen, typenbezogenen Fertigungslinien, die durch konkrete Kundenbestellungen ausgelöst werden. Bei der Endmontage im Werk Baden-Baden werden die benötigten Komponenten (Querkraftstab, Drucklager, Schaumteile und Brandschutzplatten) nach der gültigen Fertigungszeichnung und den entsprechenden Qualitätsvorschriften mittels mechanischer Verbindungstechnik sowie eines speziellen Schmelzklebers miteinander verbunden.
Deklarierte Einheit:
Die Deklaration bezieht sich auf 1 m (Laufmeter) spezifisches tragendes Wärmedämmelement der Firma Schöck Bauteile GmbH – Schöck Isokorb® Typ KXT15-CV26-V6-H200-REI120.

## Technical purpose
Der Schöck Isokorb® Typ KXT-Combar dient zur statischen Übertragung von Biegemomenten und Querkräften und wird bei auskragenden Stahlbetonkonstruktionen wie z.B. Balkonen eingesetzt. Er wird linear in der Wärmedämmebene (z.B. Außendämmung mit Wärmedämmverbundsystem - WDVS) so angeordnet, dass der Wärmestrom lokal zwischen Innen- und Außenbereich minimiert wird und Wärmebrücken reduziert werden.

Durch seine wärmetechnisch und statisch optimierte Konstruktion gewährleistet der Isokorb® eine effektive Wärmedämmleistung, die anhand der äquivalenten Wärmeleitfähigkeit (λeq) ausgewiesen wird.

## Reference product
- 1 m Schöck Isokorb® Typ KXT15 Combar-CV26-V6-h200-REI120: 1

## Inputs
- Erneuerbare Primärenergie als Energieträger (PERE) [MJ]: A1-A3 32.2
- Erneuerbare Primärenergie zur stofflichen Nutzung (PERM) [MJ]: A1-A3 31.6
- Total erneuerbare Primärenergie (PERT) [MJ]: A1-A3 63.8, C4 0.148, D 0.0691
- Nicht-erneuerbare Primärenergie als Energieträger (PENRE) [MJ]: A1-A3 166
- Nicht-erneuerbare Primärenergie zur stofflichen Nutzung (PENRM) [MJ]: A1-A3 28.6
- Total nicht erneuerbare Primärenergie (PENRT) [MJ]: A1-A3 195, C4 1.3, D -1.26
- Einsatz von Sekundärstoffen (SM) [kg]: A1-A3 2.373, C4 0, D 0
- Erneuerbare Sekundärbrennstoffe (RSF) [MJ]: A1-A3 0, C4 0, D 0
- Nicht erneuerbare Sekundärbrennstoffe (NRSF) [MJ]: A1-A3 0, C4 0, D 0
- Einsatz von Süßwasserressourcen (FW) [m^3]

## Outputs
- Gefährlicher Abfall zur Deponie (HWD) [kg]
- Entsorgter nicht gefährlicher Abfall (NHWD) [kg]
- Entsorgter radioaktiver Abfall (RWD) [kg]
- Komponenten für die Wiederverwendung (CRU) [kg]: A1-A3 0, C4 0, D 0
- Stoffe zum Recycling (MFR) [kg]: A1-A3 0.124, C4 0.884, D 0
- Stoffe für die Energierückgewinnung (MER) [kg]: A1-A3 0.029, C4 0, D 0
- Exportierte elektrische Energie (EEE) [MJ]: A1-A3 0, C4 0, D 0
- Exportierte thermische Energie (EET) [MJ]: A1-A3 0, C4 0, D 0

## Impact indicators
- Globales Erwärmungspotenzial (GWP) [kg CO_(2)-Äq.]: A1-A3 10.5, C4 0.0968, D -0.141
- Abbau Potential der stratosphärischen Ozonschicht (ODP) [kg CFC11-Äq.]: A1-A3 1.42e-7, C4 9.52e-13, D 6.29e-13
- Versauerungspotenzial von Boden und Wasser (AP) [kg SO_(2)-Äq.]: A1-A3 0.0445, C4 0.00058, D -0.00054
- Eutrophierungspotenzial (EP) [kg PO_(4)^(3)-Äq.]: A1-A3 0.00364, C4 7.89e-5, D -4.26e-5
- Bildungspotential für troposphärisches Ozon (POCP) [kg Ethen-Äq.]: A1-A3 0.00383, C4 5.57e-5, D -7.9e-5
- Potenzial für den abiotischen Abbau nicht fossiler Ressourcen (ADPE) [kg Sb-Äq.]: A1-A3 0.000178, C4 3.35e-8, D 1.16e-8
- Potenzial für den abiotischen Abbau fossiler Brennstoffe (ADPF) [MJ]: A1-A3 174, C4 1.26, D -1.32

## Use advice
Gültigkeitsbereich:
Die EPD bezieht sich auf ein spezifisches tragendes Wärmedämmelement der Firma Schöck Bauteile GmbH – Schöck Isokorb® Typ KXT15-Combar-CV26-V6-H200-REI120. Die Zusammenstellung der für das Schöck Isokorb® Typ KXT erforderlichen Drucklager erfolgt im Schöck Werk in Landsberg (in der Nähe von Halle). Die Endmontage aller benötigen Komponenten findet im Schöck Werk im Baden-Baden statt.

Die EPD Ergebnisse für die Herstellung des Schöck Isokorb® Typ KXT15-Combar-CV26-V6-H200-REI120 sind auf alle weiteren Tragstufen dieses Isokorb® Typen (Combar 25 bis Combar 95) anwendbar unter Verwendung der in Kapitel 6 angegebenen Faktoren.
Systemgrenze:
Typ der EPD: Wiege bis Werkstor – mit Optionen. Die Umweltproduktdeklaration bezieht sich auf das Produktionsstadium (A1-A3), das Entsorgungsstadium (C4) und die Verwertung, welche im Modul Gutschriften außerhalb der Systemgrenze aus Recyclingpotenzial (D) deklariert werden. Den Aufwand für die Deponierung der nicht recycelbaren Materialien wird in Modul C4 beschrieben.

## Data sources
- KXT Combar.pdf
- GaBi Database (all versions)
- GaBi database SP29 2016
